New Line.l(r:p1rdt9lv-p1rlv10) Units=km Length=0.0280236 bus1=p1rdt9lv.1.2 bus2=p1rlv10.1.2 switch=n enabled=y phases=2 Linecode=1P_OH_AL_4/0_Zuzara_0_416_0_2_2_2_2_2_2_2_2_2_2_2_2_2_2_2_2_2_2_2_2_2_2_2_2_2_2_2_2_2

New Line.l(r:p1rdt13lv-p1rlv14) Units=km Length=0.022611900000000004 bus1=p1rdt13lv.1.2 bus2=p1rlv14.1.2 switch=n enabled=y phases=2 Linecode=1P_OH_AL_2/0_Rucina_0_416_0_2_2_2_2_2_2_2_2_2_2_2_2_2_2_2_2_2_2_2_2_2_2_2_2_2_2_2_2_2

New Line.l(r:p1rdm309-p1rlv131) Units=km Length=0.0268339 bus1=p1rdm309.1.2 bus2=p1rlv131.1.2 switch=n enabled=y phases=2 Linecode=1P_OH_AL_2/0_Rucina_0_416_0_2_2_2_2_2_2_2_2_2_2_2_2_2_2_2_2_2_2_2_2_2_2_2_2_2_2_2_2_2

New Line.l(r:p1rdm309-p1rdt127lv) Units=km Length=0.0158156 bus1=p1rdt127lv.1.2 bus2=p1rdm309.1.2 switch=n enabled=y phases=2 Linecode=1P_OH_AL_2/0_Rucina_0_416_0_2_2_2_2_2_2_2_2_2_2_2_2_2_2_2_2_2_2_2_2_2_2_2_2_2_2_2_2_2

New Line.l(r:p1rdm310-p1rlv2439) Units=km Length=0.0160814 bus1=p1rdm310.1.2 bus2=p1rlv2439.1.2 switch=n enabled=y phases=2 Linecode=1P_OH_AL_2/0_Rucina_0_416_0_2_2_2_2_2_2_2_2_2_2_2_2_2_2_2_2_2_2_2_2_2_2_2_2_2_2_2_2_2

New Line.l(r:p1rdm310-p1rdt127lv) Units=km Length=0.0182538 bus1=p1rdt127lv.1.2 bus2=p1rdm310.1.2 switch=n enabled=y phases=2 Linecode=1P_OH_AL_2/0_Rucina_0_416_0_2_2_2_2_2_2_2_2_2_2_2_2_2_2_2_2_2_2_2_2_2_2_2_2_2_2_2_2_2

New Line.l(r:p1rdt265lv-p1rlv272) Units=km Length=0.0733858 bus1=p1rdt265lv.1.2 bus2=p1rlv272.1.2 switch=n enabled=y phases=2 Linecode=1P_OH_AL_4/0_Zuzara_0_416_0_2_2_2_2_2_2_2_2_2_2_2_2_2_2_2_2_2_2_2_2_2_2_2_2_2_2_2_2_2

New Line.l(r:p1rdt266lv-p1rlv273) Units=km Length=0.0493489 bus1=p1rdt266lv.1.2 bus2=p1rlv273.1.2 switch=n enabled=y phases=2 Linecode=1P_OH_AL_4/0_Zuzara_0_416_0_2_2_2_2_2_2_2_2_2_2_2_2_2_2_2_2_2_2_2_2_2_2_2_2_2_2_2_2_2

New Line.l(r:p1rdt267lv-p1rlv274) Units=km Length=0.0173684 bus1=p1rdt267lv.1.2 bus2=p1rlv274.1.2 switch=n enabled=y phases=2 Linecode=1P_OH_AL_2/0_Rucina_0_416_0_2_2_2_2_2_2_2_2_2_2_2_2_2_2_2_2_2_2_2_2_2_2_2_2_2_2_2_2_2

New Line.l(r:p1rdt267lv-p1rlv11390) Units=km Length=0.0173684 bus1=p1rdt267lv.1.2 bus2=p1rlv11390.1.2 switch=n enabled=y phases=2 Linecode=1P_OH_AL_2/0_Rucina_0_416_0_2_2_2_2_2_2_2_2_2_2_2_2_2_2_2_2_2_2_2_2_2_2_2_2_2_2_2_2_2

New Line.l(r:p1rdt268lv-p1rlv275) Units=km Length=0.0037701100000000006 bus1=p1rdt268lv.1.2 bus2=p1rlv275.1.2 switch=n enabled=y phases=2 Linecode=1P_OH_AL_4_Periwinkle_0_416_0_2_2_2_2_2_2_2_2_2_2_2_2_2_2_2_2_2_2_2_2_2_2_2_2_2_2_2_2_2

New Line.l(r:p1rdm635-p1rlv7072) Units=km Length=0.0174129 bus1=p1rdm635.1.2 bus2=p1rlv7072.1.2 switch=n enabled=y phases=2 Linecode=1P_OH_AL_2/0_Rucina_0_416_0_2_2_2_2_2_2_2_2_2_2_2_2_2_2_2_2_2_2_2_2_2_2_2_2_2_2_2_2_2

New Line.l(r:p1rdm635-p1rdt268lv) Units=km Length=0.025946 bus1=p1rdt268lv.1.2 bus2=p1rdm635.1.2 switch=n enabled=y phases=2 Linecode=1P_OH_AL_2/0_Rucina_0_416_0_2_2_2_2_2_2_2_2_2_2_2_2_2_2_2_2_2_2_2_2_2_2_2_2_2_2_2_2_2

New Line.l(r:p1rdt269lv-p1rlv276) Units=km Length=0.0304616 bus1=p1rdt269lv.1.2 bus2=p1rlv276.1.2 switch=n enabled=y phases=2 Linecode=1P_OH_AL_4/0_Zuzara_0_416_0_2_2_2_2_2_2_2_2_2_2_2_2_2_2_2_2_2_2_2_2_2_2_2_2_2_2_2_2_2

New Line.l(r:p1rdt272lv-p1rlv280) Units=km Length=0.021210100000000003 bus1=p1rdt272lv.1.2 bus2=p1rlv280.1.2 switch=n enabled=y phases=2 Linecode=1P_OH_AL_2/0_Rucina_0_416_0_2_2_2_2_2_2_2_2_2_2_2_2_2_2_2_2_2_2_2_2_2_2_2_2_2_2_2_2_2

New Line.l(r:p1rdt272lv-p1rlv4454) Units=km Length=0.025183 bus1=p1rdt272lv.1.2 bus2=p1rlv4454.1.2 switch=n enabled=y phases=2 Linecode=1P_OH_AL_2/0_Rucina_0_416_0_2_2_2_2_2_2_2_2_2_2_2_2_2_2_2_2_2_2_2_2_2_2_2_2_2_2_2_2_2

New Line.l(r:p1rdt272lv-p1rlv7219) Units=km Length=0.00526833 bus1=p1rdt272lv.1.2 bus2=p1rlv7219.1.2 switch=n enabled=y phases=2 Linecode=1P_OH_AL_2/0_Rucina_0_416_0_2_2_2_2_2_2_2_2_2_2_2_2_2_2_2_2_2_2_2_2_2_2_2_2_2_2_2_2_2

New Line.l(r:p1rdt273lv-p1rlv6311) Units=km Length=0.0244037 bus1=p1rdt273lv.1.2 bus2=p1rlv6311.1.2 switch=n enabled=y phases=2 Linecode=1P_OH_AL_2/0_Rucina_0_416_0_2_2_2_2_2_2_2_2_2_2_2_2_2_2_2_2_2_2_2_2_2_2_2_2_2_2_2_2_2

New Line.l(r:p1rdt273lv-p1rlv8956) Units=km Length=0.0454704 bus1=p1rdt273lv.1.2 bus2=p1rlv8956.1.2 switch=n enabled=y phases=2 Linecode=1P_OH_AL_4/0_Zuzara_0_416_0_2_2_2_2_2_2_2_2_2_2_2_2_2_2_2_2_2_2_2_2_2_2_2_2_2_2_2_2_2

New Line.l(r:p1rdm643-p1rlv281) Units=km Length=0.0046619 bus1=p1rdm643.1.2 bus2=p1rlv281.1.2 switch=n enabled=y phases=2 Linecode=1P_OH_AL_2/0_Rucina_0_416_0_2_2_2_2_2_2_2_2_2_2_2_2_2_2_2_2_2_2_2_2_2_2_2_2_2_2_2_2_2

New Line.l(r:p1rdm643-p1rdt273lv) Units=km Length=0.0831595 bus1=p1rdt273lv.1.2 bus2=p1rdm643.1.2 switch=n enabled=y phases=2 Linecode=1P_OH_AL_4/0_Zuzara_0_416_0_2_2_2_2_2_2_2_2_2_2_2_2_2_2_2_2_2_2_2_2_2_2_2_2_2_2_2_2_2

New Line.l(r:p1rdt274lv-p1rlv282) Units=km Length=0.001 bus1=p1rdt274lv.1.2 bus2=p1rlv282.1.2 switch=n enabled=y phases=2 Linecode=1P_OH_AL_4_Periwinkle_0_416_0_2_2_2_2_2_2_2_2_2_2_2_2_2_2_2_2_2_2_2_2_2_2_2_2_2_2_2_2_2

New Line.l(r:p1rdt392lv-p1rlv401) Units=km Length=0.0566212 bus1=p1rdt392lv.1.2 bus2=p1rlv401.1.2 switch=n enabled=y phases=2 Linecode=1P_OH_AL_4/0_Zuzara_0_416_0_2_2_2_2_2_2_2_2_2_2_2_2_2_2_2_2_2_2_2_2_2_2_2_2_2_2_2_2_2

New Line.l(r:p1rdt519lv-p1rlv532) Units=km Length=0.001 bus1=p1rdt519lv.1.2 bus2=p1rlv532.1.2 switch=n enabled=y phases=2 Linecode=1P_OH_AL_4_Periwinkle_0_416_0_2_2_2_2_2_2_2_2_2_2_2_2_2_2_2_2_2_2_2_2_2_2_2_2_2_2_2_2_2

New Line.l(r:p1rdt520lv-p1rlv533) Units=km Length=0.001 bus1=p1rdt520lv.1.2 bus2=p1rlv533.1.2 switch=n enabled=y phases=2 Linecode=1P_OH_AL_4_Periwinkle_0_416_0_2_2_2_2_2_2_2_2_2_2_2_2_2_2_2_2_2_2_2_2_2_2_2_2_2_2_2_2_2

New Line.l(r:p1rdm1497-p1rlv669) Units=km Length=0.0361058 bus1=p1rdm1497.1.2 bus2=p1rlv669.1.2 switch=n enabled=y phases=2 Linecode=1P_OH_AL_4/0_Zuzara_0_416_0_2_2_2_2_2_2_2_2_2_2_2_2_2_2_2_2_2_2_2_2_2_2_2_2_2_2_2_2_2

New Line.l(r:p1rdm1497-p1rdt647lv) Units=km Length=0.0275698 bus1=p1rdt647lv.1.2 bus2=p1rdm1497.1.2 switch=n enabled=y phases=2 Linecode=1P_OH_AL_4/0_Zuzara_0_416_0_2_2_2_2_2_2_2_2_2_2_2_2_2_2_2_2_2_2_2_2_2_2_2_2_2_2_2_2_2

New Line.l(r:p1rdm1498-p1rlv13781) Units=km Length=0.0438803 bus1=p1rdm1498.1.2 bus2=p1rlv13781.1.2 switch=n enabled=y phases=2 Linecode=1P_OH_AL_4/0_Zuzara_0_416_0_2_2_2_2_2_2_2_2_2_2_2_2_2_2_2_2_2_2_2_2_2_2_2_2_2_2_2_2_2

New Line.l(r:p1rdm1498-p1rdt647lv) Units=km Length=0.0173296 bus1=p1rdt647lv.1.2 bus2=p1rdm1498.1.2 switch=n enabled=y phases=2 Linecode=1P_OH_AL_2/0_Rucina_0_416_0_2_2_2_2_2_2_2_2_2_2_2_2_2_2_2_2_2_2_2_2_2_2_2_2_2_2_2_2_2

New Line.l(r:p1rdt796lv-p1rlv831) Units=km Length=0.00301902 bus1=p1rdt796lv.1.2 bus2=p1rlv831.1.2 switch=n enabled=y phases=2 Linecode=1P_OH_AL_4_Periwinkle_0_416_0_2_2_2_2_2_2_2_2_2_2_2_2_2_2_2_2_2_2_2_2_2_2_2_2_2_2_2_2_2

New Line.l(r:p1rdm1813-p1rlv2436) Units=km Length=0.0189862 bus1=p1rdm1813.1.2 bus2=p1rlv2436.1.2 switch=n enabled=y phases=2 Linecode=1P_OH_AL_2/0_Rucina_0_416_0_2_2_2_2_2_2_2_2_2_2_2_2_2_2_2_2_2_2_2_2_2_2_2_2_2_2_2_2_2

New Line.l(r:p1rdm1813-p1rdt796lv) Units=km Length=0.0121178 bus1=p1rdt796lv.1.2 bus2=p1rdm1813.1.2 switch=n enabled=y phases=2 Linecode=1P_OH_AL_2/0_Rucina_0_416_0_2_2_2_2_2_2_2_2_2_2_2_2_2_2_2_2_2_2_2_2_2_2_2_2_2_2_2_2_2

New Line.l(r:p1rdt798lv-p1rlv833) Units=km Length=0.011111300000000001 bus1=p1rdt798lv.1.2 bus2=p1rlv833.1.2 switch=n enabled=y phases=2 Linecode=1P_OH_AL_2/0_Rucina_0_416_0_2_2_2_2_2_2_2_2_2_2_2_2_2_2_2_2_2_2_2_2_2_2_2_2_2_2_2_2_2

New Line.l(r:p1rdt800lv-p1rlv835) Units=km Length=0.0989751 bus1=p1rdt800lv.1.2 bus2=p1rlv835.1.2 switch=n enabled=y phases=2 Linecode=1P_OH_AL_4/0_Zuzara_0_416_0_2_2_2_2_2_2_2_2_2_2_2_2_2_2_2_2_2_2_2_2_2_2_2_2_2_2_2_2_2

New Line.l(r:p1rdt914lv-p1rlv960) Units=km Length=0.00955607 bus1=p1rdt914lv.1.2 bus2=p1rlv960.1.2 switch=n enabled=y phases=2 Linecode=1P_OH_AL_2/0_Rucina_0_416_0_2_2_2_2_2_2_2_2_2_2_2_2_2_2_2_2_2_2_2_2_2_2_2_2_2_2_2_2_2

New Line.l(r:p1rdt914lv-p1rlv6818) Units=km Length=0.0555584 bus1=p1rdt914lv.1.2 bus2=p1rlv6818.1.2 switch=n enabled=y phases=2 Linecode=1P_OH_AL_4/0_Zuzara_0_416_0_2_2_2_2_2_2_2_2_2_2_2_2_2_2_2_2_2_2_2_2_2_2_2_2_2_2_2_2_2

New Line.l(r:p1rdt914lv-p1rlv9607) Units=km Length=0.0737915 bus1=p1rdt914lv.1.2 bus2=p1rlv9607.1.2 switch=n enabled=y phases=2 Linecode=1P_OH_AL_4/0_Zuzara_0_416_0_2_2_2_2_2_2_2_2_2_2_2_2_2_2_2_2_2_2_2_2_2_2_2_2_2_2_2_2_2

New Line.l(r:p1rdt916lv-p1rlv962) Units=km Length=0.00746294 bus1=p1rdt916lv.1.2 bus2=p1rlv962.1.2 switch=n enabled=y phases=2 Linecode=1P_OH_AL_2/0_Rucina_0_416_0_2_2_2_2_2_2_2_2_2_2_2_2_2_2_2_2_2_2_2_2_2_2_2_2_2_2_2_2_2

New Line.l(r:p1rdm2081-p1rlv4154) Units=km Length=0.0103372 bus1=p1rdm2081.1.2 bus2=p1rlv4154.1.2 switch=n enabled=y phases=2 Linecode=1P_OH_AL_2/0_Rucina_0_416_0_2_2_2_2_2_2_2_2_2_2_2_2_2_2_2_2_2_2_2_2_2_2_2_2_2_2_2_2_2

New Line.l(r:p1rdm2081-p1rlv13782) Units=km Length=0.00766187 bus1=p1rdm2081.1.2 bus2=p1rlv13782.1.2 switch=n enabled=y phases=2 Linecode=1P_OH_AL_2/0_Rucina_0_416_0_2_2_2_2_2_2_2_2_2_2_2_2_2_2_2_2_2_2_2_2_2_2_2_2_2_2_2_2_2

New Line.l(r:p1rdm2081-p1rdt916lv) Units=km Length=0.0129755 bus1=p1rdt916lv.1.2 bus2=p1rdm2081.1.2 switch=n enabled=y phases=2 Linecode=1P_OH_AL_2/0_Rucina_0_416_0_2_2_2_2_2_2_2_2_2_2_2_2_2_2_2_2_2_2_2_2_2_2_2_2_2_2_2_2_2

New Line.l(r:p1rdm2082-p1rlv10697) Units=km Length=0.00697381 bus1=p1rdm2082.1.2 bus2=p1rlv10697.1.2 switch=n enabled=y phases=2 Linecode=1P_OH_AL_2/0_Rucina_0_416_0_2_2_2_2_2_2_2_2_2_2_2_2_2_2_2_2_2_2_2_2_2_2_2_2_2_2_2_2_2

New Line.l(r:p1rdm2082-p1rdt916lv) Units=km Length=0.0564491 bus1=p1rdt916lv.1.2 bus2=p1rdm2082.1.2 switch=n enabled=y phases=2 Linecode=1P_OH_AL_4/0_Zuzara_0_416_0_2_2_2_2_2_2_2_2_2_2_2_2_2_2_2_2_2_2_2_2_2_2_2_2_2_2_2_2_2

New Line.l(r:p1rdt920lv-p1rlv966) Units=km Length=0.0583546 bus1=p1rdt920lv.1.2 bus2=p1rlv966.1.2 switch=n enabled=y phases=2 Linecode=1P_OH_AL_4/0_Zuzara_0_416_0_2_2_2_2_2_2_2_2_2_2_2_2_2_2_2_2_2_2_2_2_2_2_2_2_2_2_2_2_2

New Line.l(r:p1rdt1027lv-p1rlv1085) Units=km Length=0.0676462 bus1=p1rdt1027lv.1.2 bus2=p1rlv1085.1.2 switch=n enabled=y phases=2 Linecode=1P_OH_AL_4/0_Zuzara_0_416_0_2_2_2_2_2_2_2_2_2_2_2_2_2_2_2_2_2_2_2_2_2_2_2_2_2_2_2_2_2

New Line.l(r:p1rdt1028lv-p1rlv1086) Units=km Length=0.016899 bus1=p1rdt1028lv.1.2 bus2=p1rlv1086.1.2 switch=n enabled=y phases=2 Linecode=1P_OH_AL_2/0_Rucina_0_416_0_2_2_2_2_2_2_2_2_2_2_2_2_2_2_2_2_2_2_2_2_2_2_2_2_2_2_2_2_2

New Line.l(r:p1rdt1028lv-p1rlv7211) Units=km Length=0.0420968 bus1=p1rdt1028lv.1.2 bus2=p1rlv7211.1.2 switch=n enabled=y phases=2 Linecode=1P_OH_AL_4/0_Zuzara_0_416_0_2_2_2_2_2_2_2_2_2_2_2_2_2_2_2_2_2_2_2_2_2_2_2_2_2_2_2_2_2

New Line.l(r:p1rdm2814-p1rlv1347) Units=km Length=0.0127725 bus1=p1rdm2814.1.2 bus2=p1rlv1347.1.2 switch=n enabled=y phases=2 Linecode=1P_OH_AL_2/0_Rucina_0_416_0_2_2_2_2_2_2_2_2_2_2_2_2_2_2_2_2_2_2_2_2_2_2_2_2_2_2_2_2_2

New Line.l(r:p1rdm2814-p1rlv9207) Units=km Length=0.0388264 bus1=p1rdm2814.1.2 bus2=p1rlv9207.1.2 switch=n enabled=y phases=2 Linecode=1P_OH_AL_4/0_Zuzara_0_416_0_2_2_2_2_2_2_2_2_2_2_2_2_2_2_2_2_2_2_2_2_2_2_2_2_2_2_2_2_2

New Line.l(r:p1rdm2814-p1rdt1266lv) Units=km Length=0.0154503 bus1=p1rdt1266lv.1.2 bus2=p1rdm2814.1.2 switch=n enabled=y phases=2 Linecode=1P_OH_AL_2/0_Rucina_0_416_0_2_2_2_2_2_2_2_2_2_2_2_2_2_2_2_2_2_2_2_2_2_2_2_2_2_2_2_2_2

New Line.l(r:p1rdm2815-p1rlv8542) Units=km Length=0.0392664 bus1=p1rdm2815.1.2 bus2=p1rlv8542.1.2 switch=n enabled=y phases=2 Linecode=1P_OH_AL_4/0_Zuzara_0_416_0_2_2_2_2_2_2_2_2_2_2_2_2_2_2_2_2_2_2_2_2_2_2_2_2_2_2_2_2_2

New Line.l(r:p1rdm2815-p1rdt1266lv) Units=km Length=0.0148121 bus1=p1rdt1266lv.1.2 bus2=p1rdm2815.1.2 switch=n enabled=y phases=2 Linecode=1P_OH_AL_2/0_Rucina_0_416_0_2_2_2_2_2_2_2_2_2_2_2_2_2_2_2_2_2_2_2_2_2_2_2_2_2_2_2_2_2

New Line.l(r:p1rdt1269lv-p1rlv1350) Units=km Length=0.001 bus1=p1rdt1269lv.1.2 bus2=p1rlv1350.1.2 switch=n enabled=y phases=2 Linecode=1P_OH_AL_4_Periwinkle_0_416_0_2_2_2_2_2_2_2_2_2_2_2_2_2_2_2_2_2_2_2_2_2_2_2_2_2_2_2_2_2

New Line.l(r:p1rdt1394lv-p1rlv1496) Units=km Length=0.00902386 bus1=p1rdt1394lv.1.2 bus2=p1rlv1496.1.2 switch=n enabled=y phases=2 Linecode=1P_OH_AL_2/0_Rucina_0_416_0_2_2_2_2_2_2_2_2_2_2_2_2_2_2_2_2_2_2_2_2_2_2_2_2_2_2_2_2_2

New Line.l(r:p1rdt1394lv-p1rlv5396) Units=km Length=0.0545116 bus1=p1rdt1394lv.1.2 bus2=p1rlv5396.1.2 switch=n enabled=y phases=2 Linecode=1P_OH_AL_4/0_Zuzara_0_416_0_2_2_2_2_2_2_2_2_2_2_2_2_2_2_2_2_2_2_2_2_2_2_2_2_2_2_2_2_2

New Line.l(r:p1rdt1395lv-p1rlv1497) Units=km Length=0.001 bus1=p1rdt1395lv.1.2 bus2=p1rlv1497.1.2 switch=n enabled=y phases=2 Linecode=1P_OH_AL_4_Periwinkle_0_416_0_2_2_2_2_2_2_2_2_2_2_2_2_2_2_2_2_2_2_2_2_2_2_2_2_2_2_2_2_2

New Line.l(r:p1rdt1604lv-p1rlv1743) Units=km Length=0.062756 bus1=p1rdt1604lv.1.2 bus2=p1rlv1743.1.2 switch=n enabled=y phases=2 Linecode=1P_OH_AL_4/0_Zuzara_0_416_0_2_2_2_2_2_2_2_2_2_2_2_2_2_2_2_2_2_2_2_2_2_2_2_2_2_2_2_2_2

New Line.l(r:p1rdt1605lv-p1rlv1744) Units=km Length=0.018259 bus1=p1rdt1605lv.1.2 bus2=p1rlv1744.1.2 switch=n enabled=y phases=2 Linecode=1P_OH_AL_2/0_Rucina_0_416_0_2_2_2_2_2_2_2_2_2_2_2_2_2_2_2_2_2_2_2_2_2_2_2_2_2_2_2_2_2

New Line.l(r:p1rdt1605lv-p1rlv7346) Units=km Length=0.018259 bus1=p1rdt1605lv.1.2 bus2=p1rlv7346.1.2 switch=n enabled=y phases=2 Linecode=1P_OH_AL_2/0_Rucina_0_416_0_2_2_2_2_2_2_2_2_2_2_2_2_2_2_2_2_2_2_2_2_2_2_2_2_2_2_2_2_2

New Line.l(r:p1rdt1606lv-p1rlv1745) Units=km Length=0.0159518 bus1=p1rdt1606lv.1.2 bus2=p1rlv1745.1.2 switch=n enabled=y phases=2 Linecode=1P_OH_AL_2/0_Rucina_0_416_0_2_2_2_2_2_2_2_2_2_2_2_2_2_2_2_2_2_2_2_2_2_2_2_2_2_2_2_2_2

New Line.l(r:p1rdt1606lv-p1rlv11389) Units=km Length=0.0159518 bus1=p1rdt1606lv.1.2 bus2=p1rlv11389.1.2 switch=n enabled=y phases=2 Linecode=1P_OH_AL_2/0_Rucina_0_416_0_2_2_2_2_2_2_2_2_2_2_2_2_2_2_2_2_2_2_2_2_2_2_2_2_2_2_2_2_2

New Line.l(r:p1rdm3535-p1rlv1746) Units=km Length=0.0055122 bus1=p1rdm3535.1.2 bus2=p1rlv1746.1.2 switch=n enabled=y phases=2 Linecode=1P_OH_AL_2/0_Rucina_0_416_0_2_2_2_2_2_2_2_2_2_2_2_2_2_2_2_2_2_2_2_2_2_2_2_2_2_2_2_2_2

New Line.l(r:p1rdm3535-p1rlv3635) Units=km Length=0.0287061 bus1=p1rdm3535.1.2 bus2=p1rlv3635.1.2 switch=n enabled=y phases=2 Linecode=1P_OH_AL_4/0_Zuzara_0_416_0_2_2_2_2_2_2_2_2_2_2_2_2_2_2_2_2_2_2_2_2_2_2_2_2_2_2_2_2_2

New Line.l(r:p1rdm3535-p1rlv10699) Units=km Length=0.0443956 bus1=p1rdm3535.1.2 bus2=p1rlv10699.1.2 switch=n enabled=y phases=2 Linecode=1P_OH_AL_4/0_Zuzara_0_416_0_2_2_2_2_2_2_2_2_2_2_2_2_2_2_2_2_2_2_2_2_2_2_2_2_2_2_2_2_2

New Line.l(r:p1rdm3535-p1rdt1607lv) Units=km Length=0.011788600000000002 bus1=p1rdt1607lv.1.2 bus2=p1rdm3535.1.2 switch=n enabled=y phases=2 Linecode=1P_OH_AL_2/0_Rucina_0_416_0_2_2_2_2_2_2_2_2_2_2_2_2_2_2_2_2_2_2_2_2_2_2_2_2_2_2_2_2_2

New Line.l(r:p1rdm3537-p1rlv5130) Units=km Length=0.0299285 bus1=p1rdm3537.1.2 bus2=p1rlv5130.1.2 switch=n enabled=y phases=2 Linecode=1P_OH_AL_4/0_Zuzara_0_416_0_2_2_2_2_2_2_2_2_2_2_2_2_2_2_2_2_2_2_2_2_2_2_2_2_2_2_2_2_2

New Line.l(r:p1rdm3537-p1rdt1607lv) Units=km Length=0.0254273 bus1=p1rdt1607lv.1.2 bus2=p1rdm3537.1.2 switch=n enabled=y phases=2 Linecode=1P_OH_AL_2/0_Rucina_0_416_0_2_2_2_2_2_2_2_2_2_2_2_2_2_2_2_2_2_2_2_2_2_2_2_2_2_2_2_2_2

New Line.l(r:p1rdt1838lv-p1rlv2027) Units=km Length=0.072282 bus1=p1rdt1838lv.1.2 bus2=p1rlv2027.1.2 switch=n enabled=y phases=2 Linecode=1P_OH_AL_4/0_Zuzara_0_416_0_2_2_2_2_2_2_2_2_2_2_2_2_2_2_2_2_2_2_2_2_2_2_2_2_2_2_2_2_2

New Line.l(r:p1rdm3993-p1rlv7496) Units=km Length=0.0702107 bus1=p1rdm3993.1.2 bus2=p1rlv7496.1.2 switch=n enabled=y phases=2 Linecode=1P_OH_AL_4/0_Zuzara_0_416_0_2_2_2_2_2_2_2_2_2_2_2_2_2_2_2_2_2_2_2_2_2_2_2_2_2_2_2_2_2

New Line.l(r:p1rdm3993-p1rdt1838lv) Units=km Length=0.0353483 bus1=p1rdt1838lv.1.2 bus2=p1rdm3993.1.2 switch=n enabled=y phases=2 Linecode=1P_OH_AL_4/0_Zuzara_0_416_0_2_2_2_2_2_2_2_2_2_2_2_2_2_2_2_2_2_2_2_2_2_2_2_2_2_2_2_2_2

New Line.l(r:p1rdm3994-p1rlv10151) Units=km Length=0.0729595 bus1=p1rdm3994.1.2 bus2=p1rlv10151.1.2 switch=n enabled=y phases=2 Linecode=1P_OH_AL_4/0_Zuzara_0_416_0_2_2_2_2_2_2_2_2_2_2_2_2_2_2_2_2_2_2_2_2_2_2_2_2_2_2_2_2_2

New Line.l(r:p1rdm3994-p1rdt1838lv) Units=km Length=0.0353483 bus1=p1rdt1838lv.1.2 bus2=p1rdm3994.1.2 switch=n enabled=y phases=2 Linecode=1P_OH_AL_4/0_Zuzara_0_416_0_2_2_2_2_2_2_2_2_2_2_2_2_2_2_2_2_2_2_2_2_2_2_2_2_2_2_2_2_2

New Line.l(r:p1rdt1839lv-p1rlv2028) Units=km Length=0.007102510000000001 bus1=p1rdt1839lv.1.2 bus2=p1rlv2028.1.2 switch=n enabled=y phases=2 Linecode=1P_OH_AL_2/0_Rucina_0_416_0_2_2_2_2_2_2_2_2_2_2_2_2_2_2_2_2_2_2_2_2_2_2_2_2_2_2_2_2_2

New Line.l(r:p1rdt1839lv-p1rlv7906) Units=km Length=0.007102510000000001 bus1=p1rdt1839lv.1.2 bus2=p1rlv7906.1.2 switch=n enabled=y phases=2 Linecode=1P_OH_AL_2/0_Rucina_0_416_0_2_2_2_2_2_2_2_2_2_2_2_2_2_2_2_2_2_2_2_2_2_2_2_2_2_2_2_2_2

New Line.l(r:p1rdm4456-p1rlv2302) Units=km Length=0.0307583 bus1=p1rdm4456.1.2 bus2=p1rlv2302.1.2 switch=n enabled=y phases=2 Linecode=1P_OH_AL_4/0_Zuzara_0_416_0_2_2_2_2_2_2_2_2_2_2_2_2_2_2_2_2_2_2_2_2_2_2_2_2_2_2_2_2_2

New Line.l(r:p1rdm4456-p1rdt2067lv) Units=km Length=0.014510300000000002 bus1=p1rdt2067lv.1.2 bus2=p1rdm4456.1.2 switch=n enabled=y phases=2 Linecode=1P_OH_AL_2/0_Rucina_0_416_0_2_2_2_2_2_2_2_2_2_2_2_2_2_2_2_2_2_2_2_2_2_2_2_2_2_2_2_2_2

New Line.l(r:p1rdm4457-p1rlv8541) Units=km Length=0.018393 bus1=p1rdm4457.1.2 bus2=p1rlv8541.1.2 switch=n enabled=y phases=2 Linecode=1P_OH_AL_2/0_Rucina_0_416_0_2_2_2_2_2_2_2_2_2_2_2_2_2_2_2_2_2_2_2_2_2_2_2_2_2_2_2_2_2

New Line.l(r:p1rdm4457-p1rdt2067lv) Units=km Length=0.0145044 bus1=p1rdt2067lv.1.2 bus2=p1rdm4457.1.2 switch=n enabled=y phases=2 Linecode=1P_OH_AL_2/0_Rucina_0_416_0_2_2_2_2_2_2_2_2_2_2_2_2_2_2_2_2_2_2_2_2_2_2_2_2_2_2_2_2_2

New Line.l(r:p1rdm4458-p1rlv2304) Units=km Length=0.0180883 bus1=p1rdm4458.1.2 bus2=p1rlv2304.1.2 switch=n enabled=y phases=2 Linecode=1P_UG_AL_4/0_Sweetbriar_0_416_0_2_2_2_2_2_2_2_2_2_2_2_2_2_2_2_2_2_2_2_2_2_2_2_2_2_2_2_2_2

New Line.l(r:p1rdm4458-p1rdt2068lv) Units=km Length=0.025795500000000002 bus1=p1rdt2068lv.1.2 bus2=p1rdm4458.1.2 switch=n enabled=y phases=2 Linecode=1P_UG_AL_4/0_Sweetbriar_0_416_0_2_2_2_2_2_2_2_2_2_2_2_2_2_2_2_2_2_2_2_2_2_2_2_2_2_2_2_2_2

New Line.l(r:p1rdm4459-p1rlv8158) Units=km Length=0.0398612 bus1=p1rdm4459.1.2 bus2=p1rlv8158.1.2 switch=n enabled=y phases=2 Linecode=1P_UG_AL_1/0_Brenau_0_416_0_2_2_2_2_2_2_2_2_2_2_2_2_2_2_2_2_2_2_2_2_2_2_2_2_2_2_2_2_2

New Line.l(r:p1rdm4459-p1rdt2068lv) Units=km Length=0.0173805 bus1=p1rdt2068lv.1.2 bus2=p1rdm4459.1.2 switch=n enabled=y phases=2 Linecode=1P_UG_AL_1/0_Brenau_0_416_0_2_2_2_2_2_2_2_2_2_2_2_2_2_2_2_2_2_2_2_2_2_2_2_2_2_2_2_2_2

New Line.l(r:p1rdt2069lv-p1rlv2305) Units=km Length=0.0298434 bus1=p1rdt2069lv.1.2 bus2=p1rlv2305.1.2 switch=n enabled=y phases=2 Linecode=1P_OH_AL_4/0_Zuzara_0_416_0_2_2_2_2_2_2_2_2_2_2_2_2_2_2_2_2_2_2_2_2_2_2_2_2_2_2_2_2_2

New Line.l(r:p1rdm4669-p1rlv2437) Units=km Length=0.0198999 bus1=p1rdm4669.1.2 bus2=p1rlv2437.1.2 switch=n enabled=y phases=2 Linecode=1P_OH_AL_2/0_Rucina_0_416_0_2_2_2_2_2_2_2_2_2_2_2_2_2_2_2_2_2_2_2_2_2_2_2_2_2_2_2_2_2

New Line.l(r:p1rdm4669-p1rdt2184lv) Units=km Length=0.0394084 bus1=p1rdt2184lv.1.2 bus2=p1rdm4669.1.2 switch=n enabled=y phases=2 Linecode=1P_OH_AL_4/0_Zuzara_0_416_0_2_2_2_2_2_2_2_2_2_2_2_2_2_2_2_2_2_2_2_2_2_2_2_2_2_2_2_2_2

New Line.l(r:p1rdm4670-p1rlv9206) Units=km Length=0.0128225 bus1=p1rdm4670.1.2 bus2=p1rlv9206.1.2 switch=n enabled=y phases=2 Linecode=1P_OH_AL_2/0_Rucina_0_416_0_2_2_2_2_2_2_2_2_2_2_2_2_2_2_2_2_2_2_2_2_2_2_2_2_2_2_2_2_2

New Line.l(r:p1rdm4670-p1rdt2184lv) Units=km Length=0.0394084 bus1=p1rdt2184lv.1.2 bus2=p1rdm4670.1.2 switch=n enabled=y phases=2 Linecode=1P_OH_AL_4/0_Zuzara_0_416_0_2_2_2_2_2_2_2_2_2_2_2_2_2_2_2_2_2_2_2_2_2_2_2_2_2_2_2_2_2

New Line.l(r:p1rdt2185lv-p1rlv2438) Units=km Length=0.0311389 bus1=p1rdt2185lv.1.2 bus2=p1rlv2438.1.2 switch=n enabled=y phases=2 Linecode=1P_OH_AL_4/0_Zuzara_0_416_0_2_2_2_2_2_2_2_2_2_2_2_2_2_2_2_2_2_2_2_2_2_2_2_2_2_2_2_2_2

New Line.l(r:p1rdt2185lv-p1rlv4152) Units=km Length=0.0446436 bus1=p1rdt2185lv.1.2 bus2=p1rlv4152.1.2 switch=n enabled=y phases=2 Linecode=1P_OH_AL_4/0_Zuzara_0_416_0_2_2_2_2_2_2_2_2_2_2_2_2_2_2_2_2_2_2_2_2_2_2_2_2_2_2_2_2_2

New Line.l(r:p1rdt2186lv-p1rlv8280) Units=km Length=0.00932631 bus1=p1rdt2186lv.1.2 bus2=p1rlv8280.1.2 switch=n enabled=y phases=2 Linecode=1P_OH_AL_2/0_Rucina_0_416_0_2_2_2_2_2_2_2_2_2_2_2_2_2_2_2_2_2_2_2_2_2_2_2_2_2_2_2_2_2

New Line.l(r:p1rdm4673-p1rlv2440) Units=km Length=0.00626566 bus1=p1rdm4673.1.2 bus2=p1rlv2440.1.2 switch=n enabled=y phases=2 Linecode=1P_OH_AL_2/0_Rucina_0_416_0_2_2_2_2_2_2_2_2_2_2_2_2_2_2_2_2_2_2_2_2_2_2_2_2_2_2_2_2_2

New Line.l(r:p1rdm4673-p1rdt2186lv) Units=km Length=0.0101046 bus1=p1rdt2186lv.1.2 bus2=p1rdm4673.1.2 switch=n enabled=y phases=2 Linecode=1P_OH_AL_2/0_Rucina_0_416_0_2_2_2_2_2_2_2_2_2_2_2_2_2_2_2_2_2_2_2_2_2_2_2_2_2_2_2_2_2

New Line.l(r:p1rdm4675-p1rlv10698) Units=km Length=0.011256 bus1=p1rdm4675.1.2 bus2=p1rlv10698.1.2 switch=n enabled=y phases=2 Linecode=1P_OH_AL_2/0_Rucina_0_416_0_2_2_2_2_2_2_2_2_2_2_2_2_2_2_2_2_2_2_2_2_2_2_2_2_2_2_2_2_2

New Line.l(r:p1rdm4675-p1rdt2186lv) Units=km Length=0.0101031 bus1=p1rdt2186lv.1.2 bus2=p1rdm4675.1.2 switch=n enabled=y phases=2 Linecode=1P_OH_AL_2/0_Rucina_0_416_0_2_2_2_2_2_2_2_2_2_2_2_2_2_2_2_2_2_2_2_2_2_2_2_2_2_2_2_2_2

New Line.l(r:p1rdt2282lv-p1rlv2556) Units=km Length=0.0472407 bus1=p1rdt2282lv.1.2 bus2=p1rlv2556.1.2 switch=n enabled=y phases=2 Linecode=1P_OH_AL_4/0_Zuzara_0_416_0_2_2_2_2_2_2_2_2_2_2_2_2_2_2_2_2_2_2_2_2_2_2_2_2_2_2_2_2_2

New Line.l(r:p1rdt2291lv-p1rlv2568) Units=km Length=0.0660787 bus1=p1rdt2291lv.1.2 bus2=p1rlv2568.1.2 switch=n enabled=y phases=2 Linecode=1P_UG_AL_4/0_Sweetbriar_0_416_0_2_2_2_2_2_2_2_2_2_2_2_2_2_2_2_2_2_2_2_2_2_2_2_2_2_2_2_2_2

New Line.l(r:p1rdm4874-p1rlv2569) Units=km Length=0.00924105 bus1=p1rdm4874.1.2 bus2=p1rlv2569.1.2 switch=n enabled=y phases=2 Linecode=1P_OH_AL_2/0_Rucina_0_416_0_2_2_2_2_2_2_2_2_2_2_2_2_2_2_2_2_2_2_2_2_2_2_2_2_2_2_2_2_2

New Line.l(r:p1rdm4874-p1rdt2292lv) Units=km Length=0.0155402 bus1=p1rdt2292lv.1.2 bus2=p1rdm4874.1.2 switch=n enabled=y phases=2 Linecode=1P_OH_AL_2/0_Rucina_0_416_0_2_2_2_2_2_2_2_2_2_2_2_2_2_2_2_2_2_2_2_2_2_2_2_2_2_2_2_2_2

New Line.l(r:p1rdm4875-p1rlv6068) Units=km Length=0.030673 bus1=p1rdm4875.1.2 bus2=p1rlv6068.1.2 switch=n enabled=y phases=2 Linecode=1P_OH_AL_4/0_Zuzara_0_416_0_2_2_2_2_2_2_2_2_2_2_2_2_2_2_2_2_2_2_2_2_2_2_2_2_2_2_2_2_2

New Line.l(r:p1rdm4875-p1rdt2292lv) Units=km Length=0.015541800000000001 bus1=p1rdt2292lv.1.2 bus2=p1rdm4875.1.2 switch=n enabled=y phases=2 Linecode=1P_OH_AL_2/0_Rucina_0_416_0_2_2_2_2_2_2_2_2_2_2_2_2_2_2_2_2_2_2_2_2_2_2_2_2_2_2_2_2_2

New Line.l(r:p1rdt2397lv-p1rlv2704) Units=km Length=0.0126978 bus1=p1rdt2397lv.1.2 bus2=p1rlv2704.1.2 switch=n enabled=y phases=2 Linecode=1P_OH_AL_2/0_Rucina_0_416_0_2_2_2_2_2_2_2_2_2_2_2_2_2_2_2_2_2_2_2_2_2_2_2_2_2_2_2_2_2

New Line.l(r:p1rdm5075-p1rlv11813) Units=km Length=0.0469295 bus1=p1rdm5075.1.2 bus2=p1rlv11813.1.2 switch=n enabled=y phases=2 Linecode=1P_OH_AL_4/0_Zuzara_0_416_0_2_2_2_2_2_2_2_2_2_2_2_2_2_2_2_2_2_2_2_2_2_2_2_2_2_2_2_2_2

New Line.l(r:p1rdm5075-p1rdt2397lv) Units=km Length=0.0197802 bus1=p1rdt2397lv.1.2 bus2=p1rdm5075.1.2 switch=n enabled=y phases=2 Linecode=1P_OH_AL_2/0_Rucina_0_416_0_2_2_2_2_2_2_2_2_2_2_2_2_2_2_2_2_2_2_2_2_2_2_2_2_2_2_2_2_2

New Line.l(r:p1rdt2502lv-p1rlv2841) Units=km Length=0.00733597 bus1=p1rdt2502lv.1.2 bus2=p1rlv2841.1.2 switch=n enabled=y phases=2 Linecode=1P_OH_AL_2/0_Rucina_0_416_0_2_2_2_2_2_2_2_2_2_2_2_2_2_2_2_2_2_2_2_2_2_2_2_2_2_2_2_2_2

New Line.l(r:p1rdt2502lv-p1rlv3636) Units=km Length=0.00633793 bus1=p1rdt2502lv.1.2 bus2=p1rlv3636.1.2 switch=n enabled=y phases=2 Linecode=1P_OH_AL_2/0_Rucina_0_416_0_2_2_2_2_2_2_2_2_2_2_2_2_2_2_2_2_2_2_2_2_2_2_2_2_2_2_2_2_2

New Line.l(r:p1rdt2591lv-p1rlv2956) Units=km Length=0.054385 bus1=p1rdt2591lv.1.2 bus2=p1rlv2956.1.2 switch=n enabled=y phases=2 Linecode=1P_OH_AL_4/0_Zuzara_0_416_0_2_2_2_2_2_2_2_2_2_2_2_2_2_2_2_2_2_2_2_2_2_2_2_2_2_2_2_2_2

New Line.l(r:p1rdt2597lv-p1rlv2962) Units=km Length=0.0230944 bus1=p1rdt2597lv.1.2 bus2=p1rlv2962.1.2 switch=n enabled=y phases=2 Linecode=1P_UG_AL_1/0_Brenau_0_416_0_2_2_2_2_2_2_2_2_2_2_2_2_2_2_2_2_2_2_2_2_2_2_2_2_2_2_2_2_2

New Line.l(r:p1rdt2598lv-p1rlv2963) Units=km Length=0.0184146 bus1=p1rdt2598lv.1.2 bus2=p1rlv2963.1.2 switch=n enabled=y phases=2 Linecode=1P_OH_AL_2/0_Rucina_0_416_0_2_2_2_2_2_2_2_2_2_2_2_2_2_2_2_2_2_2_2_2_2_2_2_2_2_2_2_2_2

New Line.l(r:p1rdt2598lv-p1rlv3092) Units=km Length=0.0184146 bus1=p1rdt2598lv.1.2 bus2=p1rlv3092.1.2 switch=n enabled=y phases=2 Linecode=1P_OH_AL_2/0_Rucina_0_416_0_2_2_2_2_2_2_2_2_2_2_2_2_2_2_2_2_2_2_2_2_2_2_2_2_2_2_2_2_2

New Line.l(r:p1rdm5665-p1rlv3084) Units=km Length=0.0194489 bus1=p1rdm5665.1.2 bus2=p1rlv3084.1.2 switch=n enabled=y phases=2 Linecode=1P_OH_AL_2/0_Rucina_0_416_0_2_2_2_2_2_2_2_2_2_2_2_2_2_2_2_2_2_2_2_2_2_2_2_2_2_2_2_2_2

New Line.l(r:p1rdm5665-p1rdt2697lv) Units=km Length=0.0574471 bus1=p1rdt2697lv.1.2 bus2=p1rdm5665.1.2 switch=n enabled=y phases=2 Linecode=1P_OH_AL_4/0_Zuzara_0_416_0_2_2_2_2_2_2_2_2_2_2_2_2_2_2_2_2_2_2_2_2_2_2_2_2_2_2_2_2_2

New Line.l(r:p1rdm5666-p1rlv12085) Units=km Length=0.0121863 bus1=p1rdm5666.1.2 bus2=p1rlv12085.1.2 switch=n enabled=y phases=2 Linecode=1P_OH_AL_2/0_Rucina_0_416_0_2_2_2_2_2_2_2_2_2_2_2_2_2_2_2_2_2_2_2_2_2_2_2_2_2_2_2_2_2

New Line.l(r:p1rdm5666-p1rdt2697lv) Units=km Length=0.0383101 bus1=p1rdt2697lv.1.2 bus2=p1rdm5666.1.2 switch=n enabled=y phases=2 Linecode=1P_OH_AL_4/0_Zuzara_0_416_0_2_2_2_2_2_2_2_2_2_2_2_2_2_2_2_2_2_2_2_2_2_2_2_2_2_2_2_2_2

New Line.l(r:p1rdm5837-p1rlv3213) Units=km Length=0.0342916 bus1=p1rdm5837.1.2 bus2=p1rlv3213.1.2 switch=n enabled=y phases=2 Linecode=1P_UG_AL_4/0_Sweetbriar_0_416_0_2_2_2_2_2_2_2_2_2_2_2_2_2_2_2_2_2_2_2_2_2_2_2_2_2_2_2_2_2

New Line.l(r:p1rdm5837-p1rdt2794lv) Units=km Length=0.00977336 bus1=p1rdt2794lv.1.2 bus2=p1rdm5837.1.2 switch=n enabled=y phases=2 Linecode=1P_UG_AL_4/0_Sweetbriar_0_416_0_2_2_2_2_2_2_2_2_2_2_2_2_2_2_2_2_2_2_2_2_2_2_2_2_2_2_2_2_2

New Line.l(r:p1rdm5838-p1rlv4156) Units=km Length=0.044424 bus1=p1rdm5838.1.2 bus2=p1rlv4156.1.2 switch=n enabled=y phases=2 Linecode=1P_UG_AL_4/0_Sweetbriar_0_416_0_2_2_2_2_2_2_2_2_2_2_2_2_2_2_2_2_2_2_2_2_2_2_2_2_2_2_2_2_2

New Line.l(r:p1rdm5838-p1rdt2794lv) Units=km Length=0.009782620000000002 bus1=p1rdt2794lv.1.2 bus2=p1rdm5838.1.2 switch=n enabled=y phases=2 Linecode=1P_UG_AL_4/0_Sweetbriar_0_416_0_2_2_2_2_2_2_2_2_2_2_2_2_2_2_2_2_2_2_2_2_2_2_2_2_2_2_2_2_2

New Line.l(r:p1rdt2795lv-p1rlv3214) Units=km Length=0.0193691 bus1=p1rdt2795lv.1.2 bus2=p1rlv3214.1.2 switch=n enabled=y phases=2 Linecode=1P_OH_AL_2/0_Rucina_0_416_0_2_2_2_2_2_2_2_2_2_2_2_2_2_2_2_2_2_2_2_2_2_2_2_2_2_2_2_2_2

New Line.l(r:p1rdt2795lv-p1rlv9474) Units=km Length=0.0193691 bus1=p1rdt2795lv.1.2 bus2=p1rlv9474.1.2 switch=n enabled=y phases=2 Linecode=1P_OH_AL_2/0_Rucina_0_416_0_2_2_2_2_2_2_2_2_2_2_2_2_2_2_2_2_2_2_2_2_2_2_2_2_2_2_2_2_2

New Line.l(r:p1rdt2796lv-p1rlv3215) Units=km Length=0.061822 bus1=p1rdt2796lv.1.2 bus2=p1rlv3215.1.2 switch=n enabled=y phases=2 Linecode=1P_OH_AL_4/0_Zuzara_0_416_0_2_2_2_2_2_2_2_2_2_2_2_2_2_2_2_2_2_2_2_2_2_2_2_2_2_2_2_2_2

New Line.l(r:p1rdt2894lv-p1rlv3339) Units=km Length=0.001 bus1=p1rdt2894lv.1.2 bus2=p1rlv3339.1.2 switch=n enabled=y phases=2 Linecode=1P_OH_AL_4_Periwinkle_0_416_0_2_2_2_2_2_2_2_2_2_2_2_2_2_2_2_2_2_2_2_2_2_2_2_2_2_2_2_2_2

New Line.l(r:p1rdt2895lv-p1rlv10827) Units=km Length=0.06750690000000001 bus1=p1rdt2895lv.1.2 bus2=p1rlv10827.1.2 switch=n enabled=y phases=2 Linecode=1P_OH_AL_4/0_Zuzara_0_416_0_2_2_2_2_2_2_2_2_2_2_2_2_2_2_2_2_2_2_2_2_2_2_2_2_2_2_2_2_2

New Line.l(r:p1rdm6012-p1rlv3340) Units=km Length=0.0823455 bus1=p1rdm6012.1.2 bus2=p1rlv3340.1.2 switch=n enabled=y phases=2 Linecode=1P_OH_AL_4/0_Zuzara_0_416_0_2_2_2_2_2_2_2_2_2_2_2_2_2_2_2_2_2_2_2_2_2_2_2_2_2_2_2_2_2

New Line.l(r:p1rdm6012-p1rdt2895lv) Units=km Length=0.0182502 bus1=p1rdt2895lv.1.2 bus2=p1rdm6012.1.2 switch=n enabled=y phases=2 Linecode=1P_OH_AL_2/0_Rucina_0_416_0_2_2_2_2_2_2_2_2_2_2_2_2_2_2_2_2_2_2_2_2_2_2_2_2_2_2_2_2_2

New Line.l(r:p1rdm6014-p1rlv11129) Units=km Length=0.0509826 bus1=p1rdm6014.1.2 bus2=p1rlv11129.1.2 switch=n enabled=y phases=2 Linecode=1P_OH_AL_4/0_Zuzara_0_416_0_2_2_2_2_2_2_2_2_2_2_2_2_2_2_2_2_2_2_2_2_2_2_2_2_2_2_2_2_2

New Line.l(r:p1rdm6014-p1rdt2895lv) Units=km Length=0.0182589 bus1=p1rdt2895lv.1.2 bus2=p1rdm6014.1.2 switch=n enabled=y phases=2 Linecode=1P_OH_AL_2/0_Rucina_0_416_0_2_2_2_2_2_2_2_2_2_2_2_2_2_2_2_2_2_2_2_2_2_2_2_2_2_2_2_2_2

New Line.l(r:p1rdt2896lv-p1rlv3341) Units=km Length=0.0176429 bus1=p1rdt2896lv.1.2 bus2=p1rlv3341.1.2 switch=n enabled=y phases=2 Linecode=1P_OH_AL_2/0_Rucina_0_416_0_2_2_2_2_2_2_2_2_2_2_2_2_2_2_2_2_2_2_2_2_2_2_2_2_2_2_2_2_2

New Line.l(r:p1rdt2898lv-p1rlv3343) Units=km Length=0.05627970000000001 bus1=p1rdt2898lv.1.2 bus2=p1rlv3343.1.2 switch=n enabled=y phases=2 Linecode=1P_OH_AL_4/0_Zuzara_0_416_0_2_2_2_2_2_2_2_2_2_2_2_2_2_2_2_2_2_2_2_2_2_2_2_2_2_2_2_2_2

New Line.l(r:p1rdt2898lv-p1rlv10560) Units=km Length=0.0322324 bus1=p1rdt2898lv.1.2 bus2=p1rlv10560.1.2 switch=n enabled=y phases=2 Linecode=1P_OH_AL_4/0_Zuzara_0_416_0_2_2_2_2_2_2_2_2_2_2_2_2_2_2_2_2_2_2_2_2_2_2_2_2_2_2_2_2_2

New Line.l(r:p1rdt2898lv-p1rlv11816) Units=km Length=0.0847472 bus1=p1rdt2898lv.1.2 bus2=p1rlv11816.1.2 switch=n enabled=y phases=2 Linecode=1P_OH_AL_4/0_Zuzara_0_416_0_2_2_2_2_2_2_2_2_2_2_2_2_2_2_2_2_2_2_2_2_2_2_2_2_2_2_2_2_2

New Line.l(r:p1rdm6400-p1rlv3637) Units=km Length=0.0347262 bus1=p1rdm6400.1.2 bus2=p1rlv3637.1.2 switch=n enabled=y phases=2 Linecode=1P_OH_AL_4/0_Zuzara_0_416_0_2_2_2_2_2_2_2_2_2_2_2_2_2_2_2_2_2_2_2_2_2_2_2_2_2_2_2_2_2

New Line.l(r:p1rdm6400-p1rdt3108lv) Units=km Length=0.0388859 bus1=p1rdt3108lv.1.2 bus2=p1rdm6400.1.2 switch=n enabled=y phases=2 Linecode=1P_OH_AL_4/0_Zuzara_0_416_0_2_2_2_2_2_2_2_2_2_2_2_2_2_2_2_2_2_2_2_2_2_2_2_2_2_2_2_2_2

New Line.l(r:p1rdm6401-p1rlv4447) Units=km Length=0.0386805 bus1=p1rdm6401.1.2 bus2=p1rlv4447.1.2 switch=n enabled=y phases=2 Linecode=1P_OH_AL_4/0_Zuzara_0_416_0_2_2_2_2_2_2_2_2_2_2_2_2_2_2_2_2_2_2_2_2_2_2_2_2_2_2_2_2_2

New Line.l(r:p1rdm6401-p1rdt3108lv) Units=km Length=0.019445400000000005 bus1=p1rdt3108lv.1.2 bus2=p1rdm6401.1.2 switch=n enabled=y phases=2 Linecode=1P_OH_AL_2/0_Rucina_0_416_0_2_2_2_2_2_2_2_2_2_2_2_2_2_2_2_2_2_2_2_2_2_2_2_2_2_2_2_2_2

New Line.l(r:p1rdt3216lv-p1rlv3782) Units=km Length=0.08653020000000002 bus1=p1rdt3216lv.1.2 bus2=p1rlv3782.1.2 switch=n enabled=y phases=2 Linecode=1P_OH_AL_4/0_Zuzara_0_416_0_2_2_2_2_2_2_2_2_2_2_2_2_2_2_2_2_2_2_2_2_2_2_2_2_2_2_2_2_2

New Line.l(r:p1rdt3391lv-p1rlv4023) Units=km Length=0.0327951 bus1=p1rdt3391lv.1.2 bus2=p1rlv4023.1.2 switch=n enabled=y phases=2 Linecode=1P_OH_AL_4/0_Zuzara_0_416_0_2_2_2_2_2_2_2_2_2_2_2_2_2_2_2_2_2_2_2_2_2_2_2_2_2_2_2_2_2

New Line.l(r:p1rdm6899-p1rlv10700) Units=km Length=0.041914 bus1=p1rdm6899.1.2 bus2=p1rlv10700.1.2 switch=n enabled=y phases=2 Linecode=1P_OH_AL_4/0_Zuzara_0_416_0_2_2_2_2_2_2_2_2_2_2_2_2_2_2_2_2_2_2_2_2_2_2_2_2_2_2_2_2_2

New Line.l(r:p1rdm6899-p1rdt3391lv) Units=km Length=0.013170500000000002 bus1=p1rdt3391lv.1.2 bus2=p1rdm6899.1.2 switch=n enabled=y phases=2 Linecode=1P_OH_AL_2/0_Rucina_0_416_0_2_2_2_2_2_2_2_2_2_2_2_2_2_2_2_2_2_2_2_2_2_2_2_2_2_2_2_2_2

New Line.l(r:p1rdm6900-p1rlv11814) Units=km Length=0.0464788 bus1=p1rdm6900.1.2 bus2=p1rlv11814.1.2 switch=n enabled=y phases=2 Linecode=1P_OH_AL_4/0_Zuzara_0_416_0_2_2_2_2_2_2_2_2_2_2_2_2_2_2_2_2_2_2_2_2_2_2_2_2_2_2_2_2_2

New Line.l(r:p1rdm6900-p1rdt3391lv) Units=km Length=0.0646719 bus1=p1rdt3391lv.1.2 bus2=p1rdm6900.1.2 switch=n enabled=y phases=2 Linecode=1P_OH_AL_4/0_Zuzara_0_416_0_2_2_2_2_2_2_2_2_2_2_2_2_2_2_2_2_2_2_2_2_2_2_2_2_2_2_2_2_2

New Line.l(r:p1rdt3394lv-p1rlv4026) Units=km Length=0.001 bus1=p1rdt3394lv.1.2 bus2=p1rlv4026.1.2 switch=n enabled=y phases=2 Linecode=1P_OH_AL_4_Periwinkle_0_416_0_2_2_2_2_2_2_2_2_2_2_2_2_2_2_2_2_2_2_2_2_2_2_2_2_2_2_2_2_2

New Line.l(r:p1rdt3486lv-p1rlv4153) Units=km Length=0.001 bus1=p1rdt3486lv.1.2 bus2=p1rlv4153.1.2 switch=n enabled=y phases=2 Linecode=1P_OH_AL_4_Periwinkle_0_416_0_2_2_2_2_2_2_2_2_2_2_2_2_2_2_2_2_2_2_2_2_2_2_2_2_2_2_2_2_2

New Line.l(r:p1rdt3487lv-p1rlv4155) Units=km Length=0.0093094 bus1=p1rdt3487lv.1.2 bus2=p1rlv4155.1.2 switch=n enabled=y phases=2 Linecode=1P_OH_AL_2/0_Rucina_0_416_0_2_2_2_2_2_2_2_2_2_2_2_2_2_2_2_2_2_2_2_2_2_2_2_2_2_2_2_2_2

New Line.l(r:p1rdt3487lv-p1rlv5253) Units=km Length=0.0167807 bus1=p1rdt3487lv.1.2 bus2=p1rlv5253.1.2 switch=n enabled=y phases=2 Linecode=1P_OH_AL_2/0_Rucina_0_416_0_2_2_2_2_2_2_2_2_2_2_2_2_2_2_2_2_2_2_2_2_2_2_2_2_2_2_2_2_2

New Line.l(r:p1rdt3579lv-p1rlv4288) Units=km Length=0.0585142 bus1=p1rdt3579lv.1.2 bus2=p1rlv4288.1.2 switch=n enabled=y phases=2 Linecode=1P_OH_AL_4/0_Zuzara_0_416_0_2_2_2_2_2_2_2_2_2_2_2_2_2_2_2_2_2_2_2_2_2_2_2_2_2_2_2_2_2

New Line.l(r:p1rdm7237-p1rlv7491) Units=km Length=0.0134442 bus1=p1rdm7237.1.2 bus2=p1rlv7491.1.2 switch=n enabled=y phases=2 Linecode=1P_OH_AL_2/0_Rucina_0_416_0_2_2_2_2_2_2_2_2_2_2_2_2_2_2_2_2_2_2_2_2_2_2_2_2_2_2_2_2_2

New Line.l(r:p1rdm7236-p1rlv4289) Units=km Length=0.015551 bus1=p1rdm7236.1.2 bus2=p1rlv4289.1.2 switch=n enabled=y phases=2 Linecode=1P_OH_AL_2/0_Rucina_0_416_0_2_2_2_2_2_2_2_2_2_2_2_2_2_2_2_2_2_2_2_2_2_2_2_2_2_2_2_2_2

New Line.l(r:p1rdm7236-p1rlv11948) Units=km Length=0.0411903 bus1=p1rdm7236.1.2 bus2=p1rlv11948.1.2 switch=n enabled=y phases=2 Linecode=1P_OH_AL_4/0_Zuzara_0_416_0_2_2_2_2_2_2_2_2_2_2_2_2_2_2_2_2_2_2_2_2_2_2_2_2_2_2_2_2_2

New Line.l(r:p1rdm7236-p1rdm7237) Units=km Length=0.0121402 bus1=p1rdm7237.1.2 bus2=p1rdm7236.1.2 switch=n enabled=y phases=2 Linecode=1P_OH_AL_2/0_Rucina_0_416_0_2_2_2_2_2_2_2_2_2_2_2_2_2_2_2_2_2_2_2_2_2_2_2_2_2_2_2_2_2

New Line.l(r:p1rdm7237-p1rdt3580lv) Units=km Length=0.0121317 bus1=p1rdt3580lv.1.2 bus2=p1rdm7237.1.2 switch=n enabled=y phases=2 Linecode=1P_OH_AL_2/0_Rucina_0_416_0_2_2_2_2_2_2_2_2_2_2_2_2_2_2_2_2_2_2_2_2_2_2_2_2_2_2_2_2_2

New Line.l(r:p1rdm7238-p1rlv9609) Units=km Length=0.015586 bus1=p1rdm7238.1.2 bus2=p1rlv9609.1.2 switch=n enabled=y phases=2 Linecode=1P_OH_AL_2/0_Rucina_0_416_0_2_2_2_2_2_2_2_2_2_2_2_2_2_2_2_2_2_2_2_2_2_2_2_2_2_2_2_2_2

New Line.l(r:p1rdm7238-p1rdt3580lv) Units=km Length=0.08143430000000002 bus1=p1rdt3580lv.1.2 bus2=p1rdm7238.1.2 switch=n enabled=y phases=2 Linecode=1P_OH_AL_4/0_Zuzara_0_416_0_2_2_2_2_2_2_2_2_2_2_2_2_2_2_2_2_2_2_2_2_2_2_2_2_2_2_2_2_2

New Line.l(r:p1rdm7243-p1rlv4294) Units=km Length=0.0199573 bus1=p1rdm7243.1.2 bus2=p1rlv4294.1.2 switch=n enabled=y phases=2 Linecode=1P_OH_AL_2/0_Rucina_0_416_0_2_2_2_2_2_2_2_2_2_2_2_2_2_2_2_2_2_2_2_2_2_2_2_2_2_2_2_2_2

New Line.l(r:p1rdm7243-p1rdt3584lv) Units=km Length=0.0189517 bus1=p1rdt3584lv.1.2 bus2=p1rdm7243.1.2 switch=n enabled=y phases=2 Linecode=1P_OH_AL_2/0_Rucina_0_416_0_2_2_2_2_2_2_2_2_2_2_2_2_2_2_2_2_2_2_2_2_2_2_2_2_2_2_2_2_2

New Line.l(r:p1rdm7244-p1rlv12224) Units=km Length=0.0215074 bus1=p1rdm7244.1.2 bus2=p1rlv12224.1.2 switch=n enabled=y phases=2 Linecode=1P_OH_AL_2/0_Rucina_0_416_0_2_2_2_2_2_2_2_2_2_2_2_2_2_2_2_2_2_2_2_2_2_2_2_2_2_2_2_2_2

New Line.l(r:p1rdm7244-p1rdt3584lv) Units=km Length=0.018964 bus1=p1rdt3584lv.1.2 bus2=p1rdm7244.1.2 switch=n enabled=y phases=2 Linecode=1P_OH_AL_2/0_Rucina_0_416_0_2_2_2_2_2_2_2_2_2_2_2_2_2_2_2_2_2_2_2_2_2_2_2_2_2_2_2_2_2

New Line.l(r:p1rdt3684lv-p1rlv9606) Units=km Length=0.0728172 bus1=p1rdt3684lv.1.2 bus2=p1rlv9606.1.2 switch=n enabled=y phases=2 Linecode=1P_OH_AL_4/0_Zuzara_0_416_0_2_2_2_2_2_2_2_2_2_2_2_2_2_2_2_2_2_2_2_2_2_2_2_2_2_2_2_2_2

New Line.l(r:p1rdm7409-p1rlv4443) Units=km Length=0.073792 bus1=p1rdm7409.1.2 bus2=p1rlv4443.1.2 switch=n enabled=y phases=2 Linecode=1P_OH_AL_4/0_Zuzara_0_416_0_2_2_2_2_2_2_2_2_2_2_2_2_2_2_2_2_2_2_2_2_2_2_2_2_2_2_2_2_2

New Line.l(r:p1rdm7409-p1rdt3684lv) Units=km Length=0.0197447 bus1=p1rdt3684lv.1.2 bus2=p1rdm7409.1.2 switch=n enabled=y phases=2 Linecode=1P_OH_AL_2/0_Rucina_0_416_0_2_2_2_2_2_2_2_2_2_2_2_2_2_2_2_2_2_2_2_2_2_2_2_2_2_2_2_2_2

New Line.l(r:p1rdm7411-p1rlv13651) Units=km Length=0.0615719 bus1=p1rdm7411.1.2 bus2=p1rlv13651.1.2 switch=n enabled=y phases=2 Linecode=1P_OH_AL_4/0_Zuzara_0_416_0_2_2_2_2_2_2_2_2_2_2_2_2_2_2_2_2_2_2_2_2_2_2_2_2_2_2_2_2_2

New Line.l(r:p1rdm7411-p1rdt3684lv) Units=km Length=0.0337789 bus1=p1rdt3684lv.1.2 bus2=p1rdm7411.1.2 switch=n enabled=y phases=2 Linecode=1P_OH_AL_4/0_Zuzara_0_416_0_2_2_2_2_2_2_2_2_2_2_2_2_2_2_2_2_2_2_2_2_2_2_2_2_2_2_2_2_2

New Line.l(r:p1rdt3685lv-p1rlv4444) Units=km Length=0.0620985 bus1=p1rdt3685lv.1.2 bus2=p1rlv4444.1.2 switch=n enabled=y phases=2 Linecode=1P_OH_AL_4/0_Zuzara_0_416_0_2_2_2_2_2_2_2_2_2_2_2_2_2_2_2_2_2_2_2_2_2_2_2_2_2_2_2_2_2

New Line.l(r:p1rdm7413-p1rlv4445) Units=km Length=0.0150068 bus1=p1rdm7413.1.2 bus2=p1rlv4445.1.2 switch=n enabled=y phases=2 Linecode=1P_OH_AL_2/0_Rucina_0_416_0_2_2_2_2_2_2_2_2_2_2_2_2_2_2_2_2_2_2_2_2_2_2_2_2_2_2_2_2_2

New Line.l(r:p1rdm7413-p1rdt3686lv) Units=km Length=0.0197414 bus1=p1rdt3686lv.1.2 bus2=p1rdm7413.1.2 switch=n enabled=y phases=2 Linecode=1P_OH_AL_2/0_Rucina_0_416_0_2_2_2_2_2_2_2_2_2_2_2_2_2_2_2_2_2_2_2_2_2_2_2_2_2_2_2_2_2

New Line.l(r:p1rdm7414-p1rlv10422) Units=km Length=0.0145125 bus1=p1rdm7414.1.2 bus2=p1rlv10422.1.2 switch=n enabled=y phases=2 Linecode=1P_OH_AL_2/0_Rucina_0_416_0_2_2_2_2_2_2_2_2_2_2_2_2_2_2_2_2_2_2_2_2_2_2_2_2_2_2_2_2_2

New Line.l(r:p1rdm7414-p1rdt3686lv) Units=km Length=0.0197327 bus1=p1rdt3686lv.1.2 bus2=p1rdm7414.1.2 switch=n enabled=y phases=2 Linecode=1P_OH_AL_2/0_Rucina_0_416_0_2_2_2_2_2_2_2_2_2_2_2_2_2_2_2_2_2_2_2_2_2_2_2_2_2_2_2_2_2

New Line.l(r:p1rdt3693lv-p1rlv4455) Units=km Length=0.00415549 bus1=p1rdt3693lv.1.2 bus2=p1rlv4455.1.2 switch=n enabled=y phases=2 Linecode=1P_OH_AL_2/0_Rucina_0_416_0_2_2_2_2_2_2_2_2_2_2_2_2_2_2_2_2_2_2_2_2_2_2_2_2_2_2_2_2_2

New Line.l(r:p1rdt3694lv-p1rlv9475) Units=km Length=0.0801681 bus1=p1rdt3694lv.1.2 bus2=p1rlv9475.1.2 switch=n enabled=y phases=2 Linecode=1P_OH_AL_4/0_Zuzara_0_416_0_2_2_2_2_2_2_2_2_2_2_2_2_2_2_2_2_2_2_2_2_2_2_2_2_2_2_2_2_2

New Line.l(r:p1rdm7425-p1rlv4456) Units=km Length=0.10341300000000002 bus1=p1rdm7425.1.2 bus2=p1rlv4456.1.2 switch=n enabled=y phases=2 Linecode=1P_OH_AL_4/0_Zuzara_0_416_0_2_2_2_2_2_2_2_2_2_2_2_2_2_2_2_2_2_2_2_2_2_2_2_2_2_2_2_2_2

New Line.l(r:p1rdm7425-p1rdt3694lv) Units=km Length=0.014834300000000002 bus1=p1rdt3694lv.1.2 bus2=p1rdm7425.1.2 switch=n enabled=y phases=2 Linecode=1P_OH_AL_2/0_Rucina_0_416_0_2_2_2_2_2_2_2_2_2_2_2_2_2_2_2_2_2_2_2_2_2_2_2_2_2_2_2_2_2

New Line.l(r:p1rdt3785lv-p1rlv4588) Units=km Length=0.0351395 bus1=p1rdt3785lv.1.2 bus2=p1rlv4588.1.2 switch=n enabled=y phases=2 Linecode=1P_OH_AL_4/0_Zuzara_0_416_0_2_2_2_2_2_2_2_2_2_2_2_2_2_2_2_2_2_2_2_2_2_2_2_2_2_2_2_2_2

New Line.l(r:p1rdt3882lv-p1rlv4735) Units=km Length=0.0232268 bus1=p1rdt3882lv.1.2 bus2=p1rlv4735.1.2 switch=n enabled=y phases=2 Linecode=1P_OH_AL_2/0_Rucina_0_416_0_2_2_2_2_2_2_2_2_2_2_2_2_2_2_2_2_2_2_2_2_2_2_2_2_2_2_2_2_2

New Line.l(r:p1rdt3882lv-p1rlv5397) Units=km Length=0.0232268 bus1=p1rdt3882lv.1.2 bus2=p1rlv5397.1.2 switch=n enabled=y phases=2 Linecode=1P_OH_AL_2/0_Rucina_0_416_0_2_2_2_2_2_2_2_2_2_2_2_2_2_2_2_2_2_2_2_2_2_2_2_2_2_2_2_2_2

New Line.l(r:p1rdt3980lv-p1rlv4878) Units=km Length=0.001 bus1=p1rdt3980lv.1.2 bus2=p1rlv4878.1.2 switch=n enabled=y phases=2 Linecode=1P_OH_AL_4_Periwinkle_0_416_0_2_2_2_2_2_2_2_2_2_2_2_2_2_2_2_2_2_2_2_2_2_2_2_2_2_2_2_2_2

New Line.l(r:p1rdt4144lv-p1rlv5129) Units=km Length=0.0454774 bus1=p1rdt4144lv.1.2 bus2=p1rlv5129.1.2 switch=n enabled=y phases=2 Linecode=1P_OH_AL_4/0_Zuzara_0_416_0_2_2_2_2_2_2_2_2_2_2_2_2_2_2_2_2_2_2_2_2_2_2_2_2_2_2_2_2_2

New Line.l(r:p1rdt4299lv-p1rlv5387) Units=km Length=0.0808067 bus1=p1rdt4299lv.1.2 bus2=p1rlv5387.1.2 switch=n enabled=y phases=2 Linecode=1P_OH_AL_4/0_Zuzara_0_416_0_2_2_2_2_2_2_2_2_2_2_2_2_2_2_2_2_2_2_2_2_2_2_2_2_2_2_2_2_2

New Line.l(r:p1rdt4299lv-p1rlv13006) Units=km Length=0.0978015 bus1=p1rdt4299lv.1.2 bus2=p1rlv13006.1.2 switch=n enabled=y phases=2 Linecode=1P_OH_AL_4/0_Zuzara_0_416_0_2_2_2_2_2_2_2_2_2_2_2_2_2_2_2_2_2_2_2_2_2_2_2_2_2_2_2_2_2

New Line.l(r:p1rdt4300lv-p1rlv5388) Units=km Length=0.001 bus1=p1rdt4300lv.1.2 bus2=p1rlv5388.1.2 switch=n enabled=y phases=2 Linecode=1P_OH_AL_4_Periwinkle_0_416_0_2_2_2_2_2_2_2_2_2_2_2_2_2_2_2_2_2_2_2_2_2_2_2_2_2_2_2_2_2

New Line.l(r:p1rdt4301lv-p1rlv5389) Units=km Length=0.0270156 bus1=p1rdt4301lv.1.2 bus2=p1rlv5389.1.2 switch=n enabled=y phases=2 Linecode=1P_OH_AL_4/0_Zuzara_0_416_0_2_2_2_2_2_2_2_2_2_2_2_2_2_2_2_2_2_2_2_2_2_2_2_2_2_2_2_2_2

New Line.l(r:p1rdt4307lv-p1rlv5398) Units=km Length=0.0375164 bus1=p1rdt4307lv.1.2 bus2=p1rlv5398.1.2 switch=n enabled=y phases=2 Linecode=1P_OH_AL_4/0_Zuzara_0_416_0_2_2_2_2_2_2_2_2_2_2_2_2_2_2_2_2_2_2_2_2_2_2_2_2_2_2_2_2_2

New Line.l(r:p1rdt4543lv-p1rlv5793) Units=km Length=0.00181554 bus1=p1rdt4543lv.1.2 bus2=p1rlv5793.1.2 switch=n enabled=y phases=2 Linecode=1P_OH_AL_4_Periwinkle_0_416_0_2_2_2_2_2_2_2_2_2_2_2_2_2_2_2_2_2_2_2_2_2_2_2_2_2_2_2_2_2

New Line.l(r:p1rdt4623lv-p1rlv5924) Units=km Length=0.001 bus1=p1rdt4623lv.1.2 bus2=p1rlv5924.1.2 switch=n enabled=y phases=2 Linecode=1P_OH_AL_4_Periwinkle_0_416_0_2_2_2_2_2_2_2_2_2_2_2_2_2_2_2_2_2_2_2_2_2_2_2_2_2_2_2_2_2

New Line.l(r:p1rdt4710lv-p1rlv6067) Units=km Length=0.0536078 bus1=p1rdt4710lv.1.2 bus2=p1rlv6067.1.2 switch=n enabled=y phases=2 Linecode=1P_OH_AL_4/0_Zuzara_0_416_0_2_2_2_2_2_2_2_2_2_2_2_2_2_2_2_2_2_2_2_2_2_2_2_2_2_2_2_2_2

New Line.l(r:p1rdt4855lv-p1rlv6310) Units=km Length=0.0185202 bus1=p1rdt4855lv.1.2 bus2=p1rlv6310.1.2 switch=n enabled=y phases=2 Linecode=1P_OH_AL_2/0_Rucina_0_416_0_2_2_2_2_2_2_2_2_2_2_2_2_2_2_2_2_2_2_2_2_2_2_2_2_2_2_2_2_2

New Line.l(r:p1rdt4855lv-p1rlv13655) Units=km Length=0.0185202 bus1=p1rdt4855lv.1.2 bus2=p1rlv13655.1.2 switch=n enabled=y phases=2 Linecode=1P_OH_AL_2/0_Rucina_0_416_0_2_2_2_2_2_2_2_2_2_2_2_2_2_2_2_2_2_2_2_2_2_2_2_2_2_2_2_2_2

New Line.l(r:p1rdt4994lv-p1rlv6547) Units=km Length=0.0167364 bus1=p1rdt4994lv.1.2 bus2=p1rlv6547.1.2 switch=n enabled=y phases=2 Linecode=1P_OH_AL_2/0_Rucina_0_416_0_2_2_2_2_2_2_2_2_2_2_2_2_2_2_2_2_2_2_2_2_2_2_2_2_2_2_2_2_2

New Line.l(r:p1rdt4995lv-p1rlv6548) Units=km Length=0.0723558 bus1=p1rdt4995lv.1.2 bus2=p1rlv6548.1.2 switch=n enabled=y phases=2 Linecode=1P_OH_AL_4/0_Zuzara_0_416_0_2_2_2_2_2_2_2_2_2_2_2_2_2_2_2_2_2_2_2_2_2_2_2_2_2_2_2_2_2

New Line.l(r:p1rdm9652-p1rlv6691) Units=km Length=0.0368041 bus1=p1rdm9652.1.2 bus2=p1rlv6691.1.2 switch=n enabled=y phases=2 Linecode=1P_OH_AL_4/0_Zuzara_0_416_0_2_2_2_2_2_2_2_2_2_2_2_2_2_2_2_2_2_2_2_2_2_2_2_2_2_2_2_2_2

New Line.l(r:p1rdm9652-p1rdt5087lv) Units=km Length=0.0191507 bus1=p1rdt5087lv.1.2 bus2=p1rdm9652.1.2 switch=n enabled=y phases=2 Linecode=1P_OH_AL_2/0_Rucina_0_416_0_2_2_2_2_2_2_2_2_2_2_2_2_2_2_2_2_2_2_2_2_2_2_2_2_2_2_2_2_2

New Line.l(r:p1rdm9653-p1rlv8278) Units=km Length=0.0472647 bus1=p1rdm9653.1.2 bus2=p1rlv8278.1.2 switch=n enabled=y phases=2 Linecode=1P_OH_AL_4/0_Zuzara_0_416_0_2_2_2_2_2_2_2_2_2_2_2_2_2_2_2_2_2_2_2_2_2_2_2_2_2_2_2_2_2

New Line.l(r:p1rdm9653-p1rdt5087lv) Units=km Length=0.0191507 bus1=p1rdt5087lv.1.2 bus2=p1rdm9653.1.2 switch=n enabled=y phases=2 Linecode=1P_OH_AL_2/0_Rucina_0_416_0_2_2_2_2_2_2_2_2_2_2_2_2_2_2_2_2_2_2_2_2_2_2_2_2_2_2_2_2_2

New Line.l(r:p1rdm9656-p1rlv6695) Units=km Length=0.0727435 bus1=p1rdm9656.1.2 bus2=p1rlv6695.1.2 switch=n enabled=y phases=2 Linecode=1P_UG_AL_4/0_Sweetbriar_0_416_0_2_2_2_2_2_2_2_2_2_2_2_2_2_2_2_2_2_2_2_2_2_2_2_2_2_2_2_2_2

New Line.l(r:p1rdm9656-p1rdt5090lv) Units=km Length=0.0137694 bus1=p1rdt5090lv.1.2 bus2=p1rdm9656.1.2 switch=n enabled=y phases=2 Linecode=1P_UG_AL_4/0_Sweetbriar_0_416_0_2_2_2_2_2_2_2_2_2_2_2_2_2_2_2_2_2_2_2_2_2_2_2_2_2_2_2_2_2

New Line.l(r:p1rdm9657-p1rlv12895) Units=km Length=0.060890700000000006 bus1=p1rdm9657.1.2 bus2=p1rlv12895.1.2 switch=n enabled=y phases=2 Linecode=1P_UG_AL_1/0_Brenau_0_416_0_2_2_2_2_2_2_2_2_2_2_2_2_2_2_2_2_2_2_2_2_2_2_2_2_2_2_2_2_2

New Line.l(r:p1rdm9657-p1rdt5090lv) Units=km Length=0.00688472 bus1=p1rdt5090lv.1.2 bus2=p1rdm9657.1.2 switch=n enabled=y phases=2 Linecode=1P_UG_AL_1/0_Brenau_0_416_0_2_2_2_2_2_2_2_2_2_2_2_2_2_2_2_2_2_2_2_2_2_2_2_2_2_2_2_2_2

New Line.l(r:p1rdt5091lv-p1rlv6696) Units=km Length=0.016714700000000002 bus1=p1rdt5091lv.1.2 bus2=p1rlv6696.1.2 switch=n enabled=y phases=2 Linecode=1P_OH_AL_2/0_Rucina_0_416_0_2_2_2_2_2_2_2_2_2_2_2_2_2_2_2_2_2_2_2_2_2_2_2_2_2_2_2_2_2

New Line.l(r:p1rdt5092lv-p1rlv11133) Units=km Length=0.0887981 bus1=p1rdt5092lv.1.2 bus2=p1rlv11133.1.2 switch=n enabled=y phases=2 Linecode=1P_OH_AL_4/0_Zuzara_0_416_0_2_2_2_2_2_2_2_2_2_2_2_2_2_2_2_2_2_2_2_2_2_2_2_2_2_2_2_2_2

New Line.l(r:p1rdm9659-p1rlv6697) Units=km Length=0.0635636 bus1=p1rdm9659.1.2 bus2=p1rlv6697.1.2 switch=n enabled=y phases=2 Linecode=1P_OH_AL_4/0_Zuzara_0_416_0_2_2_2_2_2_2_2_2_2_2_2_2_2_2_2_2_2_2_2_2_2_2_2_2_2_2_2_2_2

New Line.l(r:p1rdm9659-p1rdt5092lv) Units=km Length=0.0227096 bus1=p1rdt5092lv.1.2 bus2=p1rdm9659.1.2 switch=n enabled=y phases=2 Linecode=1P_OH_AL_2/0_Rucina_0_416_0_2_2_2_2_2_2_2_2_2_2_2_2_2_2_2_2_2_2_2_2_2_2_2_2_2_2_2_2_2

New Line.l(r:p1rdt5246lv-p1rlv6929) Units=km Length=0.0707037 bus1=p1rdt5246lv.1.2 bus2=p1rlv6929.1.2 switch=n enabled=y phases=2 Linecode=1P_OH_AL_4/0_Zuzara_0_416_0_2_2_2_2_2_2_2_2_2_2_2_2_2_2_2_2_2_2_2_2_2_2_2_2_2_2_2_2_2

New Line.l(r:p1rdt5249lv-p1rlv6935) Units=km Length=0.0370403 bus1=p1rdt5249lv.1.2 bus2=p1rlv6935.1.2 switch=n enabled=y phases=2 Linecode=1P_OH_AL_4/0_Zuzara_0_416_0_2_2_2_2_2_2_2_2_2_2_2_2_2_2_2_2_2_2_2_2_2_2_2_2_2_2_2_2_2

New Line.l(r:p1rdt5404lv-p1rlv7210) Units=km Length=0.03280050000000001 bus1=p1rdt5404lv.1.2 bus2=p1rlv7210.1.2 switch=n enabled=y phases=2 Linecode=1P_OH_AL_4/0_Zuzara_0_416_0_2_2_2_2_2_2_2_2_2_2_2_2_2_2_2_2_2_2_2_2_2_2_2_2_2_2_2_2_2

New Line.l(r:p1rdm10125-p1rlv7212) Units=km Length=0.0346864 bus1=p1rdm10125.1.2 bus2=p1rlv7212.1.2 switch=n enabled=y phases=2 Linecode=1P_OH_AL_4/0_Zuzara_0_416_0_2_2_2_2_2_2_2_2_2_2_2_2_2_2_2_2_2_2_2_2_2_2_2_2_2_2_2_2_2

New Line.l(r:p1rdm10125-p1rdt5405lv) Units=km Length=0.0341884 bus1=p1rdt5405lv.1.2 bus2=p1rdm10125.1.2 switch=n enabled=y phases=2 Linecode=1P_OH_AL_4/0_Zuzara_0_416_0_2_2_2_2_2_2_2_2_2_2_2_2_2_2_2_2_2_2_2_2_2_2_2_2_2_2_2_2_2

New Line.l(r:p1rdm10127-p1rlv10829) Units=km Length=0.00672132 bus1=p1rdm10127.1.2 bus2=p1rlv10829.1.2 switch=n enabled=y phases=2 Linecode=1P_OH_AL_2/0_Rucina_0_416_0_2_2_2_2_2_2_2_2_2_2_2_2_2_2_2_2_2_2_2_2_2_2_2_2_2_2_2_2_2

New Line.l(r:p1rdm10126-p1rlv8680) Units=km Length=0.0359275 bus1=p1rdm10126.1.2 bus2=p1rlv8680.1.2 switch=n enabled=y phases=2 Linecode=1P_OH_AL_4/0_Zuzara_0_416_0_2_2_2_2_2_2_2_2_2_2_2_2_2_2_2_2_2_2_2_2_2_2_2_2_2_2_2_2_2

New Line.l(r:p1rdm10126-p1rdm10127) Units=km Length=0.012492 bus1=p1rdm10127.1.2 bus2=p1rdm10126.1.2 switch=n enabled=y phases=2 Linecode=1P_OH_AL_2/0_Rucina_0_416_0_2_2_2_2_2_2_2_2_2_2_2_2_2_2_2_2_2_2_2_2_2_2_2_2_2_2_2_2_2

New Line.l(r:p1rdm10127-p1rdt5405lv) Units=km Length=0.0124887 bus1=p1rdt5405lv.1.2 bus2=p1rdm10127.1.2 switch=n enabled=y phases=2 Linecode=1P_OH_AL_2/0_Rucina_0_416_0_2_2_2_2_2_2_2_2_2_2_2_2_2_2_2_2_2_2_2_2_2_2_2_2_2_2_2_2_2

New Line.l(r:p1rdt5410lv-p1rlv7218) Units=km Length=0.0724831 bus1=p1rdt5410lv.1.2 bus2=p1rlv7218.1.2 switch=n enabled=y phases=2 Linecode=1P_UG_AL_4/0_Sweetbriar_0_416_0_2_2_2_2_2_2_2_2_2_2_2_2_2_2_2_2_2_2_2_2_2_2_2_2_2_2_2_2_2

New Line.l(r:p1rdt5411lv-p1rlv7220) Units=km Length=0.0174746 bus1=p1rdt5411lv.1.2 bus2=p1rlv7220.1.2 switch=n enabled=y phases=2 Linecode=1P_OH_AL_2/0_Rucina_0_416_0_2_2_2_2_2_2_2_2_2_2_2_2_2_2_2_2_2_2_2_2_2_2_2_2_2_2_2_2_2

New Line.l(r:p1rdt5411lv-p1rlv9614) Units=km Length=0.0174746 bus1=p1rdt5411lv.1.2 bus2=p1rlv9614.1.2 switch=n enabled=y phases=2 Linecode=1P_OH_AL_2/0_Rucina_0_416_0_2_2_2_2_2_2_2_2_2_2_2_2_2_2_2_2_2_2_2_2_2_2_2_2_2_2_2_2_2

New Line.l(r:p1rdt5413lv-p1rlv7222) Units=km Length=0.001 bus1=p1rdt5413lv.1.2 bus2=p1rlv7222.1.2 switch=n enabled=y phases=2 Linecode=1P_OH_AL_4_Periwinkle_0_416_0_2_2_2_2_2_2_2_2_2_2_2_2_2_2_2_2_2_2_2_2_2_2_2_2_2_2_2_2_2

New Line.l(r:p1rdt5483lv-p1rlv7362) Units=km Length=0.001 bus1=p1rdt5483lv.1.2 bus2=p1rlv7362.1.2 switch=n enabled=y phases=2 Linecode=1P_OH_AL_4_Periwinkle_0_416_0_2_2_2_2_2_2_2_2_2_2_2_2_2_2_2_2_2_2_2_2_2_2_2_2_2_2_2_2_2

New Line.l(r:p1rdt5564lv-p1rlv7497) Units=km Length=0.001 bus1=p1rdt5564lv.1.2 bus2=p1rlv7497.1.2 switch=n enabled=y phases=2 Linecode=1P_OH_AL_4_Periwinkle_0_416_0_2_2_2_2_2_2_2_2_2_2_2_2_2_2_2_2_2_2_2_2_2_2_2_2_2_2_2_2_2

New Line.l(r:p1rdt5704lv-p1rlv7772) Units=km Length=0.013768200000000001 bus1=p1rdt5704lv.1.2 bus2=p1rlv7772.1.2 switch=n enabled=y phases=2 Linecode=1P_OH_AL_2/0_Rucina_0_416_0_2_2_2_2_2_2_2_2_2_2_2_2_2_2_2_2_2_2_2_2_2_2_2_2_2_2_2_2_2

New Line.l(r:p1rdm10558-p1rlv7773) Units=km Length=0.085644 bus1=p1rdm10558.1.2 bus2=p1rlv7773.1.2 switch=n enabled=y phases=2 Linecode=1P_OH_AL_4/0_Zuzara_0_416_0_2_2_2_2_2_2_2_2_2_2_2_2_2_2_2_2_2_2_2_2_2_2_2_2_2_2_2_2_2

New Line.l(r:p1rdm10558-p1rdt5705lv) Units=km Length=0.0129878 bus1=p1rdt5705lv.1.2 bus2=p1rdm10558.1.2 switch=n enabled=y phases=2 Linecode=1P_OH_AL_2/0_Rucina_0_416_0_2_2_2_2_2_2_2_2_2_2_2_2_2_2_2_2_2_2_2_2_2_2_2_2_2_2_2_2_2

New Line.l(r:p1rdm10559-p1rlv13262) Units=km Length=0.0536125 bus1=p1rdm10559.1.2 bus2=p1rlv13262.1.2 switch=n enabled=y phases=2 Linecode=1P_OH_AL_4/0_Zuzara_0_416_0_2_2_2_2_2_2_2_2_2_2_2_2_2_2_2_2_2_2_2_2_2_2_2_2_2_2_2_2_2

New Line.l(r:p1rdm10559-p1rdt5705lv) Units=km Length=0.022995 bus1=p1rdt5705lv.1.2 bus2=p1rdm10559.1.2 switch=n enabled=y phases=2 Linecode=1P_OH_AL_2/0_Rucina_0_416_0_2_2_2_2_2_2_2_2_2_2_2_2_2_2_2_2_2_2_2_2_2_2_2_2_2_2_2_2_2

New Line.l(r:p1rdt5706lv-p1rlv7774) Units=km Length=0.001 bus1=p1rdt5706lv.1.2 bus2=p1rlv7774.1.2 switch=n enabled=y phases=2 Linecode=1P_OH_AL_4_Periwinkle_0_416_0_2_2_2_2_2_2_2_2_2_2_2_2_2_2_2_2_2_2_2_2_2_2_2_2_2_2_2_2_2

New Line.l(r:p1rdt5779lv-p1rlv7901) Units=km Length=0.05755840000000001 bus1=p1rdt5779lv.1.2 bus2=p1rlv7901.1.2 switch=n enabled=y phases=2 Linecode=1P_OH_AL_4/0_Zuzara_0_416_0_2_2_2_2_2_2_2_2_2_2_2_2_2_2_2_2_2_2_2_2_2_2_2_2_2_2_2_2_2

New Line.l(r:p1rdt5780lv-p1rlv7902) Units=km Length=0.0682409 bus1=p1rdt5780lv.1.2 bus2=p1rlv7902.1.2 switch=n enabled=y phases=2 Linecode=1P_OH_AL_4/0_Zuzara_0_416_0_2_2_2_2_2_2_2_2_2_2_2_2_2_2_2_2_2_2_2_2_2_2_2_2_2_2_2_2_2

New Line.l(r:p1rdt5782lv-p1rlv7905)_s0 Units=km Length=0.0708843 bus1=p1rdt5782lv.1.2 bus2=p1rdt5782lv-p1rlv7905x.1.2 switch=n enabled=y phases=2 Linecode=1P_OH_AL_4/0_Zuzara_0_416_0_2_2_2_2_2_2_2_2_2_2_2_2_2_2_2_2_2_2_2_2_2_2_2_2_2_2_2_2_2

New Line.l(r:p1rdt5782lv-p1rlv7905)_s1 Units=km Length=0.001 bus1=p1rdt5782lv-p1rlv7905x.1.2 bus2=p1rdt5782lv-p1rlv7905xx.1.2 switch=n enabled=y phases=2 Linecode=1P_UG_AL_4/0_Sweetbriar_0_416_0_2_2_2_2_2_2_2_2_2_2_2_2_2_2_2_2_2_2_2_2_2_2_2_2_2_2_2_2_2

New Line.l(r:p1rdt5782lv-p1rlv7905)_s2 Units=km Length=0.0226399 bus1=p1rdt5782lv-p1rlv7905xx.1.2 bus2=p1rlv7905.1.2 switch=n enabled=y phases=2 Linecode=1P_OH_AL_2/0_Rucina_0_416_0_2_2_2_2_2_2_2_2_2_2_2_2_2_2_2_2_2_2_2_2_2_2_2_2_2_2_2_2_2

New Line.l(r:p1rdt5783lv-p1rlv7907) Units=km Length=0.0531783 bus1=p1rdt5783lv.1.2 bus2=p1rlv7907.1.2 switch=n enabled=y phases=2 Linecode=1P_OH_AL_4/0_Zuzara_0_416_0_2_2_2_2_2_2_2_2_2_2_2_2_2_2_2_2_2_2_2_2_2_2_2_2_2_2_2_2_2

New Line.l(r:p1rdt5784lv-p1rlv7908) Units=km Length=0.001 bus1=p1rdt5784lv.1.2 bus2=p1rlv7908.1.2 switch=n enabled=y phases=2 Linecode=1P_OH_AL_4_Periwinkle_0_416_0_2_2_2_2_2_2_2_2_2_2_2_2_2_2_2_2_2_2_2_2_2_2_2_2_2_2_2_2_2

New Line.l(r:p1rdt5847lv-p1rlv8024) Units=km Length=0.001 bus1=p1rdt5847lv.1.2 bus2=p1rlv8024.1.2 switch=n enabled=y phases=2 Linecode=1P_OH_AL_4_Periwinkle_0_416_0_2_2_2_2_2_2_2_2_2_2_2_2_2_2_2_2_2_2_2_2_2_2_2_2_2_2_2_2_2

New Line.l(r:p1rdt5980lv-p1rlv8281) Units=km Length=0.0228143 bus1=p1rdt5980lv.1.2 bus2=p1rlv8281.1.2 switch=n enabled=y phases=2 Linecode=1P_UG_AL_2/0_Converse_0_416_0_2_2_2_2_2_2_2_2_2_2_2_2_2_2_2_2_2_2_2_2_2_2_2_2_2_2_2_2_2

New Line.l(r:p1rdm11040-p1rlv8404) Units=km Length=0.0325065 bus1=p1rdm11040.1.2 bus2=p1rlv8404.1.2 switch=n enabled=y phases=2 Linecode=1P_OH_AL_4/0_Zuzara_0_416_0_2_2_2_2_2_2_2_2_2_2_2_2_2_2_2_2_2_2_2_2_2_2_2_2_2_2_2_2_2

New Line.l(r:p1rdm11040-p1rdt6048lv) Units=km Length=0.018654500000000004 bus1=p1rdt6048lv.1.2 bus2=p1rdm11040.1.2 switch=n enabled=y phases=2 Linecode=1P_OH_AL_2/0_Rucina_0_416_0_2_2_2_2_2_2_2_2_2_2_2_2_2_2_2_2_2_2_2_2_2_2_2_2_2_2_2_2_2

New Line.l(r:p1rdm11041-p1rlv12370) Units=km Length=0.0445269 bus1=p1rdm11041.1.2 bus2=p1rlv12370.1.2 switch=n enabled=y phases=2 Linecode=1P_OH_AL_4/0_Zuzara_0_416_0_2_2_2_2_2_2_2_2_2_2_2_2_2_2_2_2_2_2_2_2_2_2_2_2_2_2_2_2_2

New Line.l(r:p1rdm11041-p1rdt6048lv) Units=km Length=0.0186633 bus1=p1rdt6048lv.1.2 bus2=p1rdm11041.1.2 switch=n enabled=y phases=2 Linecode=1P_OH_AL_2/0_Rucina_0_416_0_2_2_2_2_2_2_2_2_2_2_2_2_2_2_2_2_2_2_2_2_2_2_2_2_2_2_2_2_2

New Line.l(r:p1rdt6049lv-p1rlv8405) Units=km Length=0.001 bus1=p1rdt6049lv.1.2 bus2=p1rlv8405.1.2 switch=n enabled=y phases=2 Linecode=1P_OH_AL_4_Periwinkle_0_416_0_2_2_2_2_2_2_2_2_2_2_2_2_2_2_2_2_2_2_2_2_2_2_2_2_2_2_2_2_2

New Line.l(r:p1rdt6052lv-p1rlv8411) Units=km Length=0.036049 bus1=p1rdt6052lv.1.2 bus2=p1rlv8411.1.2 switch=n enabled=y phases=2 Linecode=1P_OH_AL_4/0_Zuzara_0_416_0_2_2_2_2_2_2_2_2_2_2_2_2_2_2_2_2_2_2_2_2_2_2_2_2_2_2_2_2_2

New Line.l(r:p1rdt6391lv-p1rlv9081) Units=km Length=0.0315571 bus1=p1rdt6391lv.1.2 bus2=p1rlv9081.1.2 switch=n enabled=y phases=2 Linecode=1P_OH_AL_4/0_Zuzara_0_416_0_2_2_2_2_2_2_2_2_2_2_2_2_2_2_2_2_2_2_2_2_2_2_2_2_2_2_2_2_2

New Line.l(r:p1rdt6459lv-p1rlv9212) Units=km Length=0.0415125 bus1=p1rdt6459lv.1.2 bus2=p1rlv9212.1.2 switch=n enabled=y phases=2 Linecode=1P_OH_AL_4/0_Zuzara_0_416_0_2_2_2_2_2_2_2_2_2_2_2_2_2_2_2_2_2_2_2_2_2_2_2_2_2_2_2_2_2

New Line.l(r:p1rdt6519lv-p1rlv9334) Units=km Length=0.001 bus1=p1rdt6519lv.1.2 bus2=p1rlv9334.1.2 switch=n enabled=y phases=2 Linecode=1P_OH_AL_4_Periwinkle_0_416_0_2_2_2_2_2_2_2_2_2_2_2_2_2_2_2_2_2_2_2_2_2_2_2_2_2_2_2_2_2

New Line.l(r:p1rdm11831-p1rlv9605) Units=km Length=0.0505578 bus1=p1rdm11831.1.2 bus2=p1rlv9605.1.2 switch=n enabled=y phases=2 Linecode=1P_OH_AL_4/0_Zuzara_0_416_0_2_2_2_2_2_2_2_2_2_2_2_2_2_2_2_2_2_2_2_2_2_2_2_2_2_2_2_2_2

New Line.l(r:p1rdm11831-p1rdt6635lv) Units=km Length=0.0196931 bus1=p1rdt6635lv.1.2 bus2=p1rdm11831.1.2 switch=n enabled=y phases=2 Linecode=1P_OH_AL_2/0_Rucina_0_416_0_2_2_2_2_2_2_2_2_2_2_2_2_2_2_2_2_2_2_2_2_2_2_2_2_2_2_2_2_2

New Line.l(r:p1rdm11832-p1rlv13257) Units=km Length=0.0433574 bus1=p1rdm11832.1.2 bus2=p1rlv13257.1.2 switch=n enabled=y phases=2 Linecode=1P_OH_AL_4/0_Zuzara_0_416_0_2_2_2_2_2_2_2_2_2_2_2_2_2_2_2_2_2_2_2_2_2_2_2_2_2_2_2_2_2

New Line.l(r:p1rdm11832-p1rdt6635lv) Units=km Length=0.0196931 bus1=p1rdt6635lv.1.2 bus2=p1rdm11832.1.2 switch=n enabled=y phases=2 Linecode=1P_OH_AL_2/0_Rucina_0_416_0_2_2_2_2_2_2_2_2_2_2_2_2_2_2_2_2_2_2_2_2_2_2_2_2_2_2_2_2_2

New Line.l(r:p1rdt6638lv-p1rlv9615) Units=km Length=0.078052 bus1=p1rdt6638lv.1.2 bus2=p1rlv9615.1.2 switch=n enabled=y phases=2 Linecode=1P_OH_AL_4/0_Zuzara_0_416_0_2_2_2_2_2_2_2_2_2_2_2_2_2_2_2_2_2_2_2_2_2_2_2_2_2_2_2_2_2

New Line.l(r:p1rdt6702lv-p1rlv9742) Units=km Length=0.034399400000000004 bus1=p1rdt6702lv.1.2 bus2=p1rlv9742.1.2 switch=n enabled=y phases=2 Linecode=1P_OH_AL_4/0_Zuzara_0_416_0_2_2_2_2_2_2_2_2_2_2_2_2_2_2_2_2_2_2_2_2_2_2_2_2_2_2_2_2_2

New Line.l(r:p1rdt6703lv-p1rlv9743) Units=km Length=0.001 bus1=p1rdt6703lv.1.2 bus2=p1rlv9743.1.2 switch=n enabled=y phases=2 Linecode=1P_OH_AL_4_Periwinkle_0_416_0_2_2_2_2_2_2_2_2_2_2_2_2_2_2_2_2_2_2_2_2_2_2_2_2_2_2_2_2_2

New Line.l(r:p1rdt6705lv-p1rlv9745) Units=km Length=0.001 bus1=p1rdt6705lv.1.2 bus2=p1rlv9745.1.2 switch=n enabled=y phases=2 Linecode=1P_OH_AL_4_Periwinkle_0_416_0_2_2_2_2_2_2_2_2_2_2_2_2_2_2_2_2_2_2_2_2_2_2_2_2_2_2_2_2_2

New Line.l(r:p1rdm12002-p1rlv9900) Units=km Length=0.0323339 bus1=p1rdm12002.1.2 bus2=p1rlv9900.1.2 switch=n enabled=y phases=2 Linecode=1P_OH_AL_4/0_Zuzara_0_416_0_2_2_2_2_2_2_2_2_2_2_2_2_2_2_2_2_2_2_2_2_2_2_2_2_2_2_2_2_2

New Line.l(r:p1rdm12002-p1rdt6766lv) Units=km Length=0.0187861 bus1=p1rdt6766lv.1.2 bus2=p1rdm12002.1.2 switch=n enabled=y phases=2 Linecode=1P_OH_AL_2/0_Rucina_0_416_0_2_2_2_2_2_2_2_2_2_2_2_2_2_2_2_2_2_2_2_2_2_2_2_2_2_2_2_2_2

New Line.l(r:p1rdm12003-p1rlv12746) Units=km Length=0.0515021 bus1=p1rdm12003.1.2 bus2=p1rlv12746.1.2 switch=n enabled=y phases=2 Linecode=1P_OH_AL_4/0_Zuzara_0_416_0_2_2_2_2_2_2_2_2_2_2_2_2_2_2_2_2_2_2_2_2_2_2_2_2_2_2_2_2_2

New Line.l(r:p1rdm12003-p1rdt6766lv) Units=km Length=0.0187776 bus1=p1rdt6766lv.1.2 bus2=p1rdm12003.1.2 switch=n enabled=y phases=2 Linecode=1P_OH_AL_2/0_Rucina_0_416_0_2_2_2_2_2_2_2_2_2_2_2_2_2_2_2_2_2_2_2_2_2_2_2_2_2_2_2_2_2

New Line.l(r:p1rdt6770lv-p1rlv9906)_s0 Units=km Length=0.001 bus1=p1rdt6770lv.1.2 bus2=p1rdt6770lv-p1rlv9906x.1.2 switch=n enabled=y phases=2 Linecode=1P_OH_AL_4_Periwinkle_0_416_0_2_2_2_2_2_2_2_2_2_2_2_2_2_2_2_2_2_2_2_2_2_2_2_2_2_2_2_2_2

New Line.l(r:p1rdt6770lv-p1rlv9906)_s1 Units=km Length=0.001 bus1=p1rdt6770lv-p1rlv9906x.1.2 bus2=p1rdt6770lv-p1rlv9906xx.1.2 switch=n enabled=y phases=2 Linecode=1P_UG_AL_2/0_Converse_0_416_0_2_2_2_2_2_2_2_2_2_2_2_2_2_2_2_2_2_2_2_2_2_2_2_2_2_2_2_2_2

New Line.l(r:p1rdt6770lv-p1rlv9906)_s2 Units=km Length=0.16668800000000003 bus1=p1rdt6770lv-p1rlv9906xx.1.2 bus2=p1rlv9906.1.2 switch=n enabled=y phases=2 Linecode=1P_OH_AL_4/0_Zuzara_0_416_0_2_2_2_2_2_2_2_2_2_2_2_2_2_2_2_2_2_2_2_2_2_2_2_2_2_2_2_2_2

New Line.l(r:p1rdt6771lv-p1rlv9907) Units=km Length=0.001 bus1=p1rdt6771lv.1.2 bus2=p1rlv9907.1.2 switch=n enabled=y phases=2 Linecode=1P_OH_AL_4_Periwinkle_0_416_0_2_2_2_2_2_2_2_2_2_2_2_2_2_2_2_2_2_2_2_2_2_2_2_2_2_2_2_2_2

New Line.l(r:p1rdt6877lv-p1rlv10149)_s0 Units=km Length=0.001 bus1=p1rdt6877lv.1.2 bus2=p1rdt6877lv-p1rlv10149x.1.2 switch=n enabled=y phases=2 Linecode=1P_OH_AL_4_Periwinkle_0_416_0_2_2_2_2_2_2_2_2_2_2_2_2_2_2_2_2_2_2_2_2_2_2_2_2_2_2_2_2_2

New Line.l(r:p1rdt6877lv-p1rlv10149)_s1 Units=km Length=0.001 bus1=p1rdt6877lv-p1rlv10149x.1.2 bus2=p1rdt6877lv-p1rlv10149xx.1.2 switch=n enabled=y phases=2 Linecode=1P_UG_AL_4/0_Sweetbriar_0_416_0_2_2_2_2_2_2_2_2_2_2_2_2_2_2_2_2_2_2_2_2_2_2_2_2_2_2_2_2_2

New Line.l(r:p1rdt6877lv-p1rlv10149)_s2 Units=km Length=0.148407 bus1=p1rdt6877lv-p1rlv10149xx.1.2 bus2=p1rlv10149.1.2 switch=n enabled=y phases=2 Linecode=1P_UG_AL_4/0_Sweetbriar_0_416_0_2_2_2_2_2_2_2_2_2_2_2_2_2_2_2_2_2_2_2_2_2_2_2_2_2_2_2_2_2

New Line.l(r:p1rdt6878lv-p1rlv10150) Units=km Length=0.0462093 bus1=p1rdt6878lv.1.2 bus2=p1rlv10150.1.2 switch=n enabled=y phases=2 Linecode=1P_UG_AL_2/0_Converse_0_416_0_2_2_2_2_2_2_2_2_2_2_2_2_2_2_2_2_2_2_2_2_2_2_2_2_2_2_2_2_2

New Line.l(r:p1rdt6878lv-p1rlv12894) Units=km Length=0.0414044 bus1=p1rdt6878lv.1.2 bus2=p1rlv12894.1.2 switch=n enabled=y phases=2 Linecode=1P_UG_AL_2/0_Converse_0_416_0_2_2_2_2_2_2_2_2_2_2_2_2_2_2_2_2_2_2_2_2_2_2_2_2_2_2_2_2_2

New Line.l(r:p1rdt6879lv-p1rlv10152) Units=km Length=0.0217506 bus1=p1rdt6879lv.1.2 bus2=p1rlv10152.1.2 switch=n enabled=y phases=2 Linecode=1P_OH_AL_2/0_Rucina_0_416_0_2_2_2_2_2_2_2_2_2_2_2_2_2_2_2_2_2_2_2_2_2_2_2_2_2_2_2_2_2

New Line.l(r:p1rdt6937lv-p1rlv10281) Units=km Length=0.0254201 bus1=p1rdt6937lv.1.2 bus2=p1rlv10281.1.2 switch=n enabled=y phases=2 Linecode=1P_OH_AL_2/0_Rucina_0_416_0_2_2_2_2_2_2_2_2_2_2_2_2_2_2_2_2_2_2_2_2_2_2_2_2_2_2_2_2_2

New Line.l(r:p1rdm12211-p1rlv10977) Units=km Length=0.0244416 bus1=p1rdm12211.1.2 bus2=p1rlv10977.1.2 switch=n enabled=y phases=2 Linecode=1P_OH_AL_2/0_Rucina_0_416_0_2_2_2_2_2_2_2_2_2_2_2_2_2_2_2_2_2_2_2_2_2_2_2_2_2_2_2_2_2

New Line.l(r:p1rdm12211-p1rdt6937lv) Units=km Length=0.0196931 bus1=p1rdt6937lv.1.2 bus2=p1rdm12211.1.2 switch=n enabled=y phases=2 Linecode=1P_OH_AL_2/0_Rucina_0_416_0_2_2_2_2_2_2_2_2_2_2_2_2_2_2_2_2_2_2_2_2_2_2_2_2_2_2_2_2_2

New Line.l(r:p1rdt6938lv-p1rlv10282) Units=km Length=0.0595504 bus1=p1rdt6938lv.1.2 bus2=p1rlv10282.1.2 switch=n enabled=y phases=2 Linecode=1P_OH_AL_4/0_Zuzara_0_416_0_2_2_2_2_2_2_2_2_2_2_2_2_2_2_2_2_2_2_2_2_2_2_2_2_2_2_2_2_2

New Line.l(r:p1rdt6938lv-p1rlv11673) Units=km Length=0.0545706 bus1=p1rdt6938lv.1.2 bus2=p1rlv11673.1.2 switch=n enabled=y phases=2 Linecode=1P_OH_AL_4/0_Zuzara_0_416_0_2_2_2_2_2_2_2_2_2_2_2_2_2_2_2_2_2_2_2_2_2_2_2_2_2_2_2_2_2

New Line.l(r:p1rdt6939lv-p1rlv10283) Units=km Length=0.0665393 bus1=p1rdt6939lv.1.2 bus2=p1rlv10283.1.2 switch=n enabled=y phases=2 Linecode=1P_UG_AL_2/0_Converse_0_416_0_2_2_2_2_2_2_2_2_2_2_2_2_2_2_2_2_2_2_2_2_2_2_2_2_2_2_2_2_2

New Line.l(r:p1rdt7057lv-p1rlv10555) Units=km Length=0.0190644 bus1=p1rdt7057lv.1.2 bus2=p1rlv10555.1.2 switch=n enabled=y phases=2 Linecode=1P_OH_AL_2/0_Rucina_0_416_0_2_2_2_2_2_2_2_2_2_2_2_2_2_2_2_2_2_2_2_2_2_2_2_2_2_2_2_2_2

New Line.l(r:p1rdt7117lv-p1rlv10704) Units=km Length=0.0993525 bus1=p1rdt7117lv.1.2 bus2=p1rlv10704.1.2 switch=n enabled=y phases=2 Linecode=1P_OH_AL_4/0_Zuzara_0_416_0_2_2_2_2_2_2_2_2_2_2_2_2_2_2_2_2_2_2_2_2_2_2_2_2_2_2_2_2_2

New Line.l(r:p1rdt7172lv-p1rlv10826) Units=km Length=0.0624719 bus1=p1rdt7172lv.1.2 bus2=p1rlv10826.1.2 switch=n enabled=y phases=2 Linecode=1P_OH_AL_4/0_Zuzara_0_416_0_2_2_2_2_2_2_2_2_2_2_2_2_2_2_2_2_2_2_2_2_2_2_2_2_2_2_2_2_2

New Line.l(r:p1rdt7173lv-p1rlv10828) Units=km Length=0.021875000000000002 bus1=p1rdt7173lv.1.2 bus2=p1rlv10828.1.2 switch=n enabled=y phases=2 Linecode=1P_OH_AL_2/0_Rucina_0_416_0_2_2_2_2_2_2_2_2_2_2_2_2_2_2_2_2_2_2_2_2_2_2_2_2_2_2_2_2_2

New Line.l(r:p1rdt7367lv-p1rlv11251) Units=km Length=0.049097 bus1=p1rdt7367lv.1.2 bus2=p1rlv11251.1.2 switch=n enabled=y phases=2 Linecode=1P_OH_AL_4/0_Zuzara_0_416_0_2_2_2_2_2_2_2_2_2_2_2_2_2_2_2_2_2_2_2_2_2_2_2_2_2_2_2_2_2

New Line.l(r:p1rdt7426lv-p1rlv11393) Units=km Length=0.0412884 bus1=p1rdt7426lv.1.2 bus2=p1rlv11393.1.2 switch=n enabled=y phases=2 Linecode=1P_OH_AL_4/0_Zuzara_0_416_0_2_2_2_2_2_2_2_2_2_2_2_2_2_2_2_2_2_2_2_2_2_2_2_2_2_2_2_2_2

New Line.l(r:p1rdt7551lv-p1rlv11672) Units=km Length=0.068794 bus1=p1rdt7551lv.1.2 bus2=p1rlv11672.1.2 switch=n enabled=y phases=2 Linecode=1P_OH_AL_4/0_Zuzara_0_416_0_2_2_2_2_2_2_2_2_2_2_2_2_2_2_2_2_2_2_2_2_2_2_2_2_2_2_2_2_2

New Line.l(r:p1rdt7769lv-p1rlv12225) Units=km Length=0.0125966 bus1=p1rdt7769lv.1.2 bus2=p1rlv12225.1.2 switch=n enabled=y phases=2 Linecode=1P_OH_AL_2/0_Rucina_0_416_0_2_2_2_2_2_2_2_2_2_2_2_2_2_2_2_2_2_2_2_2_2_2_2_2_2_2_2_2_2

New Line.l(r:p1rdt7921lv-p1rlv12617) Units=km Length=0.0351459 bus1=p1rdt7921lv.1.2 bus2=p1rlv12617.1.2 switch=n enabled=y phases=2 Linecode=1P_OH_AL_4/0_Zuzara_0_416_0_2_2_2_2_2_2_2_2_2_2_2_2_2_2_2_2_2_2_2_2_2_2_2_2_2_2_2_2_2

New Line.l(r:p1rdt7979lv-p1rlv13650) Units=km Length=0.00231366 bus1=p1rdt7979lv.1.2 bus2=p1rlv13650.1.2 switch=n enabled=y phases=2 Linecode=1P_OH_AL_4_Periwinkle_0_416_0_2_2_2_2_2_2_2_2_2_2_2_2_2_2_2_2_2_2_2_2_2_2_2_2_2_2_2_2_2

New Line.l(r:p1rdm13414-p1rlv12747) Units=km Length=0.00846712 bus1=p1rdm13414.1.2 bus2=p1rlv12747.1.2 switch=n enabled=y phases=2 Linecode=1P_OH_AL_2/0_Rucina_0_416_0_2_2_2_2_2_2_2_2_2_2_2_2_2_2_2_2_2_2_2_2_2_2_2_2_2_2_2_2_2

New Line.l(r:p1rdm13414-p1rdt7979lv) Units=km Length=0.0176656 bus1=p1rdt7979lv.1.2 bus2=p1rdm13414.1.2 switch=n enabled=y phases=2 Linecode=1P_OH_AL_2/0_Rucina_0_416_0_2_2_2_2_2_2_2_2_2_2_2_2_2_2_2_2_2_2_2_2_2_2_2_2_2_2_2_2_2

New Line.l(r:p1rdt7980lv-p1rlv12748) Units=km Length=0.001 bus1=p1rdt7980lv.1.2 bus2=p1rlv12748.1.2 switch=n enabled=y phases=2 Linecode=1P_OH_AL_4_Periwinkle_0_416_0_2_2_2_2_2_2_2_2_2_2_2_2_2_2_2_2_2_2_2_2_2_2_2_2_2_2_2_2_2

New Line.l(r:p1rdt8120lv-p1rlv13134) Units=km Length=0.0428617 bus1=p1rdt8120lv.1.2 bus2=p1rlv13134.1.2 switch=n enabled=y phases=2 Linecode=1P_OH_AL_4/0_Zuzara_0_416_0_2_2_2_2_2_2_2_2_2_2_2_2_2_2_2_2_2_2_2_2_2_2_2_2_2_2_2_2_2

New Line.l(r:p1rdt8121lv-p1rlv13135) Units=km Length=0.001 bus1=p1rdt8121lv.1.2 bus2=p1rlv13135.1.2 switch=n enabled=y phases=2 Linecode=1P_OH_AL_4_Periwinkle_0_416_0_2_2_2_2_2_2_2_2_2_2_2_2_2_2_2_2_2_2_2_2_2_2_2_2_2_2_2_2_2

New Line.l(r:p1rdt8267lv-p1rlv13528) Units=km Length=0.0418353 bus1=p1rdt8267lv.1.2 bus2=p1rlv13528.1.2 switch=n enabled=y phases=2 Linecode=1P_UG_AL_1/0_Brenau_0_416_0_2_2_2_2_2_2_2_2_2_2_2_2_2_2_2_2_2_2_2_2_2_2_2_2_2_2_2_2_2

New Line.l(r:p1rdt2697-p1rdt5087) Units=km Length=0.001 bus1=p1rdt2697-p1rdt5087x.1 bus2=p1rdt5087.1 switch=n enabled=y phases=1 Linecode=1P_OH_AL_ACSR_#2_Sparrow_12_47_0_1_1_1_1_1_1_1_1_1_1_1_1_1_1_1_1_1_1_1_1_1_1_1_1_1_1_1_1_1

New Line.l(r:p1rdt265-p1rdt5404) Units=km Length=0.07647090000000001 bus1=p1rdt265-p1rdt5404x.1 bus2=p1rdt265.1 switch=n enabled=y phases=1 Linecode=1P_OH_AL_ACSR_#2_Sparrow_12_47_0_1_1_1_1_1_1_1_1_1_1_1_1_1_1_1_1_1_1_1_1_1_1_1_1_1_1_1_1_1

New Line.l(r:p1rdt647-p1rdt914) Units=km Length=0.0780575 bus1=p1rdt647.2 bus2=p1rdt914.2 switch=n enabled=y phases=1 Linecode=1P_OH_AL_ACSR_#2_Sparrow_12_47_0_1_1_1_1_1_1_1_1_1_1_1_1_1_1_1_1_1_1_1_1_1_1_1_1_1_1_1_1_1

New Line.l(r:p1rdt5404-p1rdt647) Units=km Length=0.093525 bus1=p1rdt5404-p1rdt647x.2 bus2=p1rdt647.2 switch=n enabled=y phases=1 Linecode=1P_OH_AL_ACSR_#2_Sparrow_12_47_0_1_1_1_1_1_1_1_1_1_1_1_1_1_1_1_1_1_1_1_1_1_1_1_1_1_1_1_1_1

New Line.l(r:p1rdt1027-p1rdt3685) Units=km Length=0.0592448 bus1=p1rdt1027.2 bus2=p1rdt3685.2 switch=n enabled=y phases=1 Linecode=1P_OH_AL_ACSR_#2_Sparrow_12_47_0_1_1_1_1_1_1_1_1_1_1_1_1_1_1_1_1_1_1_1_1_1_1_1_1_1_1_1_1_1

New Line.l(r:p1rdt1027-p1rdt3684) Units=km Length=0.0789919 bus1=p1rdt3684.2 bus2=p1rdt1027.2 switch=n enabled=y phases=1 Linecode=1P_OH_AL_ACSR_#2_Sparrow_12_47_0_1_1_1_1_1_1_1_1_1_1_1_1_1_1_1_1_1_1_1_1_1_1_1_1_1_1_1_1_1

New Line.l(r:p1rdt1605-p1rdt7980) Units=km Length=0.254386 bus1=p1rdt7980.2 bus2=p1rdt1605.2 switch=n enabled=y phases=1 Linecode=1P_OH_AL_ACSR_#2_Sparrow_12_47_0_1_1_1_1_1_1_1_1_1_1_1_1_1_1_1_1_1_1_1_1_1_1_1_1_1_1_1_1_1

New Line.l(r:p1rdt3684-p1rdt7980)_s0 Units=km Length=0.106484 bus1=p1rdt3684.2 bus2=p1rdt3684-p1rdt7980x.2 switch=n enabled=y phases=1 Linecode=1P_OH_AL_ACSR_#2_Sparrow_12_47_0_1_1_1_1_1_1_1_1_1_1_1_1_1_1_1_1_1_1_1_1_1_1_1_1_1_1_1_1_1

New Line.l(r:p1rdt3684-p1rdt7980)_s1 Units=km Length=0.0538267 bus1=p1rdt3684-p1rdt7980x.2 bus2=p1rdt7980.2 switch=n enabled=y phases=1 Linecode=1P_OH_AL_ACSR_#2_Sparrow_12_47_0_1_1_1_1_1_1_1_1_1_1_1_1_1_1_1_1_1_1_1_1_1_1_1_1_1_1_1_1_1

New Line.l(r:p1rdt3684-p1rdt5779) Units=km Length=0.0788861 bus1=p1rdt3684-p1rdt5779x.2 bus2=p1rdt3684.2 switch=n enabled=y phases=1 Linecode=1P_OH_AL_ACSR_#2_Sparrow_12_47_0_1_1_1_1_1_1_1_1_1_1_1_1_1_1_1_1_1_1_1_1_1_1_1_1_1_1_1_1_1

New Line.l(r:p1rdt1606-p1rdt266) Units=km Length=0.149489 bus1=p1rdt266.3 bus2=p1rdt1606.3 switch=n enabled=y phases=1 Linecode=1P_OH_AL_ACSR_#2_Sparrow_12_47_0_1_1_1_1_1_1_1_1_1_1_1_1_1_1_1_1_1_1_1_1_1_1_1_1_1_1_1_1_1

New Line.l(r:p1rdt3391-p1rdt5780) Units=km Length=0.152412 bus1=p1rdt5780.3 bus2=p1rdt3391.3 switch=n enabled=y phases=1 Linecode=1P_OH_AL_ACSR_#2_Sparrow_12_47_0_1_1_1_1_1_1_1_1_1_1_1_1_1_1_1_1_1_1_1_1_1_1_1_1_1_1_1_1_1

New Line.l(r:p1rdt266-p1rdt5780) Units=km Length=0.212747 bus1=p1rdt266.3 bus2=p1rdt5780.3 switch=n enabled=y phases=1 Linecode=1P_OH_AL_ACSR_#2_Sparrow_12_47_0_1_1_1_1_1_1_1_1_1_1_1_1_1_1_1_1_1_1_1_1_1_1_1_1_1_1_1_1_1

New Line.l(r:p1rdt266-p1rdt5847) Units=km Length=0.454551 bus1=p1rdt5847.3 bus2=p1rdt266.3 switch=n enabled=y phases=1 Linecode=1P_OH_AL_ACSR_#2_Sparrow_12_47_0_1_1_1_1_1_1_1_1_1_1_1_1_1_1_1_1_1_1_1_1_1_1_1_1_1_1_1_1_1

New Line.l(r:p1rdt5847-p1rdt6703) Units=km Length=0.466768 bus1=p1rdt5847.3 bus2=p1rdt6703.3 switch=n enabled=y phases=1 Linecode=1P_OH_AL_ACSR_#2_Sparrow_12_47_0_1_1_1_1_1_1_1_1_1_1_1_1_1_1_1_1_1_1_1_1_1_1_1_1_1_1_1_1_1

New Line.l(r:p1rdt5779-p1rdt5847) Units=km Length=0.195491 bus1=p1rdt5779-p1rdt5847x.3 bus2=p1rdt5847.3 switch=n enabled=y phases=1 Linecode=1P_OH_AL_ACSR_#2_Sparrow_12_47_0_1_1_1_1_1_1_1_1_1_1_1_1_1_1_1_1_1_1_1_1_1_1_1_1_1_1_1_1_1

New Line.l(r:p1rdt1604-p1rdt4299) Units=km Length=0.001 bus1=p1rdt1604.1 bus2=p1rdt4299.1 switch=n enabled=y phases=1 Linecode=1P_OH_AL_ACSR_#2_Sparrow_12_47_0_1_1_1_1_1_1_1_1_1_1_1_1_1_1_1_1_1_1_1_1_1_1_1_1_1_1_1_1_1

New Line.l(r:p1rdt1604-p1rdt5246) Units=km Length=0.001 bus1=p1rdt1604.1 bus2=p1rdt5246.1 switch=n enabled=y phases=1 Linecode=1P_OH_AL_ACSR_#2_Sparrow_12_47_0_1_1_1_1_1_1_1_1_1_1_1_1_1_1_1_1_1_1_1_1_1_1_1_1_1_1_1_1_1

New Line.l(r:p1rdt1604-p1rdt392) Units=km Length=0.0553568 bus1=p1rdt392.1 bus2=p1rdt1604.1 switch=n enabled=y phases=1 Linecode=1P_OH_AL_ACSR_#2_Sparrow_12_47_0_1_1_1_1_1_1_1_1_1_1_1_1_1_1_1_1_1_1_1_1_1_1_1_1_1_1_1_1_1

New Line.l(r:p1rdt392-p1rdt6937) Units=km Length=0.190737 bus1=p1rdt392-p1rdt6937x.1 bus2=p1rdt392.1 switch=n enabled=y phases=1 Linecode=1P_OH_AL_ACSR_#2_Sparrow_12_47_0_1_1_1_1_1_1_1_1_1_1_1_1_1_1_1_1_1_1_1_1_1_1_1_1_1_1_1_1_1

New Line.l(r:p1rdt2895-p1rdt6937) Units=km Length=0.226269 bus1=p1rdt2895-p1rdt6937x.3 bus2=p1rdt2895.3 switch=n enabled=y phases=1 Linecode=1P_OH_AL_ACSR_#2_Sparrow_12_47_0_1_1_1_1_1_1_1_1_1_1_1_1_1_1_1_1_1_1_1_1_1_1_1_1_1_1_1_1_1

New Line.l(r:p1rdt3686-p1rdt6519) Units=km Length=0.250342 bus1=p1rdt3686-p1rdt6519x.2 bus2=p1rdt6519.2 switch=n enabled=y phases=1 Linecode=1P_OH_AL_ACSR_#2_Sparrow_12_47_0_1_1_1_1_1_1_1_1_1_1_1_1_1_1_1_1_1_1_1_1_1_1_1_1_1_1_1_1_1

New Line.l(r:p1rdt5404-p1rdt7057) Units=km Length=0.23387000000000002 bus1=p1rdt5404-p1rdt7057x.3 bus2=p1rdt7057.3 switch=n enabled=y phases=1 Linecode=1P_OH_AL_ACSR_#2_Sparrow_12_47_0_1_1_1_1_1_1_1_1_1_1_1_1_1_1_1_1_1_1_1_1_1_1_1_1_1_1_1_1_1

New Line.l(r:p1rdt1266-p1rdt3580) Units=km Length=0.0505337 bus1=p1rdt1266.3 bus2=p1rdt3580.3 switch=n enabled=y phases=1 Linecode=1P_OH_AL_ACSR_#2_Sparrow_12_47_0_1_1_1_1_1_1_1_1_1_1_1_1_1_1_1_1_1_1_1_1_1_1_1_1_1_1_1_1_1

New Line.l(r:p1rdt1266-p1rdt3487) Units=km Length=0.0689336 bus1=p1rdt3487.3 bus2=p1rdt1266.3 switch=n enabled=y phases=1 Linecode=1P_OH_AL_ACSR_#2_Sparrow_12_47_0_1_1_1_1_1_1_1_1_1_1_1_1_1_1_1_1_1_1_1_1_1_1_1_1_1_1_1_1_1

New Line.l(r:p1rdt3487-p1rdt5405) Units=km Length=0.0474155 bus1=p1rdt3487-p1rdt5405x.3 bus2=p1rdt3487.3 switch=n enabled=y phases=1 Linecode=1P_OH_AL_ACSR_#2_Sparrow_12_47_0_1_1_1_1_1_1_1_1_1_1_1_1_1_1_1_1_1_1_1_1_1_1_1_1_1_1_1_1_1

New Line.l(r:p1rdt127-p1rdt2067) Units=km Length=0.215103 bus1=p1rdt127-p1rdt2067x.3 bus2=p1rdt127.3 switch=n enabled=y phases=1 Linecode=1P_OH_AL_ACSR_#2_Sparrow_12_47_0_1_1_1_1_1_1_1_1_1_1_1_1_1_1_1_1_1_1_1_1_1_1_1_1_1_1_1_1_1

New Line.l(r:p1rdt1269-p1rdt520) Units=km Length=0.0869827 bus1=p1rdt1269-p1rdt520x.1 bus2=p1rdt520.1 switch=n enabled=y phases=1 Linecode=1P_OH_AL_ACSR_#2_Sparrow_12_47_0_1_1_1_1_1_1_1_1_1_1_1_1_1_1_1_1_1_1_1_1_1_1_1_1_1_1_1_1_1

New Line.l(r:p1rdt3394-p1rdt800)_s0 Units=km Length=0.103069 bus1=p1rdt3394.3 bus2=p1rdt3394-p1rdt800x.3 switch=n enabled=y phases=1 Linecode=1P_OH_AL_ACSR_#2_Sparrow_12_47_0_1_1_1_1_1_1_1_1_1_1_1_1_1_1_1_1_1_1_1_1_1_1_1_1_1_1_1_1_1

New Line.l(r:p1rdt3394-p1rdt800)_s1 Units=km Length=0.122331 bus1=p1rdt3394-p1rdt800x.3 bus2=p1rdt800.3 switch=n enabled=y phases=1 Linecode=1P_OH_AL_ACSR_#2_Sparrow_12_47_0_1_1_1_1_1_1_1_1_1_1_1_1_1_1_1_1_1_1_1_1_1_1_1_1_1_1_1_1_1

New Line.l(r:p1rdt1394-p1rdt3394)_s0 Units=km Length=0.299574 bus1=p1rdt1394.3 bus2=p1rdt1394-p1rdt3394x.3 switch=n enabled=y phases=1 Linecode=1P_OH_AL_ACSR_#2_Sparrow_12_47_0_1_1_1_1_1_1_1_1_1_1_1_1_1_1_1_1_1_1_1_1_1_1_1_1_1_1_1_1_1

New Line.l(r:p1rdt1394-p1rdt3394)_s1 Units=km Length=0.0415844 bus1=p1rdt1394-p1rdt3394x.3 bus2=p1rdt3394.3 switch=n enabled=y phases=1 Linecode=1P_OH_AL_ACSR_#2_Sparrow_12_47_0_1_1_1_1_1_1_1_1_1_1_1_1_1_1_1_1_1_1_1_1_1_1_1_1_1_1_1_1_1

New Line.l(r:p1rdt3584-p1rdt4995) Units=km Length=0.018964 bus1=p1rdt4995.3 bus2=p1rdt3584.3 switch=n enabled=y phases=1 Linecode=1P_OH_AL_ACSR_#2_Sparrow_12_47_0_1_1_1_1_1_1_1_1_1_1_1_1_1_1_1_1_1_1_1_1_1_1_1_1_1_1_1_1_1

New Line.l(r:p1rdt1394-p1rdt4995) Units=km Length=0.132689 bus1=p1rdt1394.3 bus2=p1rdt4995.3 switch=n enabled=y phases=1 Linecode=1P_OH_AL_ACSR_#2_Sparrow_12_47_0_1_1_1_1_1_1_1_1_1_1_1_1_1_1_1_1_1_1_1_1_1_1_1_1_1_1_1_1_1

New Line.l(r:p1rdt1394-p1rdt2598)_s0 Units=km Length=0.12982 bus1=p1rdt2598.3 bus2=p1rdt1394-p1rdt2598x.3 switch=n enabled=y phases=1 Linecode=1P_OH_AL_ACSR_#2_Sparrow_12_47_0_1_1_1_1_1_1_1_1_1_1_1_1_1_1_1_1_1_1_1_1_1_1_1_1_1_1_1_1_1

New Line.l(r:p1rdt1394-p1rdt2598)_s1 Units=km Length=0.15148 bus1=p1rdt1394-p1rdt2598x.3 bus2=p1rdt1394.3 switch=n enabled=y phases=1 Linecode=1P_OH_AL_ACSR_#2_Sparrow_12_47_0_1_1_1_1_1_1_1_1_1_1_1_1_1_1_1_1_1_1_1_1_1_1_1_1_1_1_1_1_1

New Line.l(r:p1rdt2795-p1rdt4855) Units=km Length=0.117677 bus1=p1rdt4855.3 bus2=p1rdt2795.3 switch=n enabled=y phases=1 Linecode=1P_OH_AL_ACSR_#2_Sparrow_12_47_0_1_1_1_1_1_1_1_1_1_1_1_1_1_1_1_1_1_1_1_1_1_1_1_1_1_1_1_1_1

New Line.l(r:p1rdt2598-p1rdt4855) Units=km Length=0.237694 bus1=p1rdt2598.3 bus2=p1rdt4855.3 switch=n enabled=y phases=1 Linecode=1P_OH_AL_ACSR_#2_Sparrow_12_47_0_1_1_1_1_1_1_1_1_1_1_1_1_1_1_1_1_1_1_1_1_1_1_1_1_1_1_1_1_1

New Line.l(r:p1rdt1269-p1rdt2598) Units=km Length=0.0743972 bus1=p1rdt1269-p1rdt2598x.3 bus2=p1rdt2598.3 switch=n enabled=y phases=1 Linecode=1P_OH_AL_ACSR_#2_Sparrow_12_47_0_1_1_1_1_1_1_1_1_1_1_1_1_1_1_1_1_1_1_1_1_1_1_1_1_1_1_1_1_1
New Line.l(r:p1rdt4710-p1rdt5704) Units=km Length=0.261762 bus1=p1rdt4710.1 bus2=p1rdt5704.1 switch=n enabled=y phases=1 Linecode=1P_OH_AL_ACSR_#2_Sparrow_12_47_0_1_1_1_1_1_1_1_1_1_1_1_1_1_1_1_1_1_1_1_1_1_1_1_1_1_1_1_1_1

New Line.l(r:p1rdt3694-p1rdt4710) Units=km Length=0.241763 bus1=p1rdt3694.1 bus2=p1rdt4710.1 switch=n enabled=y phases=1 Linecode=1P_OH_AL_ACSR_#2_Sparrow_12_47_0_1_1_1_1_1_1_1_1_1_1_1_1_1_1_1_1_1_1_1_1_1_1_1_1_1_1_1_1_1

New Line.l(r:p1rdt1269-p1rdt3694)_s0 Units=km Length=0.12612 bus1=p1rdt1269-p1rdt3694x.1 bus2=p1rdt1269-p1rdt3694xx.1 switch=n enabled=y phases=1 Linecode=1P_OH_AL_ACSR_#2_Sparrow_12_47_0_1_1_1_1_1_1_1_1_1_1_1_1_1_1_1_1_1_1_1_1_1_1_1_1_1_1_1_1_1

New Line.l(r:p1rdt1269-p1rdt3694)_s1 Units=km Length=0.0848583 bus1=p1rdt1269-p1rdt3694xx.1 bus2=p1rdt3694.1 switch=n enabled=y phases=1 Linecode=1P_OH_AL_ACSR_#2_Sparrow_12_47_0_1_1_1_1_1_1_1_1_1_1_1_1_1_1_1_1_1_1_1_1_1_1_1_1_1_1_1_1_1

New Line.l(r:p1rdt2896-p1rdt3486)_s0 Units=km Length=0.0702733 bus1=p1rdt3486.2 bus2=p1rdt2896-p1rdt3486x.2 switch=n enabled=y phases=1 Linecode=1P_OH_AL_ACSR_#2_Sparrow_12_47_0_1_1_1_1_1_1_1_1_1_1_1_1_1_1_1_1_1_1_1_1_1_1_1_1_1_1_1_1_1

New Line.l(r:p1rdt2896-p1rdt3486)_s1 Units=km Length=0.015271900000000001 bus1=p1rdt2896-p1rdt3486x.2 bus2=p1rdt2896.2 switch=n enabled=y phases=1 Linecode=1P_OH_AL_ACSR_#2_Sparrow_12_47_0_1_1_1_1_1_1_1_1_1_1_1_1_1_1_1_1_1_1_1_1_1_1_1_1_1_1_1_1_1

New Line.l(r:p1rdt3486-p1rdt3980) Units=km Length=0.106033 bus1=p1rdt3486-p1rdt3980x.2 bus2=p1rdt3486.2 switch=n enabled=y phases=1 Linecode=1P_OH_AL_ACSR_#2_Sparrow_12_47_0_1_1_1_1_1_1_1_1_1_1_1_1_1_1_1_1_1_1_1_1_1_1_1_1_1_1_1_1_1

New Line.l(r:p1rdt2796-p1rdt3693) Units=km Length=0.176116 bus1=p1rdt2796.2 bus2=p1rdt3693.2 switch=n enabled=y phases=1 Linecode=1P_OH_AL_ACSR_#2_Sparrow_12_47_0_1_1_1_1_1_1_1_1_1_1_1_1_1_1_1_1_1_1_1_1_1_1_1_1_1_1_1_1_1

New Line.l(r:p1rdt273-p1rdt2796) Units=km Length=0.0375979 bus1=p1rdt273.2 bus2=p1rdt2796.2 switch=n enabled=y phases=1 Linecode=1P_OH_AL_ACSR_#2_Sparrow_12_47_0_1_1_1_1_1_1_1_1_1_1_1_1_1_1_1_1_1_1_1_1_1_1_1_1_1_1_1_1_1

New Line.l(r:p1rdt273-p1rdt5091) Units=km Length=0.270138 bus1=p1rdt5091.2 bus2=p1rdt273.2 switch=n enabled=y phases=1 Linecode=1P_OH_AL_ACSR_#2_Sparrow_12_47_0_1_1_1_1_1_1_1_1_1_1_1_1_1_1_1_1_1_1_1_1_1_1_1_1_1_1_1_1_1

New Line.l(r:p1rdt5091-p1rdt8120) Units=km Length=0.521439 bus1=p1rdt8120.2 bus2=p1rdt5091.2 switch=n enabled=y phases=1 Linecode=1P_OH_AL_ACSR_#2_Sparrow_12_47_0_1_1_1_1_1_1_1_1_1_1_1_1_1_1_1_1_1_1_1_1_1_1_1_1_1_1_1_1_1

New Line.l(r:p1rdt2282-p1rdt8120) Units=km Length=0.392068 bus1=p1rdt2282-p1rdt8120x.2 bus2=p1rdt8120.2 switch=n enabled=y phases=1 Linecode=1P_OH_AL_ACSR_#2_Sparrow_12_47_0_1_1_1_1_1_1_1_1_1_1_1_1_1_1_1_1_1_1_1_1_1_1_1_1_1_1_1_1_1

New Line.l(r:p1rdt2184-p1rdt2591) Units=km Length=0.376331 bus1=p1rdt2184-p1rdt2591x.2 bus2=p1rdt2591.2 switch=n enabled=y phases=1 Linecode=1P_OH_AL_ACSR_#2_Sparrow_12_47_0_1_1_1_1_1_1_1_1_1_1_1_1_1_1_1_1_1_1_1_1_1_1_1_1_1_1_1_1_1

New Line.l(r:p1rdt6048-p1rdt796) Units=km Length=0.31827 bus1=p1rdt6048.1 bus2=p1rdt796.1 switch=n enabled=y phases=1 Linecode=1P_OH_AL_ACSR_#2_Sparrow_12_47_0_1_1_1_1_1_1_1_1_1_1_1_1_1_1_1_1_1_1_1_1_1_1_1_1_1_1_1_1_1

New Line.l(r:p1rdt2894-p1rdt6048) Units=km Length=0.370977 bus1=p1rdt6048.1 bus2=p1rdt2894.1 switch=n enabled=y phases=1 Linecode=1P_OH_AL_ACSR_#2_Sparrow_12_47_0_1_1_1_1_1_1_1_1_1_1_1_1_1_1_1_1_1_1_1_1_1_1_1_1_1_1_1_1_1

New Line.l(r:p1rdt6048-p1rdt798) Units=km Length=0.213513 bus1=p1rdt798.1 bus2=p1rdt6048.1 switch=n enabled=y phases=1 Linecode=1P_OH_AL_ACSR_#2_Sparrow_12_47_0_1_1_1_1_1_1_1_1_1_1_1_1_1_1_1_1_1_1_1_1_1_1_1_1_1_1_1_1_1

New Line.l(r:p1rdt4144-p1rdt798) Units=km Length=0.437252 bus1=p1rdt4144.1 bus2=p1rdt798.1 switch=n enabled=y phases=1 Linecode=1P_OH_AL_ACSR_#2_Sparrow_12_47_0_1_1_1_1_1_1_1_1_1_1_1_1_1_1_1_1_1_1_1_1_1_1_1_1_1_1_1_1_1

New Line.l(r:p1rdt2184-p1rdt4144) Units=km Length=0.614074 bus1=p1rdt2184-p1rdt4144x.1 bus2=p1rdt4144.1 switch=n enabled=y phases=1 Linecode=1P_OH_AL_ACSR_#2_Sparrow_12_47_0_1_1_1_1_1_1_1_1_1_1_1_1_1_1_1_1_1_1_1_1_1_1_1_1_1_1_1_1_1

New Line.l(r:p1rdt6049-p1rdt6702) Units=km Length=0.134545 bus1=p1rdt6049-p1rdt6702x.2 bus2=p1rdt6049.2 switch=n enabled=y phases=1 Linecode=1P_OH_AL_ACSR_#2_Sparrow_12_47_0_1_1_1_1_1_1_1_1_1_1_1_1_1_1_1_1_1_1_1_1_1_1_1_1_1_1_1_1_1

New Line.l(r:p1rdt1839-p1rdt4994)_s0 Units=km Length=0.21860200000000002 bus1=p1rdt1839-p1rdt4994x.1 bus2=p1rdt1839-p1rdt4994xx.1 switch=n enabled=y phases=1 Linecode=1P_OH_AL_ACSR_#2_Sparrow_12_47_0_1_1_1_1_1_1_1_1_1_1_1_1_1_1_1_1_1_1_1_1_1_1_1_1_1_1_1_1_1

New Line.l(r:p1rdt1839-p1rdt4994)_s1 Units=km Length=4.77388 bus1=p1rdt1839-p1rdt4994xx.1 bus2=p1rdt4994.1 switch=n enabled=y phases=1 Linecode=1P_OH_AL_ACSR_#2_Sparrow_12_47_0_1_1_1_1_1_1_1_1_1_1_1_1_1_1_1_1_1_1_1_1_1_1_1_1_1_1_1_1_1

New Line.l(r:p1rdt3882-p1rdt5564) Units=km Length=0.118224 bus1=p1rdt3882-p1rdt5564x.2 bus2=p1rdt3882.2 switch=n enabled=y phases=1 Linecode=1P_OH_AL_ACSR_#2_Sparrow_12_47_0_1_1_1_1_1_1_1_1_1_1_1_1_1_1_1_1_1_1_1_1_1_1_1_1_1_1_1_1_1

New Line.l(r:p1rdt2898-p1rdt5784) Units=km Length=0.198744 bus1=p1rdt2898-p1rdt5784x.3 bus2=p1rdt5784.3 switch=n enabled=y phases=1 Linecode=1P_OH_AL_ACSR_#2_Sparrow_12_47_0_1_1_1_1_1_1_1_1_1_1_1_1_1_1_1_1_1_1_1_1_1_1_1_1_1_1_1_1_1

New Line.l(r:p1rdt274-p1rdt4623) Units=km Length=0.410021 bus1=p1rdt4623.3 bus2=p1rdt274.3 switch=n enabled=y phases=1 Linecode=1P_OH_AL_ACSR_#2_Sparrow_12_47_0_1_1_1_1_1_1_1_1_1_1_1_1_1_1_1_1_1_1_1_1_1_1_1_1_1_1_1_1_1

New Line.l(r:p1rdt6638-p1rdt7367) Units=km Length=0.0828274 bus1=p1rdt6638.3 bus2=p1rdt7367.3 switch=n enabled=y phases=1 Linecode=1P_OH_AL_ACSR_#2_Sparrow_12_47_0_1_1_1_1_1_1_1_1_1_1_1_1_1_1_1_1_1_1_1_1_1_1_1_1_1_1_1_1_1

New Line.l(r:p1rdt5413-p1rdt6638)_s0 Units=km Length=0.122489 bus1=p1rdt5413.3 bus2=p1rdt5413-p1rdt6638x.3 switch=n enabled=y phases=1 Linecode=1P_OH_AL_ACSR_#2_Sparrow_12_47_0_1_1_1_1_1_1_1_1_1_1_1_1_1_1_1_1_1_1_1_1_1_1_1_1_1_1_1_1_1

New Line.l(r:p1rdt5413-p1rdt6638)_s1 Units=km Length=0.00354545 bus1=p1rdt5413-p1rdt6638x.3 bus2=p1rdt6638.3 switch=n enabled=y phases=1 Linecode=1P_OH_AL_ACSR_#2_Sparrow_12_47_0_1_1_1_1_1_1_1_1_1_1_1_1_1_1_1_1_1_1_1_1_1_1_1_1_1_1_1_1_1

New Line.l(r:p1rdt4623-p1rdt5413)_s0 Units=km Length=0.348408 bus1=p1rdt4623.3 bus2=p1rdt4623-p1rdt5413x.3 switch=n enabled=y phases=1 Linecode=1P_OH_AL_ACSR_#2_Sparrow_12_47_0_1_1_1_1_1_1_1_1_1_1_1_1_1_1_1_1_1_1_1_1_1_1_1_1_1_1_1_1_1

New Line.l(r:p1rdt4623-p1rdt5413)_s1 Units=km Length=0.3845700000000001 bus1=p1rdt4623-p1rdt5413x.3 bus2=p1rdt5413.3 switch=n enabled=y phases=1 Linecode=1P_OH_AL_ACSR_#2_Sparrow_12_47_0_1_1_1_1_1_1_1_1_1_1_1_1_1_1_1_1_1_1_1_1_1_1_1_1_1_1_1_1_1

New Line.l(r:p1rdt4623-p1rdt6705) Units=km Length=0.0643146 bus1=p1rdt4623.3 bus2=p1rdt6705.3 switch=n enabled=y phases=1 Linecode=1P_OH_AL_ACSR_#2_Sparrow_12_47_0_1_1_1_1_1_1_1_1_1_1_1_1_1_1_1_1_1_1_1_1_1_1_1_1_1_1_1_1_1

New Line.l(r:p1rdt4623-p1rdt5706)_s0 Units=km Length=0.24893500000000002 bus1=p1rdt4623-p1rdt5706xx.3 bus2=p1rdt4623-p1rdt5706x.3 switch=n enabled=y phases=1 Linecode=1P_OH_AL_ACSR_#2_Sparrow_12_47_0_1_1_1_1_1_1_1_1_1_1_1_1_1_1_1_1_1_1_1_1_1_1_1_1_1_1_1_1_1

New Line.l(r:p1rdt4623-p1rdt5706)_s1 Units=km Length=0.363815 bus1=p1rdt4623-p1rdt5706x.3 bus2=p1rdt4623.3 switch=n enabled=y phases=1 Linecode=1P_OH_AL_ACSR_#2_Sparrow_12_47_0_1_1_1_1_1_1_1_1_1_1_1_1_1_1_1_1_1_1_1_1_1_1_1_1_1_1_1_1_1

New Line.l(r:p1rdt272-p1rdt8121) Units=km Length=0.478886 bus1=p1rdt272-p1rdt8121x.2 bus2=p1rdt272.2 switch=n enabled=y phases=1 Linecode=1P_OH_AL_ACSR_#2_Sparrow_12_47_0_1_1_1_1_1_1_1_1_1_1_1_1_1_1_1_1_1_1_1_1_1_1_1_1_1_1_1_1_1

New Line.l(r:p1rdt5092-p1rdt7769) Units=km Length=0.0903965 bus1=p1rdt5092.1 bus2=p1rdt5092_b1_1.1 switch=n enabled=y phases=1 Linecode=1P_OH_AL_ACSR_#2_Sparrow_12_47_0_1_1_1_1_1_1_1_1_1_1_1_1_1_1_1_1_1_1_1_1_1_1_1_1_1_1_1_1_1

New Line.l(r:p1rdt5092-p1rdt920) Units=km Length=0.496585 bus1=p1rdt920.1 bus2=p1rdt5092.1 switch=n enabled=y phases=1 Linecode=1P_OH_AL_ACSR_#2_Sparrow_12_47_0_1_1_1_1_1_1_1_1_1_1_1_1_1_1_1_1_1_1_1_1_1_1_1_1_1_1_1_1_1

New Line.l(r:p1rdt5483-p1rdt920)_s0 Units=km Length=0.459 bus1=p1rdt920.1 bus2=p1rdt5483-p1rdt920x.1 switch=n enabled=y phases=1 Linecode=1P_OH_AL_ACSR_#2_Sparrow_12_47_0_1_1_1_1_1_1_1_1_1_1_1_1_1_1_1_1_1_1_1_1_1_1_1_1_1_1_1_1_1

New Line.l(r:p1rdt5483-p1rdt920)_s1 Units=km Length=2.70503 bus1=p1rdt5483-p1rdt920x.1 bus2=p1rdt5483.1 switch=n enabled=y phases=1 Linecode=1P_OH_AL_ACSR_#2_Sparrow_12_47_0_1_1_1_1_1_1_1_1_1_1_1_1_1_1_1_1_1_1_1_1_1_1_1_1_1_1_1_1_1

New Line.l(r:p1rdt4307-p1rdt920)_s0 Units=km Length=0.0615957 bus1=p1rdt4307.1 bus2=p1rdt4307-p1rdt920x.1 switch=n enabled=y phases=1 Linecode=1P_OH_AL_ACSR_#2_Sparrow_12_47_0_1_1_1_1_1_1_1_1_1_1_1_1_1_1_1_1_1_1_1_1_1_1_1_1_1_1_1_1_1

New Line.l(r:p1rdt4307-p1rdt920)_s1 Units=km Length=1.5682 bus1=p1rdt4307-p1rdt920x.1 bus2=p1rdt4307-p1rdt920xx.1 switch=n enabled=y phases=1 Linecode=1P_OH_AL_ACSR_#2_Sparrow_12_47_0_1_1_1_1_1_1_1_1_1_1_1_1_1_1_1_1_1_1_1_1_1_1_1_1_1_1_1_1_1

New Line.l(r:p1rdt4307-p1rdt920)_s2 Units=km Length=0.101866 bus1=p1rdt4307-p1rdt920xx.1 bus2=p1rdt920.1 switch=n enabled=y phases=1 Linecode=1P_OH_AL_ACSR_#2_Sparrow_12_47_0_1_1_1_1_1_1_1_1_1_1_1_1_1_1_1_1_1_1_1_1_1_1_1_1_1_1_1_1_1

New Line.l(r:p1rdt2292-p1rdt4307) Units=km Length=0.0408353 bus1=p1rdt2292.1 bus2=p1rdt4307.1 switch=n enabled=y phases=1 Linecode=1P_OH_AL_ACSR_#2_Sparrow_12_47_0_1_1_1_1_1_1_1_1_1_1_1_1_1_1_1_1_1_1_1_1_1_1_1_1_1_1_1_1_1

New Line.l(r:p1rdt2292-p1rdt8121)_s0 Units=km Length=0.385276 bus1=p1rdt2292-p1rdt8121xx.1 bus2=p1rdt2292-p1rdt8121x.1 switch=n enabled=y phases=1 Linecode=1P_OH_AL_ACSR_#2_Sparrow_12_47_0_1_1_1_1_1_1_1_1_1_1_1_1_1_1_1_1_1_1_1_1_1_1_1_1_1_1_1_1_1

New Line.l(r:p1rdt2292-p1rdt8121)_s1 Units=km Length=0.482417 bus1=p1rdt2292-p1rdt8121x.1 bus2=p1rdt2292.1 switch=n enabled=y phases=1 Linecode=1P_OH_AL_ACSR_#2_Sparrow_12_47_0_1_1_1_1_1_1_1_1_1_1_1_1_1_1_1_1_1_1_1_1_1_1_1_1_1_1_1_1_1

New Line.l(r:p1rdt5918-p1rdt6878) Units=km Length=0.001 bus1=p1rdt5918-p1rdt6878xx.3 bus2=p1rdt5918-p1rdt6878xxx.3 switch=n enabled=y phases=1 Linecode=1P_UG_AL_#2_15_12_47_0_1_1_1_1_1_1_1_1_1_1_1_1_1_1_1_1_1_1_1_1_1_1_1_1_1_1_1_1_1

New Line.l(r:p1rdt3009-p1rdt3216) Units=km Length=0.056048 bus1=p1rdt3009-p1rdt3216x.3 bus2=p1rdt3216.3 switch=n enabled=y phases=1 Linecode=1P_OH_AL_ACSR_#2_Sparrow_12_47_0_1_1_1_1_1_1_1_1_1_1_1_1_1_1_1_1_1_1_1_1_1_1_1_1_1_1_1_1_1

New Line.l(r:p1rdt1838-p1rdt2597) Units=km Length=0.090374 bus1=p1rdt2597.2 bus2=p1rdt1838.2 switch=n enabled=y phases=1 Linecode=1P_OH_AL_ACSR_#2_Sparrow_12_47_0_1_1_1_1_1_1_1_1_1_1_1_1_1_1_1_1_1_1_1_1_1_1_1_1_1_1_1_1_1

New Line.l(r:p1rdt2597-p1rdt6939) Units=km Length=0.0186774 bus1=p1rdt2597-p1rdt6939xx.2 bus2=p1rdt2597-p1rdt6939x.2 switch=n enabled=y phases=1 Linecode=1P_UG_AL_#2_15_12_47_0_1_1_1_1_1_1_1_1_1_1_1_1_1_1_1_1_1_1_1_1_1_1_1_1_1_1_1_1_1

New Line.l(r:p1rdt2291-p1rdt6939) Units=km Length=0.0466803 bus1=p1rdt2291-p1rdt6939xx.2 bus2=p1rdt2291-p1rdt6939xxx.2 switch=n enabled=y phases=1 Linecode=1P_UG_AL_#2_15_12_47_0_1_1_1_1_1_1_1_1_1_1_1_1_1_1_1_1_1_1_1_1_1_1_1_1_1_1_1_1_1

New Line.l(r:p1rdt5410-p1rdt7983) Units=km Length=0.0373484 bus1=p1rdt5410-p1rdt7983xx.3 bus2=p1rdt5410-p1rdt7983x.3 switch=n enabled=y phases=1 Linecode=1P_UG_AL_#2_15_12_47_0_1_1_1_1_1_1_1_1_1_1_1_1_1_1_1_1_1_1_1_1_1_1_1_1_1_1_1_1_1

New Line.l(r:p1rdt2068-p1rdt5090) Units=km Length=0.0517096 bus1=p1rdt2068-p1rdt5090x.3 bus2=p1rdt2068-p1rdt5090xx.3 switch=n enabled=y phases=1 Linecode=1P_UG_AL_#2_15_12_47_0_1_1_1_1_1_1_1_1_1_1_1_1_1_1_1_1_1_1_1_1_1_1_1_1_1_1_1_1_1

New Line.l(r:p1rdt2068-p1rdt6879)_s0 Units=km Length=0.17228700000000002 bus1=p1rdt2068-p1rdt6879xxxx.3 bus2=p1rdt2068-p1rdt6879xxx.3 switch=n enabled=y phases=1 Linecode=1P_OH_AL_ACSR_#2_Sparrow_12_47_0_1_1_1_1_1_1_1_1_1_1_1_1_1_1_1_1_1_1_1_1_1_1_1_1_1_1_1_1_1

New Line.l(r:p1rdt2068-p1rdt6879)_s1 Units=km Length=0.001 bus1=p1rdt2068-p1rdt6879xxx.3 bus2=p1rdt2068-p1rdt6879xx.3 switch=n enabled=y phases=1 Linecode=1P_UG_AL_#2_15_12_47_0_1_1_1_1_1_1_1_1_1_1_1_1_1_1_1_1_1_1_1_1_1_1_1_1_1_1_1_1_1

New Line.l(r:p1rdt2068-p1rdt6879)_s2 Units=km Length=0.10902 bus1=p1rdt2068-p1rdt6879xx.3 bus2=p1rdt2068-p1rdt6879x.3 switch=n enabled=y phases=1 Linecode=1P_UG_AL_#2_15_12_47_0_1_1_1_1_1_1_1_1_1_1_1_1_1_1_1_1_1_1_1_1_1_1_1_1_1_1_1_1_1

New Line.l(r:p1rdt5249-p1rdt6770) Units=km Length=0.0770631 bus1=p1rdt6770.1 bus2=p1rdt5249.1 switch=n enabled=y phases=1 Linecode=1P_OH_AL_ACSR_#2_Sparrow_12_47_0_1_1_1_1_1_1_1_1_1_1_1_1_1_1_1_1_1_1_1_1_1_1_1_1_1_1_1_1_1

New Line.l(r:p1rdt3785-p1rdt6770) Units=km Length=0.0385222 bus1=p1rdt3785.1 bus2=p1rdt6770.1 switch=n enabled=y phases=1 Linecode=1P_OH_AL_ACSR_#2_Sparrow_12_47_0_1_1_1_1_1_1_1_1_1_1_1_1_1_1_1_1_1_1_1_1_1_1_1_1_1_1_1_1_1

New Line.l(r:p1rdt3785-p1rdt6459) Units=km Length=0.0577879 bus1=p1rdt6459.1 bus2=p1rdt3785.1 switch=n enabled=y phases=1 Linecode=1P_OH_AL_ACSR_#2_Sparrow_12_47_0_1_1_1_1_1_1_1_1_1_1_1_1_1_1_1_1_1_1_1_1_1_1_1_1_1_1_1_1_1

New Line.l(r:p1rdt6459-p1rdt7426) Units=km Length=0.0385315 bus1=p1rdt7426.1 bus2=p1rdt6459.1 switch=n enabled=y phases=1 Linecode=1P_OH_AL_ACSR_#2_Sparrow_12_47_0_1_1_1_1_1_1_1_1_1_1_1_1_1_1_1_1_1_1_1_1_1_1_1_1_1_1_1_1_1

New Line.l(r:p1rdt6879-p1rdt7426) Units=km Length=0.0192658 bus1=p1rdt6879-p1rdt7426x.1 bus2=p1rdt7426.1 switch=n enabled=y phases=1 Linecode=1P_OH_AL_ACSR_#2_Sparrow_12_47_0_1_1_1_1_1_1_1_1_1_1_1_1_1_1_1_1_1_1_1_1_1_1_1_1_1_1_1_1_1

New Line.l(r:p1rdt13-p1rdt1395)_s0 Units=km Length=0.115876 bus1=p1rdt13.3 bus2=p1rdt13-p1rdt1395x.3 switch=n enabled=y phases=1 Linecode=1P_OH_AL_ACSR_#2_Sparrow_12_47_0_1_1_1_1_1_1_1_1_1_1_1_1_1_1_1_1_1_1_1_1_1_1_1_1_1_1_1_1_1

New Line.l(r:p1rdt13-p1rdt1395)_s1 Units=km Length=0.0157898 bus1=p1rdt13-p1rdt1395x.3 bus2=p1rdt1395.3 switch=n enabled=y phases=1 Linecode=1P_OH_AL_ACSR_#2_Sparrow_12_47_0_1_1_1_1_1_1_1_1_1_1_1_1_1_1_1_1_1_1_1_1_1_1_1_1_1_1_1_1_1

New Line.l(r:p1rdt13-p1rdt5783) Units=km Length=0.248755 bus1=p1rdt5783.3 bus2=p1rdt13.3 switch=n enabled=y phases=1 Linecode=1P_OH_AL_ACSR_#2_Sparrow_12_47_0_1_1_1_1_1_1_1_1_1_1_1_1_1_1_1_1_1_1_1_1_1_1_1_1_1_1_1_1_1

New Line.l(r:p1rdt5783-p1rdt7117) Units=km Length=0.0120314 bus1=p1rdt7117.3 bus2=p1rdt5783.3 switch=n enabled=y phases=1 Linecode=1P_OH_AL_ACSR_#2_Sparrow_12_47_0_1_1_1_1_1_1_1_1_1_1_1_1_1_1_1_1_1_1_1_1_1_1_1_1_1_1_1_1_1

New Line.l(r:p1rdt2069-p1rdt7117) Units=km Length=0.29779100000000003 bus1=p1rdt2069-p1rdt7117x.3 bus2=p1rdt7117.3 switch=n enabled=y phases=1 Linecode=1P_OH_AL_ACSR_#2_Sparrow_12_47_0_1_1_1_1_1_1_1_1_1_1_1_1_1_1_1_1_1_1_1_1_1_1_1_1_1_1_1_1_1

New Line.l(r:p1rdt519-p1rdt6771)_s0 Units=km Length=0.293947 bus1=p1rdt6771.2 bus2=p1rdt519-p1rdt6771x.2 switch=n enabled=y phases=1 Linecode=1P_OH_AL_ACSR_#2_Sparrow_12_47_0_1_1_1_1_1_1_1_1_1_1_1_1_1_1_1_1_1_1_1_1_1_1_1_1_1_1_1_1_1

New Line.l(r:p1rdt519-p1rdt6771)_s1 Units=km Length=0.0134865 bus1=p1rdt519-p1rdt6771x.2 bus2=p1rdt519.2 switch=n enabled=y phases=1 Linecode=1P_OH_AL_ACSR_#2_Sparrow_12_47_0_1_1_1_1_1_1_1_1_1_1_1_1_1_1_1_1_1_1_1_1_1_1_1_1_1_1_1_1_1

New Line.l(r:p1rdt5411-p1rdt6771) Units=km Length=0.299223 bus1=p1rdt5411-p1rdt6771x.2 bus2=p1rdt6771.2 switch=n enabled=y phases=1 Linecode=1P_OH_AL_ACSR_#2_Sparrow_12_47_0_1_1_1_1_1_1_1_1_1_1_1_1_1_1_1_1_1_1_1_1_1_1_1_1_1_1_1_1_1

New Line.l(r:p1rdt4300-p1rdt6766)_s0 Units=km Length=0.153441 bus1=p1rdt4300-p1rdt6766x.2 bus2=p1rdt4300-p1rdt6766xx.2 switch=n enabled=y phases=1 Linecode=1P_OH_AL_ACSR_#2_Sparrow_12_47_0_1_1_1_1_1_1_1_1_1_1_1_1_1_1_1_1_1_1_1_1_1_1_1_1_1_1_1_1_1

New Line.l(r:p1rdt4300-p1rdt6766)_s1 Units=km Length=0.267379 bus1=p1rdt4300-p1rdt6766xx.2 bus2=p1rdt6766.2 switch=n enabled=y phases=1 Linecode=1P_OH_AL_ACSR_#2_Sparrow_12_47_0_1_1_1_1_1_1_1_1_1_1_1_1_1_1_1_1_1_1_1_1_1_1_1_1_1_1_1_1_1

New Line.l(r:p1rdt5779-p1rdt6938) Units=km Length=0.0869156 bus1=p1rdt6938.1.2.3 bus2=p1rdt5779.1.2.3 switch=n enabled=y phases=3 Linecode=3P_OH_AL_ACSR_4/0_Penguin_12_47_0_3_3_3_3_3_3_3_3_3_3_3_3_3_3_3_3_3_3_3_3_3_3_3_3_3_3_3_3_3

New Line.l(r:p1rdt2185-p1rdt6938) Units=km Length=0.0387027 bus1=p1rdt2185.1.2.3 bus2=p1rdt6938.1.2.3 switch=n enabled=y phases=3 Linecode=3P_OH_AL_ACSR_4/0_Penguin_12_47_0_3_3_3_3_3_3_3_3_3_3_3_3_3_3_3_3_3_3_3_3_3_3_3_3_3_3_3_3_3

New Line.l(r:p1rdt2185-p1rdt9) Units=km Length=0.09675230000000001 bus1=p1rdt9.1.2.3 bus2=p1rdt2185.1.2.3 switch=n enabled=y phases=3 Linecode=3P_OH_AL_ACSR_4/0_Penguin_12_47_0_3_3_3_3_3_3_3_3_3_3_3_3_3_3_3_3_3_3_3_3_3_3_3_3_3_3_3_3_3

New Line.l(r:p1rdt6937-p1rdt9) Units=km Length=0.156527 bus1=p1rdt6937.1.2.3 bus2=p1rdt9.1.2.3 switch=n enabled=y phases=3 Linecode=3P_OH_AL_ACSR_4/0_Penguin_12_47_0_3_3_3_3_3_3_3_3_3_3_3_3_3_3_3_3_3_3_3_3_3_3_3_3_3_3_3_3_3

New Line.l(r:p1rdt6635-p1rdt6937) Units=km Length=0.078776 bus1=p1rdt6635.1.2.3 bus2=p1rdt6937.1.2.3 switch=n enabled=y phases=3 Linecode=3P_OH_AL_ACSR_4/0_Penguin_12_47_0_3_3_3_3_3_3_3_3_3_3_3_3_3_3_3_3_3_3_3_3_3_3_3_3_3_3_3_3_3

New Line.l(r:p1rdt3579-p1rdt6635) Units=km Length=0.078781 bus1=p1rdt3579.1.2.3 bus2=p1rdt6635.1.2.3 switch=n enabled=y phases=3 Linecode=3P_OH_AL_ACSR_4/0_Penguin_12_47_0_3_3_3_3_3_3_3_3_3_3_3_3_3_3_3_3_3_3_3_3_3_3_3_3_3_3_3_3_3

New Line.l(r:p1rdt3579-p1rdt3686) Units=km Length=0.138 bus1=p1rdt3686.1.2.3 bus2=p1rdt3579.1.2.3 switch=n enabled=y phases=3 Linecode=3P_OH_AL_ACSR_4/0_Penguin_12_47_0_3_3_3_3_3_3_3_3_3_3_3_3_3_3_3_3_3_3_3_3_3_3_3_3_3_3_3_3_3

New Line.l(r:p1rdt3686-p1rdt5404) Units=km Length=0.196976 bus1=p1rdt5404.1.2.3 bus2=p1rdt3686.1.2.3 switch=n enabled=y phases=3 Linecode=3P_OH_AL_ACSR_4/0_Penguin_12_47_0_3_3_3_3_3_3_3_3_3_3_3_3_3_3_3_3_3_3_3_3_3_3_3_3_3_3_3_3_3

New Line.l(r:p1rdt2697-p1rdt5404) Units=km Length=0.205309 bus1=p1rdt2697.1.2.3 bus2=p1rdt5404.1.2.3 switch=n enabled=y phases=3 Linecode=3P_OH_AL_ACSR_4/0_Penguin_12_47_0_3_3_3_3_3_3_3_3_3_3_3_3_3_3_3_3_3_3_3_3_3_3_3_3_3_3_3_3_3

New Line.l(r:p1rdt269-p1rdt2697) Units=km Length=0.163635 bus1=p1rdt269.1.2.3 bus2=p1rdt2697.1.2.3 switch=n enabled=y phases=3 Linecode=3P_OH_AL_ACSR_4/0_Penguin_12_47_0_3_3_3_3_3_3_3_3_3_3_3_3_3_3_3_3_3_3_3_3_3_3_3_3_3_3_3_3_3

New Line.l(r:p1rdt1607-p1rdt5405) Units=km Length=0.062765 bus1=p1rdt1607.1.2.3 bus2=p1rdt5405.1.2.3 switch=n enabled=y phases=3 Linecode=3P_OH_AL_ACSR_4/0_Penguin_12_47_0_3_3_3_3_3_3_3_3_3_3_3_3_3_3_3_3_3_3_3_3_3_3_3_3_3_3_3_3_3

New Line.l(r:p1rdt1607-p1rdt2502) Units=km Length=0.575027 bus1=p1rdt2502.1.2.3 bus2=p1rdt1607.1.2.3 switch=n enabled=y phases=3 Linecode=3P_OH_AL_ACSR_4/0_Penguin_12_47_0_3_3_3_3_3_3_3_3_3_3_3_3_3_3_3_3_3_3_3_3_3_3_3_3_3_3_3_3_3

New Line.l(r:p1rdt1269-p1rdt3980) Units=km Length=0.396658 bus1=p1rdt3980.1.2.3 bus2=p1rdt1269.1.2.3 switch=n enabled=y phases=3 Linecode=3P_OH_AL_ACSR_4/0_Penguin_12_47_0_3_3_3_3_3_3_3_3_3_3_3_3_3_3_3_3_3_3_3_3_3_3_3_3_3_3_3_3_3

New Line.l(r:p1rdt2282-p1rdt3980)_s0 Units=km Length=0.187855 bus1=p1rdt2282.1.2.3 bus2=p1rdt2282-p1rdt3980x.1.2.3 switch=n enabled=y phases=3 Linecode=3P_OH_AL_ACSR_4/0_Penguin_12_47_0_3_3_3_3_3_3_3_3_3_3_3_3_3_3_3_3_3_3_3_3_3_3_3_3_3_3_3_3_3

New Line.l(r:p1rdt2282-p1rdt3980)_s1 Units=km Length=0.139317 bus1=p1rdt2282-p1rdt3980x.1.2.3 bus2=p1rdt3980.1.2.3 switch=n enabled=y phases=3 Linecode=3P_OH_AL_ACSR_4/0_Penguin_12_47_0_3_3_3_3_3_3_3_3_3_3_3_3_3_3_3_3_3_3_3_3_3_3_3_3_3_3_3_3_3

New Line.l(r:p1rdt2067-p1rdt2282) Units=km Length=0.21808600000000003 bus1=p1rdt2067.1.2.3 bus2=p1rdt2282.1.2.3 switch=n enabled=y phases=3 Linecode=3P_OH_AL_ACSR_4/0_Penguin_12_47_0_3_3_3_3_3_3_3_3_3_3_3_3_3_3_3_3_3_3_3_3_3_3_3_3_3_3_3_3_3

New Line.l(r:p1rdt2067-p1rdt916) Units=km Length=0.244846 bus1=p1rdt916.1.2.3 bus2=p1rdt2067.1.2.3 switch=n enabled=y phases=3 Linecode=3P_OH_AL_ACSR_4/0_Penguin_12_47_0_3_3_3_3_3_3_3_3_3_3_3_3_3_3_3_3_3_3_3_3_3_3_3_3_3_3_3_3_3

New Line.l(r:p1rdt2186-p1rdt916) Units=km Length=0.0612567 bus1=p1rdt2186.1.2.3 bus2=p1rdt916.1.2.3 switch=n enabled=y phases=3 Linecode=3P_OH_AL_ACSR_4/0_Penguin_12_47_0_3_3_3_3_3_3_3_3_3_3_3_3_3_3_3_3_3_3_3_3_3_3_3_3_3_3_3_3_3

New Line.l(r:p1rdt2186-p1rdt2502) Units=km Length=0.0654892 bus1=p1rdt2502.1.2.3 bus2=p1rdt2186.1.2.3 switch=n enabled=y phases=3 Linecode=3P_OH_AL_ACSR_4/0_Penguin_12_47_0_3_3_3_3_3_3_3_3_3_3_3_3_3_3_3_3_3_3_3_3_3_3_3_3_3_3_3_3_3

New Line.l(r:p1rdt1028-p1rdt2502) Units=km Length=0.120384 bus1=p1rdt1028.1.2.3 bus2=p1rdt2502.1.2.3 switch=n enabled=y phases=3 Linecode=3P_OH_AL_ACSR_4/0_Penguin_12_47_0_3_3_3_3_3_3_3_3_3_3_3_3_3_3_3_3_3_3_3_3_3_3_3_3_3_3_3_3_3

New Line.l(r:p1rdt1028-p1rdt3108) Units=km Length=0.116644 bus1=p1rdt3108.1.2.3 bus2=p1rdt1028.1.2.3 switch=n enabled=y phases=3 Linecode=3P_OH_AL_ACSR_4/0_Penguin_12_47_0_3_3_3_3_3_3_3_3_3_3_3_3_3_3_3_3_3_3_3_3_3_3_3_3_3_3_3_3_3

New Line.l(r:p1rdt3108-p1rdt7921) Units=km Length=0.0971948 bus1=p1rdt7921.1.2.3 bus2=p1rdt3108.1.2.3 switch=n enabled=y phases=3 Linecode=3P_OH_AL_ACSR_4/0_Penguin_12_47_0_3_3_3_3_3_3_3_3_3_3_3_3_3_3_3_3_3_3_3_3_3_3_3_3_3_3_3_3_3

New Line.l(r:p1rdt268-p1rdt7921) Units=km Length=0.430743 bus1=p1rdt268.1.2.3 bus2=p1rdt7921.1.2.3 switch=n enabled=y phases=3 Linecode=3P_OH_AL_ACSR_4/0_Penguin_12_47_0_3_3_3_3_3_3_3_3_3_3_3_3_3_3_3_3_3_3_3_3_3_3_3_3_3_3_3_3_3

New Line.l(r:p1rdt268-p1rdt7173) Units=km Length=0.422755 bus1=p1rdt7173.1.2.3 bus2=p1rdt268.1.2.3 switch=n enabled=y phases=3 Linecode=3P_OH_AL_ACSR_4/0_Penguin_12_47_0_3_3_3_3_3_3_3_3_3_3_3_3_3_3_3_3_3_3_3_3_3_3_3_3_3_3_3_3_3

New Line.l(r:p1rdt4301-p1rdt7173) Units=km Length=0.0386793 bus1=p1rdt4301.1.2.3 bus2=p1rdt7173.1.2.3 switch=n enabled=y phases=3 Linecode=3P_OH_AL_ACSR_4/0_Penguin_12_47_0_3_3_3_3_3_3_3_3_3_3_3_3_3_3_3_3_3_3_3_3_3_3_3_3_3_3_3_3_3

New Line.l(r:p1rdt269-p1rdt4301) Units=km Length=0.214035 bus1=p1rdt269.1.2.3 bus2=p1rdt4301.1.2.3 switch=n enabled=y phases=3 Linecode=3P_OH_AL_ACSR_4/0_Penguin_12_47_0_3_3_3_3_3_3_3_3_3_3_3_3_3_3_3_3_3_3_3_3_3_3_3_3_3_3_3_3_3

New Line.l(r:p1rdt2397-p1rdt269) Units=km Length=0.118672 bus1=p1rdt2397.1.2.3 bus2=p1rdt269.1.2.3 switch=n enabled=y phases=3 Linecode=3P_OH_AL_ACSR_4/0_Penguin_12_47_0_3_3_3_3_3_3_3_3_3_3_3_3_3_3_3_3_3_3_3_3_3_3_3_3_3_3_3_3_3

New Line.l(r:p1rdt5706-p1rdt8121) Units=km Length=1.10598 bus1=p1rdt5706.1.2.3 bus2=p1rdt8121.1.2.3 switch=n enabled=y phases=3 Linecode=3P_OH_AL_ACSR_4/0_Penguin_12_47_0_3_3_3_3_3_3_3_3_3_3_3_3_3_3_3_3_3_3_3_3_3_3_3_3_3_3_3_3_3

New Line.l(r:p1rdt5706-p1rdt6052)_s0 Units=km Length=0.11934500000000002 bus1=p1rdt6052.1.2.3 bus2=p1rdt5706-p1rdt6052x.1.2.3 switch=n enabled=y phases=3 Linecode=3P_OH_AL_ACSR_4/0_Penguin_12_47_0_3_3_3_3_3_3_3_3_3_3_3_3_3_3_3_3_3_3_3_3_3_3_3_3_3_3_3_3_3

New Line.l(r:p1rdt5706-p1rdt6052)_s1 Units=km Length=0.269459 bus1=p1rdt5706-p1rdt6052x.1.2.3 bus2=p1rdt5706.1.2.3 switch=n enabled=y phases=3 Linecode=3P_OH_AL_ACSR_4/0_Penguin_12_47_0_3_3_3_3_3_3_3_3_3_3_3_3_3_3_3_3_3_3_3_3_3_3_3_3_3_3_3_3_3

New Line.l(r:p1rdt2898-p1rdt6052)_s0 Units=km Length=0.18468500000000002 bus1=p1rdt2898.1.2.3 bus2=p1rdt2898-p1rdt6052x.1.2.3 switch=n enabled=y phases=3 Linecode=3P_OH_AL_ACSR_4/0_Penguin_12_47_0_3_3_3_3_3_3_3_3_3_3_3_3_3_3_3_3_3_3_3_3_3_3_3_3_3_3_3_3_3

New Line.l(r:p1rdt2898-p1rdt6052)_s1 Units=km Length=0.143676 bus1=p1rdt2898-p1rdt6052x.1.2.3 bus2=p1rdt6052.1.2.3 switch=n enabled=y phases=3 Linecode=3P_OH_AL_ACSR_4/0_Penguin_12_47_0_3_3_3_3_3_3_3_3_3_3_3_3_3_3_3_3_3_3_3_3_3_3_3_3_3_3_3_3_3

New Line.l(r:p1rdt2069-p1rdt2898)_s0 Units=km Length=0.27908 bus1=p1rdt2069.1.2.3 bus2=p1rdt2069-p1rdt2898x.1.2.3 switch=n enabled=y phases=3 Linecode=3P_OH_AL_ACSR_4/0_Penguin_12_47_0_3_3_3_3_3_3_3_3_3_3_3_3_3_3_3_3_3_3_3_3_3_3_3_3_3_3_3_3_3

New Line.l(r:p1rdt2069-p1rdt2898)_s1 Units=km Length=0.285199 bus1=p1rdt2069-p1rdt2898x.1.2.3 bus2=p1rdt2898.1.2.3 switch=n enabled=y phases=3 Linecode=3P_OH_AL_ACSR_4/0_Penguin_12_47_0_3_3_3_3_3_3_3_3_3_3_3_3_3_3_3_3_3_3_3_3_3_3_3_3_3_3_3_3_3

New Line.l(r:p1rdt5782-p1rdt6460) Units=km Length=0.001 bus1=p1rdt5782-p1rdt6460x.1.2.3 bus2=p1rdt5782-p1rdt6460xx.1.2.3 switch=n enabled=y phases=3 Linecode=3P_UG_AL_4/0_25_12_47_0_3_3_3_3_3_3_3_3_3_3_3_3_3_3_3_3_3_3_3_3_3_3_3_3_3_3_3_3_3

New Line.l(r:p1rdt5782-p1rdt6391)_s0 Units=km Length=0.145194 bus1=p1rdt6391.1.2.3 bus2=p1rdt5782-p1rdt6391xx.1.2.3 switch=n enabled=y phases=3 Linecode=3P_OH_AL_ACSR_4/0_Penguin_12_47_0_3_3_3_3_3_3_3_3_3_3_3_3_3_3_3_3_3_3_3_3_3_3_3_3_3_3_3_3_3

New Line.l(r:p1rdt5782-p1rdt6391)_s1 Units=km Length=0.107601 bus1=p1rdt5782-p1rdt6391xx.1.2.3 bus2=p1rdt5782-p1rdt6391x.1.2.3 switch=n enabled=y phases=3 Linecode=3P_OH_AL_ACSR_4/0_Penguin_12_47_0_3_3_3_3_3_3_3_3_3_3_3_3_3_3_3_3_3_3_3_3_3_3_3_3_3_3_3_3_3

New Line.l(r:p1rdt5782-p1rdt6391)_s2 Units=km Length=0.154708 bus1=p1rdt5782-p1rdt6391x.1.2.3 bus2=p1rdt5782.1.2.3 switch=n enabled=y phases=3 Linecode=3P_OH_AL_ACSR_4/0_Penguin_12_47_0_3_3_3_3_3_3_3_3_3_3_3_3_3_3_3_3_3_3_3_3_3_3_3_3_3_3_3_3_3

New Line.l(r:p1rdt2291-p1rdt3009) Units=km Length=0.14709699999999998 bus1=p1rdt2291.1.2.3 bus2=p1rdt2291_b1_1.1.2.3 switch=n enabled=y phases=3 Linecode=3P_OH_AL_ACSR_4/0_Penguin_12_47_0_3_3_3_3_3_3_3_3_3_3_3_3_3_3_3_3_3_3_3_3_3_3_3_3_3_3_3_3_3

New Line.l(r:p1rdt2291-p1rdt7983) Units=km Length=0.0373484 bus1=p1rdt2291-p1rdt7983xx.1.2.3 bus2=p1rdt2291-p1rdt7983x.1.2.3 switch=n enabled=y phases=3 Linecode=3P_UG_AL_4/0_25_12_47_0_3_3_3_3_3_3_3_3_3_3_3_3_3_3_3_3_3_3_3_3_3_3_3_3_3_3_3_3_3

New Line.l(r:p1rdt2794-p1rdt7983)_s0 Units=km Length=0.0778794 bus1=p1rdt2794-p1rdt7983x.1.2.3 bus2=p1rdt2794-p1rdt7983xx.1.2.3 switch=n enabled=y phases=3 Linecode=3P_OH_AL_ACSR_4/0_Penguin_12_47_0_3_3_3_3_3_3_3_3_3_3_3_3_3_3_3_3_3_3_3_3_3_3_3_3_3_3_3_3_3

New Line.l(r:p1rdt2794-p1rdt7983)_s1 Units=km Length=0.001 bus1=p1rdt2794-p1rdt7983xx.1.2.3 bus2=p1rdt2794-p1rdt7983xxx.1.2.3 switch=n enabled=y phases=3 Linecode=3P_UG_AL_4/0_25_12_47_0_3_3_3_3_3_3_3_3_3_3_3_3_3_3_3_3_3_3_3_3_3_3_3_3_3_3_3_3_3

New Line.l(r:p1rdt2794-p1rdt7983)_s2 Units=km Length=0.197079 bus1=p1rdt2794-p1rdt7983xxx.1.2.3 bus2=p1rdt2794-p1rdt7983xxxx.1.2.3 switch=n enabled=y phases=3 Linecode=3P_UG_AL_4/0_25_12_47_0_3_3_3_3_3_3_3_3_3_3_3_3_3_3_3_3_3_3_3_3_3_3_3_3_3_3_3_3_3

New Line.l(r:p1rdt2794-p1rdt8267) Units=km Length=0.0958739 bus1=p1rdt2794-p1rdt8267xx.1.2.3 bus2=p1rdt2794-p1rdt8267x.1.2.3 switch=n enabled=y phases=3 Linecode=3P_UG_AL_4/0_25_12_47_0_3_3_3_3_3_3_3_3_3_3_3_3_3_3_3_3_3_3_3_3_3_3_3_3_3_3_3_3_3

New Line.l(r:p1rdt6877-p1rdt8267) Units=km Length=0.0274335 bus1=p1rdt6877-p1rdt8267x.1.2.3 bus2=p1rdt6877-p1rdt8267xx.1.2.3 switch=n enabled=y phases=3 Linecode=3P_UG_AL_4/0_25_12_47_0_3_3_3_3_3_3_3_3_3_3_3_3_3_3_3_3_3_3_3_3_3_3_3_3_3_3_3_3_3

New Line.l(r:p1rdt5980-p1rdt6877) Units=km Length=0.0387877 bus1=p1rdt5980-p1rdt6877x.1.2.3 bus2=p1rdt5980-p1rdt6877xx.1.2.3 switch=n enabled=y phases=3 Linecode=3P_UG_AL_4/0_25_12_47_0_3_3_3_3_3_3_3_3_3_3_3_3_3_3_3_3_3_3_3_3_3_3_3_3_3_3_3_3_3

New Line.l(r:p1rdt5980-p1rdt6391) Units=km Length=0.0386707 bus1=p1rdt6391.1.2.3 bus2=p1rdt5980.1.2.3 switch=n enabled=y phases=3 Linecode=3P_OH_AL_ACSR_4/0_Penguin_12_47_0_3_3_3_3_3_3_3_3_3_3_3_3_3_3_3_3_3_3_3_3_3_3_3_3_3_3_3_3_3

New Line.l(r:p1rdt6391-p1rdt6879) Units=km Length=0.115576 bus1=p1rdt6391.1.2.3 bus2=p1rdt6879.1.2.3 switch=n enabled=y phases=3 Linecode=3P_OH_AL_ACSR_4/0_Penguin_12_47_0_3_3_3_3_3_3_3_3_3_3_3_3_3_3_3_3_3_3_3_3_3_3_3_3_3_3_3_3_3

New Line.l(r:p1rdt4543-p1rdt6391) Units=km Length=0.733466 bus1=p1rdt4543.1.2.3 bus2=p1rdt6391.1.2.3 switch=n enabled=y phases=3 Linecode=3P_OH_AL_ACSR_4/0_Penguin_12_47_0_3_3_3_3_3_3_3_3_3_3_3_3_3_3_3_3_3_3_3_3_3_3_3_3_3_3_3_3_3

New Line.l(r:p1rdt4543-p1rdt5705)_s0 Units=km Length=0.728555 bus1=p1rdt5705.1.2.3 bus2=p1rdt4543-p1rdt5705xx.1.2.3 switch=n enabled=y phases=3 Linecode=3P_OH_AL_ACSR_4/0_Penguin_12_47_0_3_3_3_3_3_3_3_3_3_3_3_3_3_3_3_3_3_3_3_3_3_3_3_3_3_3_3_3_3

New Line.l(r:p1rdt4543-p1rdt5705)_s1 Units=km Length=0.924746 bus1=p1rdt4543-p1rdt5705xx.1.2.3 bus2=p1rdt4543-p1rdt5705x.1.2.3 switch=n enabled=y phases=3 Linecode=3P_OH_AL_ACSR_4/0_Penguin_12_47_0_3_3_3_3_3_3_3_3_3_3_3_3_3_3_3_3_3_3_3_3_3_3_3_3_3_3_3_3_3

New Line.l(r:p1rdt4543-p1rdt5705)_s2 Units=km Length=0.401929 bus1=p1rdt4543-p1rdt5705x.1.2.3 bus2=p1rdt4543.1.2.3 switch=n enabled=y phases=3 Linecode=3P_OH_AL_ACSR_4/0_Penguin_12_47_0_3_3_3_3_3_3_3_3_3_3_3_3_3_3_3_3_3_3_3_3_3_3_3_3_3_3_3_3_3

New Line.l(r:p1rdt2069-p1rdt5705) Units=km Length=0.307753 bus1=p1rdt2069.1.2.3 bus2=p1rdt5705.1.2.3 switch=n enabled=y phases=3 Linecode=3P_OH_AL_ACSR_4/0_Penguin_12_47_0_3_3_3_3_3_3_3_3_3_3_3_3_3_3_3_3_3_3_3_3_3_3_3_3_3_3_3_3_3

New Line.l(r:p1rdt2069-p1rdt5411)_s0 Units=km Length=0.336085 bus1=p1rdt5411.1.2.3 bus2=p1rdt2069-p1rdt5411x.1.2.3 switch=n enabled=y phases=3 Linecode=3P_OH_AL_ACSR_4/0_Penguin_12_47_0_3_3_3_3_3_3_3_3_3_3_3_3_3_3_3_3_3_3_3_3_3_3_3_3_3_3_3_3_3

New Line.l(r:p1rdt2069-p1rdt5411)_s1 Units=km Length=1.3220700000000003 bus1=p1rdt2069-p1rdt5411x.1.2.3 bus2=p1rdt2069.1.2.3 switch=n enabled=y phases=3 Linecode=3P_OH_AL_ACSR_4/0_Penguin_12_47_0_3_3_3_3_3_3_3_3_3_3_3_3_3_3_3_3_3_3_3_3_3_3_3_3_3_3_3_3_3

New Line.l(r:p1rdt5411-p1rdt5564) Units=km Length=0.4945800000000001 bus1=p1rdt5564.1.2.3 bus2=p1rdt5411.1.2.3 switch=n enabled=y phases=3 Linecode=3P_OH_AL_ACSR_4/0_Penguin_12_47_0_3_3_3_3_3_3_3_3_3_3_3_3_3_3_3_3_3_3_3_3_3_3_3_3_3_3_3_3_3

New Line.l(r:p1rdt1839-p1rdt5564) Units=km Length=0.118078 bus1=p1rdt1839.1.2.3 bus2=p1rdt5564.1.2.3 switch=n enabled=y phases=3 Linecode=3P_OH_AL_ACSR_4/0_Penguin_12_47_0_3_3_3_3_3_3_3_3_3_3_3_3_3_3_3_3_3_3_3_3_3_3_3_3_3_3_3_3_3

New Line.l(r:p1rdt1839-p1rdt7979)_s0 Units=km Length=0.178356 bus1=p1rdt7979.1.2.3 bus2=p1rdt1839-p1rdt7979x.1.2.3 switch=n enabled=y phases=3 Linecode=3P_OH_AL_ACSR_4/0_Penguin_12_47_0_3_3_3_3_3_3_3_3_3_3_3_3_3_3_3_3_3_3_3_3_3_3_3_3_3_3_3_3_3

New Line.l(r:p1rdt1839-p1rdt7979)_s1 Units=km Length=0.3161280000000001 bus1=p1rdt1839-p1rdt7979x.1.2.3 bus2=p1rdt1839.1.2.3 switch=n enabled=y phases=3 Linecode=3P_OH_AL_ACSR_4/0_Penguin_12_47_0_3_3_3_3_3_3_3_3_3_3_3_3_3_3_3_3_3_3_3_3_3_3_3_3_3_3_3_3_3

New Line.l(r:p1rdt267-p1rdt7979)_s0 Units=km Length=0.444148 bus1=p1rdt267.1.2.3 bus2=p1rdt267-p1rdt7979x.1.2.3 switch=n enabled=y phases=3 Linecode=3P_OH_AL_ACSR_4/0_Penguin_12_47_0_3_3_3_3_3_3_3_3_3_3_3_3_3_3_3_3_3_3_3_3_3_3_3_3_3_3_3_3_3

New Line.l(r:p1rdt267-p1rdt7979)_s1 Units=km Length=0.083511 bus1=p1rdt267-p1rdt7979x.1.2.3 bus2=p1rdt7979.1.2.3 switch=n enabled=y phases=3 Linecode=3P_OH_AL_ACSR_4/0_Penguin_12_47_0_3_3_3_3_3_3_3_3_3_3_3_3_3_3_3_3_3_3_3_3_3_3_3_3_3_3_3_3_3

New Line.l(r:p1rdt267-p1rdt7172)_s0 Units=km Length=0.10129500000000001 bus1=p1rdt7172.1.2.3 bus2=p1rdt267-p1rdt7172x.1.2.3 switch=n enabled=y phases=3 Linecode=3P_OH_AL_ACSR_4/0_Penguin_12_47_0_3_3_3_3_3_3_3_3_3_3_3_3_3_3_3_3_3_3_3_3_3_3_3_3_3_3_3_3_3

New Line.l(r:p1rdt267-p1rdt7172)_s1 Units=km Length=0.0530918 bus1=p1rdt267-p1rdt7172x.1.2.3 bus2=p1rdt267.1.2.3 switch=n enabled=y phases=3 Linecode=3P_OH_AL_ACSR_4/0_Penguin_12_47_0_3_3_3_3_3_3_3_3_3_3_3_3_3_3_3_3_3_3_3_3_3_3_3_3_3_3_3_3_3

New Line.l(r:p1rdt6702-p1rdt7172) Units=km Length=0.117612 bus1=p1rdt6702.1.2.3 bus2=p1rdt7172.1.2.3 switch=n enabled=y phases=3 Linecode=3P_OH_AL_ACSR_4/0_Penguin_12_47_0_3_3_3_3_3_3_3_3_3_3_3_3_3_3_3_3_3_3_3_3_3_3_3_3_3_3_3_3_3

New Line.l(r:p1rdt4300-p1rdt6702)_s0 Units=km Length=0.130115 bus1=p1rdt4300.1.2.3 bus2=p1rdt4300-p1rdt6702x.1.2.3 switch=n enabled=y phases=3 Linecode=3P_OH_AL_ACSR_4/0_Penguin_12_47_0_3_3_3_3_3_3_3_3_3_3_3_3_3_3_3_3_3_3_3_3_3_3_3_3_3_3_3_3_3

New Line.l(r:p1rdt4300-p1rdt6702)_s1 Units=km Length=0.0431309 bus1=p1rdt4300-p1rdt6702x.1.2.3 bus2=p1rdt6702.1.2.3 switch=n enabled=y phases=3 Linecode=3P_OH_AL_ACSR_4/0_Penguin_12_47_0_3_3_3_3_3_3_3_3_3_3_3_3_3_3_3_3_3_3_3_3_3_3_3_3_3_3_3_3_3

New Line.l(r:p1rdt2184-p1rdt4300)_s0 Units=km Length=0.328444 bus1=p1rdt2184.1.2.3 bus2=p1rdt2184-p1rdt4300x.1.2.3 switch=n enabled=y phases=3 Linecode=3P_OH_AL_ACSR_4/0_Penguin_12_47_0_3_3_3_3_3_3_3_3_3_3_3_3_3_3_3_3_3_3_3_3_3_3_3_3_3_3_3_3_3

New Line.l(r:p1rdt2184-p1rdt4300)_s1 Units=km Length=0.169301 bus1=p1rdt2184-p1rdt4300x.1.2.3 bus2=p1rdt4300.1.2.3 switch=n enabled=y phases=3 Linecode=3P_OH_AL_ACSR_4/0_Penguin_12_47_0_3_3_3_3_3_3_3_3_3_3_3_3_3_3_3_3_3_3_3_3_3_3_3_3_3_3_3_3_3

New Line.l(r:p1rdt2184-p1rdt7551) Units=km Length=0.484531 bus1=p1rdt7551.1.2.3 bus2=p1rdt2184.1.2.3 switch=n enabled=y phases=3 Linecode=3P_OH_AL_ACSR_4/0_Penguin_12_47_0_3_3_3_3_3_3_3_3_3_3_3_3_3_3_3_3_3_3_3_3_3_3_3_3_3_3_3_3_3

New Line.l(r:p1rdt2397-p1rdt7551) Units=km Length=0.422127 bus1=p1rdt2397.1.2.3 bus2=p1rdt7551.1.2.3 switch=n enabled=y phases=3 Linecode=3P_OH_AL_ACSR_4/0_Penguin_12_47_0_3_3_3_3_3_3_3_3_3_3_3_3_3_3_3_3_3_3_3_3_3_3_3_3_3_3_3_3_3

New Line.l(r:p1rdt2397-p1rhs1_1247) Units=km Length=0.149872 bus1=p1rdt2397-p1rhs1_1247x.1.2.3 bus2=p1rdt2397-p1rhs1_1247x_b1_1.1.2.3 switch=n enabled=y phases=3 Linecode=3P_OH_AL_ACSR_4/0_Penguin_12_47_0_3_3_3_3_3_3_3_3_3_3_3_3_3_3_3_3_3_3_3_3_3_3_3_3_3_3_3_3_3

New Line.l(r:p1rdt6460lv-p1rlv9213) Units=km Length=0.0098394 bus1=p1rdt6460lv.1.2.3 bus2=p1rlv9213.1.2.3 switch=n enabled=y phases=3 Linecode=3P_UG_AL_350kcmil_15_0_416_0_3_3_3_3_3_3_3_3_3_3_3_3_3_3_3_3_3_3_3_3_3_3_3_3_3_3_3_3_3

New Line.l(r:p1rdt5918lv-p1rlv8157) Units=km Length=0.0750433 bus1=p1rdt5918lv.1.2.3 bus2=p1rlv8157.1.2.3 switch=n enabled=y phases=3 Linecode=3P_UG_AL_350kcmil_15_0_416_0_3_3_3_3_3_3_3_3_3_3_3_3_3_3_3_3_3_3_3_3_3_3_3_3_3_3_3_3_3

New Line.l(r:p1rdt2794-p1rdt5918) Units=km Length=0.009782620000000002 bus1=p1rdt2794-p1rdt5918x.1.2.3 bus2=p1rdt2794-p1rdt5918xx.1.2.3 switch=n enabled=y phases=3 Linecode=3P_UG_AL_4/0_25_12_47_0_3_3_3_3_3_3_3_3_3_3_3_3_3_3_3_3_3_3_3_3_3_3_3_3_3_3_3_3_3

New Line.l(r:p1rdt7983lv-p1rlv12751) Units=km Length=0.0625218 bus1=p1rdt7983lv.1.2.3 bus2=p1rlv12751.1.2.3 switch=n enabled=y phases=3 Linecode=3P_UG_AL_350kcmil_15_0_416_0_3_3_3_3_3_3_3_3_3_3_3_3_3_3_3_3_3_3_3_3_3_3_3_3_3_3_3_3_3

New Line.l(r:p1rdt3009lv-p1rlv3492) Units=km Length=0.0122711 bus1=p1rdt3009lv.1.2.3 bus2=p1rlv3492.1.2.3 switch=n enabled=y phases=3 Linecode=3P_UG_AL_350kcmil_15_0_416_0_3_3_3_3_3_3_3_3_3_3_3_3_3_3_3_3_3_3_3_3_3_3_3_3_3_3_3_3_3

New Line.padswitch(r:p1rdt5918-p1rdt6878)p1r_2211 Units=km Length=0.001 bus1=p1rdt5918-p1rdt6878x.3 bus2=p1rdt5918-p1rdt6878xx.3 switch=y enabled=y phases=1 Linecode=padswitch_1_1_1_1_1_1_1_1_1_1_1_1_1_1_1_1_1_1_1_1_1_1_1_1_1_1_1_1_1

New Line.padswitch(r:p1rdt5918-p1rdt6878)p1r_2212 Units=km Length=0.001 bus1=p1rdt5918-p1rdt6878xxx.3 bus2=p1rdt6878.3 switch=y enabled=y phases=1 Linecode=padswitch_1_1_1_1_1_1_1_1_1_1_1_1_1_1_1_1_1_1_1_1_1_1_1_1_1_1_1_1_1_1

New Line.padswitch(r:p1rdt2597-p1rdt6939)p1r_2215 Units=km Length=0.001 bus1=p1rdt6939.2 bus2=p1rdt2597-p1rdt6939xx.2 switch=y enabled=y phases=1 Linecode=padswitch_1_1_1_1_1_1_1_1_1_1_1_1_1_1_1_1_1_1_1_1_1_1_1_1_1_1_1_1_1

New Line.padswitch(r:p1rdt2597-p1rdt6939)p1r_2216 Units=km Length=0.001 bus1=p1rdt2597-p1rdt6939x.2 bus2=p1rdt2597.2 switch=y enabled=y phases=1 Linecode=padswitch_1_1_1_0_1_1_1_1_1_1_1_1_1_1_1_1_1_1_1_1_1_1_1_1_1_1_1_1_1_1_1

New Line.padswitch(r:p1rdt2291-p1rdt6939)p1r_2217 Units=km Length=0.001 bus1=p1rdt2291-p1rdt6939x.2 bus2=p1rdt2291-p1rdt6939xx.2 switch=y enabled=y phases=1 Linecode=padswitch_1_1_1_0_1_1_1_1_1_1_1_1_1_1_1_1_1_1_1_1_1_1_1_1_1_1_1_1_1_1_1

New Line.padswitch(r:p1rdt2291-p1rdt6939)p1r_2218 Units=km Length=0.001 bus1=p1rdt2291-p1rdt6939xxx.2 bus2=p1rdt6939.2 switch=y enabled=y phases=1 Linecode=padswitch_1_1_1_1_1_1_1_1_1_1_1_1_1_1_1_1_1_1_1_1_1_1_1_1_1_1_1_1_1

New Line.padswitch(r:p1rdt5410-p1rdt7983)p1r_2221 Units=km Length=0.001 bus1=p1rdt5410-p1rdt7983xxx.3 bus2=p1rdt5410-p1rdt7983xx.3 switch=y enabled=y phases=1 Linecode=padswitch_1_1_1_1_1_1_1_1_1_1_1_1_1_1_1_1_1_1_1_1_1_1_1_1_1_1_1_1_1

New Line.padswitch(r:p1rdt5410-p1rdt7983)p1r_2222 Units=km Length=0.001 bus1=p1rdt5410-p1rdt7983x.3 bus2=p1rdt5410.3 switch=y enabled=y phases=1 Linecode=padswitch_1_1_1_1_1_1_1_1_1_1_1_1_1_1_1_1_1_1_1_1_1_1_1_1_1_1_1_1_1

New Line.padswitch(r:p1rdt2068-p1rdt5090)p1r_2231 Units=km Length=0.001 bus1=p1rdt2068.3 bus2=p1rdt2068-p1rdt5090x.3 switch=y enabled=y phases=1 Linecode=padswitch_1_1_1_1_1_1_1_1_1_1_1_1_1_1_1_1_1_1_1_1_1_1_1_1_1_1_1_1_1

New Line.padswitch(r:p1rdt2068-p1rdt5090)p1r_2232 Units=km Length=0.001 bus1=p1rdt2068-p1rdt5090xx.3 bus2=p1rdt5090.3 switch=y enabled=y phases=1 Linecode=padswitch_1_1_1_0_1_0_1_1_1_1_1_1_1_1_1_1_1_1_1_1_1_1_1_1_1_1_1_1_1_1_1_1

New Line.padswitch(r:p1rdt2068-p1rdt6879)p1r_2233 Units=km Length=0.001 bus1=p1rdt2068-p1rdt6879xxxxx.3 bus2=p1rdt2068-p1rdt6879xxxx.3 switch=y enabled=y phases=1 Linecode=padswitch_1_1_1_0_1_0_1_0_1_1_1_1_1_1_1_1_1_1_1_1_1_1_1_1_1_1_1_1_1_1_1_1_1

New Line.padswitch(r:p1rdt2068-p1rdt6879)p1r_2234 Units=km Length=0.001 bus1=p1rdt2068-p1rdt6879x.3 bus2=p1rdt2068.3 switch=y enabled=y phases=1 Linecode=padswitch_1_1_1_1_1_1_1_1_1_1_1_1_1_1_1_1_1_1_1_1_1_1_1_1_1_1_1_1_1

New Line.padswitch(r:p1rdt5782-p1rdt6460)p1r_2209 Units=km Length=0.001 bus1=p1rdt5782.1.2.3 bus2=p1rdt5782-p1rdt6460x.1.2.3 switch=y enabled=y phases=3 Linecode=padswitch_3_3_3_3_3_3_3_3_3_3_3_3_3_3_3_3_3_3_3_3_3_3_3_3_3_3_3_3_3

New Line.padswitch(r:p1rdt5782-p1rdt6460)p1r_2210 Units=km Length=0.001 bus1=p1rdt5782-p1rdt6460xx.1.2.3 bus2=p1rdt6460.1.2.3 switch=y enabled=y phases=3 Linecode=padswitch_3_3_3_3_3_3_3_3_3_3_3_3_3_3_3_3_3_3_3_3_3_3_3_3_3_3_3_3_3_3

New Line.padswitch(r:p1rdt2291-p1rdt7983)p1r_2219 Units=km Length=0.001 bus1=p1rdt7983.1.2.3 bus2=p1rdt2291-p1rdt7983xx.1.2.3 switch=y enabled=y phases=3 Linecode=padswitch_3_3_3_2_3_3_3_3_3_3_3_3_3_3_3_3_3_3_3_3_3_3_3_3_3_3_3_3_3_3_3

New Line.padswitch(r:p1rdt2291-p1rdt7983)p1r_2220 Units=km Length=0.001 bus1=p1rdt2291-p1rdt7983x.1.2.3 bus2=p1rdt2291.1.2.3 switch=y enabled=y phases=3 Linecode=padswitch_3_3_3_3_3_3_3_3_3_3_3_3_3_3_3_3_3_3_3_3_3_3_3_3_3_3_3_3_3_3

New Line.padswitch(r:p1rdt2794-p1rdt7983)p1r_2223 Units=km Length=0.001 bus1=p1rdt2794.1.2.3 bus2=p1rdt2794-p1rdt7983x.1.2.3 switch=y enabled=y phases=3 Linecode=padswitch_3_3_3_2_3_3_3_3_3_3_3_3_3_3_3_3_3_3_3_3_3_3_3_3_3_3_3_3_3_3_3

New Line.padswitch(r:p1rdt2794-p1rdt7983)p1r_2224 Units=km Length=0.001 bus1=p1rdt2794-p1rdt7983xxxx.1.2.3 bus2=p1rdt7983.1.2.3 switch=y enabled=y phases=3 Linecode=padswitch_3_3_3_2_3_3_3_3_3_3_3_3_3_3_3_3_3_3_3_3_3_3_3_3_3_3_3_3_3_3_3

New Line.padswitch(r:p1rdt2794-p1rdt8267)p1r_2225 Units=km Length=0.001 bus1=p1rdt8267.1.2.3 bus2=p1rdt2794-p1rdt8267xx.1.2.3 switch=y enabled=y phases=3 Linecode=padswitch_3_3_3_2_3_3_3_3_3_3_3_3_3_3_3_3_3_3_3_3_3_3_3_3_3_3_3_3_3_3_3

New Line.padswitch(r:p1rdt2794-p1rdt8267)p1r_2226 Units=km Length=0.001 bus1=p1rdt2794-p1rdt8267x.1.2.3 bus2=p1rdt2794.1.2.3 switch=y enabled=y phases=3 Linecode=padswitch_3_3_3_2_3_3_3_3_3_3_3_3_3_3_3_3_3_3_3_3_3_3_3_3_3_3_3_3_3_3_3

New Line.padswitch(r:p1rdt6877-p1rdt8267)p1r_2227 Units=km Length=0.001 bus1=p1rdt6877.1.2.3 bus2=p1rdt6877-p1rdt8267x.1.2.3 switch=y enabled=y phases=3 Linecode=padswitch_3_3_3_2_3_3_3_3_3_3_3_3_3_3_3_3_3_3_3_3_3_3_3_3_3_3_3_3_3_3_3

New Line.padswitch(r:p1rdt6877-p1rdt8267)p1r_2228 Units=km Length=0.001 bus1=p1rdt6877-p1rdt8267xx.1.2.3 bus2=p1rdt8267.1.2.3 switch=y enabled=y phases=3 Linecode=padswitch_3_3_3_2_3_3_3_3_3_3_3_3_3_3_3_3_3_3_3_3_3_3_3_3_3_3_3_3_3_3_3

New Line.padswitch(r:p1rdt5980-p1rdt6877)p1r_2229 Units=km Length=0.001 bus1=p1rdt5980.1.2.3 bus2=p1rdt5980-p1rdt6877x.1.2.3 switch=y enabled=y phases=3 Linecode=padswitch_3_3_3_3_3_3_3_3_3_3_3_3_3_3_3_3_3_3_3_3_3_3_3_3_3_3_3_3_3

New Line.padswitch(r:p1rdt5980-p1rdt6877)p1r_2230 Units=km Length=0.001 bus1=p1rdt5980-p1rdt6877xx.1.2.3 bus2=p1rdt6877.1.2.3 switch=y enabled=y phases=3 Linecode=padswitch_3_3_3_2_3_3_3_3_3_3_3_3_3_3_3_3_3_3_3_3_3_3_3_3_3_3_3_3_3_3_3

New Line.padswitch(r:p1rdt2794-p1rdt5918)p1r_2213 Units=km Length=0.001 bus1=p1rdt2794.1.2.3 bus2=p1rdt2794-p1rdt5918x.1.2.3 switch=y enabled=y phases=3 Linecode=padswitch_3_3_3_2_3_3_3_3_3_3_3_3_3_3_3_3_3_3_3_3_3_3_3_3_3_3_3_3_3_3_3

New Line.padswitch(r:p1rdt2794-p1rdt5918)p1r_2214 Units=km Length=0.001 bus1=p1rdt2794-p1rdt5918xx.1.2.3 bus2=p1rdt5918.1.2.3 switch=y enabled=y phases=3 Linecode=padswitch_3_3_3_2_3_2_3_3_3_3_3_3_3_3_3_3_3_3_3_3_3_3_3_3_3_3_3_3_3_3_3_3

New Line.fuse(r:p1rdt1269-p1rdt520)p1r_3137 Units=km Length=0.001 bus1=p1rdt1269.1 bus2=p1rdt1269-p1rdt520x.1 switch=n enabled=y phases=1 Linecode=fuse_1_1_1_1_1_1_1_1_1_1_1_1_1_1_1_1_1_1_1_1_1_1_1_1_1_1_1_1_1

New Fuse.Fuse_fuse(r:p1rdt1269-p1rdt520)p1r_3137 monitoredobj=Line.fuse(r:p1rdt1269-p1rdt520)p1r_3137 enabled=y ratedcurrent=100.0

New Line.fuse(r:p1rdt1269-p1rdt2598)p1r_3138 Units=km Length=0.001 bus1=p1rdt1269.3 bus2=p1rdt1269-p1rdt2598x.3 switch=n enabled=y phases=1 Linecode=fuse_1_4_1_1_1_1_1_1_1_1_1_1_1_1_1_1_1_1_1_1_1_1_1_1_1_1_1_1_1_1

New Fuse.Fuse_fuse(r:p1rdt1269-p1rdt2598)p1r_3138 monitoredobj=Line.fuse(r:p1rdt1269-p1rdt2598)p1r_3138 enabled=y ratedcurrent=100.0

New Line.fuse(r:p1rdt1269-p1rdt3694)p1r_3139 Units=km Length=0.001 bus1=p1rdt1269.1 bus2=p1rdt1269-p1rdt3694x.1 switch=n enabled=y phases=1 Linecode=fuse_1_4_1_3_1_1_1_1_1_1_1_1_1_1_1_1_1_1_1_1_1_1_1_1_1_1_1_1_1_1_1

New Fuse.Fuse_fuse(r:p1rdt1269-p1rdt3694)p1r_3139 monitoredobj=Line.fuse(r:p1rdt1269-p1rdt3694)p1r_3139 enabled=y ratedcurrent=100.0

New Line.fuse(r:p1rdt1839-p1rdt4994)p1r_3260 Units=km Length=0.001 bus1=p1rdt1839.1 bus2=p1rdt1839-p1rdt4994x.1 switch=n enabled=y phases=1 Linecode=fuse_1_1_1_1_1_1_1_1_1_1_1_1_1_1_1_1_1_1_1_1_1_1_1_1_1_1_1_1_1

New Fuse.Fuse_fuse(r:p1rdt1839-p1rdt4994)p1r_3260 monitoredobj=Line.fuse(r:p1rdt1839-p1rdt4994)p1r_3260 enabled=y ratedcurrent=100.0

New Line.fuse(r:p1rdt127-p1rdt2067)p1r_3331 Units=km Length=0.001 bus1=p1rdt2067.3 bus2=p1rdt127-p1rdt2067x.3 switch=n enabled=y phases=1 Linecode=fuse_1_1_1_1_1_1_1_1_1_1_1_1_1_1_1_1_1_1_1_1_1_1_1_1_1_1_1_1_1

New Fuse.Fuse_fuse(r:p1rdt127-p1rdt2067)p1r_3331 monitoredobj=Line.fuse(r:p1rdt127-p1rdt2067)p1r_3331 enabled=y ratedcurrent=100.0

New Line.fuse(r:p1rdt2069-p1rdt7117)p1r_3332 Units=km Length=0.001 bus1=p1rdt2069.3 bus2=p1rdt2069-p1rdt7117x.3 switch=n enabled=y phases=1 Linecode=fuse_1_1_1_1_1_1_1_1_1_1_1_1_1_1_1_1_1_1_1_1_1_1_1_1_1_1_1_1_1

New Fuse.Fuse_fuse(r:p1rdt2069-p1rdt7117)p1r_3332 monitoredobj=Line.fuse(r:p1rdt2069-p1rdt7117)p1r_3332 enabled=y ratedcurrent=100.0

New Line.fuse(r:p1rdt2184-p1rdt2591)p1r_3353 Units=km Length=0.001 bus1=p1rdt2184.2 bus2=p1rdt2184-p1rdt2591x.2 switch=n enabled=y phases=1 Linecode=fuse_1_1_1_1_1_1_1_1_1_1_1_1_1_1_1_1_1_1_1_1_1_1_1_1_1_1_1_1_1

New Fuse.Fuse_fuse(r:p1rdt2184-p1rdt2591)p1r_3353 monitoredobj=Line.fuse(r:p1rdt2184-p1rdt2591)p1r_3353 enabled=y ratedcurrent=100.0

New Line.fuse(r:p1rdt2184-p1rdt4144)p1r_3354 Units=km Length=0.001 bus1=p1rdt2184.1 bus2=p1rdt2184-p1rdt4144x.1 switch=n enabled=y phases=1 Linecode=fuse_1_1_1_1_1_1_1_1_1_1_1_1_1_1_1_1_1_1_1_1_1_1_1_1_1_1_1_1_1

New Fuse.Fuse_fuse(r:p1rdt2184-p1rdt4144)p1r_3354 monitoredobj=Line.fuse(r:p1rdt2184-p1rdt4144)p1r_3354 enabled=y ratedcurrent=100.0

New Line.fuse(r:p1rdt2282-p1rdt8120)p1r_3376 Units=km Length=0.001 bus1=p1rdt2282.2 bus2=p1rdt2282-p1rdt8120x.2 switch=n enabled=y phases=1 Linecode=fuse_1_1_1_1_1_1_1_1_1_1_1_1_1_1_1_1_1_1_1_1_1_1_1_1_1_1_1_1_1

New Fuse.Fuse_fuse(r:p1rdt2282-p1rdt8120)p1r_3376 monitoredobj=Line.fuse(r:p1rdt2282-p1rdt8120)p1r_3376 enabled=y ratedcurrent=100.0

New Line.fuse(r:p1rdt2291-p1rdt6939)p1r_3381 Units=km Length=0.001 bus1=p1rdt2291.2 bus2=p1rdt2291-p1rdt6939x.2 switch=n enabled=y phases=1 Linecode=fuse_1_1_1_1_1_1_1_1_1_1_1_1_1_1_1_1_1_1_1_1_1_1_1_1_1_1_1_1_1

New Fuse.Fuse_fuse(r:p1rdt2291-p1rdt6939)p1r_3381 monitoredobj=Line.fuse(r:p1rdt2291-p1rdt6939)p1r_3381 enabled=y ratedcurrent=100.0

New Line.fuse(r:p1rdt2697-p1rdt5087)p1r_3484 Units=km Length=0.001 bus1=p1rdt2697.1 bus2=p1rdt2697-p1rdt5087x.1 switch=n enabled=y phases=1 Linecode=fuse_1_1_1_1_1_1_1_1_1_1_1_1_1_1_1_1_1_1_1_1_1_1_1_1_1_1_1_1_1

New Fuse.Fuse_fuse(r:p1rdt2697-p1rdt5087)p1r_3484 monitoredobj=Line.fuse(r:p1rdt2697-p1rdt5087)p1r_3484 enabled=y ratedcurrent=100.0

New Line.fuse(r:p1rdt2898-p1rdt5784)p1r_3523 Units=km Length=0.001 bus1=p1rdt2898.3 bus2=p1rdt2898-p1rdt5784x.3 switch=n enabled=y phases=1 Linecode=fuse_1_1_1_1_1_1_1_1_1_1_1_1_1_1_1_1_1_1_1_1_1_1_1_1_1_1_1_1_1

New Fuse.Fuse_fuse(r:p1rdt2898-p1rdt5784)p1r_3523 monitoredobj=Line.fuse(r:p1rdt2898-p1rdt5784)p1r_3523 enabled=y ratedcurrent=100.0

New Line.fuse(r:p1rdt3009-p1rdt3216)p1r_3552 Units=km Length=0.001 bus1=p1rdt3009.3 bus2=p1rdt3009-p1rdt3216x.3 switch=n enabled=y phases=1 Linecode=fuse_1_4_1_1_1_1_1_1_1_1_1_1_1_1_1_1_1_1_1_1_1_1_1_1_1_1_1_1_1_1

New Fuse.Fuse_fuse(r:p1rdt3009-p1rdt3216)p1r_3552 monitoredobj=Line.fuse(r:p1rdt3009-p1rdt3216)p1r_3552 enabled=y ratedcurrent=100.0

New Line.fuse(r:p1rdt3686-p1rdt6519)p1r_3721 Units=km Length=0.001 bus1=p1rdt3686.2 bus2=p1rdt3686-p1rdt6519x.2 switch=n enabled=y phases=1 Linecode=fuse_1_1_1_1_1_1_1_1_1_1_1_1_1_1_1_1_1_1_1_1_1_1_1_1_1_1_1_1_1

New Fuse.Fuse_fuse(r:p1rdt3686-p1rdt6519)p1r_3721 monitoredobj=Line.fuse(r:p1rdt3686-p1rdt6519)p1r_3721 enabled=y ratedcurrent=100.0

New Line.fuse(r:p1rdt3486-p1rdt3980)p1r_3772 Units=km Length=0.001 bus1=p1rdt3980.2 bus2=p1rdt3486-p1rdt3980x.2 switch=n enabled=y phases=1 Linecode=fuse_1_1_1_1_1_1_1_1_1_1_1_1_1_1_1_1_1_1_1_1_1_1_1_1_1_1_1_1_1

New Fuse.Fuse_fuse(r:p1rdt3486-p1rdt3980)p1r_3772 monitoredobj=Line.fuse(r:p1rdt3486-p1rdt3980)p1r_3772 enabled=y ratedcurrent=100.0

New Line.fuse(r:p1rdt4300-p1rdt6766)p1r_3858 Units=km Length=0.001 bus1=p1rdt4300.2 bus2=p1rdt4300-p1rdt6766x.2 switch=n enabled=y phases=1 Linecode=fuse_1_1_1_1_1_1_1_1_1_1_1_1_1_1_1_1_1_1_1_1_1_1_1_1_1_1_1_1_1

New Fuse.Fuse_fuse(r:p1rdt4300-p1rdt6766)p1r_3858 monitoredobj=Line.fuse(r:p1rdt4300-p1rdt6766)p1r_3858 enabled=y ratedcurrent=100.0

New Line.fuse(r:p1rdt265-p1rdt5404)p1r_4087 Units=km Length=0.001 bus1=p1rdt5404.1 bus2=p1rdt265-p1rdt5404x.1 switch=n enabled=y phases=1 Linecode=fuse_1_1_1_1_1_1_1_1_1_1_1_1_1_1_1_1_1_1_1_1_1_1_1_1_1_1_1_1_1

New Fuse.Fuse_fuse(r:p1rdt265-p1rdt5404)p1r_4087 monitoredobj=Line.fuse(r:p1rdt265-p1rdt5404)p1r_4087 enabled=y ratedcurrent=100.0

New Line.fuse(r:p1rdt5404-p1rdt647)p1r_4088 Units=km Length=0.001 bus1=p1rdt5404.2 bus2=p1rdt5404-p1rdt647x.2 switch=n enabled=y phases=1 Linecode=fuse_1_1_1_1_1_1_1_1_1_1_1_1_1_1_1_1_1_1_1_1_1_1_1_1_1_1_1_1_1

New Fuse.Fuse_fuse(r:p1rdt5404-p1rdt647)p1r_4088 monitoredobj=Line.fuse(r:p1rdt5404-p1rdt647)p1r_4088 enabled=y ratedcurrent=100.0

New Line.fuse(r:p1rdt5404-p1rdt7057)p1r_4089 Units=km Length=0.001 bus1=p1rdt5404.3 bus2=p1rdt5404-p1rdt7057x.3 switch=n enabled=y phases=1 Linecode=fuse_1_1_1_1_1_1_1_1_1_1_1_1_1_1_1_1_1_1_1_1_1_1_1_1_1_1_1_1_1

New Fuse.Fuse_fuse(r:p1rdt5404-p1rdt7057)p1r_4089 monitoredobj=Line.fuse(r:p1rdt5404-p1rdt7057)p1r_4089 enabled=y ratedcurrent=100.0

New Line.fuse(r:p1rdt3487-p1rdt5405)p1r_4090 Units=km Length=0.001 bus1=p1rdt5405.3 bus2=p1rdt3487-p1rdt5405x.3 switch=n enabled=y phases=1 Linecode=fuse_1_4_1_3_1_1_1_1_1_1_1_1_1_1_1_1_1_1_1_1_1_1_1_1_1_1_1_1_1_1_1

New Fuse.Fuse_fuse(r:p1rdt3487-p1rdt5405)p1r_4090 monitoredobj=Line.fuse(r:p1rdt3487-p1rdt5405)p1r_4090 enabled=y ratedcurrent=100.0

New Line.fuse(r:p1rdt5411-p1rdt6771)p1r_4092 Units=km Length=0.001 bus1=p1rdt5411.2 bus2=p1rdt5411-p1rdt6771x.2 switch=n enabled=y phases=1 Linecode=fuse_1_1_1_1_1_1_1_1_1_1_1_1_1_1_1_1_1_1_1_1_1_1_1_1_1_1_1_1_1

New Fuse.Fuse_fuse(r:p1rdt5411-p1rdt6771)p1r_4092 monitoredobj=Line.fuse(r:p1rdt5411-p1rdt6771)p1r_4092 enabled=y ratedcurrent=100.0

New Line.fuse(r:p1rdt3882-p1rdt5564)p1r_4126 Units=km Length=0.001 bus1=p1rdt5564.2 bus2=p1rdt3882-p1rdt5564x.2 switch=n enabled=y phases=1 Linecode=fuse_1_1_1_1_1_1_1_1_1_1_1_1_1_1_1_1_1_1_1_1_1_1_1_1_1_1_1_1_1

New Fuse.Fuse_fuse(r:p1rdt3882-p1rdt5564)p1r_4126 monitoredobj=Line.fuse(r:p1rdt3882-p1rdt5564)p1r_4126 enabled=y ratedcurrent=100.0

New Line.fuse(r:p1rdt4623-p1rdt5706)p1r_4161 Units=km Length=0.001 bus1=p1rdt5706.3 bus2=p1rdt4623-p1rdt5706xx.3 switch=n enabled=y phases=1 Linecode=fuse_1_1_1_1_1_1_1_1_1_1_1_1_1_1_1_1_1_1_1_1_1_1_1_1_1_1_1_1_1

New Fuse.Fuse_fuse(r:p1rdt4623-p1rdt5706)p1r_4161 monitoredobj=Line.fuse(r:p1rdt4623-p1rdt5706)p1r_4161 enabled=y ratedcurrent=100.0

New Line.fuse(r:p1rdt3684-p1rdt5779)p1r_4170 Units=km Length=0.001 bus1=p1rdt5779.2 bus2=p1rdt3684-p1rdt5779x.2 switch=n enabled=y phases=1 Linecode=fuse_1_4_1_3_1_1_1_1_1_1_1_1_1_1_1_1_1_1_1_1_1_1_1_1_1_1_1_1_1_1_1

New Fuse.Fuse_fuse(r:p1rdt3684-p1rdt5779)p1r_4170 monitoredobj=Line.fuse(r:p1rdt3684-p1rdt5779)p1r_4170 enabled=y ratedcurrent=100.0

New Line.fuse(r:p1rdt5779-p1rdt5847)p1r_4171 Units=km Length=0.001 bus1=p1rdt5779.3 bus2=p1rdt5779-p1rdt5847x.3 switch=n enabled=y phases=1 Linecode=fuse_1_4_1_1_1_1_1_1_1_1_1_1_1_1_1_1_1_1_1_1_1_1_1_1_1_1_1_1_1_1

New Fuse.Fuse_fuse(r:p1rdt5779-p1rdt5847)p1r_4171 monitoredobj=Line.fuse(r:p1rdt5779-p1rdt5847)p1r_4171 enabled=y ratedcurrent=100.0

New Line.fuse(r:p1rdt5918-p1rdt6878)p1r_4202 Units=km Length=0.001 bus1=p1rdt5918.3 bus2=p1rdt5918-p1rdt6878x.3 switch=n enabled=y phases=1 Linecode=fuse_1_4_1_3_1_3_1_1_1_1_1_1_1_1_1_1_1_1_1_1_1_1_1_1_1_1_1_1_1_1_1_1

New Fuse.Fuse_fuse(r:p1rdt5918-p1rdt6878)p1r_4202 monitoredobj=Line.fuse(r:p1rdt5918-p1rdt6878)p1r_4202 enabled=y ratedcurrent=100.0

New Line.fuse(r:p1rdt6049-p1rdt6702)p1r_4364 Units=km Length=0.001 bus1=p1rdt6702.2 bus2=p1rdt6049-p1rdt6702x.2 switch=n enabled=y phases=1 Linecode=fuse_1_1_1_1_1_1_1_1_1_1_1_1_1_1_1_1_1_1_1_1_1_1_1_1_1_1_1_1_1

New Fuse.Fuse_fuse(r:p1rdt6049-p1rdt6702)p1r_4364 monitoredobj=Line.fuse(r:p1rdt6049-p1rdt6702)p1r_4364 enabled=y ratedcurrent=100.0

New Line.fuse(r:p1rdt2068-p1rdt6879)p1r_4400 Units=km Length=0.001 bus1=p1rdt6879.3 bus2=p1rdt2068-p1rdt6879xxxxx.3 switch=n enabled=y phases=1 Linecode=fuse_1_1_1_1_1_1_1_1_1_1_1_1_1_1_1_1_1_1_1_1_1_1_1_1_1_1_1_1_1

New Fuse.Fuse_fuse(r:p1rdt2068-p1rdt6879)p1r_4400 monitoredobj=Line.fuse(r:p1rdt2068-p1rdt6879)p1r_4400 enabled=y ratedcurrent=100.0

New Line.fuse(r:p1rdt6879-p1rdt7426)p1r_4401 Units=km Length=0.001 bus1=p1rdt6879.1 bus2=p1rdt6879-p1rdt7426x.1 switch=n enabled=y phases=1 Linecode=fuse_1_1_1_1_1_1_1_1_1_1_1_1_1_1_1_1_1_1_1_1_1_1_1_1_1_1_1_1_1

New Fuse.Fuse_fuse(r:p1rdt6879-p1rdt7426)p1r_4401 monitoredobj=Line.fuse(r:p1rdt6879-p1rdt7426)p1r_4401 enabled=y ratedcurrent=100.0

New Line.fuse(r:p1rdt392-p1rdt6937)p1r_4410 Units=km Length=0.001 bus1=p1rdt6937.1 bus2=p1rdt392-p1rdt6937x.1 switch=n enabled=y phases=1 Linecode=fuse_1_1_1_1_1_1_1_1_1_1_1_1_1_1_1_1_1_1_1_1_1_1_1_1_1_1_1_1_1

New Fuse.Fuse_fuse(r:p1rdt392-p1rdt6937)p1r_4410 monitoredobj=Line.fuse(r:p1rdt392-p1rdt6937)p1r_4410 enabled=y ratedcurrent=100.0

New Line.fuse(r:p1rdt2895-p1rdt6937)p1r_4411 Units=km Length=0.001 bus1=p1rdt6937.3 bus2=p1rdt2895-p1rdt6937x.3 switch=n enabled=y phases=1 Linecode=fuse_1_1_1_1_1_1_1_1_1_1_1_1_1_1_1_1_1_1_1_1_1_1_1_1_1_1_1_1_1

New Fuse.Fuse_fuse(r:p1rdt2895-p1rdt6937)p1r_4411 monitoredobj=Line.fuse(r:p1rdt2895-p1rdt6937)p1r_4411 enabled=y ratedcurrent=100.0

New Line.fuse(r:p1rdt5410-p1rdt7983)p1r_4655 Units=km Length=0.001 bus1=p1rdt7983.3 bus2=p1rdt5410-p1rdt7983xxx.3 switch=n enabled=y phases=1 Linecode=fuse_1_4_1_3_1_3_1_3_1_1_1_1_1_1_1_1_1_1_1_1_1_1_1_1_1_1_1_1_1_1_1_1_1

New Fuse.Fuse_fuse(r:p1rdt5410-p1rdt7983)p1r_4655 monitoredobj=Line.fuse(r:p1rdt5410-p1rdt7983)p1r_4655 enabled=y ratedcurrent=100.0

New Line.fuse(r:p1rdt272-p1rdt8121)p1r_4676 Units=km Length=0.001 bus1=p1rdt8121.2 bus2=p1rdt272-p1rdt8121x.2 switch=n enabled=y phases=1 Linecode=fuse_1_4_1_3_1_1_1_1_1_1_1_1_1_1_1_1_1_1_1_1_1_1_1_1_1_1_1_1_1_1_1

New Fuse.Fuse_fuse(r:p1rdt272-p1rdt8121)p1r_4676 monitoredobj=Line.fuse(r:p1rdt272-p1rdt8121)p1r_4676 enabled=y ratedcurrent=100.0

New Line.fuse(r:p1rdt2292-p1rdt8121)p1r_4677 Units=km Length=0.001 bus1=p1rdt8121.1 bus2=p1rdt2292-p1rdt8121xx.1 switch=n enabled=y phases=1 Linecode=fuse_1_4_1_1_1_1_1_1_1_1_1_1_1_1_1_1_1_1_1_1_1_1_1_1_1_1_1_1_1_1

New Fuse.Fuse_fuse(r:p1rdt2292-p1rdt8121)p1r_4677 monitoredobj=Line.fuse(r:p1rdt2292-p1rdt8121)p1r_4677 enabled=y ratedcurrent=100.0

New Line.l(r:p1rdt5092-p1rdt7769)_disconnect Units=km Length=0.001 bus1=p1rdt5092_b1_1.1 bus2=p1rdt5092_b2_1.1 switch=y enabled=y phases=1 Linecode=1P_OH_AL_ACSR_#2_Sparrow_12_47_0_1_1_1_1_1_1_1_1_1_1_1_1_1_1_1_1_1_1_1_1_1_1_1_1_1_1_1_1_1

New Line.l(r:p1rdt5092-p1rdt7769)_cont Units=km Length=0.8225685000000001 bus1=p1rdt5092_b2_1.1 bus2=p1rdt7769.1 switch=n enabled=y phases=1 Linecode=1P_OH_AL_ACSR_#2_Sparrow_12_47_0_1_1_1_1_1_1_1_1_1_1_1_1_1_1_1_1_1_1_1_1_1_1_1_1_1_1_1_1_1

New Line.l(r:p1rdt2291-p1rdt3009)_disconnect Units=km Length=0.001 bus1=p1rdt2291_b1_1.1.2.3 bus2=p1rdt2291_b2_1.1.2.3 switch=y enabled=y phases=3 Linecode=3P_OH_AL_ACSR_4/0_Penguin_12_47_0_3_3_3_3_3_3_3_3_3_3_3_3_3_3_3_3_3_3_3_3_3_3_3_3_3_3_3_3_3

New Line.l(r:p1rdt2291-p1rdt3009)_cont Units=km Length=1.3328729999999998 bus1=p1rdt2291_b2_1.1.2.3 bus2=p1rdt3009.1.2.3 switch=n enabled=y phases=3 Linecode=3P_OH_AL_ACSR_4/0_Penguin_12_47_0_3_3_3_3_3_3_3_3_3_3_3_3_3_3_3_3_3_3_3_3_3_3_3_3_3_3_3_3_3

New Line.l(r:p1rdt2397-p1rhs1_1247)_disconnect Units=km Length=0.001 bus1=p1rdt2397-p1rhs1_1247x_b1_1.1.2.3 bus2=p1rdt2397-p1rhs1_1247x_b2_1.1.2.3 switch=y enabled=y phases=3 Linecode=3P_OH_AL_ACSR_4/0_Penguin_12_47_0_3_3_3_3_3_3_3_3_3_3_3_3_3_3_3_3_3_3_3_3_3_3_3_3_3_3_3_3_3

New Line.l(r:p1rdt2397-p1rhs1_1247)_cont Units=km Length=1.357848 bus1=p1rdt2397-p1rhs1_1247x_b2_1.1.2.3 bus2=p1rdt2397.1.2.3 switch=n enabled=y phases=3 Linecode=3P_OH_AL_ACSR_4/0_Penguin_12_47_0_3_3_3_3_3_3_3_3_3_3_3_3_3_3_3_3_3_3_3_3_3_3_3_3_3_3_3_3_3
