New Line.l(r:p1rdm3-p1rlv2) Units=km Length=0.0444216 bus1=p1rdm3.1.2 bus2=p1rlv2.1.2 switch=n enabled=y phases=2 Linecode=1P_OH_AL_4/0_Zuzara_0_416_0_2_2_2_2_2_2_2_2_2_2_2_2_2_2_2_2_2_2_2_2_2_2_2_2_2_2_2_2_2

New Line.l(r:p1rdm3-p1rdt1lv) Units=km Length=0.0129386 bus1=p1rdt1lv.1.2 bus2=p1rdm3.1.2 switch=n enabled=y phases=2 Linecode=1P_OH_AL_2/0_Rucina_0_416_0_2_2_2_2_2_2_2_2_2_2_2_2_2_2_2_2_2_2_2_2_2_2_2_2_2_2_2_2_2

New Line.l(r:p1rdm4-p1rlv11508) Units=km Length=0.0125058 bus1=p1rdm4.1.2 bus2=p1rlv11508.1.2 switch=n enabled=y phases=2 Linecode=1P_OH_AL_2/0_Rucina_0_416_0_2_2_2_2_2_2_2_2_2_2_2_2_2_2_2_2_2_2_2_2_2_2_2_2_2_2_2_2_2

New Line.l(r:p1rdm4-p1rdt1lv) Units=km Length=0.0271779 bus1=p1rdt1lv.1.2 bus2=p1rdm4.1.2 switch=n enabled=y phases=2 Linecode=1P_OH_AL_4/0_Zuzara_0_416_0_2_2_2_2_2_2_2_2_2_2_2_2_2_2_2_2_2_2_2_2_2_2_2_2_2_2_2_2_2

New Line.l(r:p1rdt3lv-p1rlv4) Units=km Length=0.001 bus1=p1rdt3lv.1.2 bus2=p1rlv4.1.2 switch=n enabled=y phases=2 Linecode=1P_OH_AL_4_Periwinkle_0_416_0_2_2_2_2_2_2_2_2_2_2_2_2_2_2_2_2_2_2_2_2_2_2_2_2_2_2_2_2_2

New Line.l(r:p1rdt4lv-p1rlv5) Units=km Length=0.0194254 bus1=p1rdt4lv.1.2 bus2=p1rlv5.1.2 switch=n enabled=y phases=2 Linecode=1P_OH_AL_2/0_Rucina_0_416_0_2_2_2_2_2_2_2_2_2_2_2_2_2_2_2_2_2_2_2_2_2_2_2_2_2_2_2_2_2

New Line.l(r:p1rdt4lv-p1rlv665) Units=km Length=0.0194254 bus1=p1rdt4lv.1.2 bus2=p1rlv665.1.2 switch=n enabled=y phases=2 Linecode=1P_OH_AL_2/0_Rucina_0_416_0_2_2_2_2_2_2_2_2_2_2_2_2_2_2_2_2_2_2_2_2_2_2_2_2_2_2_2_2_2

New Line.l(r:p1rdm10-p1rlv6) Units=km Length=0.0284894 bus1=p1rdm10.1.2 bus2=p1rlv6.1.2 switch=n enabled=y phases=2 Linecode=1P_OH_AL_4/0_Zuzara_0_416_0_2_2_2_2_2_2_2_2_2_2_2_2_2_2_2_2_2_2_2_2_2_2_2_2_2_2_2_2_2

New Line.l(r:p1rdm10-p1rdt5lv) Units=km Length=0.0377913 bus1=p1rdt5lv.1.2 bus2=p1rdm10.1.2 switch=n enabled=y phases=2 Linecode=1P_OH_AL_4/0_Zuzara_0_416_0_2_2_2_2_2_2_2_2_2_2_2_2_2_2_2_2_2_2_2_2_2_2_2_2_2_2_2_2_2

New Line.l(r:p1rdm11-p1rlv3081) Units=km Length=0.033704000000000005 bus1=p1rdm11.1.2 bus2=p1rlv3081.1.2 switch=n enabled=y phases=2 Linecode=1P_OH_AL_4/0_Zuzara_0_416_0_2_2_2_2_2_2_2_2_2_2_2_2_2_2_2_2_2_2_2_2_2_2_2_2_2_2_2_2_2

New Line.l(r:p1rdm11-p1rdt5lv) Units=km Length=0.0188969 bus1=p1rdt5lv.1.2 bus2=p1rdm11.1.2 switch=n enabled=y phases=2 Linecode=1P_OH_AL_2/0_Rucina_0_416_0_2_2_2_2_2_2_2_2_2_2_2_2_2_2_2_2_2_2_2_2_2_2_2_2_2_2_2_2_2

New Line.l(r:p1rdm306-p1rlv129) Units=km Length=0.0329005 bus1=p1rdm306.1.2 bus2=p1rlv129.1.2 switch=n enabled=y phases=2 Linecode=1P_OH_AL_4/0_Zuzara_0_416_0_2_2_2_2_2_2_2_2_2_2_2_2_2_2_2_2_2_2_2_2_2_2_2_2_2_2_2_2_2

New Line.l(r:p1rdm306-p1rdt125lv) Units=km Length=0.0197904 bus1=p1rdt125lv.1.2 bus2=p1rdm306.1.2 switch=n enabled=y phases=2 Linecode=1P_OH_AL_2/0_Rucina_0_416_0_2_2_2_2_2_2_2_2_2_2_2_2_2_2_2_2_2_2_2_2_2_2_2_2_2_2_2_2_2

New Line.l(r:p1rdm307-p1rlv4727) Units=km Length=0.0418665 bus1=p1rdm307.1.2 bus2=p1rlv4727.1.2 switch=n enabled=y phases=2 Linecode=1P_OH_AL_4/0_Zuzara_0_416_0_2_2_2_2_2_2_2_2_2_2_2_2_2_2_2_2_2_2_2_2_2_2_2_2_2_2_2_2_2

New Line.l(r:p1rdm307-p1rdt125lv) Units=km Length=0.0197904 bus1=p1rdt125lv.1.2 bus2=p1rdm307.1.2 switch=n enabled=y phases=2 Linecode=1P_OH_AL_2/0_Rucina_0_416_0_2_2_2_2_2_2_2_2_2_2_2_2_2_2_2_2_2_2_2_2_2_2_2_2_2_2_2_2_2

New Line.l(r:p1rdt260lv-p1rlv267) Units=km Length=0.06904510000000001 bus1=p1rdt260lv.1.2 bus2=p1rlv267.1.2 switch=n enabled=y phases=2 Linecode=1P_OH_AL_4/0_Zuzara_0_416_0_2_2_2_2_2_2_2_2_2_2_2_2_2_2_2_2_2_2_2_2_2_2_2_2_2_2_2_2_2

New Line.l(r:p1rdt260lv-p1rlv13771) Units=km Length=0.06904510000000001 bus1=p1rdt260lv.1.2 bus2=p1rlv13771.1.2 switch=n enabled=y phases=2 Linecode=1P_OH_AL_4/0_Zuzara_0_416_0_2_2_2_2_2_2_2_2_2_2_2_2_2_2_2_2_2_2_2_2_2_2_2_2_2_2_2_2_2

New Line.l(r:p1rdt383lv-p1rlv392) Units=km Length=0.0553715 bus1=p1rdt383lv.1.2 bus2=p1rlv392.1.2 switch=n enabled=y phases=2 Linecode=1P_OH_AL_4/0_Zuzara_0_416_0_2_2_2_2_2_2_2_2_2_2_2_2_2_2_2_2_2_2_2_2_2_2_2_2_2_2_2_2_2

New Line.l(r:p1rdm908-p1rlv6059) Units=km Length=0.0615103 bus1=p1rdm908.1.2 bus2=p1rlv6059.1.2 switch=n enabled=y phases=2 Linecode=1P_OH_AL_4/0_Zuzara_0_416_0_2_2_2_2_2_2_2_2_2_2_2_2_2_2_2_2_2_2_2_2_2_2_2_2_2_2_2_2_2

New Line.l(r:p1rdm908-p1rdt383lv) Units=km Length=0.0194735 bus1=p1rdt383lv.1.2 bus2=p1rdm908.1.2 switch=n enabled=y phases=2 Linecode=1P_OH_AL_2/0_Rucina_0_416_0_2_2_2_2_2_2_2_2_2_2_2_2_2_2_2_2_2_2_2_2_2_2_2_2_2_2_2_2_2

New Line.l(r:p1rdt385lv-p1rlv394) Units=km Length=0.001 bus1=p1rdt385lv.1.2 bus2=p1rlv394.1.2 switch=n enabled=y phases=2 Linecode=1P_OH_AL_4_Periwinkle_0_416_0_2_2_2_2_2_2_2_2_2_2_2_2_2_2_2_2_2_2_2_2_2_2_2_2_2_2_2_2_2

New Line.l(r:p1rdm912-p1rlv395) Units=km Length=0.0269259 bus1=p1rdm912.1.2 bus2=p1rlv395.1.2 switch=n enabled=y phases=2 Linecode=1P_OH_AL_2/0_Rucina_0_416_0_2_2_2_2_2_2_2_2_2_2_2_2_2_2_2_2_2_2_2_2_2_2_2_2_2_2_2_2_2

New Line.l(r:p1rdm912-p1rdt386lv) Units=km Length=0.0192081 bus1=p1rdt386lv.1.2 bus2=p1rdm912.1.2 switch=n enabled=y phases=2 Linecode=1P_OH_AL_2/0_Rucina_0_416_0_2_2_2_2_2_2_2_2_2_2_2_2_2_2_2_2_2_2_2_2_2_2_2_2_2_2_2_2_2

New Line.l(r:p1rdm913-p1rlv7343) Units=km Length=0.0582582 bus1=p1rdm913.1.2 bus2=p1rlv7343.1.2 switch=n enabled=y phases=2 Linecode=1P_OH_AL_4/0_Zuzara_0_416_0_2_2_2_2_2_2_2_2_2_2_2_2_2_2_2_2_2_2_2_2_2_2_2_2_2_2_2_2_2

New Line.l(r:p1rdm913-p1rdt386lv) Units=km Length=0.0169883 bus1=p1rdt386lv.1.2 bus2=p1rdm913.1.2 switch=n enabled=y phases=2 Linecode=1P_OH_AL_2/0_Rucina_0_416_0_2_2_2_2_2_2_2_2_2_2_2_2_2_2_2_2_2_2_2_2_2_2_2_2_2_2_2_2_2

New Line.l(r:p1rdt512lv-p1rlv525) Units=km Length=0.0443654 bus1=p1rdt512lv.1.2 bus2=p1rlv525.1.2 switch=n enabled=y phases=2 Linecode=1P_OH_AL_4/0_Zuzara_0_416_0_2_2_2_2_2_2_2_2_2_2_2_2_2_2_2_2_2_2_2_2_2_2_2_2_2_2_2_2_2

New Line.l(r:p1rdt512lv-p1rlv2014) Units=km Length=0.0125988 bus1=p1rdt512lv.1.2 bus2=p1rlv2014.1.2 switch=n enabled=y phases=2 Linecode=1P_OH_AL_2/0_Rucina_0_416_0_2_2_2_2_2_2_2_2_2_2_2_2_2_2_2_2_2_2_2_2_2_2_2_2_2_2_2_2_2

New Line.l(r:p1rdt512lv-p1rlv11666) Units=km Length=0.0323662 bus1=p1rdt512lv.1.2 bus2=p1rlv11666.1.2 switch=n enabled=y phases=2 Linecode=1P_OH_AL_4/0_Zuzara_0_416_0_2_2_2_2_2_2_2_2_2_2_2_2_2_2_2_2_2_2_2_2_2_2_2_2_2_2_2_2_2

New Line.l(r:p1rdt513lv-p1rlv526) Units=km Length=0.0559212 bus1=p1rdt513lv.1.2 bus2=p1rlv526.1.2 switch=n enabled=y phases=2 Linecode=1P_OH_AL_4/0_Zuzara_0_416_0_2_2_2_2_2_2_2_2_2_2_2_2_2_2_2_2_2_2_2_2_2_2_2_2_2_2_2_2_2

New Line.l(r:p1rdt645lv-p1rlv667) Units=km Length=0.104212 bus1=p1rdt645lv.1.2 bus2=p1rlv667.1.2 switch=n enabled=y phases=2 Linecode=1P_OH_AL_4/0_Zuzara_0_416_0_2_2_2_2_2_2_2_2_2_2_2_2_2_2_2_2_2_2_2_2_2_2_2_2_2_2_2_2_2

New Line.l(r:p1rdt645lv-p1rlv11513) Units=km Length=0.0724187 bus1=p1rdt645lv.1.2 bus2=p1rlv11513.1.2 switch=n enabled=y phases=2 Linecode=1P_OH_AL_4/0_Zuzara_0_416_0_2_2_2_2_2_2_2_2_2_2_2_2_2_2_2_2_2_2_2_2_2_2_2_2_2_2_2_2_2

New Line.l(r:p1rdt646lv-p1rlv668) Units=km Length=0.0143795 bus1=p1rdt646lv.1.2 bus2=p1rlv668.1.2 switch=n enabled=y phases=2 Linecode=1P_OH_AL_2/0_Rucina_0_416_0_2_2_2_2_2_2_2_2_2_2_2_2_2_2_2_2_2_2_2_2_2_2_2_2_2_2_2_2_2

New Line.l(r:p1rdt646lv-p1rlv2835) Units=km Length=0.0240259 bus1=p1rdt646lv.1.2 bus2=p1rlv2835.1.2 switch=n enabled=y phases=2 Linecode=1P_OH_AL_2/0_Rucina_0_416_0_2_2_2_2_2_2_2_2_2_2_2_2_2_2_2_2_2_2_2_2_2_2_2_2_2_2_2_2_2

New Line.l(r:p1rdt646lv-p1rlv10821) Units=km Length=0.0275101 bus1=p1rdt646lv.1.2 bus2=p1rlv10821.1.2 switch=n enabled=y phases=2 Linecode=1P_OH_AL_4/0_Zuzara_0_416_0_2_2_2_2_2_2_2_2_2_2_2_2_2_2_2_2_2_2_2_2_2_2_2_2_2_2_2_2_2

New Line.l(r:p1rdt792lv-p1rlv827) Units=km Length=0.0224006 bus1=p1rdt792lv.1.2 bus2=p1rlv827.1.2 switch=n enabled=y phases=2 Linecode=1P_OH_AL_2/0_Rucina_0_416_0_2_2_2_2_2_2_2_2_2_2_2_2_2_2_2_2_2_2_2_2_2_2_2_2_2_2_2_2_2

New Line.l(r:p1rdt792lv-p1rlv13002) Units=km Length=0.030403600000000003 bus1=p1rdt792lv.1.2 bus2=p1rlv13002.1.2 switch=n enabled=y phases=2 Linecode=1P_OH_AL_4/0_Zuzara_0_416_0_2_2_2_2_2_2_2_2_2_2_2_2_2_2_2_2_2_2_2_2_2_2_2_2_2_2_2_2_2

New Line.l(r:p1rdm1814-p1rlv832) Units=km Length=0.00395285 bus1=p1rdm1814.1.2 bus2=p1rlv832.1.2 switch=n enabled=y phases=2 Linecode=1P_OH_AL_4_Periwinkle_0_416_0_2_2_2_2_2_2_2_2_2_2_2_2_2_2_2_2_2_2_2_2_2_2_2_2_2_2_2_2_2

New Line.l(r:p1rdm1814-p1rdt797lv) Units=km Length=0.0101798 bus1=p1rdt797lv.1.2 bus2=p1rdm1814.1.2 switch=n enabled=y phases=2 Linecode=1P_OH_AL_2/0_Rucina_0_416_0_2_2_2_2_2_2_2_2_2_2_2_2_2_2_2_2_2_2_2_2_2_2_2_2_2_2_2_2_2

New Line.l(r:p1rdm1815-p1rlv9333) Units=km Length=0.00632282 bus1=p1rdm1815.1.2 bus2=p1rlv9333.1.2 switch=n enabled=y phases=2 Linecode=1P_OH_AL_2/0_Rucina_0_416_0_2_2_2_2_2_2_2_2_2_2_2_2_2_2_2_2_2_2_2_2_2_2_2_2_2_2_2_2_2

New Line.l(r:p1rdm1815-p1rdt797lv) Units=km Length=0.0213638 bus1=p1rdt797lv.1.2 bus2=p1rdm1815.1.2 switch=n enabled=y phases=2 Linecode=1P_OH_AL_2/0_Rucina_0_416_0_2_2_2_2_2_2_2_2_2_2_2_2_2_2_2_2_2_2_2_2_2_2_2_2_2_2_2_2_2

New Line.l(r:p1rdt912lv-p1rlv958) Units=km Length=0.09062990000000001 bus1=p1rdt912lv.1.2 bus2=p1rlv958.1.2 switch=n enabled=y phases=2 Linecode=1P_OH_AL_4/0_Zuzara_0_416_0_2_2_2_2_2_2_2_2_2_2_2_2_2_2_2_2_2_2_2_2_2_2_2_2_2_2_2_2_2

New Line.l(r:p1rdt1024lv-p1rlv1081) Units=km Length=0.0104432 bus1=p1rdt1024lv.1.2 bus2=p1rlv1081.1.2 switch=n enabled=y phases=2 Linecode=1P_OH_AL_2/0_Rucina_0_416_0_2_2_2_2_2_2_2_2_2_2_2_2_2_2_2_2_2_2_2_2_2_2_2_2_2_2_2_2_2

New Line.l(r:p1rdt1142lv-p1rlv1208) Units=km Length=0.0328918 bus1=p1rdt1142lv.1.2 bus2=p1rlv1208.1.2 switch=n enabled=y phases=2 Linecode=1P_OH_AL_4/0_Zuzara_0_416_0_2_2_2_2_2_2_2_2_2_2_2_2_2_2_2_2_2_2_2_2_2_2_2_2_2_2_2_2_2

New Line.l(r:p1rdt1142lv-p1rlv4439) Units=km Length=0.049780000000000005 bus1=p1rdt1142lv.1.2 bus2=p1rlv4439.1.2 switch=n enabled=y phases=2 Linecode=1P_OH_AL_4/0_Zuzara_0_416_0_2_2_2_2_2_2_2_2_2_2_2_2_2_2_2_2_2_2_2_2_2_2_2_2_2_2_2_2_2

New Line.l(r:p1rdt1147lv-p1rlv1213) Units=km Length=0.0563944 bus1=p1rdt1147lv.1.2 bus2=p1rlv1213.1.2 switch=n enabled=y phases=2 Linecode=1P_OH_AL_4/0_Zuzara_0_416_0_2_2_2_2_2_2_2_2_2_2_2_2_2_2_2_2_2_2_2_2_2_2_2_2_2_2_2_2_2

New Line.l(r:p1rdt1260lv-p1rlv1341) Units=km Length=0.0867415 bus1=p1rdt1260lv.1.2 bus2=p1rlv1341.1.2 switch=n enabled=y phases=2 Linecode=1P_OH_AL_4/0_Zuzara_0_416_0_2_2_2_2_2_2_2_2_2_2_2_2_2_2_2_2_2_2_2_2_2_2_2_2_2_2_2_2_2

New Line.l(r:p1rdt1260lv-p1rlv11514) Units=km Length=0.05733 bus1=p1rdt1260lv.1.2 bus2=p1rlv11514.1.2 switch=n enabled=y phases=2 Linecode=1P_OH_AL_4/0_Zuzara_0_416_0_2_2_2_2_2_2_2_2_2_2_2_2_2_2_2_2_2_2_2_2_2_2_2_2_2_2_2_2_2

New Line.l(r:p1rdm2802-p1rlv9073) Units=km Length=0.145459 bus1=p1rdm2802.1.2 bus2=p1rlv9073.1.2 switch=n enabled=y phases=2 Linecode=1P_OH_AL_4/0_Zuzara_0_416_0_2_2_2_2_2_2_2_2_2_2_2_2_2_2_2_2_2_2_2_2_2_2_2_2_2_2_2_2_2

New Line.l(r:p1rdm2802-p1rdt1260lv) Units=km Length=0.0162901 bus1=p1rdt1260lv.1.2 bus2=p1rdm2802.1.2 switch=n enabled=y phases=2 Linecode=1P_OH_AL_2/0_Rucina_0_416_0_2_2_2_2_2_2_2_2_2_2_2_2_2_2_2_2_2_2_2_2_2_2_2_2_2_2_2_2_2

New Line.l(r:p1rdm2808-p1rlv1345) Units=km Length=0.0116364 bus1=p1rdm2808.1.2 bus2=p1rlv1345.1.2 switch=n enabled=y phases=2 Linecode=1P_OH_AL_2/0_Rucina_0_416_0_2_2_2_2_2_2_2_2_2_2_2_2_2_2_2_2_2_2_2_2_2_2_2_2_2_2_2_2_2

New Line.l(r:p1rdm2808-p1rlv2149) Units=km Length=0.0099331 bus1=p1rdm2808.1.2 bus2=p1rlv2149.1.2 switch=n enabled=y phases=2 Linecode=1P_OH_AL_2/0_Rucina_0_416_0_2_2_2_2_2_2_2_2_2_2_2_2_2_2_2_2_2_2_2_2_2_2_2_2_2_2_2_2_2

New Line.l(r:p1rdm2808-p1rdt1264lv) Units=km Length=0.022461300000000003 bus1=p1rdt1264lv.1.2 bus2=p1rdm2808.1.2 switch=n enabled=y phases=2 Linecode=1P_OH_AL_2/0_Rucina_0_416_0_2_2_2_2_2_2_2_2_2_2_2_2_2_2_2_2_2_2_2_2_2_2_2_2_2_2_2_2_2

New Line.l(r:p1rdm2810-p1rlv2955) Units=km Length=0.00550027 bus1=p1rdm2810.1.2 bus2=p1rlv2955.1.2 switch=n enabled=y phases=2 Linecode=1P_OH_AL_2/0_Rucina_0_416_0_2_2_2_2_2_2_2_2_2_2_2_2_2_2_2_2_2_2_2_2_2_2_2_2_2_2_2_2_2

New Line.l(r:p1rdm2810-p1rdt1264lv) Units=km Length=0.0714033 bus1=p1rdt1264lv.1.2 bus2=p1rdm2810.1.2 switch=n enabled=y phases=2 Linecode=1P_OH_AL_4/0_Zuzara_0_416_0_2_2_2_2_2_2_2_2_2_2_2_2_2_2_2_2_2_2_2_2_2_2_2_2_2_2_2_2_2

New Line.l(r:p1rdm2811-p1rlv12611) Units=km Length=0.0100134 bus1=p1rdm2811.1.2 bus2=p1rlv12611.1.2 switch=n enabled=y phases=2 Linecode=1P_OH_AL_2/0_Rucina_0_416_0_2_2_2_2_2_2_2_2_2_2_2_2_2_2_2_2_2_2_2_2_2_2_2_2_2_2_2_2_2

New Line.l(r:p1rdm2811-p1rdt1264lv) Units=km Length=0.0333123 bus1=p1rdt1264lv.1.2 bus2=p1rdm2811.1.2 switch=n enabled=y phases=2 Linecode=1P_OH_AL_4/0_Zuzara_0_416_0_2_2_2_2_2_2_2_2_2_2_2_2_2_2_2_2_2_2_2_2_2_2_2_2_2_2_2_2_2

New Line.l(r:p1rdm2812-p1rlv1346) Units=km Length=0.00743006 bus1=p1rdm2812.1.2 bus2=p1rlv1346.1.2 switch=n enabled=y phases=2 Linecode=1P_OH_AL_2/0_Rucina_0_416_0_2_2_2_2_2_2_2_2_2_2_2_2_2_2_2_2_2_2_2_2_2_2_2_2_2_2_2_2_2

New Line.l(r:p1rdm2812-p1rdt1265lv) Units=km Length=0.0383044 bus1=p1rdt1265lv.1.2 bus2=p1rdm2812.1.2 switch=n enabled=y phases=2 Linecode=1P_OH_AL_4/0_Zuzara_0_416_0_2_2_2_2_2_2_2_2_2_2_2_2_2_2_2_2_2_2_2_2_2_2_2_2_2_2_2_2_2

New Line.l(r:p1rdm2813-p1rlv11671) Units=km Length=0.0573502 bus1=p1rdm2813.1.2 bus2=p1rlv11671.1.2 switch=n enabled=y phases=2 Linecode=1P_OH_AL_4/0_Zuzara_0_416_0_2_2_2_2_2_2_2_2_2_2_2_2_2_2_2_2_2_2_2_2_2_2_2_2_2_2_2_2_2

New Line.l(r:p1rdm2813-p1rdt1265lv) Units=km Length=0.0313903 bus1=p1rdt1265lv.1.2 bus2=p1rdm2813.1.2 switch=n enabled=y phases=2 Linecode=1P_OH_AL_4/0_Zuzara_0_416_0_2_2_2_2_2_2_2_2_2_2_2_2_2_2_2_2_2_2_2_2_2_2_2_2_2_2_2_2_2

New Line.l(r:p1rdt1499lv-p1rlv1618) Units=km Length=0.0320813 bus1=p1rdt1499lv.1.2 bus2=p1rlv1618.1.2 switch=n enabled=y phases=2 Linecode=1P_OH_AL_4/0_Zuzara_0_416_0_2_2_2_2_2_2_2_2_2_2_2_2_2_2_2_2_2_2_2_2_2_2_2_2_2_2_2_2_2

New Line.l(r:p1rdt1593lv-p1rlv1731) Units=km Length=0.0154463 bus1=p1rdt1593lv.1.2 bus2=p1rlv1731.1.2 switch=n enabled=y phases=2 Linecode=1P_OH_AL_2/0_Rucina_0_416_0_2_2_2_2_2_2_2_2_2_2_2_2_2_2_2_2_2_2_2_2_2_2_2_2_2_2_2_2_2

New Line.l(r:p1rdm3506-p1rlv2137) Units=km Length=0.0109223 bus1=p1rdm3506.1.2 bus2=p1rlv2137.1.2 switch=n enabled=y phases=2 Linecode=1P_OH_AL_2/0_Rucina_0_416_0_2_2_2_2_2_2_2_2_2_2_2_2_2_2_2_2_2_2_2_2_2_2_2_2_2_2_2_2_2

New Line.l(r:p1rdm3506-p1rdt1593lv) Units=km Length=0.0186288 bus1=p1rdt1593lv.1.2 bus2=p1rdm3506.1.2 switch=n enabled=y phases=2 Linecode=1P_OH_AL_2/0_Rucina_0_416_0_2_2_2_2_2_2_2_2_2_2_2_2_2_2_2_2_2_2_2_2_2_2_2_2_2_2_2_2_2

New Line.l(r:p1rdt1597lv-p1rlv1736) Units=km Length=0.001 bus1=p1rdt1597lv.1.2 bus2=p1rlv1736.1.2 switch=n enabled=y phases=2 Linecode=1P_OH_AL_4_Periwinkle_0_416_0_2_2_2_2_2_2_2_2_2_2_2_2_2_2_2_2_2_2_2_2_2_2_2_2_2_2_2_2_2

New Line.l(r:p1rdt1707lv-p1rlv1869) Units=km Length=0.0635094 bus1=p1rdt1707lv.1.2 bus2=p1rlv1869.1.2 switch=n enabled=y phases=2 Linecode=1P_OH_AL_4/0_Zuzara_0_416_0_2_2_2_2_2_2_2_2_2_2_2_2_2_2_2_2_2_2_2_2_2_2_2_2_2_2_2_2_2

New Line.l(r:p1rdt1707lv-p1rlv12498) Units=km Length=0.0635094 bus1=p1rdt1707lv.1.2 bus2=p1rlv12498.1.2 switch=n enabled=y phases=2 Linecode=1P_OH_AL_4/0_Zuzara_0_416_0_2_2_2_2_2_2_2_2_2_2_2_2_2_2_2_2_2_2_2_2_2_2_2_2_2_2_2_2_2

New Line.l(r:p1rdm3735-p1rlv1870) Units=km Length=0.105667 bus1=p1rdm3735.1.2 bus2=p1rlv1870.1.2 switch=n enabled=y phases=2 Linecode=1P_OH_AL_4/0_Zuzara_0_416_0_2_2_2_2_2_2_2_2_2_2_2_2_2_2_2_2_2_2_2_2_2_2_2_2_2_2_2_2_2

New Line.l(r:p1rdm3735-p1rdt1708lv) Units=km Length=0.0168801 bus1=p1rdt1708lv.1.2 bus2=p1rdm3735.1.2 switch=n enabled=y phases=2 Linecode=1P_OH_AL_2/0_Rucina_0_416_0_2_2_2_2_2_2_2_2_2_2_2_2_2_2_2_2_2_2_2_2_2_2_2_2_2_2_2_2_2

New Line.l(r:p1rdm3736-p1rlv5127) Units=km Length=0.0877874 bus1=p1rdm3736.1.2 bus2=p1rlv5127.1.2 switch=n enabled=y phases=2 Linecode=1P_OH_AL_4/0_Zuzara_0_416_0_2_2_2_2_2_2_2_2_2_2_2_2_2_2_2_2_2_2_2_2_2_2_2_2_2_2_2_2_2

New Line.l(r:p1rdm3736-p1rdt1708lv) Units=km Length=0.0168771 bus1=p1rdt1708lv.1.2 bus2=p1rdm3736.1.2 switch=n enabled=y phases=2 Linecode=1P_OH_AL_2/0_Rucina_0_416_0_2_2_2_2_2_2_2_2_2_2_2_2_2_2_2_2_2_2_2_2_2_2_2_2_2_2_2_2_2

New Line.l(r:p1rdt1709lv-p1rlv1871) Units=km Length=0.0353081 bus1=p1rdt1709lv.1.2 bus2=p1rlv1871.1.2 switch=n enabled=y phases=2 Linecode=1P_OH_AL_4/0_Zuzara_0_416_0_2_2_2_2_2_2_2_2_2_2_2_2_2_2_2_2_2_2_2_2_2_2_2_2_2_2_2_2_2

New Line.l(r:p1rdt1709lv-p1rlv6541) Units=km Length=0.0694525 bus1=p1rdt1709lv.1.2 bus2=p1rlv6541.1.2 switch=n enabled=y phases=2 Linecode=1P_OH_AL_4/0_Zuzara_0_416_0_2_2_2_2_2_2_2_2_2_2_2_2_2_2_2_2_2_2_2_2_2_2_2_2_2_2_2_2_2

New Line.l(r:p1rdt1710lv-p1rlv1872) Units=km Length=0.043655400000000004 bus1=p1rdt1710lv.1.2 bus2=p1rlv1872.1.2 switch=n enabled=y phases=2 Linecode=1P_OH_AL_4/0_Zuzara_0_416_0_2_2_2_2_2_2_2_2_2_2_2_2_2_2_2_2_2_2_2_2_2_2_2_2_2_2_2_2_2

New Line.l(r:p1rdt1710lv-p1rlv8020) Units=km Length=0.043655400000000004 bus1=p1rdt1710lv.1.2 bus2=p1rlv8020.1.2 switch=n enabled=y phases=2 Linecode=1P_OH_AL_4/0_Zuzara_0_416_0_2_2_2_2_2_2_2_2_2_2_2_2_2_2_2_2_2_2_2_2_2_2_2_2_2_2_2_2_2

New Line.l(r:p1rdt1823lv-p1rlv2011) Units=km Length=0.0207987 bus1=p1rdt1823lv.1.2 bus2=p1rlv2011.1.2 switch=n enabled=y phases=2 Linecode=1P_OH_AL_2/0_Rucina_0_416_0_2_2_2_2_2_2_2_2_2_2_2_2_2_2_2_2_2_2_2_2_2_2_2_2_2_2_2_2_2

New Line.l(r:p1rdt1823lv-p1rlv10143) Units=km Length=0.0356353 bus1=p1rdt1823lv.1.2 bus2=p1rlv10143.1.2 switch=n enabled=y phases=2 Linecode=1P_OH_AL_4/0_Zuzara_0_416_0_2_2_2_2_2_2_2_2_2_2_2_2_2_2_2_2_2_2_2_2_2_2_2_2_2_2_2_2_2

New Line.l(r:p1rdt1824lv-p1rlv8019) Units=km Length=0.0815436 bus1=p1rdt1824lv.1.2 bus2=p1rlv8019.1.2 switch=n enabled=y phases=2 Linecode=1P_OH_AL_4/0_Zuzara_0_416_0_2_2_2_2_2_2_2_2_2_2_2_2_2_2_2_2_2_2_2_2_2_2_2_2_2_2_2_2_2

New Line.l(r:p1rdm3964-p1rlv2012) Units=km Length=0.0642583 bus1=p1rdm3964.1.2 bus2=p1rlv2012.1.2 switch=n enabled=y phases=2 Linecode=1P_OH_AL_4/0_Zuzara_0_416_0_2_2_2_2_2_2_2_2_2_2_2_2_2_2_2_2_2_2_2_2_2_2_2_2_2_2_2_2_2

New Line.l(r:p1rdm3965-p1rlv7341) Units=km Length=0.0454782 bus1=p1rdm3965.1.2 bus2=p1rlv7341.1.2 switch=n enabled=y phases=2 Linecode=1P_OH_AL_4/0_Zuzara_0_416_0_2_2_2_2_2_2_2_2_2_2_2_2_2_2_2_2_2_2_2_2_2_2_2_2_2_2_2_2_2

New Line.l(r:p1rdm3964-p1rdm3965) Units=km Length=0.017905 bus1=p1rdm3964.1.2 bus2=p1rdm3965.1.2 switch=n enabled=y phases=2 Linecode=1P_OH_AL_2/0_Rucina_0_416_0_2_2_2_2_2_2_2_2_2_2_2_2_2_2_2_2_2_2_2_2_2_2_2_2_2_2_2_2_2

New Line.l(r:p1rdm3964-p1rdt1824lv) Units=km Length=0.0178955 bus1=p1rdt1824lv.1.2 bus2=p1rdm3964.1.2 switch=n enabled=y phases=2 Linecode=1P_OH_AL_2/0_Rucina_0_416_0_2_2_2_2_2_2_2_2_2_2_2_2_2_2_2_2_2_2_2_2_2_2_2_2_2_2_2_2_2

New Line.l(r:p1rdm3967-p1rlv11382) Units=km Length=0.058265000000000004 bus1=p1rdm3967.1.2 bus2=p1rlv11382.1.2 switch=n enabled=y phases=2 Linecode=1P_OH_AL_4/0_Zuzara_0_416_0_2_2_2_2_2_2_2_2_2_2_2_2_2_2_2_2_2_2_2_2_2_2_2_2_2_2_2_2_2

New Line.l(r:p1rdm3967-p1rdt1824lv) Units=km Length=0.0358005 bus1=p1rdt1824lv.1.2 bus2=p1rdm3967.1.2 switch=n enabled=y phases=2 Linecode=1P_OH_AL_4/0_Zuzara_0_416_0_2_2_2_2_2_2_2_2_2_2_2_2_2_2_2_2_2_2_2_2_2_2_2_2_2_2_2_2_2

New Line.l(r:p1rdt1825lv-p1rlv2013) Units=km Length=0.0470997 bus1=p1rdt1825lv.1.2 bus2=p1rlv2013.1.2 switch=n enabled=y phases=2 Linecode=1P_OH_AL_4/0_Zuzara_0_416_0_2_2_2_2_2_2_2_2_2_2_2_2_2_2_2_2_2_2_2_2_2_2_2_2_2_2_2_2_2

New Line.l(r:p1rdt1825lv-p1rlv7624) Units=km Length=0.0470997 bus1=p1rdt1825lv.1.2 bus2=p1rlv7624.1.2 switch=n enabled=y phases=2 Linecode=1P_OH_AL_4/0_Zuzara_0_416_0_2_2_2_2_2_2_2_2_2_2_2_2_2_2_2_2_2_2_2_2_2_2_2_2_2_2_2_2_2

New Line.l(r:p1rdt1826lv-p1rlv2015) Units=km Length=0.0500553 bus1=p1rdt1826lv.1.2 bus2=p1rlv2015.1.2 switch=n enabled=y phases=2 Linecode=1P_OH_AL_4/0_Zuzara_0_416_0_2_2_2_2_2_2_2_2_2_2_2_2_2_2_2_2_2_2_2_2_2_2_2_2_2_2_2_2_2

New Line.l(r:p1rdt1827lv-p1rlv11667) Units=km Length=0.0661043 bus1=p1rdt1827lv.1.2 bus2=p1rlv11667.1.2 switch=n enabled=y phases=2 Linecode=1P_OH_AL_4/0_Zuzara_0_416_0_2_2_2_2_2_2_2_2_2_2_2_2_2_2_2_2_2_2_2_2_2_2_2_2_2_2_2_2_2

New Line.l(r:p1rdm3971-p1rlv2016) Units=km Length=0.0531458 bus1=p1rdm3971.1.2 bus2=p1rlv2016.1.2 switch=n enabled=y phases=2 Linecode=1P_OH_AL_4/0_Zuzara_0_416_0_2_2_2_2_2_2_2_2_2_2_2_2_2_2_2_2_2_2_2_2_2_2_2_2_2_2_2_2_2

New Line.l(r:p1rdm3971-p1rdt1827lv) Units=km Length=0.0175356 bus1=p1rdt1827lv.1.2 bus2=p1rdm3971.1.2 switch=n enabled=y phases=2 Linecode=1P_OH_AL_2/0_Rucina_0_416_0_2_2_2_2_2_2_2_2_2_2_2_2_2_2_2_2_2_2_2_2_2_2_2_2_2_2_2_2_2

New Line.l(r:p1rdm3973-p1rlv9736) Units=km Length=0.0615276 bus1=p1rdm3973.1.2 bus2=p1rlv9736.1.2 switch=n enabled=y phases=2 Linecode=1P_OH_AL_4/0_Zuzara_0_416_0_2_2_2_2_2_2_2_2_2_2_2_2_2_2_2_2_2_2_2_2_2_2_2_2_2_2_2_2_2

New Line.l(r:p1rdm3972-p1rlv5662) Units=km Length=0.04505340000000001 bus1=p1rdm3972.1.2 bus2=p1rlv5662.1.2 switch=n enabled=y phases=2 Linecode=1P_OH_AL_4/0_Zuzara_0_416_0_2_2_2_2_2_2_2_2_2_2_2_2_2_2_2_2_2_2_2_2_2_2_2_2_2_2_2_2_2

New Line.l(r:p1rdm3972-p1rdm3973) Units=km Length=0.0175352 bus1=p1rdm3973.1.2 bus2=p1rdm3972.1.2 switch=n enabled=y phases=2 Linecode=1P_OH_AL_2/0_Rucina_0_416_0_2_2_2_2_2_2_2_2_2_2_2_2_2_2_2_2_2_2_2_2_2_2_2_2_2_2_2_2_2

New Line.l(r:p1rdm3973-p1rdt1827lv) Units=km Length=0.0175456 bus1=p1rdt1827lv.1.2 bus2=p1rdm3973.1.2 switch=n enabled=y phases=2 Linecode=1P_OH_AL_2/0_Rucina_0_416_0_2_2_2_2_2_2_2_2_2_2_2_2_2_2_2_2_2_2_2_2_2_2_2_2_2_2_2_2_2

New Line.l(r:p1rdt1828lv-p1rlv2017) Units=km Length=0.0777889 bus1=p1rdt1828lv.1.2 bus2=p1rlv2017.1.2 switch=n enabled=y phases=2 Linecode=1P_OH_AL_4/0_Zuzara_0_416_0_2_2_2_2_2_2_2_2_2_2_2_2_2_2_2_2_2_2_2_2_2_2_2_2_2_2_2_2_2

New Line.l(r:p1rdt1935lv-p1rlv2142) Units=km Length=0.0118358 bus1=p1rdt1935lv.1.2 bus2=p1rlv2142.1.2 switch=n enabled=y phases=2 Linecode=1P_OH_AL_2/0_Rucina_0_416_0_2_2_2_2_2_2_2_2_2_2_2_2_2_2_2_2_2_2_2_2_2_2_2_2_2_2_2_2_2

New Line.l(r:p1rdt1935lv-p1rlv7897) Units=km Length=0.0322967 bus1=p1rdt1935lv.1.2 bus2=p1rlv7897.1.2 switch=n enabled=y phases=2 Linecode=1P_OH_AL_4/0_Zuzara_0_416_0_2_2_2_2_2_2_2_2_2_2_2_2_2_2_2_2_2_2_2_2_2_2_2_2_2_2_2_2_2

New Line.l(r:p1rdt1935lv-p1rlv8400) Units=km Length=0.0367841 bus1=p1rdt1935lv.1.2 bus2=p1rlv8400.1.2 switch=n enabled=y phases=2 Linecode=1P_OH_AL_4/0_Zuzara_0_416_0_2_2_2_2_2_2_2_2_2_2_2_2_2_2_2_2_2_2_2_2_2_2_2_2_2_2_2_2_2

New Line.l(r:p1rdt1936lv-p1rlv2143) Units=km Length=0.0364023 bus1=p1rdt1936lv.1.2 bus2=p1rlv2143.1.2 switch=n enabled=y phases=2 Linecode=1P_OH_AL_4/0_Zuzara_0_416_0_2_2_2_2_2_2_2_2_2_2_2_2_2_2_2_2_2_2_2_2_2_2_2_2_2_2_2_2_2

New Line.l(r:p1rdt1936lv-p1rlv10693) Units=km Length=0.0364023 bus1=p1rdt1936lv.1.2 bus2=p1rlv10693.1.2 switch=n enabled=y phases=2 Linecode=1P_OH_AL_4/0_Zuzara_0_416_0_2_2_2_2_2_2_2_2_2_2_2_2_2_2_2_2_2_2_2_2_2_2_2_2_2_2_2_2_2

New Line.l(r:p1rdt2061lv-p1rlv2293) Units=km Length=0.126264 bus1=p1rdt2061lv.1.2 bus2=p1rlv2293.1.2 switch=n enabled=y phases=2 Linecode=1P_OH_AL_4/0_Zuzara_0_416_0_2_2_2_2_2_2_2_2_2_2_2_2_2_2_2_2_2_2_2_2_2_2_2_2_2_2_2_2_2

New Line.l(r:p1rdt2061lv-p1rlv3202) Units=km Length=0.0732079 bus1=p1rdt2061lv.1.2 bus2=p1rlv3202.1.2 switch=n enabled=y phases=2 Linecode=1P_OH_AL_4/0_Zuzara_0_416_0_2_2_2_2_2_2_2_2_2_2_2_2_2_2_2_2_2_2_2_2_2_2_2_2_2_2_2_2_2

New Line.l(r:p1rdt2061lv-p1rlv9070) Units=km Length=0.0989853 bus1=p1rdt2061lv.1.2 bus2=p1rlv9070.1.2 switch=n enabled=y phases=2 Linecode=1P_OH_AL_4/0_Zuzara_0_416_0_2_2_2_2_2_2_2_2_2_2_2_2_2_2_2_2_2_2_2_2_2_2_2_2_2_2_2_2_2

New Line.l(r:p1rdt2063lv-p1rlv2297) Units=km Length=0.001 bus1=p1rdt2063lv.1.2 bus2=p1rlv2297.1.2 switch=n enabled=y phases=2 Linecode=1P_OH_AL_4_Periwinkle_0_416_0_2_2_2_2_2_2_2_2_2_2_2_2_2_2_2_2_2_2_2_2_2_2_2_2_2_2_2_2_2

New Line.l(r:p1rdt2180lv-p1rlv2432) Units=km Length=0.0308624 bus1=p1rdt2180lv.1.2 bus2=p1rlv2432.1.2 switch=n enabled=y phases=2 Linecode=1P_OH_AL_4/0_Zuzara_0_416_0_2_2_2_2_2_2_2_2_2_2_2_2_2_2_2_2_2_2_2_2_2_2_2_2_2_2_2_2_2

New Line.l(r:p1rdm4665-p1rlv2433) Units=km Length=0.0263776 bus1=p1rdm4665.1.2 bus2=p1rlv2433.1.2 switch=n enabled=y phases=2 Linecode=1P_OH_AL_2/0_Rucina_0_416_0_2_2_2_2_2_2_2_2_2_2_2_2_2_2_2_2_2_2_2_2_2_2_2_2_2_2_2_2_2

New Line.l(r:p1rdm4665-p1rdt2181lv) Units=km Length=0.0389608 bus1=p1rdt2181lv.1.2 bus2=p1rdm4665.1.2 switch=n enabled=y phases=2 Linecode=1P_OH_AL_4/0_Zuzara_0_416_0_2_2_2_2_2_2_2_2_2_2_2_2_2_2_2_2_2_2_2_2_2_2_2_2_2_2_2_2_2

New Line.l(r:p1rdm4666-p1rlv10025) Units=km Length=0.0295765 bus1=p1rdm4666.1.2 bus2=p1rlv10025.1.2 switch=n enabled=y phases=2 Linecode=1P_OH_AL_4/0_Zuzara_0_416_0_2_2_2_2_2_2_2_2_2_2_2_2_2_2_2_2_2_2_2_2_2_2_2_2_2_2_2_2_2

New Line.l(r:p1rdm4666-p1rdt2181lv) Units=km Length=0.0194735 bus1=p1rdt2181lv.1.2 bus2=p1rdm4666.1.2 switch=n enabled=y phases=2 Linecode=1P_OH_AL_2/0_Rucina_0_416_0_2_2_2_2_2_2_2_2_2_2_2_2_2_2_2_2_2_2_2_2_2_2_2_2_2_2_2_2_2

New Line.l(r:p1rdt2278lv-p1rlv2552) Units=km Length=0.0124945 bus1=p1rdt2278lv.1.2 bus2=p1rlv2552.1.2 switch=n enabled=y phases=2 Linecode=1P_OH_AL_2/0_Rucina_0_416_0_2_2_2_2_2_2_2_2_2_2_2_2_2_2_2_2_2_2_2_2_2_2_2_2_2_2_2_2_2

New Line.l(r:p1rdm4849-p1rlv2836) Units=km Length=0.024644700000000002 bus1=p1rdm4849.1.2 bus2=p1rlv2836.1.2 switch=n enabled=y phases=2 Linecode=1P_OH_AL_2/0_Rucina_0_416_0_2_2_2_2_2_2_2_2_2_2_2_2_2_2_2_2_2_2_2_2_2_2_2_2_2_2_2_2_2

New Line.l(r:p1rdm4849-p1rdt2278lv) Units=km Length=0.0631732 bus1=p1rdt2278lv.1.2 bus2=p1rdm4849.1.2 switch=n enabled=y phases=2 Linecode=1P_OH_AL_4/0_Zuzara_0_416_0_2_2_2_2_2_2_2_2_2_2_2_2_2_2_2_2_2_2_2_2_2_2_2_2_2_2_2_2_2

New Line.l(r:p1rdt2391lv-p1rlv2698) Units=km Length=0.0369929 bus1=p1rdt2391lv.1.2 bus2=p1rlv2698.1.2 switch=n enabled=y phases=2 Linecode=1P_OH_AL_4/0_Zuzara_0_416_0_2_2_2_2_2_2_2_2_2_2_2_2_2_2_2_2_2_2_2_2_2_2_2_2_2_2_2_2_2

New Line.l(r:p1rdt2391lv-p1rlv3077) Units=km Length=0.0242739 bus1=p1rdt2391lv.1.2 bus2=p1rlv3077.1.2 switch=n enabled=y phases=2 Linecode=1P_OH_AL_2/0_Rucina_0_416_0_2_2_2_2_2_2_2_2_2_2_2_2_2_2_2_2_2_2_2_2_2_2_2_2_2_2_2_2_2

New Line.l(r:p1rdt2391lv-p1rlv12606) Units=km Length=0.0224901 bus1=p1rdt2391lv.1.2 bus2=p1rlv12606.1.2 switch=n enabled=y phases=2 Linecode=1P_OH_AL_2/0_Rucina_0_416_0_2_2_2_2_2_2_2_2_2_2_2_2_2_2_2_2_2_2_2_2_2_2_2_2_2_2_2_2_2

New Line.l(r:p1rdm5064-p1rlv10413) Units=km Length=0.0235882 bus1=p1rdm5064.1.2 bus2=p1rlv10413.1.2 switch=n enabled=y phases=2 Linecode=1P_OH_AL_2/0_Rucina_0_416_0_2_2_2_2_2_2_2_2_2_2_2_2_2_2_2_2_2_2_2_2_2_2_2_2_2_2_2_2_2

New Line.l(r:p1rdm5064-p1rdt2391lv) Units=km Length=0.021489500000000005 bus1=p1rdt2391lv.1.2 bus2=p1rdm5064.1.2 switch=n enabled=y phases=2 Linecode=1P_OH_AL_2/0_Rucina_0_416_0_2_2_2_2_2_2_2_2_2_2_2_2_2_2_2_2_2_2_2_2_2_2_2_2_2_2_2_2_2

New Line.l(r:p1rdt2393lv-p1rlv2700) Units=km Length=0.0127163 bus1=p1rdt2393lv.1.2 bus2=p1rlv2700.1.2 switch=n enabled=y phases=2 Linecode=1P_OH_AL_2/0_Rucina_0_416_0_2_2_2_2_2_2_2_2_2_2_2_2_2_2_2_2_2_2_2_2_2_2_2_2_2_2_2_2_2

New Line.l(r:p1rdt2393lv-p1rlv9197) Units=km Length=0.0127163 bus1=p1rdt2393lv.1.2 bus2=p1rlv9197.1.2 switch=n enabled=y phases=2 Linecode=1P_OH_AL_2/0_Rucina_0_416_0_2_2_2_2_2_2_2_2_2_2_2_2_2_2_2_2_2_2_2_2_2_2_2_2_2_2_2_2_2

New Line.l(r:p1rdt2395lv-p1rlv2702) Units=km Length=0.001 bus1=p1rdt2395lv.1.2 bus2=p1rlv2702.1.2 switch=n enabled=y phases=2 Linecode=1P_OH_AL_4_Periwinkle_0_416_0_2_2_2_2_2_2_2_2_2_2_2_2_2_2_2_2_2_2_2_2_2_2_2_2_2_2_2_2_2

New Line.l(r:p1rdt2497lv-p1rlv13519) Units=km Length=0.0387509 bus1=p1rdt2497lv.1.2 bus2=p1rlv13519.1.2 switch=n enabled=y phases=2 Linecode=1P_OH_AL_4/0_Zuzara_0_416_0_2_2_2_2_2_2_2_2_2_2_2_2_2_2_2_2_2_2_2_2_2_2_2_2_2_2_2_2_2

New Line.l(r:p1rdm5260-p1rlv2834)_s0 Units=km Length=0.0684032 bus1=p1rdm5260.1.2 bus2=p1rdm5260-p1rlv2834x.1.2 switch=n enabled=y phases=2 Linecode=1P_OH_AL_4/0_Zuzara_0_416_0_2_2_2_2_2_2_2_2_2_2_2_2_2_2_2_2_2_2_2_2_2_2_2_2_2_2_2_2_2

New Line.l(r:p1rdm5260-p1rlv2834)_s1 Units=km Length=0.005904000000000001 bus1=p1rdm5260-p1rlv2834x.1.2 bus2=p1rlv2834.1.2 switch=n enabled=y phases=2 Linecode=1P_OH_AL_2/0_Rucina_0_416_0_2_2_2_2_2_2_2_2_2_2_2_2_2_2_2_2_2_2_2_2_2_2_2_2_2_2_2_2_2

New Line.l(r:p1rdm5260-p1rdt2497lv) Units=km Length=0.0344572 bus1=p1rdt2497lv.1.2 bus2=p1rdm5260.1.2 switch=n enabled=y phases=2 Linecode=1P_OH_AL_4/0_Zuzara_0_416_0_2_2_2_2_2_2_2_2_2_2_2_2_2_2_2_2_2_2_2_2_2_2_2_2_2_2_2_2_2

New Line.l(r:p1rdt2498lv-p1rlv2837) Units=km Length=0.0250558 bus1=p1rdt2498lv.1.2 bus2=p1rlv2837.1.2 switch=n enabled=y phases=2 Linecode=1P_OH_AL_2/0_Rucina_0_416_0_2_2_2_2_2_2_2_2_2_2_2_2_2_2_2_2_2_2_2_2_2_2_2_2_2_2_2_2_2

New Line.l(r:p1rdt2590lv-p1rlv2953) Units=km Length=0.0727165 bus1=p1rdt2590lv.1.2 bus2=p1rlv2953.1.2 switch=n enabled=y phases=2 Linecode=1P_OH_AL_4/0_Zuzara_0_416_0_2_2_2_2_2_2_2_2_2_2_2_2_2_2_2_2_2_2_2_2_2_2_2_2_2_2_2_2_2

New Line.l(r:p1rdm5454-p1rlv8953) Units=km Length=0.0458473 bus1=p1rdm5454.1.2 bus2=p1rlv8953.1.2 switch=n enabled=y phases=2 Linecode=1P_OH_AL_4/0_Zuzara_0_416_0_2_2_2_2_2_2_2_2_2_2_2_2_2_2_2_2_2_2_2_2_2_2_2_2_2_2_2_2_2

New Line.l(r:p1rdm5454-p1rdt2590lv) Units=km Length=0.0197938 bus1=p1rdt2590lv.1.2 bus2=p1rdm5454.1.2 switch=n enabled=y phases=2 Linecode=1P_OH_AL_2/0_Rucina_0_416_0_2_2_2_2_2_2_2_2_2_2_2_2_2_2_2_2_2_2_2_2_2_2_2_2_2_2_2_2_2

New Line.l(r:p1rdt2789lv-p1rlv3207) Units=km Length=0.0455224 bus1=p1rdt2789lv.1.2 bus2=p1rlv3207.1.2 switch=n enabled=y phases=2 Linecode=1P_OH_AL_4/0_Zuzara_0_416_0_2_2_2_2_2_2_2_2_2_2_2_2_2_2_2_2_2_2_2_2_2_2_2_2_2_2_2_2_2

New Line.l(r:p1rdt2789lv-p1rlv4022) Units=km Length=0.0140619 bus1=p1rdt2789lv.1.2 bus2=p1rlv4022.1.2 switch=n enabled=y phases=2 Linecode=1P_OH_AL_2/0_Rucina_0_416_0_2_2_2_2_2_2_2_2_2_2_2_2_2_2_2_2_2_2_2_2_2_2_2_2_2_2_2_2_2

New Line.l(r:p1rdt2889lv-p1rlv3334) Units=km Length=0.019965 bus1=p1rdt2889lv.1.2 bus2=p1rlv3334.1.2 switch=n enabled=y phases=2 Linecode=1P_OH_AL_2/0_Rucina_0_416_0_2_2_2_2_2_2_2_2_2_2_2_2_2_2_2_2_2_2_2_2_2_2_2_2_2_2_2_2_2

New Line.l(r:p1rdt2890lv-p1rlv3335) Units=km Length=0.0931502 bus1=p1rdt2890lv.1.2 bus2=p1rlv3335.1.2 switch=n enabled=y phases=2 Linecode=1P_OH_AL_4/0_Zuzara_0_416_0_2_2_2_2_2_2_2_2_2_2_2_2_2_2_2_2_2_2_2_2_2_2_2_2_2_2_2_2_2

New Line.l(r:p1rdt2890lv-p1rlv4579) Units=km Length=0.0786635 bus1=p1rdt2890lv.1.2 bus2=p1rlv4579.1.2 switch=n enabled=y phases=2 Linecode=1P_OH_AL_4/0_Zuzara_0_416_0_2_2_2_2_2_2_2_2_2_2_2_2_2_2_2_2_2_2_2_2_2_2_2_2_2_2_2_2_2

New Line.l(r:p1rdt2999lv-p1rlv3481) Units=km Length=0.001 bus1=p1rdt2999lv.1.2 bus2=p1rlv3481.1.2 switch=n enabled=y phases=2 Linecode=1P_OH_AL_4_Periwinkle_0_416_0_2_2_2_2_2_2_2_2_2_2_2_2_2_2_2_2_2_2_2_2_2_2_2_2_2_2_2_2_2

New Line.l(r:p1rdt3102lv-p1rlv3628) Units=km Length=0.0845573 bus1=p1rdt3102lv.1.2 bus2=p1rlv3628.1.2 switch=n enabled=y phases=2 Linecode=1P_OH_AL_4/0_Zuzara_0_416_0_2_2_2_2_2_2_2_2_2_2_2_2_2_2_2_2_2_2_2_2_2_2_2_2_2_2_2_2_2

New Line.l(r:p1rdm6389-p1rlv10144) Units=km Length=0.10208300000000001 bus1=p1rdm6389.1.2 bus2=p1rlv10144.1.2 switch=n enabled=y phases=2 Linecode=1P_OH_AL_4/0_Zuzara_0_416_0_2_2_2_2_2_2_2_2_2_2_2_2_2_2_2_2_2_2_2_2_2_2_2_2_2_2_2_2_2

New Line.l(r:p1rdm6389-p1rdt3102lv) Units=km Length=0.0198002 bus1=p1rdt3102lv.1.2 bus2=p1rdm6389.1.2 switch=n enabled=y phases=2 Linecode=1P_OH_AL_2/0_Rucina_0_416_0_2_2_2_2_2_2_2_2_2_2_2_2_2_2_2_2_2_2_2_2_2_2_2_2_2_2_2_2_2

New Line.l(r:p1rdm6390-p1rlv3629) Units=km Length=0.0480792 bus1=p1rdm6390.1.2 bus2=p1rlv3629.1.2 switch=n enabled=y phases=2 Linecode=1P_OH_AL_4/0_Zuzara_0_416_0_2_2_2_2_2_2_2_2_2_2_2_2_2_2_2_2_2_2_2_2_2_2_2_2_2_2_2_2_2

New Line.l(r:p1rdm6390-p1rdt3103lv) Units=km Length=0.0196221 bus1=p1rdt3103lv.1.2 bus2=p1rdm6390.1.2 switch=n enabled=y phases=2 Linecode=1P_OH_AL_2/0_Rucina_0_416_0_2_2_2_2_2_2_2_2_2_2_2_2_2_2_2_2_2_2_2_2_2_2_2_2_2_2_2_2_2

New Line.l(r:p1rdm6391-p1rlv10280) Units=km Length=0.0450238 bus1=p1rdm6391.1.2 bus2=p1rlv10280.1.2 switch=n enabled=y phases=2 Linecode=1P_OH_AL_4/0_Zuzara_0_416_0_2_2_2_2_2_2_2_2_2_2_2_2_2_2_2_2_2_2_2_2_2_2_2_2_2_2_2_2_2

New Line.l(r:p1rdm6391-p1rdt3103lv) Units=km Length=0.0196295 bus1=p1rdt3103lv.1.2 bus2=p1rdm6391.1.2 switch=n enabled=y phases=2 Linecode=1P_OH_AL_2/0_Rucina_0_416_0_2_2_2_2_2_2_2_2_2_2_2_2_2_2_2_2_2_2_2_2_2_2_2_2_2_2_2_2_2

New Line.l(r:p1rdt3104lv-p1rlv3630) Units=km Length=0.0394254 bus1=p1rdt3104lv.1.2 bus2=p1rlv3630.1.2 switch=n enabled=y phases=2 Linecode=1P_OH_AL_4/0_Zuzara_0_416_0_2_2_2_2_2_2_2_2_2_2_2_2_2_2_2_2_2_2_2_2_2_2_2_2_2_2_2_2_2

New Line.l(r:p1rdt3104lv-p1rlv12612) Units=km Length=0.061963 bus1=p1rdt3104lv.1.2 bus2=p1rlv12612.1.2 switch=n enabled=y phases=2 Linecode=1P_OH_AL_4/0_Zuzara_0_416_0_2_2_2_2_2_2_2_2_2_2_2_2_2_2_2_2_2_2_2_2_2_2_2_2_2_2_2_2_2

New Line.l(r:p1rdt3209lv-p1rlv3771) Units=km Length=0.0323728 bus1=p1rdt3209lv.1.2 bus2=p1rlv3771.1.2 switch=n enabled=y phases=2 Linecode=1P_OH_AL_4/0_Zuzara_0_416_0_2_2_2_2_2_2_2_2_2_2_2_2_2_2_2_2_2_2_2_2_2_2_2_2_2_2_2_2_2

New Line.l(r:p1rdt3209lv-p1rlv7762) Units=km Length=0.0213629 bus1=p1rdt3209lv.1.2 bus2=p1rlv7762.1.2 switch=n enabled=y phases=2 Linecode=1P_OH_AL_2/0_Rucina_0_416_0_2_2_2_2_2_2_2_2_2_2_2_2_2_2_2_2_2_2_2_2_2_2_2_2_2_2_2_2_2

New Line.l(r:p1rdt3209lv-p1rlv12742) Units=km Length=0.0132322 bus1=p1rdt3209lv.1.2 bus2=p1rlv12742.1.2 switch=n enabled=y phases=2 Linecode=1P_OH_AL_2/0_Rucina_0_416_0_2_2_2_2_2_2_2_2_2_2_2_2_2_2_2_2_2_2_2_2_2_2_2_2_2_2_2_2_2

New Line.l(r:p1rdt3210lv-p1rlv3772) Units=km Length=0.03893830000000001 bus1=p1rdt3210lv.1.2 bus2=p1rlv3772.1.2 switch=n enabled=y phases=2 Linecode=1P_OH_AL_4/0_Zuzara_0_416_0_2_2_2_2_2_2_2_2_2_2_2_2_2_2_2_2_2_2_2_2_2_2_2_2_2_2_2_2_2

New Line.l(r:p1rdm6730-p1rlv3885) Units=km Length=0.0278383 bus1=p1rdm6730.1.2 bus2=p1rlv3885.1.2 switch=n enabled=y phases=2 Linecode=1P_OH_AL_4/0_Zuzara_0_416_0_2_2_2_2_2_2_2_2_2_2_2_2_2_2_2_2_2_2_2_2_2_2_2_2_2_2_2_2_2

New Line.l(r:p1rdm6730-p1rdt3294lv) Units=km Length=0.0196843 bus1=p1rdt3294lv.1.2 bus2=p1rdm6730.1.2 switch=n enabled=y phases=2 Linecode=1P_OH_AL_2/0_Rucina_0_416_0_2_2_2_2_2_2_2_2_2_2_2_2_2_2_2_2_2_2_2_2_2_2_2_2_2_2_2_2_2

New Line.l(r:p1rdm6731-p1rlv10024) Units=km Length=0.0700884 bus1=p1rdm6731.1.2 bus2=p1rlv10024.1.2 switch=n enabled=y phases=2 Linecode=1P_OH_AL_4/0_Zuzara_0_416_0_2_2_2_2_2_2_2_2_2_2_2_2_2_2_2_2_2_2_2_2_2_2_2_2_2_2_2_2_2

New Line.l(r:p1rdm6731-p1rdt3294lv) Units=km Length=0.0196881 bus1=p1rdt3294lv.1.2 bus2=p1rdm6731.1.2 switch=n enabled=y phases=2 Linecode=1P_OH_AL_2/0_Rucina_0_416_0_2_2_2_2_2_2_2_2_2_2_2_2_2_2_2_2_2_2_2_2_2_2_2_2_2_2_2_2_2

New Line.l(r:p1rdt3295lv-p1rlv3886) Units=km Length=0.001 bus1=p1rdt3295lv.1.2 bus2=p1rlv3886.1.2 switch=n enabled=y phases=2 Linecode=1P_OH_AL_4_Periwinkle_0_416_0_2_2_2_2_2_2_2_2_2_2_2_2_2_2_2_2_2_2_2_2_2_2_2_2_2_2_2_2_2

New Line.l(r:p1rdt3297lv-p1rlv3888) Units=km Length=0.0203303 bus1=p1rdt3297lv.1.2 bus2=p1rlv3888.1.2 switch=n enabled=y phases=2 Linecode=1P_OH_AL_2/0_Rucina_0_416_0_2_2_2_2_2_2_2_2_2_2_2_2_2_2_2_2_2_2_2_2_2_2_2_2_2_2_2_2_2

New Line.l(r:p1rdt3386lv-p1rlv4016) Units=km Length=0.0976032 bus1=p1rdt3386lv.1.2 bus2=p1rlv4016.1.2 switch=n enabled=y phases=2 Linecode=1P_OH_AL_4/0_Zuzara_0_416_0_2_2_2_2_2_2_2_2_2_2_2_2_2_2_2_2_2_2_2_2_2_2_2_2_2_2_2_2_2

New Line.l(r:p1rdt3485lv-p1rlv4151) Units=km Length=0.028985700000000003 bus1=p1rdt3485lv.1.2 bus2=p1rlv4151.1.2 switch=n enabled=y phases=2 Linecode=1P_OH_AL_4/0_Zuzara_0_416_0_2_2_2_2_2_2_2_2_2_2_2_2_2_2_2_2_2_2_2_2_2_2_2_2_2_2_2_2_2

New Line.l(r:p1rdt3575lv-p1rlv4284) Units=km Length=0.0255498 bus1=p1rdt3575lv.1.2 bus2=p1rlv4284.1.2 switch=n enabled=y phases=2 Linecode=1P_OH_AL_2/0_Rucina_0_416_0_2_2_2_2_2_2_2_2_2_2_2_2_2_2_2_2_2_2_2_2_2_2_2_2_2_2_2_2_2

New Line.l(r:p1rdt3776lv-p1rlv4577) Units=km Length=0.0782529 bus1=p1rdt3776lv.1.2 bus2=p1rlv4577.1.2 switch=n enabled=y phases=2 Linecode=1P_OH_AL_4/0_Zuzara_0_416_0_2_2_2_2_2_2_2_2_2_2_2_2_2_2_2_2_2_2_2_2_2_2_2_2_2_2_2_2_2

New Line.l(r:p1rdm7562-p1rlv6301) Units=km Length=0.081376 bus1=p1rdm7562.1.2 bus2=p1rlv6301.1.2 switch=n enabled=y phases=2 Linecode=1P_OH_AL_4/0_Zuzara_0_416_0_2_2_2_2_2_2_2_2_2_2_2_2_2_2_2_2_2_2_2_2_2_2_2_2_2_2_2_2_2

New Line.l(r:p1rdm7562-p1rdt3776lv) Units=km Length=0.0196221 bus1=p1rdt3776lv.1.2 bus2=p1rdm7562.1.2 switch=n enabled=y phases=2 Linecode=1P_OH_AL_2/0_Rucina_0_416_0_2_2_2_2_2_2_2_2_2_2_2_2_2_2_2_2_2_2_2_2_2_2_2_2_2_2_2_2_2

New Line.l(r:p1rdt3777lv-p1rlv4578) Units=km Length=0.04841580000000001 bus1=p1rdt3777lv.1.2 bus2=p1rlv4578.1.2 switch=n enabled=y phases=2 Linecode=1P_OH_AL_4/0_Zuzara_0_416_0_2_2_2_2_2_2_2_2_2_2_2_2_2_2_2_2_2_2_2_2_2_2_2_2_2_2_2_2_2

New Line.l(r:p1rdt3873lv-p1rlv4723) Units=km Length=0.0171187 bus1=p1rdt3873lv.1.2 bus2=p1rlv4723.1.2 switch=n enabled=y phases=2 Linecode=1P_OH_AL_2/0_Rucina_0_416_0_2_2_2_2_2_2_2_2_2_2_2_2_2_2_2_2_2_2_2_2_2_2_2_2_2_2_2_2_2

New Line.l(r:p1rdt3876lv-p1rlv4726) Units=km Length=0.001 bus1=p1rdt3876lv.1.2 bus2=p1rlv4726.1.2 switch=n enabled=y phases=2 Linecode=1P_OH_AL_4_Periwinkle_0_416_0_2_2_2_2_2_2_2_2_2_2_2_2_2_2_2_2_2_2_2_2_2_2_2_2_2_2_2_2_2

New Line.l(r:p1rdt3978lv-p1rlv4876) Units=km Length=0.0275741 bus1=p1rdt3978lv.1.2 bus2=p1rlv4876.1.2 switch=n enabled=y phases=2 Linecode=1P_OH_AL_4/0_Zuzara_0_416_0_2_2_2_2_2_2_2_2_2_2_2_2_2_2_2_2_2_2_2_2_2_2_2_2_2_2_2_2_2

New Line.l(r:p1rdt4142lv-p1rlv5126) Units=km Length=0.0602795 bus1=p1rdt4142lv.1.2 bus2=p1rlv5126.1.2 switch=n enabled=y phases=2 Linecode=1P_OH_AL_4/0_Zuzara_0_416_0_2_2_2_2_2_2_2_2_2_2_2_2_2_2_2_2_2_2_2_2_2_2_2_2_2_2_2_2_2

New Line.l(r:p1rdt4215lv-p1rlv5250) Units=km Length=0.066706 bus1=p1rdt4215lv.1.2 bus2=p1rlv5250.1.2 switch=n enabled=y phases=2 Linecode=1P_OH_AL_4/0_Zuzara_0_416_0_2_2_2_2_2_2_2_2_2_2_2_2_2_2_2_2_2_2_2_2_2_2_2_2_2_2_2_2_2

New Line.l(r:p1rdm8301-p1rlv13390) Units=km Length=0.0446149 bus1=p1rdm8301.1.2 bus2=p1rlv13390.1.2 switch=n enabled=y phases=2 Linecode=1P_OH_AL_4/0_Zuzara_0_416_0_2_2_2_2_2_2_2_2_2_2_2_2_2_2_2_2_2_2_2_2_2_2_2_2_2_2_2_2_2

New Line.l(r:p1rdm8301-p1rdt4215lv) Units=km Length=0.018158200000000003 bus1=p1rdt4215lv.1.2 bus2=p1rdm8301.1.2 switch=n enabled=y phases=2 Linecode=1P_OH_AL_2/0_Rucina_0_416_0_2_2_2_2_2_2_2_2_2_2_2_2_2_2_2_2_2_2_2_2_2_2_2_2_2_2_2_2_2

New Line.l(r:p1rdt4376lv-p1rlv5520) Units=km Length=0.023674 bus1=p1rdt4376lv.1.2 bus2=p1rlv5520.1.2 switch=n enabled=y phases=2 Linecode=1P_OH_AL_2/0_Rucina_0_416_0_2_2_2_2_2_2_2_2_2_2_2_2_2_2_2_2_2_2_2_2_2_2_2_2_2_2_2_2_2

New Line.l(r:p1rdt4376lv-p1rlv8535) Units=km Length=0.023674 bus1=p1rdt4376lv.1.2 bus2=p1rlv8535.1.2 switch=n enabled=y phases=2 Linecode=1P_OH_AL_2/0_Rucina_0_416_0_2_2_2_2_2_2_2_2_2_2_2_2_2_2_2_2_2_2_2_2_2_2_2_2_2_2_2_2_2

New Line.l(r:p1rdt4380lv-p1rlv5524) Units=km Length=0.0145825 bus1=p1rdt4380lv.1.2 bus2=p1rlv5524.1.2 switch=n enabled=y phases=2 Linecode=1P_OH_AL_2/0_Rucina_0_416_0_2_2_2_2_2_2_2_2_2_2_2_2_2_2_2_2_2_2_2_2_2_2_2_2_2_2_2_2_2

New Line.l(r:p1rdt4464lv-p1rlv5661) Units=km Length=0.001 bus1=p1rdt4464lv.1.2 bus2=p1rlv5661.1.2 switch=n enabled=y phases=2 Linecode=1P_OH_AL_4_Periwinkle_0_416_0_2_2_2_2_2_2_2_2_2_2_2_2_2_2_2_2_2_2_2_2_2_2_2_2_2_2_2_2_2

New Line.l(r:p1rdt4466lv-p1rlv5664) Units=km Length=0.102811 bus1=p1rdt4466lv.1.2 bus2=p1rlv5664.1.2 switch=n enabled=y phases=2 Linecode=1P_OH_AL_4/0_Zuzara_0_416_0_2_2_2_2_2_2_2_2_2_2_2_2_2_2_2_2_2_2_2_2_2_2_2_2_2_2_2_2_2

New Line.l(r:p1rdm8726-p1rlv5915) Units=km Length=0.0853372 bus1=p1rdm8726.1.2 bus2=p1rlv5915.1.2 switch=n enabled=y phases=2 Linecode=1P_OH_AL_4/0_Zuzara_0_416_0_2_2_2_2_2_2_2_2_2_2_2_2_2_2_2_2_2_2_2_2_2_2_2_2_2_2_2_2_2

New Line.l(r:p1rdm8726-p1rdt4466lv) Units=km Length=0.018561 bus1=p1rdt4466lv.1.2 bus2=p1rdm8726.1.2 switch=n enabled=y phases=2 Linecode=1P_OH_AL_2/0_Rucina_0_416_0_2_2_2_2_2_2_2_2_2_2_2_2_2_2_2_2_2_2_2_2_2_2_2_2_2_2_2_2_2

New Line.l(r:p1rdt4537lv-p1rlv5786) Units=km Length=0.0417171 bus1=p1rdt4537lv.1.2 bus2=p1rlv5786.1.2 switch=n enabled=y phases=2 Linecode=1P_OH_AL_4/0_Zuzara_0_416_0_2_2_2_2_2_2_2_2_2_2_2_2_2_2_2_2_2_2_2_2_2_2_2_2_2_2_2_2_2

New Line.l(r:p1rdt4538lv-p1rlv5787) Units=km Length=0.0691253 bus1=p1rdt4538lv.1.2 bus2=p1rlv5787.1.2 switch=n enabled=y phases=2 Linecode=1P_OH_AL_4/0_Zuzara_0_416_0_2_2_2_2_2_2_2_2_2_2_2_2_2_2_2_2_2_2_2_2_2_2_2_2_2_2_2_2_2

New Line.l(r:p1rdt4538lv-p1rlv9074) Units=km Length=0.0691253 bus1=p1rdt4538lv.1.2 bus2=p1rlv9074.1.2 switch=n enabled=y phases=2 Linecode=1P_OH_AL_4/0_Zuzara_0_416_0_2_2_2_2_2_2_2_2_2_2_2_2_2_2_2_2_2_2_2_2_2_2_2_2_2_2_2_2_2

New Line.l(r:p1rdt4540lv-p1rlv5789) Units=km Length=0.0601205 bus1=p1rdt4540lv.1.2 bus2=p1rlv5789.1.2 switch=n enabled=y phases=2 Linecode=1P_OH_AL_4/0_Zuzara_0_416_0_2_2_2_2_2_2_2_2_2_2_2_2_2_2_2_2_2_2_2_2_2_2_2_2_2_2_2_2_2

New Line.l(r:p1rdt4614lv-p1rlv5911) Units=km Length=0.0458442 bus1=p1rdt4614lv.1.2 bus2=p1rlv5911.1.2 switch=n enabled=y phases=2 Linecode=1P_OH_AL_4/0_Zuzara_0_416_0_2_2_2_2_2_2_2_2_2_2_2_2_2_2_2_2_2_2_2_2_2_2_2_2_2_2_2_2_2

New Line.l(r:p1rdt4615lv-p1rlv5912) Units=km Length=0.001 bus1=p1rdt4615lv.1.2 bus2=p1rlv5912.1.2 switch=n enabled=y phases=2 Linecode=1P_OH_AL_4_Periwinkle_0_416_0_2_2_2_2_2_2_2_2_2_2_2_2_2_2_2_2_2_2_2_2_2_2_2_2_2_2_2_2_2

New Line.l(r:p1rdt4616lv-p1rlv5913) Units=km Length=0.0712173 bus1=p1rdt4616lv.1.2 bus2=p1rlv5913.1.2 switch=n enabled=y phases=2 Linecode=1P_OH_AL_4/0_Zuzara_0_416_0_2_2_2_2_2_2_2_2_2_2_2_2_2_2_2_2_2_2_2_2_2_2_2_2_2_2_2_2_2

New Line.l(r:p1rdt4617lv-p1rlv5914) Units=km Length=0.001 bus1=p1rdt4617lv.1.2 bus2=p1rlv5914.1.2 switch=n enabled=y phases=2 Linecode=1P_OH_AL_4_Periwinkle_0_416_0_2_2_2_2_2_2_2_2_2_2_2_2_2_2_2_2_2_2_2_2_2_2_2_2_2_2_2_2_2

New Line.l(r:p1rdt4619lv-p1rlv5917) Units=km Length=0.00512489 bus1=p1rdt4619lv.1.2 bus2=p1rlv5917.1.2 switch=n enabled=y phases=2 Linecode=1P_OH_AL_2/0_Rucina_0_416_0_2_2_2_2_2_2_2_2_2_2_2_2_2_2_2_2_2_2_2_2_2_2_2_2_2_2_2_2_2

New Line.l(r:p1rdt4705lv-p1rlv6057) Units=km Length=0.001 bus1=p1rdt4705lv.1.2 bus2=p1rlv6057.1.2 switch=n enabled=y phases=2 Linecode=1P_OH_AL_4_Periwinkle_0_416_0_2_2_2_2_2_2_2_2_2_2_2_2_2_2_2_2_2_2_2_2_2_2_2_2_2_2_2_2_2

New Line.l(r:p1rdt4924lv-p1rlv6424) Units=km Length=0.025671 bus1=p1rdt4924lv.1.2 bus2=p1rlv6424.1.2 switch=n enabled=y phases=2 Linecode=1P_OH_AL_2/0_Rucina_0_416_0_2_2_2_2_2_2_2_2_2_2_2_2_2_2_2_2_2_2_2_2_2_2_2_2_2_2_2_2_2

New Line.l(r:p1rdt4928lv-p1rlv11669) Units=km Length=0.0441714 bus1=p1rdt4928lv.1.2 bus2=p1rlv11669.1.2 switch=n enabled=y phases=2 Linecode=1P_OH_AL_4/0_Zuzara_0_416_0_2_2_2_2_2_2_2_2_2_2_2_2_2_2_2_2_2_2_2_2_2_2_2_2_2_2_2_2_2

New Line.l(r:p1rdm9401-p1rlv6428) Units=km Length=0.0266028 bus1=p1rdm9401.1.2 bus2=p1rlv6428.1.2 switch=n enabled=y phases=2 Linecode=1P_OH_AL_2/0_Rucina_0_416_0_2_2_2_2_2_2_2_2_2_2_2_2_2_2_2_2_2_2_2_2_2_2_2_2_2_2_2_2_2

New Line.l(r:p1rdm9401-p1rdt4928lv) Units=km Length=0.019202000000000004 bus1=p1rdt4928lv.1.2 bus2=p1rdm9401.1.2 switch=n enabled=y phases=2 Linecode=1P_OH_AL_2/0_Rucina_0_416_0_2_2_2_2_2_2_2_2_2_2_2_2_2_2_2_2_2_2_2_2_2_2_2_2_2_2_2_2_2

New Line.l(r:p1rdt4986lv-p1rlv6538) Units=km Length=0.001 bus1=p1rdt4986lv.1.2 bus2=p1rlv6538.1.2 switch=n enabled=y phases=2 Linecode=1P_OH_AL_4_Periwinkle_0_416_0_2_2_2_2_2_2_2_2_2_2_2_2_2_2_2_2_2_2_2_2_2_2_2_2_2_2_2_2_2

New Line.l(r:p1rdt4988lv-p1rlv6540) Units=km Length=0.0360407 bus1=p1rdt4988lv.1.2 bus2=p1rlv6540.1.2 switch=n enabled=y phases=2 Linecode=1P_OH_AL_4/0_Zuzara_0_416_0_2_2_2_2_2_2_2_2_2_2_2_2_2_2_2_2_2_2_2_2_2_2_2_2_2_2_2_2_2

New Line.l(r:p1rdt4989lv-p1rlv6542) Units=km Length=0.0262575 bus1=p1rdt4989lv.1.2 bus2=p1rlv6542.1.2 switch=n enabled=y phases=2 Linecode=1P_OH_AL_2/0_Rucina_0_416_0_2_2_2_2_2_2_2_2_2_2_2_2_2_2_2_2_2_2_2_2_2_2_2_2_2_2_2_2_2

New Line.l(r:p1rdt4990lv-p1rlv6543) Units=km Length=0.0454451 bus1=p1rdt4990lv.1.2 bus2=p1rlv6543.1.2 switch=n enabled=y phases=2 Linecode=1P_OH_AL_4/0_Zuzara_0_416_0_2_2_2_2_2_2_2_2_2_2_2_2_2_2_2_2_2_2_2_2_2_2_2_2_2_2_2_2_2

New Line.l(r:p1rdt4990lv-p1rlv10417) Units=km Length=0.03937410000000001 bus1=p1rdt4990lv.1.2 bus2=p1rlv10417.1.2 switch=n enabled=y phases=2 Linecode=1P_OH_AL_4/0_Zuzara_0_416_0_2_2_2_2_2_2_2_2_2_2_2_2_2_2_2_2_2_2_2_2_2_2_2_2_2_2_2_2_2

New Line.l(r:p1rdt5170lv-p1rlv6813) Units=km Length=0.0200011 bus1=p1rdt5170lv.1.2 bus2=p1rlv6813.1.2 switch=n enabled=y phases=2 Linecode=1P_OH_AL_2/0_Rucina_0_416_0_2_2_2_2_2_2_2_2_2_2_2_2_2_2_2_2_2_2_2_2_2_2_2_2_2_2_2_2_2

New Line.l(r:p1rdt5170lv-p1rlv9200) Units=km Length=0.0328758 bus1=p1rdt5170lv.1.2 bus2=p1rlv9200.1.2 switch=n enabled=y phases=2 Linecode=1P_OH_AL_4/0_Zuzara_0_416_0_2_2_2_2_2_2_2_2_2_2_2_2_2_2_2_2_2_2_2_2_2_2_2_2_2_2_2_2_2

New Line.l(r:p1rdt5171lv-p1rlv9599) Units=km Length=0.0629861 bus1=p1rdt5171lv.1.2 bus2=p1rlv9599.1.2 switch=n enabled=y phases=2 Linecode=1P_OH_AL_4/0_Zuzara_0_416_0_2_2_2_2_2_2_2_2_2_2_2_2_2_2_2_2_2_2_2_2_2_2_2_2_2_2_2_2_2

New Line.l(r:p1rdm9786-p1rlv6814) Units=km Length=0.0389352 bus1=p1rdm9786.1.2 bus2=p1rlv6814.1.2 switch=n enabled=y phases=2 Linecode=1P_OH_AL_4/0_Zuzara_0_416_0_2_2_2_2_2_2_2_2_2_2_2_2_2_2_2_2_2_2_2_2_2_2_2_2_2_2_2_2_2

New Line.l(r:p1rdm9786-p1rdt5171lv) Units=km Length=0.0197658 bus1=p1rdt5171lv.1.2 bus2=p1rdm9786.1.2 switch=n enabled=y phases=2 Linecode=1P_OH_AL_2/0_Rucina_0_416_0_2_2_2_2_2_2_2_2_2_2_2_2_2_2_2_2_2_2_2_2_2_2_2_2_2_2_2_2_2

New Line.l(r:p1rdt5242lv-p1rlv6923) Units=km Length=0.001 bus1=p1rdt5242lv.1.2 bus2=p1rlv6923.1.2 switch=n enabled=y phases=2 Linecode=1P_OH_AL_4_Periwinkle_0_416_0_2_2_2_2_2_2_2_2_2_2_2_2_2_2_2_2_2_2_2_2_2_2_2_2_2_2_2_2_2

New Line.l(r:p1rdt5325lv-p1rlv7069) Units=km Length=0.001 bus1=p1rdt5325lv.1.2 bus2=p1rlv7069.1.2 switch=n enabled=y phases=2 Linecode=1P_OH_AL_4_Periwinkle_0_416_0_2_2_2_2_2_2_2_2_2_2_2_2_2_2_2_2_2_2_2_2_2_2_2_2_2_2_2_2_2

New Line.l(r:p1rdt5400lv-p1rlv12743) Units=km Length=0.07358030000000002 bus1=p1rdt5400lv.1.2 bus2=p1rlv12743.1.2 switch=n enabled=y phases=2 Linecode=1P_OH_AL_4/0_Zuzara_0_416_0_2_2_2_2_2_2_2_2_2_2_2_2_2_2_2_2_2_2_2_2_2_2_2_2_2_2_2_2_2

New Line.l(r:p1rdm10117-p1rlv7205) Units=km Length=0.0802245 bus1=p1rdm10117.1.2 bus2=p1rlv7205.1.2 switch=n enabled=y phases=2 Linecode=1P_OH_AL_4/0_Zuzara_0_416_0_2_2_2_2_2_2_2_2_2_2_2_2_2_2_2_2_2_2_2_2_2_2_2_2_2_2_2_2_2

New Line.l(r:p1rdm10117-p1rdt5400lv) Units=km Length=0.0197885 bus1=p1rdt5400lv.1.2 bus2=p1rdm10117.1.2 switch=n enabled=y phases=2 Linecode=1P_OH_AL_2/0_Rucina_0_416_0_2_2_2_2_2_2_2_2_2_2_2_2_2_2_2_2_2_2_2_2_2_2_2_2_2_2_2_2_2

New Line.l(r:p1rdt5401lv-p1rlv7206) Units=km Length=0.0122523 bus1=p1rdt5401lv.1.2 bus2=p1rlv7206.1.2 switch=n enabled=y phases=2 Linecode=1P_OH_AL_2/0_Rucina_0_416_0_2_2_2_2_2_2_2_2_2_2_2_2_2_2_2_2_2_2_2_2_2_2_2_2_2_2_2_2_2

New Line.l(r:p1rdt5401lv-p1rlv10145) Units=km Length=0.0122523 bus1=p1rdt5401lv.1.2 bus2=p1rlv10145.1.2 switch=n enabled=y phases=2 Linecode=1P_OH_AL_2/0_Rucina_0_416_0_2_2_2_2_2_2_2_2_2_2_2_2_2_2_2_2_2_2_2_2_2_2_2_2_2_2_2_2_2

New Line.l(r:p1rdt5475lv-p1rlv7342) Units=km Length=0.0430099 bus1=p1rdt5475lv.1.2 bus2=p1rlv7342.1.2 switch=n enabled=y phases=2 Linecode=1P_OH_AL_4/0_Zuzara_0_416_0_2_2_2_2_2_2_2_2_2_2_2_2_2_2_2_2_2_2_2_2_2_2_2_2_2_2_2_2_2

New Line.l(r:p1rdt5475lv-p1rlv13003) Units=km Length=0.0841974 bus1=p1rdt5475lv.1.2 bus2=p1rlv13003.1.2 switch=n enabled=y phases=2 Linecode=1P_OH_AL_4/0_Zuzara_0_416_0_2_2_2_2_2_2_2_2_2_2_2_2_2_2_2_2_2_2_2_2_2_2_2_2_2_2_2_2_2

New Line.l(r:p1rdt5630lv-p1rlv7623) Units=km Length=0.0542157 bus1=p1rdt5630lv.1.2 bus2=p1rlv7623.1.2 switch=n enabled=y phases=2 Linecode=1P_OH_AL_4/0_Zuzara_0_416_0_2_2_2_2_2_2_2_2_2_2_2_2_2_2_2_2_2_2_2_2_2_2_2_2_2_2_2_2_2

New Line.l(r:p1rdt5631lv-p1rlv7625) Units=km Length=0.0453708 bus1=p1rdt5631lv.1.2 bus2=p1rlv7625.1.2 switch=n enabled=y phases=2 Linecode=1P_OH_AL_4/0_Zuzara_0_416_0_2_2_2_2_2_2_2_2_2_2_2_2_2_2_2_2_2_2_2_2_2_2_2_2_2_2_2_2_2

New Line.l(r:p1rdt5632lv-p1rlv7626) Units=km Length=0.0966344 bus1=p1rdt5632lv.1.2 bus2=p1rlv7626.1.2 switch=n enabled=y phases=2 Linecode=1P_OH_AL_4/0_Zuzara_0_416_0_2_2_2_2_2_2_2_2_2_2_2_2_2_2_2_2_2_2_2_2_2_2_2_2_2_2_2_2_2

New Line.l(r:p1rdt5776lv-p1rlv7898) Units=km Length=0.0267642 bus1=p1rdt5776lv.1.2 bus2=p1rlv7898.1.2 switch=n enabled=y phases=2 Linecode=1P_OH_AL_2/0_Rucina_0_416_0_2_2_2_2_2_2_2_2_2_2_2_2_2_2_2_2_2_2_2_2_2_2_2_2_2_2_2_2_2

New Line.l(r:p1rdt5914lv-p1rlv8152) Units=km Length=0.00671512 bus1=p1rdt5914lv.1.2 bus2=p1rlv8152.1.2 switch=n enabled=y phases=2 Linecode=1P_OH_AL_2/0_Rucina_0_416_0_2_2_2_2_2_2_2_2_2_2_2_2_2_2_2_2_2_2_2_2_2_2_2_2_2_2_2_2_2

New Line.l(r:p1rdt5914lv-p1rlv10026) Units=km Length=0.00671512 bus1=p1rdt5914lv.1.2 bus2=p1rlv10026.1.2 switch=n enabled=y phases=2 Linecode=1P_OH_AL_2/0_Rucina_0_416_0_2_2_2_2_2_2_2_2_2_2_2_2_2_2_2_2_2_2_2_2_2_2_2_2_2_2_2_2_2

New Line.l(r:p1rdm10942-p1rlv8271) Units=km Length=0.0298151 bus1=p1rdm10942.1.2 bus2=p1rlv8271.1.2 switch=n enabled=y phases=2 Linecode=1P_OH_AL_4/0_Zuzara_0_416_0_2_2_2_2_2_2_2_2_2_2_2_2_2_2_2_2_2_2_2_2_2_2_2_2_2_2_2_2_2

New Line.l(r:p1rdm10942-p1rdt5975lv) Units=km Length=0.0133047 bus1=p1rdt5975lv.1.2 bus2=p1rdm10942.1.2 switch=n enabled=y phases=2 Linecode=1P_OH_AL_2/0_Rucina_0_416_0_2_2_2_2_2_2_2_2_2_2_2_2_2_2_2_2_2_2_2_2_2_2_2_2_2_2_2_2_2

New Line.l(r:p1rdm10943-p1rlv13253) Units=km Length=0.0284307 bus1=p1rdm10943.1.2 bus2=p1rlv13253.1.2 switch=n enabled=y phases=2 Linecode=1P_OH_AL_4/0_Zuzara_0_416_0_2_2_2_2_2_2_2_2_2_2_2_2_2_2_2_2_2_2_2_2_2_2_2_2_2_2_2_2_2

New Line.l(r:p1rdm10943-p1rdt5975lv) Units=km Length=0.0328708 bus1=p1rdt5975lv.1.2 bus2=p1rdm10943.1.2 switch=n enabled=y phases=2 Linecode=1P_OH_AL_4/0_Zuzara_0_416_0_2_2_2_2_2_2_2_2_2_2_2_2_2_2_2_2_2_2_2_2_2_2_2_2_2_2_2_2_2

New Line.l(r:p1rdt6045lv-p1rlv8399) Units=km Length=0.0461526 bus1=p1rdt6045lv.1.2 bus2=p1rlv8399.1.2 switch=n enabled=y phases=2 Linecode=1P_OH_AL_4/0_Zuzara_0_416_0_2_2_2_2_2_2_2_2_2_2_2_2_2_2_2_2_2_2_2_2_2_2_2_2_2_2_2_2_2

New Line.l(r:p1rdt6045lv-p1rlv10692) Units=km Length=0.0461526 bus1=p1rdt6045lv.1.2 bus2=p1rlv10692.1.2 switch=n enabled=y phases=2 Linecode=1P_OH_AL_4/0_Zuzara_0_416_0_2_2_2_2_2_2_2_2_2_2_2_2_2_2_2_2_2_2_2_2_2_2_2_2_2_2_2_2_2

New Line.l(r:p1rdt6114lv-p1rlv8532) Units=km Length=0.0209532 bus1=p1rdt6114lv.1.2 bus2=p1rlv8532.1.2 switch=n enabled=y phases=2 Linecode=1P_OH_AL_2/0_Rucina_0_416_0_2_2_2_2_2_2_2_2_2_2_2_2_2_2_2_2_2_2_2_2_2_2_2_2_2_2_2_2_2

New Line.l(r:p1rdm11143-p1rlv8533) Units=km Length=0.0292901 bus1=p1rdm11143.1.2 bus2=p1rlv8533.1.2 switch=n enabled=y phases=2 Linecode=1P_OH_AL_4/0_Zuzara_0_416_0_2_2_2_2_2_2_2_2_2_2_2_2_2_2_2_2_2_2_2_2_2_2_2_2_2_2_2_2_2

New Line.l(r:p1rdm11143-p1rdt6115lv) Units=km Length=0.0194727 bus1=p1rdt6115lv.1.2 bus2=p1rdm11143.1.2 switch=n enabled=y phases=2 Linecode=1P_OH_AL_2/0_Rucina_0_416_0_2_2_2_2_2_2_2_2_2_2_2_2_2_2_2_2_2_2_2_2_2_2_2_2_2_2_2_2_2

New Line.l(r:p1rdm11144-p1rlv8678) Units=km Length=0.0200655 bus1=p1rdm11144.1.2 bus2=p1rlv8678.1.2 switch=n enabled=y phases=2 Linecode=1P_OH_AL_2/0_Rucina_0_416_0_2_2_2_2_2_2_2_2_2_2_2_2_2_2_2_2_2_2_2_2_2_2_2_2_2_2_2_2_2

New Line.l(r:p1rdm11144-p1rdt6115lv) Units=km Length=0.0194639 bus1=p1rdt6115lv.1.2 bus2=p1rdm11144.1.2 switch=n enabled=y phases=2 Linecode=1P_OH_AL_2/0_Rucina_0_416_0_2_2_2_2_2_2_2_2_2_2_2_2_2_2_2_2_2_2_2_2_2_2_2_2_2_2_2_2_2

New Line.l(r:p1rdt6119lv-p1rlv8540) Units=km Length=0.0235054 bus1=p1rdt6119lv.1.2 bus2=p1rlv8540.1.2 switch=n enabled=y phases=2 Linecode=1P_OH_AL_2/0_Rucina_0_416_0_2_2_2_2_2_2_2_2_2_2_2_2_2_2_2_2_2_2_2_2_2_2_2_2_2_2_2_2_2

New Line.l(r:p1rdt6119lv-p1rlv10824) Units=km Length=0.0235054 bus1=p1rdt6119lv.1.2 bus2=p1rlv10824.1.2 switch=n enabled=y phases=2 Linecode=1P_OH_AL_2/0_Rucina_0_416_0_2_2_2_2_2_2_2_2_2_2_2_2_2_2_2_2_2_2_2_2_2_2_2_2_2_2_2_2_2

New Line.l(r:p1rdt6450lv-p1rlv9198) Units=km Length=0.0200584 bus1=p1rdt6450lv.1.2 bus2=p1rlv9198.1.2 switch=n enabled=y phases=2 Linecode=1P_OH_AL_2/0_Rucina_0_416_0_2_2_2_2_2_2_2_2_2_2_2_2_2_2_2_2_2_2_2_2_2_2_2_2_2_2_2_2_2

New Line.l(r:p1rdt6451lv-p1rlv9199) Units=km Length=0.00826695 bus1=p1rdt6451lv.1.2 bus2=p1rlv9199.1.2 switch=n enabled=y phases=2 Linecode=1P_OH_AL_2/0_Rucina_0_416_0_2_2_2_2_2_2_2_2_2_2_2_2_2_2_2_2_2_2_2_2_2_2_2_2_2_2_2_2_2

New Line.l(r:p1rdt6452lv-p1rlv9201) Units=km Length=0.0391493 bus1=p1rdt6452lv.1.2 bus2=p1rlv9201.1.2 switch=n enabled=y phases=2 Linecode=1P_OH_AL_4/0_Zuzara_0_416_0_2_2_2_2_2_2_2_2_2_2_2_2_2_2_2_2_2_2_2_2_2_2_2_2_2_2_2_2_2

New Line.l(r:p1rdt6514lv-p1rlv9326) Units=km Length=0.0111614 bus1=p1rdt6514lv.1.2 bus2=p1rlv9326.1.2 switch=n enabled=y phases=2 Linecode=1P_OH_AL_2/0_Rucina_0_416_0_2_2_2_2_2_2_2_2_2_2_2_2_2_2_2_2_2_2_2_2_2_2_2_2_2_2_2_2_2

New Line.l(r:p1rdt6517lv-p1rlv13391) Units=km Length=0.030051300000000003 bus1=p1rdt6517lv.1.2 bus2=p1rlv13391.1.2 switch=n enabled=y phases=2 Linecode=1P_OH_AL_4/0_Zuzara_0_416_0_2_2_2_2_2_2_2_2_2_2_2_2_2_2_2_2_2_2_2_2_2_2_2_2_2_2_2_2_2

New Line.l(r:p1rdm11679-p1rlv9330)_s0 Units=km Length=0.0681308 bus1=p1rdm11679.1.2 bus2=p1rdm11679-p1rlv9330x.1.2 switch=n enabled=y phases=2 Linecode=1P_OH_AL_4/0_Zuzara_0_416_0_2_2_2_2_2_2_2_2_2_2_2_2_2_2_2_2_2_2_2_2_2_2_2_2_2_2_2_2_2

New Line.l(r:p1rdm11679-p1rlv9330)_s1 Units=km Length=0.0289103 bus1=p1rdm11679-p1rlv9330x.1.2 bus2=p1rlv9330.1.2 switch=n enabled=y phases=2 Linecode=1P_OH_AL_4/0_Zuzara_0_416_0_2_2_2_2_2_2_2_2_2_2_2_2_2_2_2_2_2_2_2_2_2_2_2_2_2_2_2_2_2

New Line.l(r:p1rdm11679-p1rdt6517lv) Units=km Length=0.0175216 bus1=p1rdt6517lv.1.2 bus2=p1rdm11679.1.2 switch=n enabled=y phases=2 Linecode=1P_OH_AL_2/0_Rucina_0_416_0_2_2_2_2_2_2_2_2_2_2_2_2_2_2_2_2_2_2_2_2_2_2_2_2_2_2_2_2_2

New Line.l(r:p1rdt6574lv-p1rlv9466) Units=km Length=0.0982394 bus1=p1rdt6574lv.1.2 bus2=p1rlv9466.1.2 switch=n enabled=y phases=2 Linecode=1P_OH_AL_4/0_Zuzara_0_416_0_2_2_2_2_2_2_2_2_2_2_2_2_2_2_2_2_2_2_2_2_2_2_2_2_2_2_2_2_2

New Line.l(r:p1rdt6577lv-p1rlv9469) Units=km Length=0.052460400000000004 bus1=p1rdt6577lv.1.2 bus2=p1rlv9469.1.2 switch=n enabled=y phases=2 Linecode=1P_OH_AL_4/0_Zuzara_0_416_0_2_2_2_2_2_2_2_2_2_2_2_2_2_2_2_2_2_2_2_2_2_2_2_2_2_2_2_2_2

New Line.l(r:p1rdt6578lv-p1rlv9470) Units=km Length=0.0112506 bus1=p1rdt6578lv.1.2 bus2=p1rlv9470.1.2 switch=n enabled=y phases=2 Linecode=1P_OH_AL_2/0_Rucina_0_416_0_2_2_2_2_2_2_2_2_2_2_2_2_2_2_2_2_2_2_2_2_2_2_2_2_2_2_2_2_2

New Line.l(r:p1rdt6628lv-p1rlv9594) Units=km Length=0.001 bus1=p1rdt6628lv.1.2 bus2=p1rlv9594.1.2 switch=n enabled=y phases=2 Linecode=1P_OH_AL_4_Periwinkle_0_416_0_2_2_2_2_2_2_2_2_2_2_2_2_2_2_2_2_2_2_2_2_2_2_2_2_2_2_2_2_2

New Line.l(r:p1rdt6630lv-p1rlv9597) Units=km Length=0.0926625 bus1=p1rdt6630lv.1.2 bus2=p1rlv9597.1.2 switch=n enabled=y phases=2 Linecode=1P_OH_AL_4/0_Zuzara_0_416_0_2_2_2_2_2_2_2_2_2_2_2_2_2_2_2_2_2_2_2_2_2_2_2_2_2_2_2_2_2

New Line.l(r:p1rdt6630lv-p1rlv12499) Units=km Length=0.100218 bus1=p1rdt6630lv.1.2 bus2=p1rlv12499.1.2 switch=n enabled=y phases=2 Linecode=1P_OH_AL_4/0_Zuzara_0_416_0_2_2_2_2_2_2_2_2_2_2_2_2_2_2_2_2_2_2_2_2_2_2_2_2_2_2_2_2_2

New Line.l(r:p1rdt6631lv-p1rlv9598) Units=km Length=0.0399919 bus1=p1rdt6631lv.1.2 bus2=p1rlv9598.1.2 switch=n enabled=y phases=2 Linecode=1P_OH_AL_4/0_Zuzara_0_416_0_2_2_2_2_2_2_2_2_2_2_2_2_2_2_2_2_2_2_2_2_2_2_2_2_2_2_2_2_2

New Line.l(r:p1rdt6632lv-p1rlv9602) Units=km Length=0.0215859 bus1=p1rdt6632lv.1.2 bus2=p1rlv9602.1.2 switch=n enabled=y phases=2 Linecode=1P_OH_AL_2/0_Rucina_0_416_0_2_2_2_2_2_2_2_2_2_2_2_2_2_2_2_2_2_2_2_2_2_2_2_2_2_2_2_2_2

New Line.l(r:p1rdt6633lv-p1rlv9603) Units=km Length=0.0129922 bus1=p1rdt6633lv.1.2 bus2=p1rlv9603.1.2 switch=n enabled=y phases=2 Linecode=1P_OH_AL_2/0_Rucina_0_416_0_2_2_2_2_2_2_2_2_2_2_2_2_2_2_2_2_2_2_2_2_2_2_2_2_2_2_2_2_2

New Line.l(r:p1rdt7114lv-p1rlv10694) Units=km Length=0.0311166 bus1=p1rdt7114lv.1.2 bus2=p1rlv10694.1.2 switch=n enabled=y phases=2 Linecode=1P_OH_AL_4/0_Zuzara_0_416_0_2_2_2_2_2_2_2_2_2_2_2_2_2_2_2_2_2_2_2_2_2_2_2_2_2_2_2_2_2

New Line.l(r:p1rdt7171lv-p1rlv10825) Units=km Length=0.0537822 bus1=p1rdt7171lv.1.2 bus2=p1rlv10825.1.2 switch=n enabled=y phases=2 Linecode=1P_OH_AL_4/0_Zuzara_0_416_0_2_2_2_2_2_2_2_2_2_2_2_2_2_2_2_2_2_2_2_2_2_2_2_2_2_2_2_2_2

New Line.l(r:p1rdt7235lv-p1rlv10971) Units=km Length=0.0124764 bus1=p1rdt7235lv.1.2 bus2=p1rlv10971.1.2 switch=n enabled=y phases=2 Linecode=1P_OH_AL_2/0_Rucina_0_416_0_2_2_2_2_2_2_2_2_2_2_2_2_2_2_2_2_2_2_2_2_2_2_2_2_2_2_2_2_2

New Line.l(r:p1rdt7299lv-p1rlv11122) Units=km Length=0.0308334 bus1=p1rdt7299lv.1.2 bus2=p1rlv11122.1.2 switch=n enabled=y phases=2 Linecode=1P_OH_AL_4/0_Zuzara_0_416_0_2_2_2_2_2_2_2_2_2_2_2_2_2_2_2_2_2_2_2_2_2_2_2_2_2_2_2_2_2

New Line.l(r:p1rdt7299lv-p1rlv12607) Units=km Length=0.0297343 bus1=p1rdt7299lv.1.2 bus2=p1rlv12607.1.2 switch=n enabled=y phases=2 Linecode=1P_OH_AL_4/0_Zuzara_0_416_0_2_2_2_2_2_2_2_2_2_2_2_2_2_2_2_2_2_2_2_2_2_2_2_2_2_2_2_2_2

New Line.l(r:p1rdt7299lv-p1rlv13772) Units=km Length=0.051124800000000005 bus1=p1rdt7299lv.1.2 bus2=p1rlv13772.1.2 switch=n enabled=y phases=2 Linecode=1P_OH_AL_4/0_Zuzara_0_416_0_2_2_2_2_2_2_2_2_2_2_2_2_2_2_2_2_2_2_2_2_2_2_2_2_2_2_2_2_2

New Line.l(r:p1rdt7300lv-p1rlv11123) Units=km Length=0.001 bus1=p1rdt7300lv.1.2 bus2=p1rlv11123.1.2 switch=n enabled=y phases=2 Linecode=1P_OH_AL_4_Periwinkle_0_416_0_2_2_2_2_2_2_2_2_2_2_2_2_2_2_2_2_2_2_2_2_2_2_2_2_2_2_2_2_2

New Line.l(r:p1rdt7365lv-p1rlv11245) Units=km Length=0.001 bus1=p1rdt7365lv.1.2 bus2=p1rlv11245.1.2 switch=n enabled=y phases=2 Linecode=1P_OH_AL_4_Periwinkle_0_416_0_2_2_2_2_2_2_2_2_2_2_2_2_2_2_2_2_2_2_2_2_2_2_2_2_2_2_2_2_2

New Line.l(r:p1rdt7422lv-p1rlv11385) Units=km Length=0.021401 bus1=p1rdt7422lv.1.2 bus2=p1rlv11385.1.2 switch=n enabled=y phases=2 Linecode=1P_OH_AL_2/0_Rucina_0_416_0_2_2_2_2_2_2_2_2_2_2_2_2_2_2_2_2_2_2_2_2_2_2_2_2_2_2_2_2_2

New Line.l(r:p1rdt7422lv-p1rlv13518) Units=km Length=0.021401 bus1=p1rdt7422lv.1.2 bus2=p1rlv13518.1.2 switch=n enabled=y phases=2 Linecode=1P_OH_AL_2/0_Rucina_0_416_0_2_2_2_2_2_2_2_2_2_2_2_2_2_2_2_2_2_2_2_2_2_2_2_2_2_2_2_2_2

New Line.l(r:p1rdt7423lv-p1rlv11386) Units=km Length=0.0340706 bus1=p1rdt7423lv.1.2 bus2=p1rlv11386.1.2 switch=n enabled=y phases=2 Linecode=1P_OH_AL_4/0_Zuzara_0_416_0_2_2_2_2_2_2_2_2_2_2_2_2_2_2_2_2_2_2_2_2_2_2_2_2_2_2_2_2_2

New Line.l(r:p1rdt7478lv-p1rlv11511) Units=km Length=0.0503752 bus1=p1rdt7478lv.1.2 bus2=p1rlv11511.1.2 switch=n enabled=y phases=2 Linecode=1P_OH_AL_4/0_Zuzara_0_416_0_2_2_2_2_2_2_2_2_2_2_2_2_2_2_2_2_2_2_2_2_2_2_2_2_2_2_2_2_2

New Line.l(r:p1rdt7549lv-p1rlv11665) Units=km Length=0.0201314 bus1=p1rdt7549lv.1.2 bus2=p1rlv11665.1.2 switch=n enabled=y phases=2 Linecode=1P_OH_AL_2/0_Rucina_0_416_0_2_2_2_2_2_2_2_2_2_2_2_2_2_2_2_2_2_2_2_2_2_2_2_2_2_2_2_2_2

New Line.l(r:p1rdt7603lv-p1rlv11808) Units=km Length=0.0231985 bus1=p1rdt7603lv.1.2 bus2=p1rlv11808.1.2 switch=n enabled=y phases=2 Linecode=1P_OH_AL_2/0_Rucina_0_416_0_2_2_2_2_2_2_2_2_2_2_2_2_2_2_2_2_2_2_2_2_2_2_2_2_2_2_2_2_2

New Line.l(r:p1rdt7657lv-p1rlv11940) Units=km Length=0.001 bus1=p1rdt7657lv.1.2 bus2=p1rlv11940.1.2 switch=n enabled=y phases=2 Linecode=1P_OH_AL_4_Periwinkle_0_416_0_2_2_2_2_2_2_2_2_2_2_2_2_2_2_2_2_2_2_2_2_2_2_2_2_2_2_2_2_2

New Line.l(r:p1rdt7658lv-p1rlv11941) Units=km Length=0.0202822 bus1=p1rdt7658lv.1.2 bus2=p1rlv11941.1.2 switch=n enabled=y phases=2 Linecode=1P_OH_AL_2/0_Rucina_0_416_0_2_2_2_2_2_2_2_2_2_2_2_2_2_2_2_2_2_2_2_2_2_2_2_2_2_2_2_2_2

New Line.l(r:p1rdt7705lv-p1rlv12082) Units=km Length=0.0989178 bus1=p1rdt7705lv.1.2 bus2=p1rlv12082.1.2 switch=n enabled=y phases=2 Linecode=1P_OH_AL_4/0_Zuzara_0_416_0_2_2_2_2_2_2_2_2_2_2_2_2_2_2_2_2_2_2_2_2_2_2_2_2_2_2_2_2_2

New Line.l(r:p1rdt7706lv-p1rlv12083) Units=km Length=0.001 bus1=p1rdt7706lv.1.2 bus2=p1rlv12083.1.2 switch=n enabled=y phases=2 Linecode=1P_OH_AL_4_Periwinkle_0_416_0_2_2_2_2_2_2_2_2_2_2_2_2_2_2_2_2_2_2_2_2_2_2_2_2_2_2_2_2_2

New Line.l(r:p1rdt7764lv-p1rlv12217) Units=km Length=0.001 bus1=p1rdt7764lv.1.2 bus2=p1rlv12217.1.2 switch=n enabled=y phases=2 Linecode=1P_OH_AL_4_Periwinkle_0_416_0_2_2_2_2_2_2_2_2_2_2_2_2_2_2_2_2_2_2_2_2_2_2_2_2_2_2_2_2_2

New Line.l(r:p1rdt7765lv-p1rlv12219) Units=km Length=0.0981412 bus1=p1rdt7765lv.1.2 bus2=p1rlv12219.1.2 switch=n enabled=y phases=2 Linecode=1P_OH_AL_4/0_Zuzara_0_416_0_2_2_2_2_2_2_2_2_2_2_2_2_2_2_2_2_2_2_2_2_2_2_2_2_2_2_2_2_2

New Line.l(r:p1rdt7767lv-p1rlv12221) Units=km Length=0.001 bus1=p1rdt7767lv.1.2 bus2=p1rlv12221.1.2 switch=n enabled=y phases=2 Linecode=1P_OH_AL_4_Periwinkle_0_416_0_2_2_2_2_2_2_2_2_2_2_2_2_2_2_2_2_2_2_2_2_2_2_2_2_2_2_2_2_2

New Line.l(r:p1rdt7834lv-p1rlv12361) Units=km Length=0.0277361 bus1=p1rdt7834lv.1.2 bus2=p1rlv12361.1.2 switch=n enabled=y phases=2 Linecode=1P_OH_AL_4/0_Zuzara_0_416_0_2_2_2_2_2_2_2_2_2_2_2_2_2_2_2_2_2_2_2_2_2_2_2_2_2_2_2_2_2

New Line.l(r:p1rdt7835lv-p1rlv12363) Units=km Length=0.014762800000000001 bus1=p1rdt7835lv.1.2 bus2=p1rlv12363.1.2 switch=n enabled=y phases=2 Linecode=1P_OH_AL_2/0_Rucina_0_416_0_2_2_2_2_2_2_2_2_2_2_2_2_2_2_2_2_2_2_2_2_2_2_2_2_2_2_2_2_2

New Line.l(r:p1rdt7835lv-p1rlv13520) Units=km Length=0.014762800000000001 bus1=p1rdt7835lv.1.2 bus2=p1rlv13520.1.2 switch=n enabled=y phases=2 Linecode=1P_OH_AL_2/0_Rucina_0_416_0_2_2_2_2_2_2_2_2_2_2_2_2_2_2_2_2_2_2_2_2_2_2_2_2_2_2_2_2_2

New Line.l(r:p1rdt7919lv-p1rlv12610) Units=km Length=0.023332800000000004 bus1=p1rdt7919lv.1.2 bus2=p1rlv12610.1.2 switch=n enabled=y phases=2 Linecode=1P_OH_AL_2/0_Rucina_0_416_0_2_2_2_2_2_2_2_2_2_2_2_2_2_2_2_2_2_2_2_2_2_2_2_2_2_2_2_2_2

New Line.l(r:p1rdt8035lv-p1rlv12888) Units=km Length=0.001 bus1=p1rdt8035lv.1.2 bus2=p1rlv12888.1.2 switch=n enabled=y phases=2 Linecode=1P_OH_AL_4_Periwinkle_0_416_0_2_2_2_2_2_2_2_2_2_2_2_2_2_2_2_2_2_2_2_2_2_2_2_2_2_2_2_2_2

New Line.l(r:p1rdt8036lv-p1rlv12889) Units=km Length=0.001 bus1=p1rdt8036lv.1.2 bus2=p1rlv12889.1.2 switch=n enabled=y phases=2 Linecode=1P_OH_AL_4_Periwinkle_0_416_0_2_2_2_2_2_2_2_2_2_2_2_2_2_2_2_2_2_2_2_2_2_2_2_2_2_2_2_2_2

New Line.l(r:p1rdt8038lv-p1rlv12892) Units=km Length=0.0523095 bus1=p1rdt8038lv.1.2 bus2=p1rlv12892.1.2 switch=n enabled=y phases=2 Linecode=1P_OH_AL_4/0_Zuzara_0_416_0_2_2_2_2_2_2_2_2_2_2_2_2_2_2_2_2_2_2_2_2_2_2_2_2_2_2_2_2_2

New Line.l(r:p1rdt8348lv-p1rlv13774) Units=km Length=0.0396781 bus1=p1rdt8348lv.1.2 bus2=p1rlv13774.1.2 switch=n enabled=y phases=2 Linecode=1P_OH_AL_4/0_Zuzara_0_416_0_2_2_2_2_2_2_2_2_2_2_2_2_2_2_2_2_2_2_2_2_2_2_2_2_2_2_2_2_2

New Line.l(r:p1rdt1264-p1rdt6577) Units=km Length=0.100133 bus1=p1rdt1264.2 bus2=p1rdt6577.2 switch=n enabled=y phases=1 Linecode=1P_OH_AL_ACSR_#2_Sparrow_12_47_0_1_1_1_1_1_1_1_1_1_1_1_1_1_1_1_1_1_1_1_1_1_1_1_1_1_1_1_1_1

New Line.l(r:p1rdt1264-p1rdt8038) Units=km Length=0.0871695 bus1=p1rdt8038.2 bus2=p1rdt1264.2 switch=n enabled=y phases=1 Linecode=1P_OH_AL_ACSR_#2_Sparrow_12_47_0_1_1_1_1_1_1_1_1_1_1_1_1_1_1_1_1_1_1_1_1_1_1_1_1_1_1_1_1_1

New Line.l(r:p1rdt4540-p1rdt8038) Units=km Length=0.5883 bus1=p1rdt4540.2 bus2=p1rdt8038.2 switch=n enabled=y phases=1 Linecode=1P_OH_AL_ACSR_#2_Sparrow_12_47_0_1_1_1_1_1_1_1_1_1_1_1_1_1_1_1_1_1_1_1_1_1_1_1_1_1_1_1_1_1

New Line.l(r:p1rdt3297-p1rdt4540)_s0 Units=km Length=0.22333000000000003 bus1=p1rdt3297-p1rdt4540x.2 bus2=p1rdt3297-p1rdt4540xx.2 switch=n enabled=y phases=1 Linecode=1P_OH_AL_ACSR_#2_Sparrow_12_47_0_1_1_1_1_1_1_1_1_1_1_1_1_1_1_1_1_1_1_1_1_1_1_1_1_1_1_1_1_1

New Line.l(r:p1rdt3297-p1rdt4540)_s1 Units=km Length=3.29821 bus1=p1rdt3297-p1rdt4540xx.2 bus2=p1rdt3297-p1rdt4540xxx.2 switch=n enabled=y phases=1 Linecode=1P_OH_AL_ACSR_#2_Sparrow_12_47_0_1_1_1_1_1_1_1_1_1_1_1_1_1_1_1_1_1_1_1_1_1_1_1_1_1_1_1_1_1

New Line.l(r:p1rdt3297-p1rdt4540)_s2 Units=km Length=0.560109 bus1=p1rdt3297-p1rdt4540xxx.2 bus2=p1rdt4540.2 switch=n enabled=y phases=1 Linecode=1P_OH_AL_ACSR_#2_Sparrow_12_47_0_1_1_1_1_1_1_1_1_1_1_1_1_1_1_1_1_1_1_1_1_1_1_1_1_1_1_1_1_1

New Line.l(r:p1rdt1826-p1rdt2890) Units=km Length=0.0188528 bus1=p1rdt2890.1 bus2=p1rdt1826.1 switch=n enabled=y phases=1 Linecode=1P_OH_AL_ACSR_#2_Sparrow_12_47_0_1_1_1_1_1_1_1_1_1_1_1_1_1_1_1_1_1_1_1_1_1_1_1_1_1_1_1_1_1

New Line.l(r:p1rdt2890-p1rdt5914) Units=km Length=0.103404 bus1=p1rdt2890.1 bus2=p1rdt5914.1 switch=n enabled=y phases=1 Linecode=1P_OH_AL_ACSR_#2_Sparrow_12_47_0_1_1_1_1_1_1_1_1_1_1_1_1_1_1_1_1_1_1_1_1_1_1_1_1_1_1_1_1_1

New Line.l(r:p1rdt2395-p1rdt2890)_s0 Units=km Length=0.12096300000000001 bus1=p1rdt2395-p1rdt2890x.1 bus2=p1rdt2395-p1rdt2890xx.1 switch=n enabled=y phases=1 Linecode=1P_OH_AL_ACSR_#2_Sparrow_12_47_0_1_1_1_1_1_1_1_1_1_1_1_1_1_1_1_1_1_1_1_1_1_1_1_1_1_1_1_1_1

New Line.l(r:p1rdt2395-p1rdt2890)_s1 Units=km Length=0.0346601 bus1=p1rdt2395-p1rdt2890xx.1 bus2=p1rdt2890.1 switch=n enabled=y phases=1 Linecode=1P_OH_AL_ACSR_#2_Sparrow_12_47_0_1_1_1_1_1_1_1_1_1_1_1_1_1_1_1_1_1_1_1_1_1_1_1_1_1_1_1_1_1

New Line.l(r:p1rdt4615-p1rdt6631) Units=km Length=0.271673 bus1=p1rdt6631.2 bus2=p1rdt4615.2 switch=n enabled=y phases=1 Linecode=1P_OH_AL_ACSR_#2_Sparrow_12_47_0_1_1_1_1_1_1_1_1_1_1_1_1_1_1_1_1_1_1_1_1_1_1_1_1_1_1_1_1_1

New Line.l(r:p1rdt3386-p1rdt7299) Units=km Length=0.16480100000000003 bus1=p1rdt3386.2 bus2=p1rdt7299.2 switch=n enabled=y phases=1 Linecode=1P_OH_AL_ACSR_#2_Sparrow_12_47_0_1_1_1_1_1_1_1_1_1_1_1_1_1_1_1_1_1_1_1_1_1_1_1_1_1_1_1_1_1

New Line.l(r:p1rdt3386-p1rdt7300) Units=km Length=0.33825600000000006 bus1=p1rdt3386.2 bus2=p1rdt7300.2 switch=n enabled=y phases=1 Linecode=1P_OH_AL_ACSR_#2_Sparrow_12_47_0_1_1_1_1_1_1_1_1_1_1_1_1_1_1_1_1_1_1_1_1_1_1_1_1_1_1_1_1_1

New Line.l(r:p1rdt3386-p1rdt6628) Units=km Length=0.336775 bus1=p1rdt6628.2 bus2=p1rdt3386.2 switch=n enabled=y phases=1 Linecode=1P_OH_AL_ACSR_#2_Sparrow_12_47_0_1_1_1_1_1_1_1_1_1_1_1_1_1_1_1_1_1_1_1_1_1_1_1_1_1_1_1_1_1

New Line.l(r:p1rdt6628-p1rdt7764)_s0 Units=km Length=0.365077 bus1=p1rdt7764.2 bus2=p1rdt6628-p1rdt7764x.2 switch=n enabled=y phases=1 Linecode=1P_OH_AL_ACSR_#2_Sparrow_12_47_0_1_1_1_1_1_1_1_1_1_1_1_1_1_1_1_1_1_1_1_1_1_1_1_1_1_1_1_1_1

New Line.l(r:p1rdt6628-p1rdt7764)_s1 Units=km Length=1.47598 bus1=p1rdt6628-p1rdt7764x.2 bus2=p1rdt6628.2 switch=n enabled=y phases=1 Linecode=1P_OH_AL_ACSR_#2_Sparrow_12_47_0_1_1_1_1_1_1_1_1_1_1_1_1_1_1_1_1_1_1_1_1_1_1_1_1_1_1_1_1_1

New Line.l(r:p1rdt7764-p1rdt7765)_s0 Units=km Length=0.334079 bus1=p1rdt7765.2 bus2=p1rdt7764-p1rdt7765x.2 switch=n enabled=y phases=1 Linecode=1P_OH_AL_ACSR_#2_Sparrow_12_47_0_1_1_1_1_1_1_1_1_1_1_1_1_1_1_1_1_1_1_1_1_1_1_1_1_1_1_1_1_1

New Line.l(r:p1rdt7764-p1rdt7765)_s1 Units=km Length=0.371047 bus1=p1rdt7764-p1rdt7765x.2 bus2=p1rdt7764.2 switch=n enabled=y phases=1 Linecode=1P_OH_AL_ACSR_#2_Sparrow_12_47_0_1_1_1_1_1_1_1_1_1_1_1_1_1_1_1_1_1_1_1_1_1_1_1_1_1_1_1_1_1

New Line.l(r:p1rdt6631-p1rdt7765) Units=km Length=0.190541 bus1=p1rdt6631.2 bus2=p1rdt7765.2 switch=n enabled=y phases=1 Linecode=1P_OH_AL_ACSR_#2_Sparrow_12_47_0_1_1_1_1_1_1_1_1_1_1_1_1_1_1_1_1_1_1_1_1_1_1_1_1_1_1_1_1_1

New Line.l(r:p1rdt5632-p1rdt6631) Units=km Length=0.379668 bus1=p1rdt5632.2 bus2=p1rdt6631.2 switch=n enabled=y phases=1 Linecode=1P_OH_AL_ACSR_#2_Sparrow_12_47_0_1_1_1_1_1_1_1_1_1_1_1_1_1_1_1_1_1_1_1_1_1_1_1_1_1_1_1_1_1

New Line.l(r:p1rdt4988-p1rdt5632) Units=km Length=0.0194217 bus1=p1rdt4988.2 bus2=p1rdt5632.2 switch=n enabled=y phases=1 Linecode=1P_OH_AL_ACSR_#2_Sparrow_12_47_0_1_1_1_1_1_1_1_1_1_1_1_1_1_1_1_1_1_1_1_1_1_1_1_1_1_1_1_1_1

New Line.l(r:p1rdt1708-p1rdt4988) Units=km Length=0.111408 bus1=p1rdt1708-p1rdt4988x.2 bus2=p1rdt4988.2 switch=n enabled=y phases=1 Linecode=1P_OH_AL_ACSR_#2_Sparrow_12_47_0_1_1_1_1_1_1_1_1_1_1_1_1_1_1_1_1_1_1_1_1_1_1_1_1_1_1_1_1_1

New Line.l(r:p1rdt3210-p1rdt5171) Units=km Length=0.0645179 bus1=p1rdt3210.3 bus2=p1rdt5171.3 switch=n enabled=y phases=1 Linecode=1P_OH_AL_ACSR_#2_Sparrow_12_47_0_1_1_1_1_1_1_1_1_1_1_1_1_1_1_1_1_1_1_1_1_1_1_1_1_1_1_1_1_1

New Line.l(r:p1rdt3103-p1rdt3210) Units=km Length=0.0785032 bus1=p1rdt3103.3 bus2=p1rdt3210.3 switch=n enabled=y phases=1 Linecode=1P_OH_AL_ACSR_#2_Sparrow_12_47_0_1_1_1_1_1_1_1_1_1_1_1_1_1_1_1_1_1_1_1_1_1_1_1_1_1_1_1_1_1

New Line.l(r:p1rdt3103-p1rdt3776) Units=km Length=0.001 bus1=p1rdt3103.3 bus2=p1rdt3776.3 switch=n enabled=y phases=1 Linecode=1P_OH_AL_ACSR_#2_Sparrow_12_47_0_1_1_1_1_1_1_1_1_1_1_1_1_1_1_1_1_1_1_1_1_1_1_1_1_1_1_1_1_1

New Line.l(r:p1rdt3103-p1rdt5475) Units=km Length=0.0588669 bus1=p1rdt5475.3 bus2=p1rdt3103.3 switch=n enabled=y phases=1 Linecode=1P_OH_AL_ACSR_#2_Sparrow_12_47_0_1_1_1_1_1_1_1_1_1_1_1_1_1_1_1_1_1_1_1_1_1_1_1_1_1_1_1_1_1

New Line.l(r:p1rdt2497-p1rdt5475) Units=km Length=0.150686 bus1=p1rdt2497.3 bus2=p1rdt5475.3 switch=n enabled=y phases=1 Linecode=1P_OH_AL_ACSR_#2_Sparrow_12_47_0_1_1_1_1_1_1_1_1_1_1_1_1_1_1_1_1_1_1_1_1_1_1_1_1_1_1_1_1_1

New Line.l(r:p1rdt2497-p1rdt6517)_s0 Units=km Length=0.281869 bus1=p1rdt2497-p1rdt6517xxx.3 bus2=p1rdt2497-p1rdt6517xx.3 switch=n enabled=y phases=1 Linecode=1P_OH_AL_ACSR_#2_Sparrow_12_47_0_1_1_1_1_1_1_1_1_1_1_1_1_1_1_1_1_1_1_1_1_1_1_1_1_1_1_1_1_1

New Line.l(r:p1rdt2497-p1rdt6517)_s1 Units=km Length=0.001 bus1=p1rdt2497-p1rdt6517xx.3 bus2=p1rdt2497-p1rdt6517x.3 switch=n enabled=y phases=1 Linecode=1P_OH_AL_ACSR_#2_Sparrow_12_47_0_1_1_1_1_1_1_1_1_1_1_1_1_1_1_1_1_1_1_1_1_1_1_1_1_1_1_1_1_1
New Line.l(r:p1rdt2497-p1rdt6517)_s2 Units=km Length=0.0588609 bus1=p1rdt2497-p1rdt6517x.3 bus2=p1rdt2497.3 switch=n enabled=y phases=1 Linecode=1P_OH_AL_ACSR_#2_Sparrow_12_47_0_1_1_1_1_1_1_1_1_1_1_1_1_1_1_1_1_1_1_1_1_1_1_1_1_1_1_1_1_1

New Line.l(r:p1rdt2181-p1rdt383) Units=km Length=0.001 bus1=p1rdt383.1 bus2=p1rdt2181.1 switch=n enabled=y phases=1 Linecode=1P_OH_AL_ACSR_#2_Sparrow_12_47_0_1_1_1_1_1_1_1_1_1_1_1_1_1_1_1_1_1_1_1_1_1_1_1_1_1_1_1_1_1

New Line.l(r:p1rdt383-p1rdt645) Units=km Length=0.0873666 bus1=p1rdt645.1 bus2=p1rdt383.1 switch=n enabled=y phases=1 Linecode=1P_OH_AL_ACSR_#2_Sparrow_12_47_0_1_1_1_1_1_1_1_1_1_1_1_1_1_1_1_1_1_1_1_1_1_1_1_1_1_1_1_1_1

New Line.l(r:p1rdt125-p1rdt1828) Units=km Length=0.0395868 bus1=p1rdt1828.1 bus2=p1rdt125.1 switch=n enabled=y phases=1 Linecode=1P_OH_AL_ACSR_#2_Sparrow_12_47_0_1_1_1_1_1_1_1_1_1_1_1_1_1_1_1_1_1_1_1_1_1_1_1_1_1_1_1_1_1

New Line.l(r:p1rdt1828-p1rdt645) Units=km Length=0.0322676 bus1=p1rdt645.1 bus2=p1rdt1828.1 switch=n enabled=y phases=1 Linecode=1P_OH_AL_ACSR_#2_Sparrow_12_47_0_1_1_1_1_1_1_1_1_1_1_1_1_1_1_1_1_1_1_1_1_1_1_1_1_1_1_1_1_1

New Line.l(r:p1rdt4376-p1rdt645)_s0 Units=km Length=0.126289 bus1=p1rdt4376-p1rdt645x.1 bus2=p1rdt4376-p1rdt645xx.1 switch=n enabled=y phases=1 Linecode=1P_OH_AL_ACSR_#2_Sparrow_12_47_0_1_1_1_1_1_1_1_1_1_1_1_1_1_1_1_1_1_1_1_1_1_1_1_1_1_1_1_1_1

New Line.l(r:p1rdt4376-p1rdt645)_s1 Units=km Length=0.0564384 bus1=p1rdt4376-p1rdt645xx.1 bus2=p1rdt645.1 switch=n enabled=y phases=1 Linecode=1P_OH_AL_ACSR_#2_Sparrow_12_47_0_1_1_1_1_1_1_1_1_1_1_1_1_1_1_1_1_1_1_1_1_1_1_1_1_1_1_1_1_1

New Line.l(r:p1rdt1827-p1rdt4376)_s0 Units=km Length=0.0967363 bus1=p1rdt1827-p1rdt4376xx.2 bus2=p1rdt1827-p1rdt4376x.2 switch=n enabled=y phases=1 Linecode=1P_OH_AL_ACSR_#2_Sparrow_12_47_0_1_1_1_1_1_1_1_1_1_1_1_1_1_1_1_1_1_1_1_1_1_1_1_1_1_1_1_1_1

New Line.l(r:p1rdt1827-p1rdt4376)_s1 Units=km Length=0.100127 bus1=p1rdt1827-p1rdt4376x.2 bus2=p1rdt1827.2 switch=n enabled=y phases=1 Linecode=1P_OH_AL_ACSR_#2_Sparrow_12_47_0_1_1_1_1_1_1_1_1_1_1_1_1_1_1_1_1_1_1_1_1_1_1_1_1_1_1_1_1_1

New Line.l(r:p1rdt385-p1rdt386)_s0 Units=km Length=0.280404 bus1=p1rdt385-p1rdt386xx.1 bus2=p1rdt385-p1rdt386x.1 switch=n enabled=y phases=1 Linecode=1P_OH_AL_ACSR_#2_Sparrow_12_47_0_1_1_1_1_1_1_1_1_1_1_1_1_1_1_1_1_1_1_1_1_1_1_1_1_1_1_1_1_1

New Line.l(r:p1rdt385-p1rdt386)_s1 Units=km Length=0.00243767 bus1=p1rdt385-p1rdt386x.1 bus2=p1rdt385.1 switch=n enabled=y phases=1 Linecode=1P_OH_AL_ACSR_#2_Sparrow_12_47_0_1_1_1_1_1_1_1_1_1_1_1_1_1_1_1_1_1_1_1_1_1_1_1_1_1_1_1_1_1

New Line.l(r:p1rdt1707-p1rdt1825)_s0 Units=km Length=0.584054 bus1=p1rdt1707-p1rdt1825xx.2 bus2=p1rdt1707-p1rdt1825x.2 switch=n enabled=y phases=1 Linecode=1P_OH_AL_ACSR_#2_Sparrow_12_47_0_1_1_1_1_1_1_1_1_1_1_1_1_1_1_1_1_1_1_1_1_1_1_1_1_1_1_1_1_1

New Line.l(r:p1rdt1707-p1rdt1825)_s1 Units=km Length=0.921878 bus1=p1rdt1707-p1rdt1825x.2 bus2=p1rdt1707.2 switch=n enabled=y phases=1 Linecode=1P_OH_AL_ACSR_#2_Sparrow_12_47_0_1_1_1_1_1_1_1_1_1_1_1_1_1_1_1_1_1_1_1_1_1_1_1_1_1_1_1_1_1

New Line.l(r:p1rdt2393-p1rdt6045) Units=km Length=0.432812 bus1=p1rdt6045.3 bus2=p1rdt2393.3 switch=n enabled=y phases=1 Linecode=1P_OH_AL_ACSR_#2_Sparrow_12_47_0_1_1_1_1_1_1_1_1_1_1_1_1_1_1_1_1_1_1_1_1_1_1_1_1_1_1_1_1_1

New Line.l(r:p1rdt1499-p1rdt6045) Units=km Length=0.21714 bus1=p1rdt1499.3 bus2=p1rdt6045.3 switch=n enabled=y phases=1 Linecode=1P_OH_AL_ACSR_#2_Sparrow_12_47_0_1_1_1_1_1_1_1_1_1_1_1_1_1_1_1_1_1_1_1_1_1_1_1_1_1_1_1_1_1

New Line.l(r:p1rdt1499-p1rdt7834) Units=km Length=0.52107 bus1=p1rdt1499-p1rdt7834x.3 bus2=p1rdt1499.3 switch=n enabled=y phases=1 Linecode=1P_OH_AL_ACSR_#2_Sparrow_12_47_0_1_1_1_1_1_1_1_1_1_1_1_1_1_1_1_1_1_1_1_1_1_1_1_1_1_1_1_1_1

New Line.l(r:p1rdt7657-p1rdt7834)_s0 Units=km Length=0.476002 bus1=p1rdt7657-p1rdt7834xx.1 bus2=p1rdt7657-p1rdt7834x.1 switch=n enabled=y phases=1 Linecode=1P_OH_AL_ACSR_#2_Sparrow_12_47_0_1_1_1_1_1_1_1_1_1_1_1_1_1_1_1_1_1_1_1_1_1_1_1_1_1_1_1_1_1

New Line.l(r:p1rdt7657-p1rdt7834)_s1 Units=km Length=0.224011 bus1=p1rdt7657-p1rdt7834x.1 bus2=p1rdt7657.1 switch=n enabled=y phases=1 Linecode=1P_OH_AL_ACSR_#2_Sparrow_12_47_0_1_1_1_1_1_1_1_1_1_1_1_1_1_1_1_1_1_1_1_1_1_1_1_1_1_1_1_1_1

New Line.l(r:p1rdt2999-p1rdt5975) Units=km Length=0.110653 bus1=p1rdt5975.1 bus2=p1rdt5975_b1_1.1 switch=n enabled=y phases=1 Linecode=1P_OH_AL_ACSR_#2_Sparrow_12_47_0_1_1_1_1_1_1_1_1_1_1_1_1_1_1_1_1_1_1_1_1_1_1_1_1_1_1_1_1_1

New Line.l(r:p1rdt5630-p1rdt5975) Units=km Length=0.282856 bus1=p1rdt5975.1 bus2=p1rdt5630.1 switch=n enabled=y phases=1 Linecode=1P_OH_AL_ACSR_#2_Sparrow_12_47_0_1_1_1_1_1_1_1_1_1_1_1_1_1_1_1_1_1_1_1_1_1_1_1_1_1_1_1_1_1

New Line.l(r:p1rdt5975-p1rdt7478) Units=km Length=0.157379 bus1=p1rdt7478.1 bus2=p1rdt5975.1 switch=n enabled=y phases=1 Linecode=1P_OH_AL_ACSR_#2_Sparrow_12_47_0_1_1_1_1_1_1_1_1_1_1_1_1_1_1_1_1_1_1_1_1_1_1_1_1_1_1_1_1_1

New Line.l(r:p1rdt4215-p1rdt7478) Units=km Length=0.0569779 bus1=p1rdt4215.1 bus2=p1rdt7478.1 switch=n enabled=y phases=1 Linecode=1P_OH_AL_ACSR_#2_Sparrow_12_47_0_1_1_1_1_1_1_1_1_1_1_1_1_1_1_1_1_1_1_1_1_1_1_1_1_1_1_1_1_1

New Line.l(r:p1rdt4215-p1rdt8035) Units=km Length=0.127369 bus1=p1rdt4215.1 bus2=p1rdt8035.1 switch=n enabled=y phases=1 Linecode=1P_OH_AL_ACSR_#2_Sparrow_12_47_0_1_1_1_1_1_1_1_1_1_1_1_1_1_1_1_1_1_1_1_1_1_1_1_1_1_1_1_1_1

New Line.l(r:p1rdt4215-p1rdt6630) Units=km Length=0.180952 bus1=p1rdt4215-p1rdt6630x.1 bus2=p1rdt4215.1 switch=n enabled=y phases=1 Linecode=1P_OH_AL_ACSR_#2_Sparrow_12_47_0_1_1_1_1_1_1_1_1_1_1_1_1_1_1_1_1_1_1_1_1_1_1_1_1_1_1_1_1_1

New Line.l(r:p1rdt6450-p1rdt7919) Units=km Length=0.0277701 bus1=p1rdt6450.2 bus2=p1rdt7919.2 switch=n enabled=y phases=1 Linecode=1P_OH_AL_ACSR_#2_Sparrow_12_47_0_1_1_1_1_1_1_1_1_1_1_1_1_1_1_1_1_1_1_1_1_1_1_1_1_1_1_1_1_1

New Line.l(r:p1rdt2889-p1rdt6450) Units=km Length=0.253906 bus1=p1rdt2889-p1rdt6450x.2 bus2=p1rdt6450.2 switch=n enabled=y phases=1 Linecode=1P_OH_AL_ACSR_#2_Sparrow_12_47_0_1_1_1_1_1_1_1_1_1_1_1_1_1_1_1_1_1_1_1_1_1_1_1_1_1_1_1_1_1

New Line.l(r:p1rdt1142-p1rdt6114) Units=km Length=0.135872 bus1=p1rdt6114.3 bus2=p1rdt1142.3 switch=n enabled=y phases=1 Linecode=1P_OH_AL_ACSR_#2_Sparrow_12_47_0_1_1_1_1_1_1_1_1_1_1_1_1_1_1_1_1_1_1_1_1_1_1_1_1_1_1_1_1_1

New Line.l(r:p1rdt6114-p1rdt7549) Units=km Length=0.447336 bus1=p1rdt7549.3 bus2=p1rdt6114.3 switch=n enabled=y phases=1 Linecode=1P_OH_AL_ACSR_#2_Sparrow_12_47_0_1_1_1_1_1_1_1_1_1_1_1_1_1_1_1_1_1_1_1_1_1_1_1_1_1_1_1_1_1

New Line.l(r:p1rdt2889-p1rdt7549) Units=km Length=0.148194 bus1=p1rdt2889-p1rdt7549x.3 bus2=p1rdt7549.3 switch=n enabled=y phases=1 Linecode=1P_OH_AL_ACSR_#2_Sparrow_12_47_0_1_1_1_1_1_1_1_1_1_1_1_1_1_1_1_1_1_1_1_1_1_1_1_1_1_1_1_1_1

New Line.l(r:p1rdt1935-p1rdt3876) Units=km Length=0.125641 bus1=p1rdt3876.2 bus2=p1rdt1935.2 switch=n enabled=y phases=1 Linecode=1P_OH_AL_ACSR_#2_Sparrow_12_47_0_1_1_1_1_1_1_1_1_1_1_1_1_1_1_1_1_1_1_1_1_1_1_1_1_1_1_1_1_1

New Line.l(r:p1rdt3876-p1rdt7422) Units=km Length=0.358675 bus1=p1rdt3876-p1rdt7422x.2 bus2=p1rdt3876.2 switch=n enabled=y phases=1 Linecode=1P_OH_AL_ACSR_#2_Sparrow_12_47_0_1_1_1_1_1_1_1_1_1_1_1_1_1_1_1_1_1_1_1_1_1_1_1_1_1_1_1_1_1

New Line.l(r:p1rdt1936-p1rdt4) Units=km Length=0.8327150000000001 bus1=p1rdt4.1 bus2=p1rdt1936.1 switch=n enabled=y phases=1 Linecode=1P_OH_AL_ACSR_#2_Sparrow_12_47_0_1_1_1_1_1_1_1_1_1_1_1_1_1_1_1_1_1_1_1_1_1_1_1_1_1_1_1_1_1

New Line.l(r:p1rdt4-p1rdt6451) Units=km Length=0.536961 bus1=p1rdt6451.1 bus2=p1rdt6451_b1_1.1 switch=n enabled=y phases=1 Linecode=1P_OH_AL_ACSR_#2_Sparrow_12_47_0_1_1_1_1_1_1_1_1_1_1_1_1_1_1_1_1_1_1_1_1_1_1_1_1_1_1_1_1_1

New Line.l(r:p1rdt1024-p1rdt6451) Units=km Length=0.188643 bus1=p1rdt1024.1 bus2=p1rdt6451.1 switch=n enabled=y phases=1 Linecode=1P_OH_AL_ACSR_#2_Sparrow_12_47_0_1_1_1_1_1_1_1_1_1_1_1_1_1_1_1_1_1_1_1_1_1_1_1_1_1_1_1_1_1

New Line.l(r:p1rdt1024-p1rdt512) Units=km Length=0.443181 bus1=p1rdt1024-p1rdt512x.1 bus2=p1rdt1024.1 switch=n enabled=y phases=1 Linecode=1P_OH_AL_ACSR_#2_Sparrow_12_47_0_1_1_1_1_1_1_1_1_1_1_1_1_1_1_1_1_1_1_1_1_1_1_1_1_1_1_1_1_1

New Line.l(r:p1rdt3-p1rdt5170) Units=km Length=0.313966 bus1=p1rdt5170.3 bus2=p1rdt3.3 switch=n enabled=y phases=1 Linecode=1P_OH_AL_ACSR_#2_Sparrow_12_47_0_1_1_1_1_1_1_1_1_1_1_1_1_1_1_1_1_1_1_1_1_1_1_1_1_1_1_1_1_1

New Line.l(r:p1rdt4986-p1rdt5170) Units=km Length=0.412694 bus1=p1rdt5170.3 bus2=p1rdt4986.3 switch=n enabled=y phases=1 Linecode=1P_OH_AL_ACSR_#2_Sparrow_12_47_0_1_1_1_1_1_1_1_1_1_1_1_1_1_1_1_1_1_1_1_1_1_1_1_1_1_1_1_1_1

New Line.l(r:p1rdt5170-p1rdt7658) Units=km Length=0.0190118 bus1=p1rdt7658.3 bus2=p1rdt5170.3 switch=n enabled=y phases=1 Linecode=1P_OH_AL_ACSR_#2_Sparrow_12_47_0_1_1_1_1_1_1_1_1_1_1_1_1_1_1_1_1_1_1_1_1_1_1_1_1_1_1_1_1_1

New Line.l(r:p1rdt7235-p1rdt7658) Units=km Length=0.42104700000000006 bus1=p1rdt7235.3 bus2=p1rdt7658.3 switch=n enabled=y phases=1 Linecode=1P_OH_AL_ACSR_#2_Sparrow_12_47_0_1_1_1_1_1_1_1_1_1_1_1_1_1_1_1_1_1_1_1_1_1_1_1_1_1_1_1_1_1

New Line.l(r:p1rdt5631-p1rdt7235) Units=km Length=0.774605 bus1=p1rdt5631-p1rdt7235x.3 bus2=p1rdt7235.3 switch=n enabled=y phases=1 Linecode=1P_OH_AL_ACSR_#2_Sparrow_12_47_0_1_1_1_1_1_1_1_1_1_1_1_1_1_1_1_1_1_1_1_1_1_1_1_1_1_1_1_1_1

New Line.l(r:p1rdt1709-p1rdt912) Units=km Length=0.001 bus1=p1rdt1709-p1rdt912x.1 bus2=p1rdt1709.1 switch=n enabled=y phases=1 Linecode=1P_OH_AL_ACSR_#2_Sparrow_12_47_0_1_1_1_1_1_1_1_1_1_1_1_1_1_1_1_1_1_1_1_1_1_1_1_1_1_1_1_1_1

New Line.l(r:p1rdt513-p1rdt646) Units=km Length=0.143473 bus1=p1rdt513-p1rdt646x.2 bus2=p1rdt646.2 switch=n enabled=y phases=1 Linecode=1P_OH_AL_ACSR_#2_Sparrow_12_47_0_1_1_1_1_1_1_1_1_1_1_1_1_1_1_1_1_1_1_1_1_1_1_1_1_1_1_1_1_1

New Line.l(r:p1rdt3294-p1rdt4537) Units=km Length=0.116172 bus1=p1rdt4537.1 bus2=p1rdt3294.1 switch=n enabled=y phases=1 Linecode=1P_OH_AL_ACSR_#2_Sparrow_12_47_0_1_1_1_1_1_1_1_1_1_1_1_1_1_1_1_1_1_1_1_1_1_1_1_1_1_1_1_1_1

New Line.l(r:p1rdt3102-p1rdt4537) Units=km Length=0.0388331 bus1=p1rdt3102.1 bus2=p1rdt4537.1 switch=n enabled=y phases=1 Linecode=1P_OH_AL_ACSR_#2_Sparrow_12_47_0_1_1_1_1_1_1_1_1_1_1_1_1_1_1_1_1_1_1_1_1_1_1_1_1_1_1_1_1_1

New Line.l(r:p1rdt3102-p1rdt8348) Units=km Length=0.124972 bus1=p1rdt8348.1 bus2=p1rdt3102.1 switch=n enabled=y phases=1 Linecode=1P_OH_AL_ACSR_#2_Sparrow_12_47_0_1_1_1_1_1_1_1_1_1_1_1_1_1_1_1_1_1_1_1_1_1_1_1_1_1_1_1_1_1

New Line.l(r:p1rdt4989-p1rdt8348) Units=km Length=0.0629447 bus1=p1rdt8348.1 bus2=p1rdt4989.1 switch=n enabled=y phases=1 Linecode=1P_OH_AL_ACSR_#2_Sparrow_12_47_0_1_1_1_1_1_1_1_1_1_1_1_1_1_1_1_1_1_1_1_1_1_1_1_1_1_1_1_1_1

New Line.l(r:p1rdt7365-p1rdt8348) Units=km Length=0.139078 bus1=p1rdt8348.1 bus2=p1rdt7365.1 switch=n enabled=y phases=1 Linecode=1P_OH_AL_ACSR_#2_Sparrow_12_47_0_1_1_1_1_1_1_1_1_1_1_1_1_1_1_1_1_1_1_1_1_1_1_1_1_1_1_1_1_1

New Line.l(r:p1rdt4466-p1rdt8348) Units=km Length=0.092796 bus1=p1rdt4466.1 bus2=p1rdt8348.1 switch=n enabled=y phases=1 Linecode=1P_OH_AL_ACSR_#2_Sparrow_12_47_0_1_1_1_1_1_1_1_1_1_1_1_1_1_1_1_1_1_1_1_1_1_1_1_1_1_1_1_1_1

New Line.l(r:p1rdt4466-p1rdt513) Units=km Length=0.074235 bus1=p1rdt4466-p1rdt513x.1 bus2=p1rdt4466.1 switch=n enabled=y phases=1 Linecode=1P_OH_AL_ACSR_#2_Sparrow_12_47_0_1_1_1_1_1_1_1_1_1_1_1_1_1_1_1_1_1_1_1_1_1_1_1_1_1_1_1_1_1

New Line.l(r:p1rdt5242-p1rdt7835) Units=km Length=0.139524 bus1=p1rdt7835.3 bus2=p1rdt5242.3 switch=n enabled=y phases=1 Linecode=1P_OH_AL_ACSR_#2_Sparrow_12_47_0_1_1_1_1_1_1_1_1_1_1_1_1_1_1_1_1_1_1_1_1_1_1_1_1_1_1_1_1_1

New Line.l(r:p1rdt5401-p1rdt7835) Units=km Length=0.0508342 bus1=p1rdt7835.3 bus2=p1rdt5401.3 switch=n enabled=y phases=1 Linecode=1P_OH_AL_ACSR_#2_Sparrow_12_47_0_1_1_1_1_1_1_1_1_1_1_1_1_1_1_1_1_1_1_1_1_1_1_1_1_1_1_1_1_1

New Line.l(r:p1rdt513-p1rdt7835)_s0 Units=km Length=0.118418 bus1=p1rdt513-p1rdt7835x.3 bus2=p1rdt513-p1rdt7835xx.3 switch=n enabled=y phases=1 Linecode=1P_OH_AL_ACSR_#2_Sparrow_12_47_0_1_1_1_1_1_1_1_1_1_1_1_1_1_1_1_1_1_1_1_1_1_1_1_1_1_1_1_1_1

New Line.l(r:p1rdt513-p1rdt7835)_s1 Units=km Length=0.0151037 bus1=p1rdt513-p1rdt7835xx.3 bus2=p1rdt7835.3 switch=n enabled=y phases=1 Linecode=1P_OH_AL_ACSR_#2_Sparrow_12_47_0_1_1_1_1_1_1_1_1_1_1_1_1_1_1_1_1_1_1_1_1_1_1_1_1_1_1_1_1_1

New Line.l(r:p1rdt3104-p1rdt7706) Units=km Length=0.173967 bus1=p1rdt3104-p1rdt7706x.2 bus2=p1rdt7706.2 switch=n enabled=y phases=1 Linecode=1P_OH_AL_ACSR_#2_Sparrow_12_47_0_1_1_1_1_1_1_1_1_1_1_1_1_1_1_1_1_1_1_1_1_1_1_1_1_1_1_1_1_1

New Line.l(r:p1rdt2063-p1rdt792)_s0 Units=km Length=0.329479 bus1=p1rdt2063-p1rdt792x.2 bus2=p1rdt2063-p1rdt792xx.2 switch=n enabled=y phases=1 Linecode=1P_OH_AL_ACSR_#2_Sparrow_12_47_0_1_1_1_1_1_1_1_1_1_1_1_1_1_1_1_1_1_1_1_1_1_1_1_1_1_1_1_1_1

New Line.l(r:p1rdt2063-p1rdt792)_s1 Units=km Length=0.147584 bus1=p1rdt2063-p1rdt792xx.2 bus2=p1rdt792.2 switch=n enabled=y phases=1 Linecode=1P_OH_AL_ACSR_#2_Sparrow_12_47_0_1_1_1_1_1_1_1_1_1_1_1_1_1_1_1_1_1_1_1_1_1_1_1_1_1_1_1_1_1

New Line.l(r:p1rdt4614-p1rdt6514)_s0 Units=km Length=0.389059 bus1=p1rdt4614-p1rdt6514x.3 bus2=p1rdt4614-p1rdt6514xx.3 switch=n enabled=y phases=1 Linecode=1P_OH_AL_ACSR_#2_Sparrow_12_47_0_1_1_1_1_1_1_1_1_1_1_1_1_1_1_1_1_1_1_1_1_1_1_1_1_1_1_1_1_1

New Line.l(r:p1rdt4614-p1rdt6514)_s1 Units=km Length=0.3507120000000001 bus1=p1rdt4614-p1rdt6514xx.3 bus2=p1rdt4614-p1rdt6514xxx.3 switch=n enabled=y phases=1 Linecode=1P_OH_AL_ACSR_#2_Sparrow_12_47_0_1_1_1_1_1_1_1_1_1_1_1_1_1_1_1_1_1_1_1_1_1_1_1_1_1_1_1_1_1

New Line.l(r:p1rdt4614-p1rdt6514)_s2 Units=km Length=0.119333 bus1=p1rdt4614-p1rdt6514xxx.3 bus2=p1rdt6514.3 switch=n enabled=y phases=1 Linecode=1P_OH_AL_ACSR_#2_Sparrow_12_47_0_1_1_1_1_1_1_1_1_1_1_1_1_1_1_1_1_1_1_1_1_1_1_1_1_1_1_1_1_1

New Line.l(r:p1rdt1823-p1rdt7603) Units=km Length=0.18514800000000003 bus1=p1rdt1823-p1rdt7603x.2 bus2=p1rdt1823-p1rdt7603x_b1_1.2 switch=n enabled=y phases=1 Linecode=1P_OH_AL_ACSR_#2_Sparrow_12_47_0_1_1_1_1_1_1_1_1_1_1_1_1_1_1_1_1_1_1_1_1_1_1_1_1_1_1_1_1_1

New Line.l(r:p1rdt1593-p1rdt3873)_s0 Units=km Length=0.825919 bus1=p1rdt3873.1 bus2=p1rdt1593-p1rdt3873xx.1 switch=n enabled=y phases=1 Linecode=1P_OH_AL_ACSR_#2_Sparrow_12_47_0_1_1_1_1_1_1_1_1_1_1_1_1_1_1_1_1_1_1_1_1_1_1_1_1_1_1_1_1_1

New Line.l(r:p1rdt1593-p1rdt3873)_s1 Units=km Length=1.23195 bus1=p1rdt1593-p1rdt3873xx.1 bus2=p1rdt1593-p1rdt3873x.1 switch=n enabled=y phases=1 Linecode=1P_OH_AL_ACSR_#2_Sparrow_12_47_0_1_1_1_1_1_1_1_1_1_1_1_1_1_1_1_1_1_1_1_1_1_1_1_1_1_1_1_1_1

New Line.l(r:p1rdt1593-p1rdt3873)_s2 Units=km Length=0.179083 bus1=p1rdt1593-p1rdt3873x.1 bus2=p1rdt1593.1 switch=n enabled=y phases=1 Linecode=1P_OH_AL_ACSR_#2_Sparrow_12_47_0_1_1_1_1_1_1_1_1_1_1_1_1_1_1_1_1_1_1_1_1_1_1_1_1_1_1_1_1_1

New Line.l(r:p1rdt1824-p1rdt2061) Units=km Length=0.206905 bus1=p1rdt1824.1 bus2=p1rdt2061.1 switch=n enabled=y phases=1 Linecode=1P_OH_AL_ACSR_#2_Sparrow_12_47_0_1_1_1_1_1_1_1_1_1_1_1_1_1_1_1_1_1_1_1_1_1_1_1_1_1_1_1_1_1

New Line.l(r:p1rdt1824-p1rdt3873)_s0 Units=km Length=1.19485 bus1=p1rdt3873.1 bus2=p1rdt1824-p1rdt3873xx.1 switch=n enabled=y phases=1 Linecode=1P_OH_AL_ACSR_#2_Sparrow_12_47_0_1_1_1_1_1_1_1_1_1_1_1_1_1_1_1_1_1_1_1_1_1_1_1_1_1_1_1_1_1

New Line.l(r:p1rdt1824-p1rdt3873)_s1 Units=km Length=1.08105 bus1=p1rdt1824-p1rdt3873xx.1 bus2=p1rdt1824-p1rdt3873x.1 switch=n enabled=y phases=1 Linecode=1P_OH_AL_ACSR_#2_Sparrow_12_47_0_1_1_1_1_1_1_1_1_1_1_1_1_1_1_1_1_1_1_1_1_1_1_1_1_1_1_1_1_1

New Line.l(r:p1rdt1824-p1rdt3873)_s2 Units=km Length=0.128658 bus1=p1rdt1824-p1rdt3873x.1 bus2=p1rdt1824.1 switch=n enabled=y phases=1 Linecode=1P_OH_AL_ACSR_#2_Sparrow_12_47_0_1_1_1_1_1_1_1_1_1_1_1_1_1_1_1_1_1_1_1_1_1_1_1_1_1_1_1_1_1

New Line.l(r:p1rdt3873-p1rdt4924) Units=km Length=0.146564 bus1=p1rdt4924.1 bus2=p1rdt3873.1 switch=n enabled=y phases=1 Linecode=1P_OH_AL_ACSR_#2_Sparrow_12_47_0_1_1_1_1_1_1_1_1_1_1_1_1_1_1_1_1_1_1_1_1_1_1_1_1_1_1_1_1_1

New Line.l(r:p1rdt4924-p1rdt7603) Units=km Length=0.27832 bus1=p1rdt4924-p1rdt7603x.1 bus2=p1rdt4924.1 switch=n enabled=y phases=1 Linecode=1P_OH_AL_ACSR_#2_Sparrow_12_47_0_1_1_1_1_1_1_1_1_1_1_1_1_1_1_1_1_1_1_1_1_1_1_1_1_1_1_1_1_1

New Line.l(r:p1rdt2391-p1rdt3575) Units=km Length=0.751893 bus1=p1rdt3575.3 bus2=p1rdt2391.3 switch=n enabled=y phases=1 Linecode=1P_OH_AL_ACSR_#2_Sparrow_12_47_0_1_1_1_1_1_1_1_1_1_1_1_1_1_1_1_1_1_1_1_1_1_1_1_1_1_1_1_1_1

New Line.l(r:p1rdt1-p1rdt3575) Units=km Length=0.09859750000000002 bus1=p1rdt1.3 bus2=p1rdt3575.3 switch=n enabled=y phases=1 Linecode=1P_OH_AL_ACSR_#2_Sparrow_12_47_0_1_1_1_1_1_1_1_1_1_1_1_1_1_1_1_1_1_1_1_1_1_1_1_1_1_1_1_1_1

New Line.l(r:p1rdt1-p1rdt4705)_s0 Units=km Length=0.991988 bus1=p1rdt4705.3 bus2=p1rdt1-p1rdt4705x.3 switch=n enabled=y phases=1 Linecode=1P_OH_AL_ACSR_#2_Sparrow_12_47_0_1_1_1_1_1_1_1_1_1_1_1_1_1_1_1_1_1_1_1_1_1_1_1_1_1_1_1_1_1

New Line.l(r:p1rdt1-p1rdt4705)_s1 Units=km Length=1.1574900000000001 bus1=p1rdt1-p1rdt4705x.3 bus2=p1rdt1.3 switch=n enabled=y phases=1 Linecode=1P_OH_AL_ACSR_#2_Sparrow_12_47_0_1_1_1_1_1_1_1_1_1_1_1_1_1_1_1_1_1_1_1_1_1_1_1_1_1_1_1_1_1

New Line.l(r:p1rdt260-p1rdt4705) Units=km Length=0.0937272 bus1=p1rdt4705.3 bus2=p1rdt260.3 switch=n enabled=y phases=1 Linecode=1P_OH_AL_ACSR_#2_Sparrow_12_47_0_1_1_1_1_1_1_1_1_1_1_1_1_1_1_1_1_1_1_1_1_1_1_1_1_1_1_1_1_1

New Line.l(r:p1rdt4705-p1rdt5325) Units=km Length=1.3316800000000002 bus1=p1rdt4705-p1rdt5325x.3 bus2=p1rdt4705.3 switch=n enabled=y phases=1 Linecode=1P_OH_AL_ACSR_#2_Sparrow_12_47_0_1_1_1_1_1_1_1_1_1_1_1_1_1_1_1_1_1_1_1_1_1_1_1_1_1_1_1_1_1

New Line.l(r:p1rdt1147-p1rdt797) Units=km Length=0.0819746 bus1=p1rdt797.1 bus2=p1rdt1147.1 switch=n enabled=y phases=1 Linecode=1P_OH_AL_ACSR_#2_Sparrow_12_47_0_1_1_1_1_1_1_1_1_1_1_1_1_1_1_1_1_1_1_1_1_1_1_1_1_1_1_1_1_1

New Line.l(r:p1rdt7171-p1rdt797) Units=km Length=0.103699 bus1=p1rdt7171.1 bus2=p1rdt797.1 switch=n enabled=y phases=1 Linecode=1P_OH_AL_ACSR_#2_Sparrow_12_47_0_1_1_1_1_1_1_1_1_1_1_1_1_1_1_1_1_1_1_1_1_1_1_1_1_1_1_1_1_1

New Line.l(r:p1rdt7171-p1rdt7767)_s0 Units=km Length=0.190233 bus1=p1rdt7767.1 bus2=p1rdt7171-p1rdt7767x.1 switch=n enabled=y phases=1 Linecode=1P_OH_AL_ACSR_#2_Sparrow_12_47_0_1_1_1_1_1_1_1_1_1_1_1_1_1_1_1_1_1_1_1_1_1_1_1_1_1_1_1_1_1

New Line.l(r:p1rdt7171-p1rdt7767)_s1 Units=km Length=0.271075 bus1=p1rdt7171-p1rdt7767x.1 bus2=p1rdt7171.1 switch=n enabled=y phases=1 Linecode=1P_OH_AL_ACSR_#2_Sparrow_12_47_0_1_1_1_1_1_1_1_1_1_1_1_1_1_1_1_1_1_1_1_1_1_1_1_1_1_1_1_1_1

New Line.l(r:p1rdt6119-p1rdt7767) Units=km Length=0.0894943 bus1=p1rdt6119-p1rdt7767x.1 bus2=p1rdt7767.1 switch=n enabled=y phases=1 Linecode=1P_OH_AL_ACSR_#2_Sparrow_12_47_0_1_1_1_1_1_1_1_1_1_1_1_1_1_1_1_1_1_1_1_1_1_1_1_1_1_1_1_1_1

New Line.l(r:p1rdt1708-p1rdt6517) Units=km Length=0.0949351 bus1=p1rdt6517.1.2.3 bus2=p1rdt1708.1.2.3 switch=n enabled=y phases=3 Linecode=3P_OH_AL_ACSR_4/0_Penguin_12_47_0_3_3_3_3_3_3_3_3_3_3_3_3_3_3_3_3_3_3_3_3_3_3_3_3_3_3_3_3_3

New Line.l(r:p1rdt4376-p1rdt6517)_s0 Units=km Length=0.221154 bus1=p1rdt6517.1.2.3 bus2=p1rdt4376-p1rdt6517x.1.2.3 switch=n enabled=y phases=3 Linecode=3P_OH_AL_ACSR_4/0_Penguin_12_47_0_3_3_3_3_3_3_3_3_3_3_3_3_3_3_3_3_3_3_3_3_3_3_3_3_3_3_3_3_3

New Line.l(r:p1rdt4376-p1rdt6517)_s1 Units=km Length=0.140593 bus1=p1rdt4376-p1rdt6517x.1.2.3 bus2=p1rdt4376.1.2.3 switch=n enabled=y phases=3 Linecode=3P_OH_AL_ACSR_4/0_Penguin_12_47_0_3_3_3_3_3_3_3_3_3_3_3_3_3_3_3_3_3_3_3_3_3_3_3_3_3_3_3_3_3

New Line.l(r:p1rdt2395-p1rdt6517)_s0 Units=km Length=0.0690407 bus1=p1rdt2395.1.2.3 bus2=p1rdt2395-p1rdt6517x.1.2.3 switch=n enabled=y phases=3 Linecode=3P_OH_AL_ACSR_4/0_Penguin_12_47_0_3_3_3_3_3_3_3_3_3_3_3_3_3_3_3_3_3_3_3_3_3_3_3_3_3_3_3_3_3

New Line.l(r:p1rdt2395-p1rdt6517)_s1 Units=km Length=0.192814 bus1=p1rdt2395-p1rdt6517x.1.2.3 bus2=p1rdt6517.1.2.3 switch=n enabled=y phases=3 Linecode=3P_OH_AL_ACSR_4/0_Penguin_12_47_0_3_3_3_3_3_3_3_3_3_3_3_3_3_3_3_3_3_3_3_3_3_3_3_3_3_3_3_3_3

New Line.l(r:p1rdt2395-p1rdt3295) Units=km Length=0.0558371 bus1=p1rdt3295.1.2.3 bus2=p1rdt2395.1.2.3 switch=n enabled=y phases=3 Linecode=3P_OH_AL_ACSR_4/0_Penguin_12_47_0_3_3_3_3_3_3_3_3_3_3_3_3_3_3_3_3_3_3_3_3_3_3_3_3_3_3_3_3_3

New Line.l(r:p1rdt1710-p1rdt3295) Units=km Length=0.238736 bus1=p1rdt1710.1.2.3 bus2=p1rdt3295.1.2.3 switch=n enabled=y phases=3 Linecode=3P_OH_AL_ACSR_4/0_Penguin_12_47_0_3_3_3_3_3_3_3_3_3_3_3_3_3_3_3_3_3_3_3_3_3_3_3_3_3_3_3_3_3

New Line.l(r:p1rdt1260-p1rdt1710)_s0 Units=km Length=0.117944 bus1=p1rdt1260.1.2.3 bus2=p1rdt1260-p1rdt1710x.1.2.3 switch=n enabled=y phases=3 Linecode=3P_OH_AL_ACSR_4/0_Penguin_12_47_0_3_3_3_3_3_3_3_3_3_3_3_3_3_3_3_3_3_3_3_3_3_3_3_3_3_3_3_3_3

New Line.l(r:p1rdt1260-p1rdt1710)_s1 Units=km Length=0.0399411 bus1=p1rdt1260-p1rdt1710x.1.2.3 bus2=p1rdt1710.1.2.3 switch=n enabled=y phases=3 Linecode=3P_OH_AL_ACSR_4/0_Penguin_12_47_0_3_3_3_3_3_3_3_3_3_3_3_3_3_3_3_3_3_3_3_3_3_3_3_3_3_3_3_3_3

New Line.l(r:p1rdt1260-p1rdt5) Units=km Length=0.0540814 bus1=p1rdt5.1.2.3 bus2=p1rdt1260.1.2.3 switch=n enabled=y phases=3 Linecode=3P_OH_AL_ACSR_4/0_Penguin_12_47_0_3_3_3_3_3_3_3_3_3_3_3_3_3_3_3_3_3_3_3_3_3_3_3_3_3_3_3_3_3

New Line.l(r:p1rdt2498-p1rdt5) Units=km Length=0.0377913 bus1=p1rdt2498.1.2.3 bus2=p1rdt5.1.2.3 switch=n enabled=y phases=3 Linecode=3P_OH_AL_ACSR_4/0_Penguin_12_47_0_3_3_3_3_3_3_3_3_3_3_3_3_3_3_3_3_3_3_3_3_3_3_3_3_3_3_3_3_3

New Line.l(r:p1rdt2278-p1rdt2498) Units=km Length=0.0964838 bus1=p1rdt2278.1.2.3 bus2=p1rdt2498.1.2.3 switch=n enabled=y phases=3 Linecode=3P_OH_AL_ACSR_4/0_Penguin_12_47_0_3_3_3_3_3_3_3_3_3_3_3_3_3_3_3_3_3_3_3_3_3_3_3_3_3_3_3_3_3

New Line.l(r:p1rdt4142-p1rdt6630) Units=km Length=0.14454600000000004 bus1=p1rdt4142.1.2.3 bus2=p1rdt6630.1.2.3 switch=n enabled=y phases=3 Linecode=3P_OH_AL_ACSR_4/0_Penguin_12_47_0_3_3_3_3_3_3_3_3_3_3_3_3_3_3_3_3_3_3_3_3_3_3_3_3_3_3_3_3_3

New Line.l(r:p1rdt4142-p1rdt7705) Units=km Length=0.105832 bus1=p1rdt7705.1.2.3 bus2=p1rdt4142.1.2.3 switch=n enabled=y phases=3 Linecode=3P_OH_AL_ACSR_4/0_Penguin_12_47_0_3_3_3_3_3_3_3_3_3_3_3_3_3_3_3_3_3_3_3_3_3_3_3_3_3_3_3_3_3

New Line.l(r:p1rdt7705-p1rdt7834) Units=km Length=0.383321 bus1=p1rdt7834.1.2.3 bus2=p1rdt7705.1.2.3 switch=n enabled=y phases=3 Linecode=3P_OH_AL_ACSR_4/0_Penguin_12_47_0_3_3_3_3_3_3_3_3_3_3_3_3_3_3_3_3_3_3_3_3_3_3_3_3_3_3_3_3_3

New Line.l(r:p1rdt1825-p1rdt7834)_s0 Units=km Length=0.271791 bus1=p1rdt1825.1.2.3 bus2=p1rdt1825-p1rdt7834x.1.2.3 switch=n enabled=y phases=3 Linecode=3P_OH_AL_ACSR_4/0_Penguin_12_47_0_3_3_3_3_3_3_3_3_3_3_3_3_3_3_3_3_3_3_3_3_3_3_3_3_3_3_3_3_3

New Line.l(r:p1rdt1825-p1rdt7834)_s1 Units=km Length=0.940905 bus1=p1rdt1825-p1rdt7834x.1.2.3 bus2=p1rdt7834.1.2.3 switch=n enabled=y phases=3 Linecode=3P_OH_AL_ACSR_4/0_Penguin_12_47_0_3_3_3_3_3_3_3_3_3_3_3_3_3_3_3_3_3_3_3_3_3_3_3_3_3_3_3_3_3

New Line.l(r:p1rdt1825-p1rdt2889)_s0 Units=km Length=0.200402 bus1=p1rdt2889.1.2.3 bus2=p1rdt1825-p1rdt2889x.1.2.3 switch=n enabled=y phases=3 Linecode=3P_OH_AL_ACSR_4/0_Penguin_12_47_0_3_3_3_3_3_3_3_3_3_3_3_3_3_3_3_3_3_3_3_3_3_3_3_3_3_3_3_3_3

New Line.l(r:p1rdt1825-p1rdt2889)_s1 Units=km Length=0.167852 bus1=p1rdt1825-p1rdt2889x.1.2.3 bus2=p1rdt1825.1.2.3 switch=n enabled=y phases=3 Linecode=3P_OH_AL_ACSR_4/0_Penguin_12_47_0_3_3_3_3_3_3_3_3_3_3_3_3_3_3_3_3_3_3_3_3_3_3_3_3_3_3_3_3_3

New Line.l(r:p1rdt2889-p1rdt7422)_s0 Units=km Length=0.23121000000000003 bus1=p1rdt7422.1.2.3 bus2=p1rdt2889-p1rdt7422x.1.2.3 switch=n enabled=y phases=3 Linecode=3P_OH_AL_ACSR_4/0_Penguin_12_47_0_3_3_3_3_3_3_3_3_3_3_3_3_3_3_3_3_3_3_3_3_3_3_3_3_3_3_3_3_3

New Line.l(r:p1rdt2889-p1rdt7422)_s1 Units=km Length=1.8529300000000002 bus1=p1rdt2889-p1rdt7422x.1.2.3 bus2=p1rdt2889.1.2.3 switch=n enabled=y phases=3 Linecode=3P_OH_AL_ACSR_4/0_Penguin_12_47_0_3_3_3_3_3_3_3_3_3_3_3_3_3_3_3_3_3_3_3_3_3_3_3_3_3_3_3_3_3

New Line.l(r:p1rdt512-p1rdt5631) Units=km Length=0.7720350000000001 bus1=p1rdt5631.1.2.3 bus2=p1rdt512.1.2.3 switch=n enabled=y phases=3 Linecode=3P_OH_AL_ACSR_4/0_Penguin_12_47_0_3_3_3_3_3_3_3_3_3_3_3_3_3_3_3_3_3_3_3_3_3_3_3_3_3_3_3_3_3

New Line.l(r:p1rdt5631-p1rdt7422)_s0 Units=km Length=0.112565 bus1=p1rdt7422.1.2.3 bus2=p1rdt5631-p1rdt7422x.1.2.3 switch=n enabled=y phases=3 Linecode=3P_OH_AL_ACSR_4/0_Penguin_12_47_0_3_3_3_3_3_3_3_3_3_3_3_3_3_3_3_3_3_3_3_3_3_3_3_3_3_3_3_3_3

New Line.l(r:p1rdt5631-p1rdt7422)_s1 Units=km Length=0.681216 bus1=p1rdt5631-p1rdt7422x.1.2.3 bus2=p1rdt5631.1.2.3 switch=n enabled=y phases=3 Linecode=3P_OH_AL_ACSR_4/0_Penguin_12_47_0_3_3_3_3_3_3_3_3_3_3_3_3_3_3_3_3_3_3_3_3_3_3_3_3_3_3_3_3_3

New Line.l(r:p1rdt1597-p1rdt7422) Units=km Length=0.4844300000000001 bus1=p1rdt1597.1.2.3 bus2=p1rdt1597_b1_1.1.2.3 switch=n enabled=y phases=3 Linecode=3P_OH_AL_ACSR_4/0_Penguin_12_47_0_3_3_3_3_3_3_3_3_3_3_3_3_3_3_3_3_3_3_3_3_3_3_3_3_3_3_3_3_3

New Line.l(r:p1rdt1597-p1rdt912)_s0 Units=km Length=0.0749278 bus1=p1rdt912.1.2.3 bus2=p1rdt1597-p1rdt912x.1.2.3 switch=n enabled=y phases=3 Linecode=3P_OH_AL_ACSR_4/0_Penguin_12_47_0_3_3_3_3_3_3_3_3_3_3_3_3_3_3_3_3_3_3_3_3_3_3_3_3_3_3_3_3_3

New Line.l(r:p1rdt1597-p1rdt912)_s1 Units=km Length=0.0178839 bus1=p1rdt1597-p1rdt912x.1.2.3 bus2=p1rdt1597.1.2.3 switch=n enabled=y phases=3 Linecode=3P_OH_AL_ACSR_4/0_Penguin_12_47_0_3_3_3_3_3_3_3_3_3_3_3_3_3_3_3_3_3_3_3_3_3_3_3_3_3_3_3_3_3

New Line.l(r:p1rdt4616-p1rdt912) Units=km Length=0.0506586 bus1=p1rdt4616.1.2.3 bus2=p1rdt912.1.2.3 switch=n enabled=y phases=3 Linecode=3P_OH_AL_ACSR_4/0_Penguin_12_47_0_3_3_3_3_3_3_3_3_3_3_3_3_3_3_3_3_3_3_3_3_3_3_3_3_3_3_3_3_3

New Line.l(r:p1rdt4616-p1rdt6452) Units=km Length=0.059726 bus1=p1rdt6452.1.2.3 bus2=p1rdt4616.1.2.3 switch=n enabled=y phases=3 Linecode=3P_OH_AL_ACSR_4/0_Penguin_12_47_0_3_3_3_3_3_3_3_3_3_3_3_3_3_3_3_3_3_3_3_3_3_3_3_3_3_3_3_3_3

New Line.l(r:p1rdt386-p1rdt6452) Units=km Length=0.20843300000000003 bus1=p1rdt386.1.2.3 bus2=p1rdt6452.1.2.3 switch=n enabled=y phases=3 Linecode=3P_OH_AL_ACSR_4/0_Penguin_12_47_0_3_3_3_3_3_3_3_3_3_3_3_3_3_3_3_3_3_3_3_3_3_3_3_3_3_3_3_3_3

New Line.l(r:p1rdt386-p1rdt4928) Units=km Length=0.0384101 bus1=p1rdt4928.1.2.3 bus2=p1rdt386.1.2.3 switch=n enabled=y phases=3 Linecode=3P_OH_AL_ACSR_4/0_Penguin_12_47_0_3_3_3_3_3_3_3_3_3_3_3_3_3_3_3_3_3_3_3_3_3_3_3_3_3_3_3_3_3

New Line.l(r:p1rdt3104-p1rdt513) Units=km Length=0.155866 bus1=p1rdt3104.1.2.3 bus2=p1rdt513.1.2.3 switch=n enabled=y phases=3 Linecode=3P_OH_AL_ACSR_4/0_Penguin_12_47_0_3_3_3_3_3_3_3_3_3_3_3_3_3_3_3_3_3_3_3_3_3_3_3_3_3_3_3_3_3

New Line.l(r:p1rdt2590-p1rdt3104) Units=km Length=0.0395877 bus1=p1rdt2590.1.2.3 bus2=p1rdt3104.1.2.3 switch=n enabled=y phases=3 Linecode=3P_OH_AL_ACSR_4/0_Penguin_12_47_0_3_3_3_3_3_3_3_3_3_3_3_3_3_3_3_3_3_3_3_3_3_3_3_3_3_3_3_3_3

New Line.l(r:p1rdt2590-p1rdt7423) Units=km Length=0.0395877 bus1=p1rdt7423.1.2.3 bus2=p1rdt2590.1.2.3 switch=n enabled=y phases=3 Linecode=3P_OH_AL_ACSR_4/0_Penguin_12_47_0_3_3_3_3_3_3_3_3_3_3_3_3_3_3_3_3_3_3_3_3_3_3_3_3_3_3_3_3_3

New Line.l(r:p1rdt4614-p1rdt7603)_s0 Units=km Length=0.07439090000000001 bus1=p1rdt4614.1.2.3 bus2=p1rdt4614-p1rdt7603x.1.2.3 switch=n enabled=y phases=3 Linecode=3P_OH_AL_ACSR_4/0_Penguin_12_47_0_3_3_3_3_3_3_3_3_3_3_3_3_3_3_3_3_3_3_3_3_3_3_3_3_3_3_3_3_3

New Line.l(r:p1rdt4614-p1rdt7603)_s1 Units=km Length=0.75821 bus1=p1rdt4614-p1rdt7603x.1.2.3 bus2=p1rdt4614-p1rdt7603xx.1.2.3 switch=n enabled=y phases=3 Linecode=3P_OH_AL_ACSR_4/0_Penguin_12_47_0_3_3_3_3_3_3_3_3_3_3_3_3_3_3_3_3_3_3_3_3_3_3_3_3_3_3_3_3_3

New Line.l(r:p1rdt4614-p1rdt7603)_s2 Units=km Length=0.203496 bus1=p1rdt4614-p1rdt7603xx.1.2.3 bus2=p1rdt7603.1.2.3 switch=n enabled=y phases=3 Linecode=3P_OH_AL_ACSR_4/0_Penguin_12_47_0_3_3_3_3_3_3_3_3_3_3_3_3_3_3_3_3_3_3_3_3_3_3_3_3_3_3_3_3_3

New Line.l(r:p1rdt4614-p1rdt5325)_s0 Units=km Length=0.17446 bus1=p1rdt5325.1.2.3 bus2=p1rdt4614-p1rdt5325x.1.2.3 switch=n enabled=y phases=3 Linecode=3P_OH_AL_ACSR_4/0_Penguin_12_47_0_3_3_3_3_3_3_3_3_3_3_3_3_3_3_3_3_3_3_3_3_3_3_3_3_3_3_3_3_3

New Line.l(r:p1rdt4614-p1rdt5325)_s1 Units=km Length=2.0969500000000005 bus1=p1rdt4614-p1rdt5325x.1.2.3 bus2=p1rdt4614.1.2.3 switch=n enabled=y phases=3 Linecode=3P_OH_AL_ACSR_4/0_Penguin_12_47_0_3_3_3_3_3_3_3_3_3_3_3_3_3_3_3_3_3_3_3_3_3_3_3_3_3_3_3_3_3

New Line.l(r:p1rdt3209-p1rdt5325) Units=km Length=0.807122 bus1=p1rdt3209.1.2.3 bus2=p1rdt5325.1.2.3 switch=n enabled=y phases=3 Linecode=3P_OH_AL_ACSR_4/0_Penguin_12_47_0_3_3_3_3_3_3_3_3_3_3_3_3_3_3_3_3_3_3_3_3_3_3_3_3_3_3_3_3_3

New Line.l(r:p1rdt3209-p1rdt4464) Units=km Length=0.193597 bus1=p1rdt4464.1.2.3 bus2=p1rdt3209.1.2.3 switch=n enabled=y phases=3 Linecode=3P_OH_AL_ACSR_4/0_Penguin_12_47_0_3_3_3_3_3_3_3_3_3_3_3_3_3_3_3_3_3_3_3_3_3_3_3_3_3_3_3_3_3

New Line.l(r:p1rdt2180-p1rdt4464)_s0 Units=km Length=0.133931 bus1=p1rdt2180.1.2.3 bus2=p1rdt2180-p1rdt4464x.1.2.3 switch=n enabled=y phases=3 Linecode=3P_OH_AL_ACSR_4/0_Penguin_12_47_0_3_3_3_3_3_3_3_3_3_3_3_3_3_3_3_3_3_3_3_3_3_3_3_3_3_3_3_3_3

New Line.l(r:p1rdt2180-p1rdt4464)_s1 Units=km Length=0.220077 bus1=p1rdt2180-p1rdt4464x.1.2.3 bus2=p1rdt4464.1.2.3 switch=n enabled=y phases=3 Linecode=3P_OH_AL_ACSR_4/0_Penguin_12_47_0_3_3_3_3_3_3_3_3_3_3_3_3_3_3_3_3_3_3_3_3_3_3_3_3_3_3_3_3_3

New Line.l(r:p1rdt2180-p1rdt6115) Units=km Length=0.15574600000000002 bus1=p1rdt6115.1.2.3 bus2=p1rdt2180.1.2.3 switch=n enabled=y phases=3 Linecode=3P_OH_AL_ACSR_4/0_Penguin_12_47_0_3_3_3_3_3_3_3_3_3_3_3_3_3_3_3_3_3_3_3_3_3_3_3_3_3_3_3_3_3

New Line.l(r:p1rdt2063-p1rdt6115)_s0 Units=km Length=0.286436 bus1=p1rdt2063.1.2.3 bus2=p1rdt2063-p1rdt6115x.1.2.3 switch=n enabled=y phases=3 Linecode=3P_OH_AL_ACSR_4/0_Penguin_12_47_0_3_3_3_3_3_3_3_3_3_3_3_3_3_3_3_3_3_3_3_3_3_3_3_3_3_3_3_3_3

New Line.l(r:p1rdt2063-p1rdt6115)_s1 Units=km Length=0.129916 bus1=p1rdt2063-p1rdt6115x.1.2.3 bus2=p1rdt6115.1.2.3 switch=n enabled=y phases=3 Linecode=3P_OH_AL_ACSR_4/0_Penguin_12_47_0_3_3_3_3_3_3_3_3_3_3_3_3_3_3_3_3_3_3_3_3_3_3_3_3_3_3_3_3_3

New Line.l(r:p1rdt2063-p1rdt4617) Units=km Length=0.266385 bus1=p1rdt4617.1.2.3 bus2=p1rdt2063.1.2.3 switch=n enabled=y phases=3 Linecode=3P_OH_AL_ACSR_4/0_Penguin_12_47_0_3_3_3_3_3_3_3_3_3_3_3_3_3_3_3_3_3_3_3_3_3_3_3_3_3_3_3_3_3

New Line.l(r:p1rdt4617-p1rdt8036) Units=km Length=0.17885000000000004 bus1=p1rdt8036.1.2.3 bus2=p1rdt4617.1.2.3 switch=n enabled=y phases=3 Linecode=3P_OH_AL_ACSR_4/0_Penguin_12_47_0_3_3_3_3_3_3_3_3_3_3_3_3_3_3_3_3_3_3_3_3_3_3_3_3_3_3_3_3_3

New Line.l(r:p1rdt4538-p1rdt8036) Units=km Length=0.167978 bus1=p1rdt4538.1.2.3 bus2=p1rdt8036.1.2.3 switch=n enabled=y phases=3 Linecode=3P_OH_AL_ACSR_4/0_Penguin_12_47_0_3_3_3_3_3_3_3_3_3_3_3_3_3_3_3_3_3_3_3_3_3_3_3_3_3_3_3_3_3

New Line.l(r:p1rdt4538-p1rdt7423)_s0 Units=km Length=0.255381 bus1=p1rdt7423.1.2.3 bus2=p1rdt4538-p1rdt7423x.1.2.3 switch=n enabled=y phases=3 Linecode=3P_OH_AL_ACSR_4/0_Penguin_12_47_0_3_3_3_3_3_3_3_3_3_3_3_3_3_3_3_3_3_3_3_3_3_3_3_3_3_3_3_3_3

New Line.l(r:p1rdt4538-p1rdt7423)_s1 Units=km Length=0.026729400000000004 bus1=p1rdt4538-p1rdt7423x.1.2.3 bus2=p1rdt4538.1.2.3 switch=n enabled=y phases=3 Linecode=3P_OH_AL_ACSR_4/0_Penguin_12_47_0_3_3_3_3_3_3_3_3_3_3_3_3_3_3_3_3_3_3_3_3_3_3_3_3_3_3_3_3_3

New Line.l(r:p1rdt5400-p1rdt7423) Units=km Length=0.0197885 bus1=p1rdt5400.1.2.3 bus2=p1rdt7423.1.2.3 switch=n enabled=y phases=3 Linecode=3P_OH_AL_ACSR_4/0_Penguin_12_47_0_3_3_3_3_3_3_3_3_3_3_3_3_3_3_3_3_3_3_3_3_3_3_3_3_3_3_3_3_3

New Line.l(r:p1rdt5400-p1rdt6574) Units=km Length=0.0381845 bus1=p1rdt6574.1.2.3 bus2=p1rdt5400.1.2.3 switch=n enabled=y phases=3 Linecode=3P_OH_AL_ACSR_4/0_Penguin_12_47_0_3_3_3_3_3_3_3_3_3_3_3_3_3_3_3_3_3_3_3_3_3_3_3_3_3_3_3_3_3

New Line.l(r:p1rdt3777-p1rdt6574) Units=km Length=0.0183906 bus1=p1rdt3777.1.2.3 bus2=p1rdt6574.1.2.3 switch=n enabled=y phases=3 Linecode=3P_OH_AL_ACSR_4/0_Penguin_12_47_0_3_3_3_3_3_3_3_3_3_3_3_3_3_3_3_3_3_3_3_3_3_3_3_3_3_3_3_3_3

New Line.l(r:p1rdt3777-p1rdt4928) Units=km Length=0.0710972 bus1=p1rdt4928.1.2.3 bus2=p1rdt3777.1.2.3 switch=n enabled=y phases=3 Linecode=3P_OH_AL_ACSR_4/0_Penguin_12_47_0_3_3_3_3_3_3_3_3_3_3_3_3_3_3_3_3_3_3_3_3_3_3_3_3_3_3_3_3_3

New Line.l(r:p1rdt4928-p1rdt5776) Units=km Length=0.10707700000000002 bus1=p1rdt5776.1.2.3 bus2=p1rdt4928.1.2.3 switch=n enabled=y phases=3 Linecode=3P_OH_AL_ACSR_4/0_Penguin_12_47_0_3_3_3_3_3_3_3_3_3_3_3_3_3_3_3_3_3_3_3_3_3_3_3_3_3_3_3_3_3

New Line.l(r:p1rdt2278-p1rdt5776) Units=km Length=0.13627 bus1=p1rdt2278.1.2.3 bus2=p1rdt5776.1.2.3 switch=n enabled=y phases=3 Linecode=3P_OH_AL_ACSR_4/0_Penguin_12_47_0_3_3_3_3_3_3_3_3_3_3_3_3_3_3_3_3_3_3_3_3_3_3_3_3_3_3_3_3_3

New Line.l(r:p1rdt2278-p1rdt4990) Units=km Length=0.10293200000000001 bus1=p1rdt4990.1.2.3 bus2=p1rdt2278.1.2.3 switch=n enabled=y phases=3 Linecode=3P_OH_AL_ACSR_4/0_Penguin_12_47_0_3_3_3_3_3_3_3_3_3_3_3_3_3_3_3_3_3_3_3_3_3_3_3_3_3_3_3_3_3

New Line.l(r:p1rdt4990-p1rdt7114) Units=km Length=0.039762 bus1=p1rdt7114.1.2.3 bus2=p1rdt4990.1.2.3 switch=n enabled=y phases=3 Linecode=3P_OH_AL_ACSR_4/0_Penguin_12_47_0_3_3_3_3_3_3_3_3_3_3_3_3_3_3_3_3_3_3_3_3_3_3_3_3_3_3_3_3_3

New Line.l(r:p1rdt3297-p1rdt7114)_s0 Units=km Length=0.443155 bus1=p1rdt3297.1.2.3 bus2=p1rdt3297-p1rdt7114x.1.2.3 switch=n enabled=y phases=3 Linecode=3P_OH_AL_ACSR_4/0_Penguin_12_47_0_3_3_3_3_3_3_3_3_3_3_3_3_3_3_3_3_3_3_3_3_3_3_3_3_3_3_3_3_3

New Line.l(r:p1rdt3297-p1rdt7114)_s1 Units=km Length=3.89212 bus1=p1rdt3297-p1rdt7114x.1.2.3 bus2=p1rdt3297-p1rdt7114xx.1.2.3 switch=n enabled=y phases=3 Linecode=3P_OH_AL_ACSR_4/0_Penguin_12_47_0_3_3_3_3_3_3_3_3_3_3_3_3_3_3_3_3_3_3_3_3_3_3_3_3_3_3_3_3_3

New Line.l(r:p1rdt3297-p1rdt7114)_s2 Units=km Length=0.184746 bus1=p1rdt3297-p1rdt7114xx.1.2.3 bus2=p1rdt7114.1.2.3 switch=n enabled=y phases=3 Linecode=3P_OH_AL_ACSR_4/0_Penguin_12_47_0_3_3_3_3_3_3_3_3_3_3_3_3_3_3_3_3_3_3_3_3_3_3_3_3_3_3_3_3_3

New Line.l(r:p1rdt2789-p1rdt3297) Units=km Length=0.10196 bus1=p1rdt2789.1.2.3 bus2=p1rdt3297.1.2.3 switch=n enabled=y phases=3 Linecode=3P_OH_AL_ACSR_4/0_Penguin_12_47_0_3_3_3_3_3_3_3_3_3_3_3_3_3_3_3_3_3_3_3_3_3_3_3_3_3_3_3_3_3

New Line.l(r:p1rdt2789-p1rdt4619) Units=km Length=0.0393032 bus1=p1rdt4619.1.2.3 bus2=p1rdt2789.1.2.3 switch=n enabled=y phases=3 Linecode=3P_OH_AL_ACSR_4/0_Penguin_12_47_0_3_3_3_3_3_3_3_3_3_3_3_3_3_3_3_3_3_3_3_3_3_3_3_3_3_3_3_3_3

New Line.l(r:p1rdt3978-p1rdt4619) Units=km Length=0.0472257 bus1=p1rdt3978.1.2.3 bus2=p1rdt4619.1.2.3 switch=n enabled=y phases=3 Linecode=3P_OH_AL_ACSR_4/0_Penguin_12_47_0_3_3_3_3_3_3_3_3_3_3_3_3_3_3_3_3_3_3_3_3_3_3_3_3_3_3_3_3_3

New Line.l(r:p1rdt3978-p1rdt6119)_s0 Units=km Length=0.636533 bus1=p1rdt6119.1.2.3 bus2=p1rdt3978-p1rdt6119x.1.2.3 switch=n enabled=y phases=3 Linecode=3P_OH_AL_ACSR_4/0_Penguin_12_47_0_3_3_3_3_3_3_3_3_3_3_3_3_3_3_3_3_3_3_3_3_3_3_3_3_3_3_3_3_3

New Line.l(r:p1rdt3978-p1rdt6119)_s1 Units=km Length=0.635185 bus1=p1rdt3978-p1rdt6119x.1.2.3 bus2=p1rdt3978.1.2.3 switch=n enabled=y phases=3 Linecode=3P_OH_AL_ACSR_4/0_Penguin_12_47_0_3_3_3_3_3_3_3_3_3_3_3_3_3_3_3_3_3_3_3_3_3_3_3_3_3_3_3_3_3

New Line.l(r:p1rdt6119-p1rdt6633)_s0 Units=km Length=0.122905 bus1=p1rdt6633.1.2.3 bus2=p1rdt6119-p1rdt6633x.1.2.3 switch=n enabled=y phases=3 Linecode=3P_OH_AL_ACSR_4/0_Penguin_12_47_0_3_3_3_3_3_3_3_3_3_3_3_3_3_3_3_3_3_3_3_3_3_3_3_3_3_3_3_3_3

New Line.l(r:p1rdt6119-p1rdt6633)_s1 Units=km Length=0.413959 bus1=p1rdt6119-p1rdt6633x.1.2.3 bus2=p1rdt6119.1.2.3 switch=n enabled=y phases=3 Linecode=3P_OH_AL_ACSR_4/0_Penguin_12_47_0_3_3_3_3_3_3_3_3_3_3_3_3_3_3_3_3_3_3_3_3_3_3_3_3_3_3_3_3_3

New Line.l(r:p1rdt1265-p1rdt6633) Units=km Length=0.11607500000000001 bus1=p1rdt1265.1.2.3 bus2=p1rdt6633.1.2.3 switch=n enabled=y phases=3 Linecode=3P_OH_AL_ACSR_4/0_Penguin_12_47_0_3_3_3_3_3_3_3_3_3_3_3_3_3_3_3_3_3_3_3_3_3_3_3_3_3_3_3_3_3

New Line.l(r:p1rdt1265-p1rdt6632) Units=km Length=0.0156955 bus1=p1rdt6632.1.2.3 bus2=p1rdt1265.1.2.3 switch=n enabled=y phases=3 Linecode=3P_OH_AL_ACSR_4/0_Penguin_12_47_0_3_3_3_3_3_3_3_3_3_3_3_3_3_3_3_3_3_3_3_3_3_3_3_3_3_3_3_3_3

New Line.l(r:p1rdt3485-p1rdt6632) Units=km Length=0.434574 bus1=p1rdt3485.1.2.3 bus2=p1rdt6632.1.2.3 switch=n enabled=y phases=3 Linecode=3P_OH_AL_ACSR_4/0_Penguin_12_47_0_3_3_3_3_3_3_3_3_3_3_3_3_3_3_3_3_3_3_3_3_3_3_3_3_3_3_3_3_3

New Line.l(r:p1rdt3485-p1rdt4380) Units=km Length=0.128501 bus1=p1rdt4380.1.2.3 bus2=p1rdt3485.1.2.3 switch=n enabled=y phases=3 Linecode=3P_OH_AL_ACSR_4/0_Penguin_12_47_0_3_3_3_3_3_3_3_3_3_3_3_3_3_3_3_3_3_3_3_3_3_3_3_3_3_3_3_3_3

New Line.l(r:p1rdt4380-p1rdt6578) Units=km Length=0.189278 bus1=p1rdt6578.1.2.3 bus2=p1rdt4380.1.2.3 switch=n enabled=y phases=3 Linecode=3P_OH_AL_ACSR_4/0_Penguin_12_47_0_3_3_3_3_3_3_3_3_3_3_3_3_3_3_3_3_3_3_3_3_3_3_3_3_3_3_3_3_3

New Line.l(r:p1rdt6578-p1rhs1_1247) Units=km Length=0.358329 bus1=p1rdt6578-p1rhs1_1247x.1.2.3 bus2=p1rdt6578-p1rhs1_1247x_b1_1.1.2.3 switch=n enabled=y phases=3 Linecode=3P_OH_AL_ACSR_4/0_Penguin_12_47_0_3_3_3_3_3_3_3_3_3_3_3_3_3_3_3_3_3_3_3_3_3_3_3_3_3_3_3_3_3

New Line.l(r:p1rdt4300-p1rdt6578)_s0 Units=km Length=0.0911422 bus1=p1rdt4300-p1rdt6578xx.1.2.3 bus2=p1rdt4300-p1rdt6578x.1.2.3 switch=n enabled=y phases=3 Linecode=3P_OH_AL_ACSR_1033kcmil_Curlew_12.47_1_3_3_3_3_3_3_3_3_3_3_3_3_3_3_3_3_3_3_3_3_3_3_3_3_3_3_3_3_3

New Line.l(r:p1rdt4300-p1rdt6578)_s1 Units=km Length=0.30441 bus1=p1rdt4300-p1rdt6578x.1.2.3 bus2=p1rdt4300.1.2.3 switch=n enabled=y phases=3 Linecode=3P_OH_AL_ACSR_1033kcmil_Curlew_12.47_1_3_3_3_3_3_3_3_3_3_3_3_3_3_3_3_3_3_3_3_3_3_3_3_3_3_3_3_3_3

New Line.elbswitch(r:p1rdt4300-p1rdt6578)p1r_2845 Units=km Length=0.001 bus1=p1rdt6578.1.2.3 bus2=p1rdt4300-p1rdt6578xx.1.2.3 switch=y enabled=n phases=3 Linecode=elbswitch_3_3_3_3_3_3_3_3_3_3_3_3_3_3_3_3_3_3_3_3_3_3_3_3_3_3_3_3_3

New Line.fuse(r:p1rdt385-p1rdt386)p1r_2934 Units=km Length=0.001 bus1=p1rdt386.1 bus2=p1rdt385-p1rdt386xx.1 switch=n enabled=y phases=1 Linecode=fuse_1_1_1_1_1_1_1_1_1_1_1_1_1_1_1_1_1_1_1_1_1_1_1_1_1_1_1_1_1

New Fuse.Fuse_fuse(r:p1rdt385-p1rdt386)p1r_2934 monitoredobj=Line.fuse(r:p1rdt385-p1rdt386)p1r_2934 enabled=y ratedcurrent=100.0

New Line.fuse(r:p1rdt1024-p1rdt512)p1r_2963 Units=km Length=0.001 bus1=p1rdt512.1 bus2=p1rdt1024-p1rdt512x.1 switch=n enabled=y phases=1 Linecode=fuse_1_4_1_1_1_1_1_1_1_1_1_1_1_1_1_1_1_1_1_1_1_1_1_1_1_1_1_1_1_1

New Fuse.Fuse_fuse(r:p1rdt1024-p1rdt512)p1r_2963 monitoredobj=Line.fuse(r:p1rdt1024-p1rdt512)p1r_2963 enabled=y ratedcurrent=100.0

New Line.fuse(r:p1rdt513-p1rdt646)p1r_2964 Units=km Length=0.001 bus1=p1rdt513.2 bus2=p1rdt513-p1rdt646x.2 switch=n enabled=y phases=1 Linecode=fuse_1_4_1_3_1_1_1_1_1_1_1_1_1_1_1_1_1_1_1_1_1_1_1_1_1_1_1_1_1_1_1

New Fuse.Fuse_fuse(r:p1rdt513-p1rdt646)p1r_2964 monitoredobj=Line.fuse(r:p1rdt513-p1rdt646)p1r_2964 enabled=y ratedcurrent=100.0

New Line.fuse(r:p1rdt4466-p1rdt513)p1r_2965 Units=km Length=0.001 bus1=p1rdt513.1 bus2=p1rdt4466-p1rdt513x.1 switch=n enabled=y phases=1 Linecode=fuse_1_4_1_1_1_1_1_1_1_1_1_1_1_1_1_1_1_1_1_1_1_1_1_1_1_1_1_1_1_1

New Fuse.Fuse_fuse(r:p1rdt4466-p1rdt513)p1r_2965 monitoredobj=Line.fuse(r:p1rdt4466-p1rdt513)p1r_2965 enabled=y ratedcurrent=100.0

New Line.fuse(r:p1rdt513-p1rdt7835)p1r_2966 Units=km Length=0.001 bus1=p1rdt513.3 bus2=p1rdt513-p1rdt7835x.3 switch=n enabled=y phases=1 Linecode=fuse_1_4_1_3_1_1_1_1_1_1_1_1_1_1_1_1_1_1_1_1_1_1_1_1_1_1_1_1_1_1_1

New Fuse.Fuse_fuse(r:p1rdt513-p1rdt7835)p1r_2966 monitoredobj=Line.fuse(r:p1rdt513-p1rdt7835)p1r_2966 enabled=y ratedcurrent=100.0

New Line.fuse(r:p1rdt1709-p1rdt912)p1r_3057 Units=km Length=0.001 bus1=p1rdt912.1 bus2=p1rdt1709-p1rdt912x.1 switch=n enabled=y phases=1 Linecode=fuse_1_1_1_1_1_1_1_1_1_1_1_1_1_1_1_1_1_1_1_1_1_1_1_1_1_1_1_1_1

New Fuse.Fuse_fuse(r:p1rdt1709-p1rdt912)p1r_3057 monitoredobj=Line.fuse(r:p1rdt1709-p1rdt912)p1r_3057 enabled=y ratedcurrent=100.0

New Line.fuse(r:p1rdt1708-p1rdt4988)p1r_3235 Units=km Length=0.001 bus1=p1rdt1708.2 bus2=p1rdt1708-p1rdt4988x.2 switch=n enabled=y phases=1 Linecode=fuse_1_4_1_1_1_1_1_1_1_1_1_1_1_1_1_1_1_1_1_1_1_1_1_1_1_1_1_1_1_1

New Fuse.Fuse_fuse(r:p1rdt1708-p1rdt4988)p1r_3235 monitoredobj=Line.fuse(r:p1rdt1708-p1rdt4988)p1r_3235 enabled=y ratedcurrent=100.0

New Line.fuse(r:p1rdt1707-p1rdt1825)p1r_3259 Units=km Length=0.001 bus1=p1rdt1825.2 bus2=p1rdt1707-p1rdt1825xx.2 switch=n enabled=y phases=1 Linecode=fuse_1_1_1_1_1_1_1_1_1_1_1_1_1_1_1_1_1_1_1_1_1_1_1_1_1_1_1_1_1

New Fuse.Fuse_fuse(r:p1rdt1707-p1rdt1825)p1r_3259 monitoredobj=Line.fuse(r:p1rdt1707-p1rdt1825)p1r_3259 enabled=y ratedcurrent=100.0

New Line.fuse(r:p1rdt2063-p1rdt792)p1r_3329 Units=km Length=0.001 bus1=p1rdt2063.2 bus2=p1rdt2063-p1rdt792x.2 switch=n enabled=y phases=1 Linecode=fuse_1_1_1_1_1_1_1_1_1_1_1_1_1_1_1_1_1_1_1_1_1_1_1_1_1_1_1_1_1

New Fuse.Fuse_fuse(r:p1rdt2063-p1rdt792)p1r_3329 monitoredobj=Line.fuse(r:p1rdt2063-p1rdt792)p1r_3329 enabled=y ratedcurrent=100.0

New Line.fuse(r:p1rdt2395-p1rdt2890)p1r_3403 Units=km Length=0.001 bus1=p1rdt2395.1 bus2=p1rdt2395-p1rdt2890x.1 switch=n enabled=y phases=1 Linecode=fuse_1_1_1_1_1_1_1_1_1_1_1_1_1_1_1_1_1_1_1_1_1_1_1_1_1_1_1_1_1

New Fuse.Fuse_fuse(r:p1rdt2395-p1rdt2890)p1r_3403 monitoredobj=Line.fuse(r:p1rdt2395-p1rdt2890)p1r_3403 enabled=y ratedcurrent=100.0

New Line.fuse(r:p1rdt2889-p1rdt6450)p1r_3520 Units=km Length=0.001 bus1=p1rdt2889.2 bus2=p1rdt2889-p1rdt6450x.2 switch=n enabled=y phases=1 Linecode=fuse_1_1_1_1_1_1_1_1_1_1_1_1_1_1_1_1_1_1_1_1_1_1_1_1_1_1_1_1_1

New Fuse.Fuse_fuse(r:p1rdt2889-p1rdt6450)p1r_3520 monitoredobj=Line.fuse(r:p1rdt2889-p1rdt6450)p1r_3520 enabled=y ratedcurrent=100.0

New Line.fuse(r:p1rdt2889-p1rdt7549)p1r_3521 Units=km Length=0.001 bus1=p1rdt2889.3 bus2=p1rdt2889-p1rdt7549x.3 switch=n enabled=y phases=1 Linecode=fuse_1_1_1_1_1_1_1_1_1_1_1_1_1_1_1_1_1_1_1_1_1_1_1_1_1_1_1_1_1

New Fuse.Fuse_fuse(r:p1rdt2889-p1rdt7549)p1r_3521 monitoredobj=Line.fuse(r:p1rdt2889-p1rdt7549)p1r_3521 enabled=y ratedcurrent=100.0

New Line.fuse(r:p1rdt3104-p1rdt7706)p1r_3581 Units=km Length=0.001 bus1=p1rdt3104.2 bus2=p1rdt3104-p1rdt7706x.2 switch=n enabled=y phases=1 Linecode=fuse_1_1_1_1_1_1_1_1_1_1_1_1_1_1_1_1_1_1_1_1_1_1_1_1_1_1_1_1_1

New Fuse.Fuse_fuse(r:p1rdt3104-p1rdt7706)p1r_3581 monitoredobj=Line.fuse(r:p1rdt3104-p1rdt7706)p1r_3581 enabled=y ratedcurrent=100.0

New Line.fuse(r:p1rdt3297-p1rdt4540)p1r_3635 Units=km Length=0.001 bus1=p1rdt3297.2 bus2=p1rdt3297-p1rdt4540x.2 switch=n enabled=y phases=1 Linecode=fuse_1_1_1_1_1_1_1_1_1_1_1_1_1_1_1_1_1_1_1_1_1_1_1_1_1_1_1_1_1

New Fuse.Fuse_fuse(r:p1rdt3297-p1rdt4540)p1r_3635 monitoredobj=Line.fuse(r:p1rdt3297-p1rdt4540)p1r_3635 enabled=y ratedcurrent=100.0

New Line.fuse(r:p1rdt4376-p1rdt645)p1r_3874 Units=km Length=0.001 bus1=p1rdt4376.1 bus2=p1rdt4376-p1rdt645x.1 switch=n enabled=y phases=1 Linecode=fuse_1_1_1_1_1_1_1_1_1_1_1_1_1_1_1_1_1_1_1_1_1_1_1_1_1_1_1_1_1

New Fuse.Fuse_fuse(r:p1rdt4376-p1rdt645)p1r_3874 monitoredobj=Line.fuse(r:p1rdt4376-p1rdt645)p1r_3874 enabled=y ratedcurrent=100.0

New Line.fuse(r:p1rdt1827-p1rdt4376)p1r_3875 Units=km Length=0.001 bus1=p1rdt4376.2 bus2=p1rdt1827-p1rdt4376xx.2 switch=n enabled=y phases=1 Linecode=fuse_1_1_1_1_1_1_1_1_1_1_1_1_1_1_1_1_1_1_1_1_1_1_1_1_1_1_1_1_1

New Fuse.Fuse_fuse(r:p1rdt1827-p1rdt4376)p1r_3875 monitoredobj=Line.fuse(r:p1rdt1827-p1rdt4376)p1r_3875 enabled=y ratedcurrent=100.0

New Line.fuse(r:p1rdt4614-p1rdt6514)p1r_3924 Units=km Length=0.001 bus1=p1rdt4614.3 bus2=p1rdt4614-p1rdt6514x.3 switch=n enabled=y phases=1 Linecode=fuse_1_1_1_1_1_1_1_1_1_1_1_1_1_1_1_1_1_1_1_1_1_1_1_1_1_1_1_1_1

New Fuse.Fuse_fuse(r:p1rdt4614-p1rdt6514)p1r_3924 monitoredobj=Line.fuse(r:p1rdt4614-p1rdt6514)p1r_3924 enabled=y ratedcurrent=100.0

New Line.fuse(r:p1rdt4705-p1rdt5325)p1r_4065 Units=km Length=0.001 bus1=p1rdt5325.3 bus2=p1rdt4705-p1rdt5325x.3 switch=n enabled=y phases=1 Linecode=fuse_1_1_1_1_1_1_1_1_1_1_1_1_1_1_1_1_1_1_1_1_1_1_1_1_1_1_1_1_1

New Fuse.Fuse_fuse(r:p1rdt4705-p1rdt5325)p1r_4065 monitoredobj=Line.fuse(r:p1rdt4705-p1rdt5325)p1r_4065 enabled=y ratedcurrent=100.0

New Line.fuse(r:p1rdt5631-p1rdt7235)p1r_4143 Units=km Length=0.001 bus1=p1rdt5631.3 bus2=p1rdt5631-p1rdt7235x.3 switch=n enabled=y phases=1 Linecode=fuse_1_1_1_1_1_1_1_1_1_1_1_1_1_1_1_1_1_1_1_1_1_1_1_1_1_1_1_1_1

New Fuse.Fuse_fuse(r:p1rdt5631-p1rdt7235)p1r_4143 monitoredobj=Line.fuse(r:p1rdt5631-p1rdt7235)p1r_4143 enabled=y ratedcurrent=100.0

New Line.fuse(r:p1rdt6119-p1rdt7767)p1r_4247 Units=km Length=0.001 bus1=p1rdt6119.1 bus2=p1rdt6119-p1rdt7767x.1 switch=n enabled=y phases=1 Linecode=fuse_1_1_1_1_1_1_1_1_1_1_1_1_1_1_1_1_1_1_1_1_1_1_1_1_1_1_1_1_1

New Fuse.Fuse_fuse(r:p1rdt6119-p1rdt7767)p1r_4247 monitoredobj=Line.fuse(r:p1rdt6119-p1rdt7767)p1r_4247 enabled=y ratedcurrent=100.0

New Line.fuse(r:p1rdt2497-p1rdt6517)p1r_4321 Units=km Length=0.001 bus1=p1rdt6517.3 bus2=p1rdt2497-p1rdt6517xxx.3 switch=n enabled=y phases=1 Linecode=fuse_1_1_1_1_1_1_1_1_1_1_1_1_1_1_1_1_1_1_1_1_1_1_1_1_1_1_1_1_1

New Fuse.Fuse_fuse(r:p1rdt2497-p1rdt6517)p1r_4321 monitoredobj=Line.fuse(r:p1rdt2497-p1rdt6517)p1r_4321 enabled=y ratedcurrent=100.0

New Line.fuse(r:p1rdt4215-p1rdt6630)p1r_4347 Units=km Length=0.001 bus1=p1rdt6630.1 bus2=p1rdt4215-p1rdt6630x.1 switch=n enabled=y phases=1 Linecode=fuse_1_4_1_3_1_1_1_1_1_1_1_1_1_1_1_1_1_1_1_1_1_1_1_1_1_1_1_1_1_1_1

New Fuse.Fuse_fuse(r:p1rdt4215-p1rdt6630)p1r_4347 monitoredobj=Line.fuse(r:p1rdt4215-p1rdt6630)p1r_4347 enabled=y ratedcurrent=100.0

New Line.fuse(r:p1rdt3876-p1rdt7422)p1r_4542 Units=km Length=0.001 bus1=p1rdt7422.2 bus2=p1rdt3876-p1rdt7422x.2 switch=n enabled=y phases=1 Linecode=fuse_1_1_1_1_1_1_1_1_1_1_1_1_1_1_1_1_1_1_1_1_1_1_1_1_1_1_1_1_1

New Fuse.Fuse_fuse(r:p1rdt3876-p1rdt7422)p1r_4542 monitoredobj=Line.fuse(r:p1rdt3876-p1rdt7422)p1r_4542 enabled=y ratedcurrent=100.0

New Line.fuse(r:p1rdt1823-p1rdt7603)p1r_4586 Units=km Length=0.001 bus1=p1rdt7603.2 bus2=p1rdt1823-p1rdt7603x.2 switch=n enabled=y phases=1 Linecode=fuse_1_1_1_1_1_1_1_1_1_1_1_1_1_1_1_1_1_1_1_1_1_1_1_1_1_1_1_1_1

New Fuse.Fuse_fuse(r:p1rdt1823-p1rdt7603)p1r_4586 monitoredobj=Line.fuse(r:p1rdt1823-p1rdt7603)p1r_4586 enabled=y ratedcurrent=100.0

New Line.fuse(r:p1rdt4924-p1rdt7603)p1r_4587 Units=km Length=0.001 bus1=p1rdt7603.1 bus2=p1rdt4924-p1rdt7603x.1 switch=n enabled=y phases=1 Linecode=fuse_1_1_1_1_1_1_1_1_1_1_1_1_1_1_1_1_1_1_1_1_1_1_1_1_1_1_1_1_1

New Fuse.Fuse_fuse(r:p1rdt4924-p1rdt7603)p1r_4587 monitoredobj=Line.fuse(r:p1rdt4924-p1rdt7603)p1r_4587 enabled=y ratedcurrent=100.0

New Line.fuse(r:p1rdt1499-p1rdt7834)p1r_4625 Units=km Length=0.001 bus1=p1rdt7834.3 bus2=p1rdt1499-p1rdt7834x.3 switch=n enabled=y phases=1 Linecode=fuse_1_1_1_1_1_1_1_1_1_1_1_1_1_1_1_1_1_1_1_1_1_1_1_1_1_1_1_1_1

New Fuse.Fuse_fuse(r:p1rdt1499-p1rdt7834)p1r_4625 monitoredobj=Line.fuse(r:p1rdt1499-p1rdt7834)p1r_4625 enabled=y ratedcurrent=100.0

New Line.fuse(r:p1rdt7657-p1rdt7834)p1r_4626 Units=km Length=0.001 bus1=p1rdt7834.1 bus2=p1rdt7657-p1rdt7834xx.1 switch=n enabled=y phases=1 Linecode=fuse_1_1_1_1_1_1_1_1_1_1_1_1_1_1_1_1_1_1_1_1_1_1_1_1_1_1_1_1_1

New Fuse.Fuse_fuse(r:p1rdt7657-p1rdt7834)p1r_4626 monitoredobj=Line.fuse(r:p1rdt7657-p1rdt7834)p1r_4626 enabled=y ratedcurrent=100.0

New Line.l(r:p1rdt2999-p1rdt5975)_disconnect Units=km Length=0.001 bus1=p1rdt5975_b1_1.1 bus2=p1rdt5975_b2_1.1 switch=y enabled=y phases=1 Linecode=1P_OH_AL_ACSR_#2_Sparrow_12_47_0_1_1_1_1_1_1_1_1_1_1_1_1_1_1_1_1_1_1_1_1_1_1_1_1_1_1_1_1_1

New Line.l(r:p1rdt2999-p1rdt5975)_cont Units=km Length=1.004877 bus1=p1rdt5975_b2_1.1 bus2=p1rdt2999.1 switch=n enabled=y phases=1 Linecode=1P_OH_AL_ACSR_#2_Sparrow_12_47_0_1_1_1_1_1_1_1_1_1_1_1_1_1_1_1_1_1_1_1_1_1_1_1_1_1_1_1_1_1

New Line.l(r:p1rdt4-p1rdt6451)_disconnect Units=km Length=0.001 bus1=p1rdt6451_b1_1.1 bus2=p1rdt6451_b2_1.1 switch=y enabled=y phases=1 Linecode=1P_OH_AL_ACSR_#2_Sparrow_12_47_0_1_1_1_1_1_1_1_1_1_1_1_1_1_1_1_1_1_1_1_1_1_1_1_1_1_1_1_1_1

New Line.l(r:p1rdt4-p1rdt6451)_cont Units=km Length=4.841648999999999 bus1=p1rdt6451_b2_1.1 bus2=p1rdt4.1 switch=n enabled=y phases=1 Linecode=1P_OH_AL_ACSR_#2_Sparrow_12_47_0_1_1_1_1_1_1_1_1_1_1_1_1_1_1_1_1_1_1_1_1_1_1_1_1_1_1_1_1_1

New Line.l(r:p1rdt1823-p1rdt7603)_disconnect Units=km Length=0.001 bus1=p1rdt1823-p1rdt7603x_b1_1.2 bus2=p1rdt1823-p1rdt7603x_b2_1.2 switch=y enabled=y phases=1 Linecode=1P_OH_AL_ACSR_#2_Sparrow_12_47_0_1_1_1_1_1_1_1_1_1_1_1_1_1_1_1_1_1_1_1_1_1_1_1_1_1_1_1_1_1

New Line.l(r:p1rdt1823-p1rdt7603)_cont Units=km Length=1.675332 bus1=p1rdt1823-p1rdt7603x_b2_1.2 bus2=p1rdt1823.2 switch=n enabled=y phases=1 Linecode=1P_OH_AL_ACSR_#2_Sparrow_12_47_0_1_1_1_1_1_1_1_1_1_1_1_1_1_1_1_1_1_1_1_1_1_1_1_1_1_1_1_1_1

New Line.l(r:p1rdt1597-p1rdt7422)_disconnect Units=km Length=0.001 bus1=p1rdt1597_b1_1.1.2.3 bus2=p1rdt1597_b2_1.1.2.3 switch=y enabled=y phases=3 Linecode=3P_OH_AL_ACSR_4/0_Penguin_12_47_0_3_3_3_3_3_3_3_3_3_3_3_3_3_3_3_3_3_3_3_3_3_3_3_3_3_3_3_3_3

New Line.l(r:p1rdt1597-p1rdt7422)_cont Units=km Length=4.36887 bus1=p1rdt1597_b2_1.1.2.3 bus2=p1rdt7422.1.2.3 switch=n enabled=y phases=3 Linecode=3P_OH_AL_ACSR_4/0_Penguin_12_47_0_3_3_3_3_3_3_3_3_3_3_3_3_3_3_3_3_3_3_3_3_3_3_3_3_3_3_3_3_3

New Line.l(r:p1rdt6578-p1rhs1_1247)_disconnect Units=km Length=0.001 bus1=p1rdt6578-p1rhs1_1247x_b1_1.1.2.3 bus2=p1rdt6578-p1rhs1_1247x_b2_1.1.2.3 switch=y enabled=y phases=3 Linecode=3P_OH_AL_ACSR_4/0_Penguin_12_47_0_3_3_3_3_3_3_3_3_3_3_3_3_3_3_3_3_3_3_3_3_3_3_3_3_3_3_3_3_3

New Line.l(r:p1rdt6578-p1rhs1_1247)_cont Units=km Length=3.2339610000000003 bus1=p1rdt6578-p1rhs1_1247x_b2_1.1.2.3 bus2=p1rdt6578.1.2.3 switch=n enabled=y phases=3 Linecode=3P_OH_AL_ACSR_4/0_Penguin_12_47_0_3_3_3_3_3_3_3_3_3_3_3_3_3_3_3_3_3_3_3_3_3_3_3_3_3_3_3_3_3
