New RegControl.reg_creguladortension(r:p1rdt6277-p1rdt682) transformer=trans_reg_creguladortension(r:p1rdt6277-p1rdt682) winding=2 ptratio=59.99631547328862 band=2.4 vreg = 123.60000000000001

New RegControl.reg_creguladortension(r:p1rdt1302-p1rdt5194) transformer=trans_reg_creguladortension(r:p1rdt1302-p1rdt5194) winding=2 ptratio=59.99631547328862 band=2.4 vreg = 123.60000000000001
