New RegControl.reg_creguladortension(r:p1rdt4523-p1rdt5233) transformer=trans_reg_creguladortension(r:p1rdt4523-p1rdt5233) winding=2 ptratio=59.99631547328862 band=2.4 vreg = 123.60000000000001

New RegControl.reg_creguladortension(r:p1rdt4523-p1rdt628) transformer=trans_reg_creguladortension(r:p1rdt4523-p1rdt628) winding=2 ptratio=59.99631547328862 band=2.4 vreg = 123.60000000000001
