New RegControl.reg_creguladortension(r:p1rdt8207-p1rhs3_1247) transformer=trans_reg_creguladortension(r:p1rdt8207-p1rhs3_1247) winding=2 ptratio=59.99631547328862 band=2.4 vreg = 123.60000000000001

New RegControl.reg_creguladortension(r:p1rdt5687-p1rdt7753) transformer=trans_reg_creguladortension(r:p1rdt5687-p1rdt7753) winding=2 ptratio=60.0 band=2.4 vreg = 123.60000000000001
