New RegControl.reg_creguladortension(r:p1rdt2126-p1rdt7520) transformer=trans_reg_creguladortension(r:p1rdt2126-p1rdt7520) winding=2 ptratio=59.99631547328862 band=2.4 vreg = 123.60000000000001

New RegControl.reg_creguladortension(r:p1rdt1123-p1rdt2769)p1rd2 transformer=trans_reg_creguladortension(r:p1rdt1123-p1rdt2769)p1rd2 winding=2 ptratio=59.99631547328862 band=2.4 vreg = 123.60000000000001
