New Line.l(r:p1rdt18lv-p1rlv19) Units=km Length=0.0676676 bus1=p1rdt18lv.1.2 bus2=p1rlv19.1.2 switch=n enabled=y phases=2 Linecode=1P_OH_AL_4/0_Zuzara_0_416_0_2_2_2_2_2_2_2_2_2_2_2_2_2_2_2_2_2_2_2_2_2_2_2_2_2_2_2_2_2

New Line.l(r:p1rdt18lv-p1rlv4161) Units=km Length=0.0676676 bus1=p1rdt18lv.1.2 bus2=p1rlv4161.1.2 switch=n enabled=y phases=2 Linecode=1P_OH_AL_4/0_Zuzara_0_416_0_2_2_2_2_2_2_2_2_2_2_2_2_2_2_2_2_2_2_2_2_2_2_2_2_2_2_2_2_2

New Line.l(r:p1rdt20lv-p1rlv21) Units=km Length=0.044193 bus1=p1rdt20lv.1.2 bus2=p1rlv21.1.2 switch=n enabled=y phases=2 Linecode=1P_OH_AL_4/0_Zuzara_0_416_0_2_2_2_2_2_2_2_2_2_2_2_2_2_2_2_2_2_2_2_2_2_2_2_2_2_2_2_2_2

New Line.l(r:p1rdt20lv-p1rlv8554) Units=km Length=0.044193 bus1=p1rdt20lv.1.2 bus2=p1rlv8554.1.2 switch=n enabled=y phases=2 Linecode=1P_OH_AL_4/0_Zuzara_0_416_0_2_2_2_2_2_2_2_2_2_2_2_2_2_2_2_2_2_2_2_2_2_2_2_2_2_2_2_2_2

New Line.l(r:p1rdt135lv-p1rlv139) Units=km Length=0.001 bus1=p1rdt135lv.1.2 bus2=p1rlv139.1.2 switch=n enabled=y phases=2 Linecode=1P_OH_AL_4_Periwinkle_0_416_0_2_2_2_2_2_2_2_2_2_2_2_2_2_2_2_2_2_2_2_2_2_2_2_2_2_2_2_2_2

New Line.l(r:p1rdt136lv-p1rlv140) Units=km Length=0.0522564 bus1=p1rdt136lv.1.2 bus2=p1rlv140.1.2 switch=n enabled=y phases=2 Linecode=1P_OH_AL_4/0_Zuzara_0_416_0_2_2_2_2_2_2_2_2_2_2_2_2_2_2_2_2_2_2_2_2_2_2_2_2_2_2_2_2_2

New Line.l(r:p1rdt136lv-p1rlv2710) Units=km Length=0.0522564 bus1=p1rdt136lv.1.2 bus2=p1rlv2710.1.2 switch=n enabled=y phases=2 Linecode=1P_OH_AL_4/0_Zuzara_0_416_0_2_2_2_2_2_2_2_2_2_2_2_2_2_2_2_2_2_2_2_2_2_2_2_2_2_2_2_2_2

New Line.l(r:p1rdt278lv-p1rlv286) Units=km Length=0.017300100000000002 bus1=p1rdt278lv.1.2 bus2=p1rlv286.1.2 switch=n enabled=y phases=2 Linecode=1P_OH_AL_2/0_Rucina_0_416_0_2_2_2_2_2_2_2_2_2_2_2_2_2_2_2_2_2_2_2_2_2_2_2_2_2_2_2_2_2

New Line.l(r:p1rdt278lv-p1rlv8962) Units=km Length=0.021952 bus1=p1rdt278lv.1.2 bus2=p1rlv8962.1.2 switch=n enabled=y phases=2 Linecode=1P_OH_AL_2/0_Rucina_0_416_0_2_2_2_2_2_2_2_2_2_2_2_2_2_2_2_2_2_2_2_2_2_2_2_2_2_2_2_2_2

New Line.l(r:p1rdt278lv-p1rlv11397) Units=km Length=0.0214259 bus1=p1rdt278lv.1.2 bus2=p1rlv11397.1.2 switch=n enabled=y phases=2 Linecode=1P_OH_AL_2/0_Rucina_0_416_0_2_2_2_2_2_2_2_2_2_2_2_2_2_2_2_2_2_2_2_2_2_2_2_2_2_2_2_2_2

New Line.l(r:p1rdt278lv-p1rlv13012) Units=km Length=0.0200274 bus1=p1rdt278lv.1.2 bus2=p1rlv13012.1.2 switch=n enabled=y phases=2 Linecode=1P_OH_AL_2/0_Rucina_0_416_0_2_2_2_2_2_2_2_2_2_2_2_2_2_2_2_2_2_2_2_2_2_2_2_2_2_2_2_2_2

New Line.l(r:p1rdt401lv-p1rlv410) Units=km Length=0.001 bus1=p1rdt401lv.1.2 bus2=p1rlv410.1.2 switch=n enabled=y phases=2 Linecode=1P_OH_AL_4_Periwinkle_0_416_0_2_2_2_2_2_2_2_2_2_2_2_2_2_2_2_2_2_2_2_2_2_2_2_2_2_2_2_2_2

New Line.l(r:p1rdt524lv-p1rlv537) Units=km Length=0.0457166 bus1=p1rdt524lv.1.2 bus2=p1rlv537.1.2 switch=n enabled=y phases=2 Linecode=1P_OH_AL_4/0_Zuzara_0_416_0_2_2_2_2_2_2_2_2_2_2_2_2_2_2_2_2_2_2_2_2_2_2_2_2_2_2_2_2_2

New Line.l(r:p1rdt524lv-p1rlv1883) Units=km Length=0.0523644 bus1=p1rdt524lv.1.2 bus2=p1rlv1883.1.2 switch=n enabled=y phases=2 Linecode=1P_OH_AL_4/0_Zuzara_0_416_0_2_2_2_2_2_2_2_2_2_2_2_2_2_2_2_2_2_2_2_2_2_2_2_2_2_2_2_2_2

New Line.l(r:p1rdt524lv-p1rlv7225) Units=km Length=0.0125903 bus1=p1rdt524lv.1.2 bus2=p1rlv7225.1.2 switch=n enabled=y phases=2 Linecode=1P_OH_AL_2/0_Rucina_0_416_0_2_2_2_2_2_2_2_2_2_2_2_2_2_2_2_2_2_2_2_2_2_2_2_2_2_2_2_2_2

New Line.l(r:p1rdt524lv-p1rlv8029) Units=km Length=0.09441840000000001 bus1=p1rdt524lv.1.2 bus2=p1rlv8029.1.2 switch=n enabled=y phases=2 Linecode=1P_OH_AL_4/0_Zuzara_0_416_0_2_2_2_2_2_2_2_2_2_2_2_2_2_2_2_2_2_2_2_2_2_2_2_2_2_2_2_2_2

New Line.l(r:p1rdt525lv-p1rlv538)_s0 Units=km Length=0.05054700000000001 bus1=p1rdt525lv.1.2 bus2=p1rdt525lv-p1rlv538x.1.2 switch=n enabled=y phases=2 Linecode=1P_OH_AL_4/0_Zuzara_0_416_0_2_2_2_2_2_2_2_2_2_2_2_2_2_2_2_2_2_2_2_2_2_2_2_2_2_2_2_2_2

New Line.l(r:p1rdt525lv-p1rlv538)_s1 Units=km Length=0.0316257 bus1=p1rdt525lv-p1rlv538x.1.2 bus2=p1rlv538.1.2 switch=n enabled=y phases=2 Linecode=1P_OH_AL_4/0_Zuzara_0_416_0_2_2_2_2_2_2_2_2_2_2_2_2_2_2_2_2_2_2_2_2_2_2_2_2_2_2_2_2_2

New Line.l(r:p1rdt525lv-p1rlv1354) Units=km Length=0.04249590000000001 bus1=p1rdt525lv.1.2 bus2=p1rlv1354.1.2 switch=n enabled=y phases=2 Linecode=1P_OH_AL_4/0_Zuzara_0_416_0_2_2_2_2_2_2_2_2_2_2_2_2_2_2_2_2_2_2_2_2_2_2_2_2_2_2_2_2_2

New Line.l(r:p1rdt525lv-p1rlv5800)_s0 Units=km Length=0.0664407 bus1=p1rdt525lv.1.2 bus2=p1rdt525lv-p1rlv5800x.1.2 switch=n enabled=y phases=2 Linecode=1P_OH_AL_4/0_Zuzara_0_416_0_2_2_2_2_2_2_2_2_2_2_2_2_2_2_2_2_2_2_2_2_2_2_2_2_2_2_2_2_2

New Line.l(r:p1rdt525lv-p1rlv5800)_s1 Units=km Length=0.0508906 bus1=p1rdt525lv-p1rlv5800x.1.2 bus2=p1rlv5800.1.2 switch=n enabled=y phases=2 Linecode=1P_OH_AL_4/0_Zuzara_0_416_0_2_2_2_2_2_2_2_2_2_2_2_2_2_2_2_2_2_2_2_2_2_2_2_2_2_2_2_2_2

New Line.l(r:p1rdt525lv-p1rlv9915)_s0 Units=km Length=0.076025 bus1=p1rdt525lv.1.2 bus2=p1rdt525lv-p1rlv9915x.1.2 switch=n enabled=y phases=2 Linecode=1P_OH_AL_4/0_Zuzara_0_416_0_2_2_2_2_2_2_2_2_2_2_2_2_2_2_2_2_2_2_2_2_2_2_2_2_2_2_2_2_2

New Line.l(r:p1rdt525lv-p1rlv9915)_s1 Units=km Length=0.0459591 bus1=p1rdt525lv-p1rlv9915x.1.2 bus2=p1rlv9915.1.2 switch=n enabled=y phases=2 Linecode=1P_OH_AL_4/0_Zuzara_0_416_0_2_2_2_2_2_2_2_2_2_2_2_2_2_2_2_2_2_2_2_2_2_2_2_2_2_2_2_2_2

New Line.l(r:p1rdt651lv-p1rlv673) Units=km Length=0.014501 bus1=p1rdt651lv.1.2 bus2=p1rlv673.1.2 switch=n enabled=y phases=2 Linecode=1P_OH_AL_2/0_Rucina_0_416_0_2_2_2_2_2_2_2_2_2_2_2_2_2_2_2_2_2_2_2_2_2_2_2_2_2_2_2_2_2

New Line.l(r:p1rdt651lv-p1rlv12508) Units=km Length=0.014501 bus1=p1rdt651lv.1.2 bus2=p1rlv12508.1.2 switch=n enabled=y phases=2 Linecode=1P_OH_AL_2/0_Rucina_0_416_0_2_2_2_2_2_2_2_2_2_2_2_2_2_2_2_2_2_2_2_2_2_2_2_2_2_2_2_2_2

New Line.l(r:p1rdt653lv-p1rlv675) Units=km Length=0.001 bus1=p1rdt653lv.1.2 bus2=p1rlv675.1.2 switch=n enabled=y phases=2 Linecode=1P_OH_AL_4_Periwinkle_0_416_0_2_2_2_2_2_2_2_2_2_2_2_2_2_2_2_2_2_2_2_2_2_2_2_2_2_2_2_2_2

New Line.l(r:p1rdt805lv-p1rlv840) Units=km Length=0.08610570000000001 bus1=p1rdt805lv.1.2 bus2=p1rlv840.1.2 switch=n enabled=y phases=2 Linecode=1P_OH_AL_4/0_Zuzara_0_416_0_2_2_2_2_2_2_2_2_2_2_2_2_2_2_2_2_2_2_2_2_2_2_2_2_2_2_2_2_2

New Line.l(r:p1rdt806lv-p1rlv841) Units=km Length=0.001 bus1=p1rdt806lv.1.2 bus2=p1rlv841.1.2 switch=n enabled=y phases=2 Linecode=1P_OH_AL_4_Periwinkle_0_416_0_2_2_2_2_2_2_2_2_2_2_2_2_2_2_2_2_2_2_2_2_2_2_2_2_2_2_2_2_2

New Line.l(r:p1rdt1273lv-p1rlv1355) Units=km Length=0.0575131 bus1=p1rdt1273lv.1.2 bus2=p1rlv1355.1.2 switch=n enabled=y phases=2 Linecode=1P_OH_AL_4/0_Zuzara_0_416_0_2_2_2_2_2_2_2_2_2_2_2_2_2_2_2_2_2_2_2_2_2_2_2_2_2_2_2_2_2

New Line.l(r:p1rdt1273lv-p1rlv13405) Units=km Length=0.0575131 bus1=p1rdt1273lv.1.2 bus2=p1rlv13405.1.2 switch=n enabled=y phases=2 Linecode=1P_OH_AL_4/0_Zuzara_0_416_0_2_2_2_2_2_2_2_2_2_2_2_2_2_2_2_2_2_2_2_2_2_2_2_2_2_2_2_2_2

New Line.l(r:p1rdt1509lv-p1rlv1628) Units=km Length=0.0143117 bus1=p1rdt1509lv.1.2 bus2=p1rlv1628.1.2 switch=n enabled=y phases=2 Linecode=1P_OH_AL_2/0_Rucina_0_416_0_2_2_2_2_2_2_2_2_2_2_2_2_2_2_2_2_2_2_2_2_2_2_2_2_2_2_2_2_2

New Line.l(r:p1rdt1509lv-p1rlv10564) Units=km Length=0.0143117 bus1=p1rdt1509lv.1.2 bus2=p1rlv10564.1.2 switch=n enabled=y phases=2 Linecode=1P_OH_AL_2/0_Rucina_0_416_0_2_2_2_2_2_2_2_2_2_2_2_2_2_2_2_2_2_2_2_2_2_2_2_2_2_2_2_2_2

New Line.l(r:p1rdt1612lv-p1rlv1751) Units=km Length=0.0170601 bus1=p1rdt1612lv.1.2 bus2=p1rlv1751.1.2 switch=n enabled=y phases=2 Linecode=1P_OH_AL_2/0_Rucina_0_416_0_2_2_2_2_2_2_2_2_2_2_2_2_2_2_2_2_2_2_2_2_2_2_2_2_2_2_2_2_2

New Line.l(r:p1rdt1612lv-p1rlv4596) Units=km Length=0.0170601 bus1=p1rdt1612lv.1.2 bus2=p1rlv4596.1.2 switch=n enabled=y phases=2 Linecode=1P_OH_AL_2/0_Rucina_0_416_0_2_2_2_2_2_2_2_2_2_2_2_2_2_2_2_2_2_2_2_2_2_2_2_2_2_2_2_2_2

New Line.l(r:p1rdm4000-p1rlv2032) Units=km Length=0.0610348 bus1=p1rdm4000.1.2 bus2=p1rlv2032.1.2 switch=n enabled=y phases=2 Linecode=1P_OH_AL_4/0_Zuzara_0_416_0_2_2_2_2_2_2_2_2_2_2_2_2_2_2_2_2_2_2_2_2_2_2_2_2_2_2_2_2_2

New Line.l(r:p1rdm4000-p1rlv5402) Units=km Length=0.039427000000000004 bus1=p1rdm4000.1.2 bus2=p1rlv5402.1.2 switch=n enabled=y phases=2 Linecode=1P_OH_AL_4/0_Zuzara_0_416_0_2_2_2_2_2_2_2_2_2_2_2_2_2_2_2_2_2_2_2_2_2_2_2_2_2_2_2_2_2

New Line.l(r:p1rdm4000-p1rdt1841lv) Units=km Length=0.0134931 bus1=p1rdt1841lv.1.2 bus2=p1rdm4000.1.2 switch=n enabled=y phases=2 Linecode=1P_OH_AL_2/0_Rucina_0_416_0_2_2_2_2_2_2_2_2_2_2_2_2_2_2_2_2_2_2_2_2_2_2_2_2_2_2_2_2_2

New Line.l(r:p1rdm4002-p1rlv13407) Units=km Length=0.0431111 bus1=p1rdm4002.1.2 bus2=p1rlv13407.1.2 switch=n enabled=y phases=2 Linecode=1P_OH_AL_4/0_Zuzara_0_416_0_2_2_2_2_2_2_2_2_2_2_2_2_2_2_2_2_2_2_2_2_2_2_2_2_2_2_2_2_2

New Line.l(r:p1rdm4002-p1rlv13661) Units=km Length=0.0480793 bus1=p1rdm4002.1.2 bus2=p1rlv13661.1.2 switch=n enabled=y phases=2 Linecode=1P_OH_AL_4/0_Zuzara_0_416_0_2_2_2_2_2_2_2_2_2_2_2_2_2_2_2_2_2_2_2_2_2_2_2_2_2_2_2_2_2

New Line.l(r:p1rdm4002-p1rdt1841lv) Units=km Length=0.0134842 bus1=p1rdt1841lv.1.2 bus2=p1rdm4002.1.2 switch=n enabled=y phases=2 Linecode=1P_OH_AL_2/0_Rucina_0_416_0_2_2_2_2_2_2_2_2_2_2_2_2_2_2_2_2_2_2_2_2_2_2_2_2_2_2_2_2_2

New Line.l(r:p1rdt1951lv-p1rlv2160) Units=km Length=0.0681501 bus1=p1rdt1951lv.1.2 bus2=p1rlv2160.1.2 switch=n enabled=y phases=2 Linecode=1P_OH_AL_4/0_Zuzara_0_416_0_2_2_2_2_2_2_2_2_2_2_2_2_2_2_2_2_2_2_2_2_2_2_2_2_2_2_2_2_2

New Line.l(r:p1rdt1951lv-p1rlv6553) Units=km Length=0.0681501 bus1=p1rdt1951lv.1.2 bus2=p1rlv6553.1.2 switch=n enabled=y phases=2 Linecode=1P_OH_AL_4/0_Zuzara_0_416_0_2_2_2_2_2_2_2_2_2_2_2_2_2_2_2_2_2_2_2_2_2_2_2_2_2_2_2_2_2

New Line.l(r:p1rdt2076lv-p1rlv2312) Units=km Length=0.001 bus1=p1rdt2076lv.1.2 bus2=p1rlv2312.1.2 switch=n enabled=y phases=2 Linecode=1P_OH_AL_4_Periwinkle_0_416_0_2_2_2_2_2_2_2_2_2_2_2_2_2_2_2_2_2_2_2_2_2_2_2_2_2_2_2_2_2

New Line.l(r:p1rdt2193lv-p1rlv2448) Units=km Length=0.03595 bus1=p1rdt2193lv.1.2 bus2=p1rlv2448.1.2 switch=n enabled=y phases=2 Linecode=1P_OH_AL_4/0_Zuzara_0_416_0_2_2_2_2_2_2_2_2_2_2_2_2_2_2_2_2_2_2_2_2_2_2_2_2_2_2_2_2_2

New Line.l(r:p1rdt2193lv-p1rlv4298) Units=km Length=0.0123735 bus1=p1rdt2193lv.1.2 bus2=p1rlv4298.1.2 switch=n enabled=y phases=2 Linecode=1P_OH_AL_2/0_Rucina_0_416_0_2_2_2_2_2_2_2_2_2_2_2_2_2_2_2_2_2_2_2_2_2_2_2_2_2_2_2_2_2

New Line.l(r:p1rdt2193lv-p1rlv6315) Units=km Length=0.0233221 bus1=p1rdt2193lv.1.2 bus2=p1rlv6315.1.2 switch=n enabled=y phases=2 Linecode=1P_OH_AL_2/0_Rucina_0_416_0_2_2_2_2_2_2_2_2_2_2_2_2_2_2_2_2_2_2_2_2_2_2_2_2_2_2_2_2_2

New Line.l(r:p1rdt2193lv-p1rlv10040) Units=km Length=0.0636587 bus1=p1rdt2193lv.1.2 bus2=p1rlv10040.1.2 switch=n enabled=y phases=2 Linecode=1P_OH_AL_4/0_Zuzara_0_416_0_2_2_2_2_2_2_2_2_2_2_2_2_2_2_2_2_2_2_2_2_2_2_2_2_2_2_2_2_2

New Line.l(r:p1rdt2293lv-p1rlv2572) Units=km Length=0.04226100000000001 bus1=p1rdt2293lv.1.2 bus2=p1rlv2572.1.2 switch=n enabled=y phases=2 Linecode=1P_OH_AL_4/0_Zuzara_0_416_0_2_2_2_2_2_2_2_2_2_2_2_2_2_2_2_2_2_2_2_2_2_2_2_2_2_2_2_2_2

New Line.l(r:p1rdt2293lv-p1rlv7351) Units=km Length=0.0817732 bus1=p1rdt2293lv.1.2 bus2=p1rlv7351.1.2 switch=n enabled=y phases=2 Linecode=1P_OH_AL_4/0_Zuzara_0_416_0_2_2_2_2_2_2_2_2_2_2_2_2_2_2_2_2_2_2_2_2_2_2_2_2_2_2_2_2_2

New Line.l(r:p1rdt2293lv-p1rlv12383) Units=km Length=0.0438433 bus1=p1rdt2293lv.1.2 bus2=p1rlv12383.1.2 switch=n enabled=y phases=2 Linecode=1P_OH_AL_4/0_Zuzara_0_416_0_2_2_2_2_2_2_2_2_2_2_2_2_2_2_2_2_2_2_2_2_2_2_2_2_2_2_2_2_2

New Line.l(r:p1rdt2294lv-p1rlv2573) Units=km Length=0.0635668 bus1=p1rdt2294lv.1.2 bus2=p1rlv2573.1.2 switch=n enabled=y phases=2 Linecode=1P_OH_AL_4/0_Zuzara_0_416_0_2_2_2_2_2_2_2_2_2_2_2_2_2_2_2_2_2_2_2_2_2_2_2_2_2_2_2_2_2

New Line.l(r:p1rdt2294lv-p1rlv9749) Units=km Length=0.0635668 bus1=p1rdt2294lv.1.2 bus2=p1rlv9749.1.2 switch=n enabled=y phases=2 Linecode=1P_OH_AL_4/0_Zuzara_0_416_0_2_2_2_2_2_2_2_2_2_2_2_2_2_2_2_2_2_2_2_2_2_2_2_2_2_2_2_2_2

New Line.l(r:p1rdt2402lv-p1rlv2711) Units=km Length=0.001 bus1=p1rdt2402lv.1.2 bus2=p1rlv2711.1.2 switch=n enabled=y phases=2 Linecode=1P_OH_AL_4_Periwinkle_0_416_0_2_2_2_2_2_2_2_2_2_2_2_2_2_2_2_2_2_2_2_2_2_2_2_2_2_2_2_2_2

New Line.l(r:p1rdm5471-p1rlv2969) Units=km Length=0.0866849 bus1=p1rdm5471.1.2 bus2=p1rlv2969.1.2 switch=n enabled=y phases=2 Linecode=1P_OH_AL_4/0_Zuzara_0_416_0_2_2_2_2_2_2_2_2_2_2_2_2_2_2_2_2_2_2_2_2_2_2_2_2_2_2_2_2_2

New Line.l(r:p1rdm5471-p1rdt2602lv) Units=km Length=0.0174091 bus1=p1rdt2602lv.1.2 bus2=p1rdm5471.1.2 switch=n enabled=y phases=2 Linecode=1P_OH_AL_2/0_Rucina_0_416_0_2_2_2_2_2_2_2_2_2_2_2_2_2_2_2_2_2_2_2_2_2_2_2_2_2_2_2_2_2

New Line.l(r:p1rdm5472-p1rlv4597) Units=km Length=0.09899880000000001 bus1=p1rdm5472.1.2 bus2=p1rlv4597.1.2 switch=n enabled=y phases=2 Linecode=1P_OH_AL_4/0_Zuzara_0_416_0_2_2_2_2_2_2_2_2_2_2_2_2_2_2_2_2_2_2_2_2_2_2_2_2_2_2_2_2_2

New Line.l(r:p1rdm5472-p1rdt2602lv) Units=km Length=0.017412800000000003 bus1=p1rdt2602lv.1.2 bus2=p1rdm5472.1.2 switch=n enabled=y phases=2 Linecode=1P_OH_AL_2/0_Rucina_0_416_0_2_2_2_2_2_2_2_2_2_2_2_2_2_2_2_2_2_2_2_2_2_2_2_2_2_2_2_2_2

New Line.l(r:p1rdt2603lv-p1rlv2970) Units=km Length=0.0791931 bus1=p1rdt2603lv.1.2 bus2=p1rlv2970.1.2 switch=n enabled=y phases=2 Linecode=1P_OH_AL_4/0_Zuzara_0_416_0_2_2_2_2_2_2_2_2_2_2_2_2_2_2_2_2_2_2_2_2_2_2_2_2_2_2_2_2_2

New Line.l(r:p1rdt2603lv-p1rlv8964) Units=km Length=0.10529200000000001 bus1=p1rdt2603lv.1.2 bus2=p1rlv8964.1.2 switch=n enabled=y phases=2 Linecode=1P_OH_AL_4/0_Zuzara_0_416_0_2_2_2_2_2_2_2_2_2_2_2_2_2_2_2_2_2_2_2_2_2_2_2_2_2_2_2_2_2

New Line.l(r:p1rdt2799lv-p1rlv3218) Units=km Length=0.04638 bus1=p1rdt2799lv.1.2 bus2=p1rlv3218.1.2 switch=n enabled=y phases=2 Linecode=1P_OH_AL_4/0_Zuzara_0_416_0_2_2_2_2_2_2_2_2_2_2_2_2_2_2_2_2_2_2_2_2_2_2_2_2_2_2_2_2_2

New Line.l(r:p1rdt2799lv-p1rlv7226) Units=km Length=0.04638 bus1=p1rdt2799lv.1.2 bus2=p1rlv7226.1.2 switch=n enabled=y phases=2 Linecode=1P_OH_AL_4/0_Zuzara_0_416_0_2_2_2_2_2_2_2_2_2_2_2_2_2_2_2_2_2_2_2_2_2_2_2_2_2_2_2_2_2

New Line.l(r:p1rdt2899lv-p1rlv3344) Units=km Length=0.001 bus1=p1rdt2899lv.1.2 bus2=p1rlv3344.1.2 switch=n enabled=y phases=2 Linecode=1P_OH_AL_4_Periwinkle_0_416_0_2_2_2_2_2_2_2_2_2_2_2_2_2_2_2_2_2_2_2_2_2_2_2_2_2_2_2_2_2

New Line.l(r:p1rdt3307lv-p1rlv3900) Units=km Length=0.0363096 bus1=p1rdt3307lv.1.2 bus2=p1rlv3900.1.2 switch=n enabled=y phases=2 Linecode=1P_OH_AL_4/0_Zuzara_0_416_0_2_2_2_2_2_2_2_2_2_2_2_2_2_2_2_2_2_2_2_2_2_2_2_2_2_2_2_2_2

New Line.l(r:p1rdm6750-p1rlv7352) Units=km Length=0.065389 bus1=p1rdm6750.1.2 bus2=p1rlv7352.1.2 switch=n enabled=y phases=2 Linecode=1P_OH_AL_4/0_Zuzara_0_416_0_2_2_2_2_2_2_2_2_2_2_2_2_2_2_2_2_2_2_2_2_2_2_2_2_2_2_2_2_2

New Line.l(r:p1rdm6750-p1rdt3307lv) Units=km Length=0.0162757 bus1=p1rdt3307lv.1.2 bus2=p1rdm6750.1.2 switch=n enabled=y phases=2 Linecode=1P_OH_AL_2/0_Rucina_0_416_0_2_2_2_2_2_2_2_2_2_2_2_2_2_2_2_2_2_2_2_2_2_2_2_2_2_2_2_2_2

New Line.l(r:p1rdt3395lv-p1rlv4028) Units=km Length=0.0271233 bus1=p1rdt3395lv.1.2 bus2=p1rlv4028.1.2 switch=n enabled=y phases=2 Linecode=1P_OH_AL_4/0_Zuzara_0_416_0_2_2_2_2_2_2_2_2_2_2_2_2_2_2_2_2_2_2_2_2_2_2_2_2_2_2_2_2_2

New Line.l(r:p1rdt3395lv-p1rlv9220) Units=km Length=0.0271233 bus1=p1rdt3395lv.1.2 bus2=p1rlv9220.1.2 switch=n enabled=y phases=2 Linecode=1P_OH_AL_4/0_Zuzara_0_416_0_2_2_2_2_2_2_2_2_2_2_2_2_2_2_2_2_2_2_2_2_2_2_2_2_2_2_2_2_2

New Line.l(r:p1rdt3396lv-p1rlv4029) Units=km Length=0.0190244 bus1=p1rdt3396lv.1.2 bus2=p1rlv4029.1.2 switch=n enabled=y phases=2 Linecode=1P_OH_AL_2/0_Rucina_0_416_0_2_2_2_2_2_2_2_2_2_2_2_2_2_2_2_2_2_2_2_2_2_2_2_2_2_2_2_2_2

New Line.l(r:p1rdt3396lv-p1rlv7912) Units=km Length=0.0190244 bus1=p1rdt3396lv.1.2 bus2=p1rlv7912.1.2 switch=n enabled=y phases=2 Linecode=1P_OH_AL_2/0_Rucina_0_416_0_2_2_2_2_2_2_2_2_2_2_2_2_2_2_2_2_2_2_2_2_2_2_2_2_2_2_2_2_2

New Line.l(r:p1rdt3397lv-p1rlv4030) Units=km Length=0.0246849 bus1=p1rdt3397lv.1.2 bus2=p1rlv4030.1.2 switch=n enabled=y phases=2 Linecode=1P_OH_AL_2/0_Rucina_0_416_0_2_2_2_2_2_2_2_2_2_2_2_2_2_2_2_2_2_2_2_2_2_2_2_2_2_2_2_2_2

New Line.l(r:p1rdt3397lv-p1rlv5801) Units=km Length=0.0246849 bus1=p1rdt3397lv.1.2 bus2=p1rlv5801.1.2 switch=n enabled=y phases=2 Linecode=1P_OH_AL_2/0_Rucina_0_416_0_2_2_2_2_2_2_2_2_2_2_2_2_2_2_2_2_2_2_2_2_2_2_2_2_2_2_2_2_2

New Line.l(r:p1rdt3398lv-p1rlv4031) Units=km Length=0.0408146 bus1=p1rdt3398lv.1.2 bus2=p1rlv4031.1.2 switch=n enabled=y phases=2 Linecode=1P_OH_AL_4/0_Zuzara_0_416_0_2_2_2_2_2_2_2_2_2_2_2_2_2_2_2_2_2_2_2_2_2_2_2_2_2_2_2_2_2

New Line.l(r:p1rdt3398lv-p1rlv11821) Units=km Length=0.0408146 bus1=p1rdt3398lv.1.2 bus2=p1rlv11821.1.2 switch=n enabled=y phases=2 Linecode=1P_OH_AL_4/0_Zuzara_0_416_0_2_2_2_2_2_2_2_2_2_2_2_2_2_2_2_2_2_2_2_2_2_2_2_2_2_2_2_2_2

New Line.l(r:p1rdt3587lv-p1rlv4297) Units=km Length=0.0192512 bus1=p1rdt3587lv.1.2 bus2=p1rlv4297.1.2 switch=n enabled=y phases=2 Linecode=1P_OH_AL_2/0_Rucina_0_416_0_2_2_2_2_2_2_2_2_2_2_2_2_2_2_2_2_2_2_2_2_2_2_2_2_2_2_2_2_2

New Line.l(r:p1rdt3587lv-p1rlv8829) Units=km Length=0.0192512 bus1=p1rdt3587lv.1.2 bus2=p1rlv8829.1.2 switch=n enabled=y phases=2 Linecode=1P_OH_AL_2/0_Rucina_0_416_0_2_2_2_2_2_2_2_2_2_2_2_2_2_2_2_2_2_2_2_2_2_2_2_2_2_2_2_2_2

New Line.l(r:p1rdt3588lv-p1rlv4299) Units=km Length=0.013416300000000003 bus1=p1rdt3588lv.1.2 bus2=p1rlv4299.1.2 switch=n enabled=y phases=2 Linecode=1P_OH_AL_2/0_Rucina_0_416_0_2_2_2_2_2_2_2_2_2_2_2_2_2_2_2_2_2_2_2_2_2_2_2_2_2_2_2_2_2

New Line.l(r:p1rdt3588lv-p1rlv8693) Units=km Length=0.013416300000000003 bus1=p1rdt3588lv.1.2 bus2=p1rlv8693.1.2 switch=n enabled=y phases=2 Linecode=1P_OH_AL_2/0_Rucina_0_416_0_2_2_2_2_2_2_2_2_2_2_2_2_2_2_2_2_2_2_2_2_2_2_2_2_2_2_2_2_2

New Line.l(r:p1rdt3982lv-p1rlv4886) Units=km Length=0.001 bus1=p1rdt3982lv.1.2 bus2=p1rlv4886.1.2 switch=n enabled=y phases=2 Linecode=1P_OH_AL_4_Periwinkle_0_416_0_2_2_2_2_2_2_2_2_2_2_2_2_2_2_2_2_2_2_2_2_2_2_2_2_2_2_2_2_2

New Line.l(r:p1rdt4223lv-p1rlv7778) Units=km Length=0.05806800000000001 bus1=p1rdt4223lv.1.2 bus2=p1rlv7778.1.2 switch=n enabled=y phases=2 Linecode=1P_UG_AL_1/0_Brenau_0_416_0_2_2_2_2_2_2_2_2_2_2_2_2_2_2_2_2_2_2_2_2_2_2_2_2_2_2_2_2_2

New Line.l(r:p1rdm8314-p1rlv5261) Units=km Length=0.069749 bus1=p1rdm8314.1.2 bus2=p1rlv5261.1.2 switch=n enabled=y phases=2 Linecode=1P_UG_AL_1/0_Brenau_0_416_0_2_2_2_2_2_2_2_2_2_2_2_2_2_2_2_2_2_2_2_2_2_2_2_2_2_2_2_2_2

New Line.l(r:p1rdm8314-p1rdt4223lv) Units=km Length=0.00831407 bus1=p1rdt4223lv.1.2 bus2=p1rdm8314.1.2 switch=n enabled=y phases=2 Linecode=1P_UG_AL_1/0_Brenau_0_416_0_2_2_2_2_2_2_2_2_2_2_2_2_2_2_2_2_2_2_2_2_2_2_2_2_2_2_2_2_2

New Line.l(r:p1rdt4383lv-p1rlv5528) Units=km Length=0.0528365 bus1=p1rdt4383lv.1.2 bus2=p1rlv5528.1.2 switch=n enabled=y phases=2 Linecode=1P_OH_AL_4/0_Zuzara_0_416_0_2_2_2_2_2_2_2_2_2_2_2_2_2_2_2_2_2_2_2_2_2_2_2_2_2_2_2_2_2

New Line.l(r:p1rdt4383lv-p1rlv10425) Units=km Length=0.052294 bus1=p1rdt4383lv.1.2 bus2=p1rlv10425.1.2 switch=n enabled=y phases=2 Linecode=1P_OH_AL_4/0_Zuzara_0_416_0_2_2_2_2_2_2_2_2_2_2_2_2_2_2_2_2_2_2_2_2_2_2_2_2_2_2_2_2_2

New Line.l(r:p1rdt4383lv-p1rlv10566) Units=km Length=0.0486524 bus1=p1rdt4383lv.1.2 bus2=p1rlv10566.1.2 switch=n enabled=y phases=2 Linecode=1P_OH_AL_4/0_Zuzara_0_416_0_2_2_2_2_2_2_2_2_2_2_2_2_2_2_2_2_2_2_2_2_2_2_2_2_2_2_2_2_2

New Line.l(r:p1rdt4384lv-p1rlv5529) Units=km Length=0.001 bus1=p1rdt4384lv.1.2 bus2=p1rlv5529.1.2 switch=n enabled=y phases=2 Linecode=1P_OH_AL_4_Periwinkle_0_416_0_2_2_2_2_2_2_2_2_2_2_2_2_2_2_2_2_2_2_2_2_2_2_2_2_2_2_2_2_2

New Line.l(r:p1rdt4385lv-p1rlv5530) Units=km Length=0.0190387 bus1=p1rdt4385lv.1.2 bus2=p1rlv5530.1.2 switch=n enabled=y phases=2 Linecode=1P_OH_AL_2/0_Rucina_0_416_0_2_2_2_2_2_2_2_2_2_2_2_2_2_2_2_2_2_2_2_2_2_2_2_2_2_2_2_2_2

New Line.l(r:p1rdt4385lv-p1rlv6316) Units=km Length=0.0208291 bus1=p1rdt4385lv.1.2 bus2=p1rlv6316.1.2 switch=n enabled=y phases=2 Linecode=1P_OH_AL_2/0_Rucina_0_416_0_2_2_2_2_2_2_2_2_2_2_2_2_2_2_2_2_2_2_2_2_2_2_2_2_2_2_2_2_2

New Line.l(r:p1rdt4385lv-p1rlv11957) Units=km Length=0.011751600000000001 bus1=p1rdt4385lv.1.2 bus2=p1rlv11957.1.2 switch=n enabled=y phases=2 Linecode=1P_OH_AL_2/0_Rucina_0_416_0_2_2_2_2_2_2_2_2_2_2_2_2_2_2_2_2_2_2_2_2_2_2_2_2_2_2_2_2_2

New Line.l(r:p1rdt4475lv-p1rlv5674) Units=km Length=0.001 bus1=p1rdt4475lv.1.2 bus2=p1rlv5674.1.2 switch=n enabled=y phases=2 Linecode=1P_OH_AL_4_Periwinkle_0_416_0_2_2_2_2_2_2_2_2_2_2_2_2_2_2_2_2_2_2_2_2_2_2_2_2_2_2_2_2_2

New Line.l(r:p1rdt4476lv-p1rlv5675) Units=km Length=0.0398222 bus1=p1rdt4476lv.1.2 bus2=p1rlv5675.1.2 switch=n enabled=y phases=2 Linecode=1P_OH_AL_4/0_Zuzara_0_416_0_2_2_2_2_2_2_2_2_2_2_2_2_2_2_2_2_2_2_2_2_2_2_2_2_2_2_2_2_2

New Line.l(r:p1rdt4712lv-p1rlv6072) Units=km Length=0.001 bus1=p1rdt4712lv.1.2 bus2=p1rlv6072.1.2 switch=n enabled=y phases=2 Linecode=1P_OH_AL_4_Periwinkle_0_416_0_2_2_2_2_2_2_2_2_2_2_2_2_2_2_2_2_2_2_2_2_2_2_2_2_2_2_2_2_2

New Line.l(r:p1rdt4782lv-p1rlv6188) Units=km Length=0.001 bus1=p1rdt4782lv.1.2 bus2=p1rlv6188.1.2 switch=n enabled=y phases=2 Linecode=1P_OH_AL_4_Periwinkle_0_416_0_2_2_2_2_2_2_2_2_2_2_2_2_2_2_2_2_2_2_2_2_2_2_2_2_2_2_2_2_2

New Line.l(r:p1rdt4783lv-p1rlv6189) Units=km Length=0.001 bus1=p1rdt4783lv.1.2 bus2=p1rlv6189.1.2 switch=n enabled=y phases=2 Linecode=1P_OH_AL_4_Periwinkle_0_416_0_2_2_2_2_2_2_2_2_2_2_2_2_2_2_2_2_2_2_2_2_2_2_2_2_2_2_2_2_2

New Line.l(r:p1rdt4784lv-p1rlv6190) Units=km Length=0.001 bus1=p1rdt4784lv.1.2 bus2=p1rlv6190.1.2 switch=n enabled=y phases=2 Linecode=1P_OH_AL_4_Periwinkle_0_416_0_2_2_2_2_2_2_2_2_2_2_2_2_2_2_2_2_2_2_2_2_2_2_2_2_2_2_2_2_2

New Line.l(r:p1rdt4856lv-p1rlv6312) Units=km Length=0.001 bus1=p1rdt4856lv.1.2 bus2=p1rlv6312.1.2 switch=n enabled=y phases=2 Linecode=1P_OH_AL_4_Periwinkle_0_416_0_2_2_2_2_2_2_2_2_2_2_2_2_2_2_2_2_2_2_2_2_2_2_2_2_2_2_2_2_2

New Line.l(r:p1rdt4857lv-p1rlv6313) Units=km Length=0.0128711 bus1=p1rdt4857lv.1.2 bus2=p1rlv6313.1.2 switch=n enabled=y phases=2 Linecode=1P_OH_AL_2/0_Rucina_0_416_0_2_2_2_2_2_2_2_2_2_2_2_2_2_2_2_2_2_2_2_2_2_2_2_2_2_2_2_2_2

New Line.l(r:p1rdt4858lv-p1rlv6314) Units=km Length=0.001 bus1=p1rdt4858lv.1.2 bus2=p1rlv6314.1.2 switch=n enabled=y phases=2 Linecode=1P_OH_AL_4_Periwinkle_0_416_0_2_2_2_2_2_2_2_2_2_2_2_2_2_2_2_2_2_2_2_2_2_2_2_2_2_2_2_2_2

New Line.l(r:p1rdt4999lv-p1rlv6552) Units=km Length=0.0186391 bus1=p1rdt4999lv.1.2 bus2=p1rlv6552.1.2 switch=n enabled=y phases=2 Linecode=1P_OH_AL_2/0_Rucina_0_416_0_2_2_2_2_2_2_2_2_2_2_2_2_2_2_2_2_2_2_2_2_2_2_2_2_2_2_2_2_2

New Line.l(r:p1rdt4999lv-p1rlv11524) Units=km Length=0.0186391 bus1=p1rdt4999lv.1.2 bus2=p1rlv11524.1.2 switch=n enabled=y phases=2 Linecode=1P_OH_AL_2/0_Rucina_0_416_0_2_2_2_2_2_2_2_2_2_2_2_2_2_2_2_2_2_2_2_2_2_2_2_2_2_2_2_2_2

New Line.l(r:p1rdt5000lv-p1rlv6554) Units=km Length=0.0297743 bus1=p1rdt5000lv.1.2 bus2=p1rlv6554.1.2 switch=n enabled=y phases=2 Linecode=1P_OH_AL_4/0_Zuzara_0_416_0_2_2_2_2_2_2_2_2_2_2_2_2_2_2_2_2_2_2_2_2_2_2_2_2_2_2_2_2_2

New Line.l(r:p1rdt5000lv-p1rlv10565) Units=km Length=0.0297743 bus1=p1rdt5000lv.1.2 bus2=p1rlv10565.1.2 switch=n enabled=y phases=2 Linecode=1P_OH_AL_4/0_Zuzara_0_416_0_2_2_2_2_2_2_2_2_2_2_2_2_2_2_2_2_2_2_2_2_2_2_2_2_2_2_2_2_2

New Line.l(r:p1rdt5097lv-p1rlv6703) Units=km Length=0.0512162 bus1=p1rdt5097lv.1.2 bus2=p1rlv6703.1.2 switch=n enabled=y phases=2 Linecode=1P_OH_AL_4/0_Zuzara_0_416_0_2_2_2_2_2_2_2_2_2_2_2_2_2_2_2_2_2_2_2_2_2_2_2_2_2_2_2_2_2

New Line.l(r:p1rdt5097lv-p1rlv13531) Units=km Length=0.0512162 bus1=p1rdt5097lv.1.2 bus2=p1rlv13531.1.2 switch=n enabled=y phases=2 Linecode=1P_OH_AL_4/0_Zuzara_0_416_0_2_2_2_2_2_2_2_2_2_2_2_2_2_2_2_2_2_2_2_2_2_2_2_2_2_2_2_2_2

New Line.l(r:p1rdt5181lv-p1rlv6826) Units=km Length=0.0408454 bus1=p1rdt5181lv.1.2 bus2=p1rlv6826.1.2 switch=n enabled=y phases=2 Linecode=1P_OH_AL_4/0_Zuzara_0_416_0_2_2_2_2_2_2_2_2_2_2_2_2_2_2_2_2_2_2_2_2_2_2_2_2_2_2_2_2_2

New Line.l(r:p1rdt5181lv-p1rlv10289) Units=km Length=0.0408454 bus1=p1rdt5181lv.1.2 bus2=p1rlv10289.1.2 switch=n enabled=y phases=2 Linecode=1P_OH_AL_4/0_Zuzara_0_416_0_2_2_2_2_2_2_2_2_2_2_2_2_2_2_2_2_2_2_2_2_2_2_2_2_2_2_2_2_2

New Line.l(r:p1rdt5252lv-p1rlv6940) Units=km Length=0.0566087 bus1=p1rdt5252lv.1.2 bus2=p1rlv6940.1.2 switch=n enabled=y phases=2 Linecode=1P_OH_AL_4/0_Zuzara_0_416_0_2_2_2_2_2_2_2_2_2_2_2_2_2_2_2_2_2_2_2_2_2_2_2_2_2_2_2_2_2

New Line.l(r:p1rdt5253lv-p1rlv6941) Units=km Length=0.0436944 bus1=p1rdt5253lv.1.2 bus2=p1rlv6941.1.2 switch=n enabled=y phases=2 Linecode=1P_OH_AL_4/0_Zuzara_0_416_0_2_2_2_2_2_2_2_2_2_2_2_2_2_2_2_2_2_2_2_2_2_2_2_2_2_2_2_2_2

New Line.l(r:p1rdt5253lv-p1rlv13014) Units=km Length=0.0436944 bus1=p1rdt5253lv.1.2 bus2=p1rlv13014.1.2 switch=n enabled=y phases=2 Linecode=1P_OH_AL_4/0_Zuzara_0_416_0_2_2_2_2_2_2_2_2_2_2_2_2_2_2_2_2_2_2_2_2_2_2_2_2_2_2_2_2_2

New Line.l(r:p1rdt5478lv-p1rlv7353) Units=km Length=0.0631237 bus1=p1rdt5478lv.1.2 bus2=p1rlv7353.1.2 switch=n enabled=y phases=2 Linecode=1P_OH_AL_4/0_Zuzara_0_416_0_2_2_2_2_2_2_2_2_2_2_2_2_2_2_2_2_2_2_2_2_2_2_2_2_2_2_2_2_2

New Line.l(r:p1rdt5478lv-p1rlv8692) Units=km Length=0.0631237 bus1=p1rdt5478lv.1.2 bus2=p1rlv8692.1.2 switch=n enabled=y phases=2 Linecode=1P_OH_AL_4/0_Zuzara_0_416_0_2_2_2_2_2_2_2_2_2_2_2_2_2_2_2_2_2_2_2_2_2_2_2_2_2_2_2_2_2

New Line.l(r:p1rdt5709lv-p1rlv7777) Units=km Length=0.00507469 bus1=p1rdt5709lv.1.2 bus2=p1rlv7777.1.2 switch=n enabled=y phases=2 Linecode=1P_OH_AL_2/0_Rucina_0_416_0_2_2_2_2_2_2_2_2_2_2_2_2_2_2_2_2_2_2_2_2_2_2_2_2_2_2_2_2_2

New Line.l(r:p1rdt5785lv-p1rlv7909) Units=km Length=0.0696296 bus1=p1rdt5785lv.1.2 bus2=p1rlv7909.1.2 switch=n enabled=y phases=2 Linecode=1P_OH_AL_4/0_Zuzara_0_416_0_2_2_2_2_2_2_2_2_2_2_2_2_2_2_2_2_2_2_2_2_2_2_2_2_2_2_2_2_2

New Line.l(r:p1rdt5786lv-p1rlv7910) Units=km Length=0.001 bus1=p1rdt5786lv.1.2 bus2=p1rlv7910.1.2 switch=n enabled=y phases=2 Linecode=1P_OH_AL_4_Periwinkle_0_416_0_2_2_2_2_2_2_2_2_2_2_2_2_2_2_2_2_2_2_2_2_2_2_2_2_2_2_2_2_2

New Line.l(r:p1rdt5788lv-p1rlv7913) Units=km Length=0.001 bus1=p1rdt5788lv.1.2 bus2=p1rlv7913.1.2 switch=n enabled=y phases=2 Linecode=1P_OH_AL_4_Periwinkle_0_416_0_2_2_2_2_2_2_2_2_2_2_2_2_2_2_2_2_2_2_2_2_2_2_2_2_2_2_2_2_2

New Line.l(r:p1rdt5850lv-p1rlv8030) Units=km Length=0.001 bus1=p1rdt5850lv.1.2 bus2=p1rlv8030.1.2 switch=n enabled=y phases=2 Linecode=1P_OH_AL_4_Periwinkle_0_416_0_2_2_2_2_2_2_2_2_2_2_2_2_2_2_2_2_2_2_2_2_2_2_2_2_2_2_2_2_2

New Line.l(r:p1rdt6190lv-p1rlv8689) Units=km Length=0.001 bus1=p1rdt6190lv.1.2 bus2=p1rlv8689.1.2 switch=n enabled=y phases=2 Linecode=1P_OH_AL_4_Periwinkle_0_416_0_2_2_2_2_2_2_2_2_2_2_2_2_2_2_2_2_2_2_2_2_2_2_2_2_2_2_2_2_2

New Line.l(r:p1rdt6192lv-p1rlv8691) Units=km Length=0.001 bus1=p1rdt6192lv.1.2 bus2=p1rlv8691.1.2 switch=n enabled=y phases=2 Linecode=1P_OH_AL_4_Periwinkle_0_416_0_2_2_2_2_2_2_2_2_2_2_2_2_2_2_2_2_2_2_2_2_2_2_2_2_2_2_2_2_2

New Line.l(r:p1rdt6337lv-p1rlv8963) Units=km Length=0.001 bus1=p1rdt6337lv.1.2 bus2=p1rlv8963.1.2 switch=n enabled=y phases=2 Linecode=1P_OH_AL_4_Periwinkle_0_416_0_2_2_2_2_2_2_2_2_2_2_2_2_2_2_2_2_2_2_2_2_2_2_2_2_2_2_2_2_2

New Line.l(r:p1rdt6396lv-p1rlv9086) Units=km Length=0.001 bus1=p1rdt6396lv.1.2 bus2=p1rlv9086.1.2 switch=n enabled=y phases=2 Linecode=1P_OH_AL_4_Periwinkle_0_416_0_2_2_2_2_2_2_2_2_2_2_2_2_2_2_2_2_2_2_2_2_2_2_2_2_2_2_2_2_2

New Line.l(r:p1rdt6397lv-p1rlv9087) Units=km Length=0.001 bus1=p1rdt6397lv.1.2 bus2=p1rlv9087.1.2 switch=n enabled=y phases=2 Linecode=1P_OH_AL_4_Periwinkle_0_416_0_2_2_2_2_2_2_2_2_2_2_2_2_2_2_2_2_2_2_2_2_2_2_2_2_2_2_2_2_2

New Line.l(r:p1rdt6463lv-p1rlv9219) Units=km Length=0.001 bus1=p1rdt6463lv.1.2 bus2=p1rlv9219.1.2 switch=n enabled=y phases=2 Linecode=1P_OH_AL_4_Periwinkle_0_416_0_2_2_2_2_2_2_2_2_2_2_2_2_2_2_2_2_2_2_2_2_2_2_2_2_2_2_2_2_2

New Line.l(r:p1rdt6709lv-p1rlv13403) Units=km Length=0.0330474 bus1=p1rdt6709lv.1.2 bus2=p1rlv13403.1.2 switch=n enabled=y phases=2 Linecode=1P_OH_AL_4/0_Zuzara_0_416_0_2_2_2_2_2_2_2_2_2_2_2_2_2_2_2_2_2_2_2_2_2_2_2_2_2_2_2_2_2

New Line.l(r:p1rdm11928-p1rlv9750) Units=km Length=0.04322150000000001 bus1=p1rdm11928.1.2 bus2=p1rlv9750.1.2 switch=n enabled=y phases=2 Linecode=1P_OH_AL_4/0_Zuzara_0_416_0_2_2_2_2_2_2_2_2_2_2_2_2_2_2_2_2_2_2_2_2_2_2_2_2_2_2_2_2_2

New Line.l(r:p1rdm11928-p1rdt6709lv) Units=km Length=0.012537800000000002 bus1=p1rdt6709lv.1.2 bus2=p1rdm11928.1.2 switch=n enabled=y phases=2 Linecode=1P_OH_AL_2/0_Rucina_0_416_0_2_2_2_2_2_2_2_2_2_2_2_2_2_2_2_2_2_2_2_2_2_2_2_2_2_2_2_2_2

New Line.l(r:p1rdm11930-p1rlv13790) Units=km Length=0.074826 bus1=p1rdm11930.1.2 bus2=p1rlv13790.1.2 switch=n enabled=y phases=2 Linecode=1P_OH_AL_4/0_Zuzara_0_416_0_2_2_2_2_2_2_2_2_2_2_2_2_2_2_2_2_2_2_2_2_2_2_2_2_2_2_2_2_2

New Line.l(r:p1rdm11930-p1rdt6709lv) Units=km Length=0.0163115 bus1=p1rdt6709lv.1.2 bus2=p1rdm11930.1.2 switch=n enabled=y phases=2 Linecode=1P_OH_AL_2/0_Rucina_0_416_0_2_2_2_2_2_2_2_2_2_2_2_2_2_2_2_2_2_2_2_2_2_2_2_2_2_2_2_2_2

New Line.l(r:p1rdt6710lv-p1rlv9751) Units=km Length=0.001 bus1=p1rdt6710lv.1.2 bus2=p1rlv9751.1.2 switch=n enabled=y phases=2 Linecode=1P_OH_AL_4_Periwinkle_0_416_0_2_2_2_2_2_2_2_2_2_2_2_2_2_2_2_2_2_2_2_2_2_2_2_2_2_2_2_2_2

New Line.l(r:p1rdt6839lv-p1rlv10039) Units=km Length=0.001 bus1=p1rdt6839lv.1.2 bus2=p1rlv10039.1.2 switch=n enabled=y phases=2 Linecode=1P_OH_AL_4_Periwinkle_0_416_0_2_2_2_2_2_2_2_2_2_2_2_2_2_2_2_2_2_2_2_2_2_2_2_2_2_2_2_2_2

New Line.l(r:p1rdt6999lv-p1rlv10426) Units=km Length=0.0377323 bus1=p1rdt6999lv.1.2 bus2=p1rlv10426.1.2 switch=n enabled=y phases=2 Linecode=1P_OH_AL_4/0_Zuzara_0_416_0_2_2_2_2_2_2_2_2_2_2_2_2_2_2_2_2_2_2_2_2_2_2_2_2_2_2_2_2_2

New Line.l(r:p1rdt6999lv-p1rlv11822) Units=km Length=0.0416653 bus1=p1rdt6999lv.1.2 bus2=p1rlv11822.1.2 switch=n enabled=y phases=2 Linecode=1P_OH_AL_4/0_Zuzara_0_416_0_2_2_2_2_2_2_2_2_2_2_2_2_2_2_2_2_2_2_2_2_2_2_2_2_2_2_2_2_2

New Line.l(r:p1rdt6999lv-p1rlv13662) Units=km Length=0.010784 bus1=p1rdt6999lv.1.2 bus2=p1rlv13662.1.2 switch=n enabled=y phases=2 Linecode=1P_OH_AL_2/0_Rucina_0_416_0_2_2_2_2_2_2_2_2_2_2_2_2_2_2_2_2_2_2_2_2_2_2_2_2_2_2_2_2_2

New Line.l(r:p1rdt7311lv-p1rlv11139) Units=km Length=0.0248963 bus1=p1rdt7311lv.1.2 bus2=p1rlv11139.1.2 switch=n enabled=y phases=2 Linecode=1P_UG_AL_1/0_Brenau_0_416_0_2_2_2_2_2_2_2_2_2_2_2_2_2_2_2_2_2_2_2_2_2_2_2_2_2_2_2_2_2

New Line.l(r:p1rdt7312lv-p1rlv11140) Units=km Length=0.001 bus1=p1rdt7312lv.1.2 bus2=p1rlv11140.1.2 switch=n enabled=y phases=2 Linecode=1P_OH_AL_4_Periwinkle_0_416_0_2_2_2_2_2_2_2_2_2_2_2_2_2_2_2_2_2_2_2_2_2_2_2_2_2_2_2_2_2

New Line.l(r:p1rdt7369lv-p1rlv11254) Units=km Length=0.0909262 bus1=p1rdt7369lv.1.2 bus2=p1rlv11254.1.2 switch=n enabled=y phases=2 Linecode=1P_OH_AL_4/0_Zuzara_0_416_0_2_2_2_2_2_2_2_2_2_2_2_2_2_2_2_2_2_2_2_2_2_2_2_2_2_2_2_2_2

New Line.l(r:p1rdt7484lv-p1rlv11525) Units=km Length=0.001 bus1=p1rdt7484lv.1.2 bus2=p1rlv11525.1.2 switch=n enabled=y phases=2 Linecode=1P_OH_AL_4_Periwinkle_0_416_0_2_2_2_2_2_2_2_2_2_2_2_2_2_2_2_2_2_2_2_2_2_2_2_2_2_2_2_2_2

New Line.l(r:p1rdt7609lv-p1rlv11820) Units=km Length=0.001 bus1=p1rdt7609lv.1.2 bus2=p1rlv11820.1.2 switch=n enabled=y phases=2 Linecode=1P_OH_AL_4_Periwinkle_0_416_0_2_2_2_2_2_2_2_2_2_2_2_2_2_2_2_2_2_2_2_2_2_2_2_2_2_2_2_2_2

New Line.l(r:p1rdt7665lv-p1rlv11958) Units=km Length=0.0243288 bus1=p1rdt7665lv.1.2 bus2=p1rlv11958.1.2 switch=n enabled=y phases=2 Linecode=1P_OH_AL_2/0_Rucina_0_416_0_2_2_2_2_2_2_2_2_2_2_2_2_2_2_2_2_2_2_2_2_2_2_2_2_2_2_2_2_2

New Line.l(r:p1rdt7665lv-p1rlv13406) Units=km Length=0.0243288 bus1=p1rdt7665lv.1.2 bus2=p1rlv13406.1.2 switch=n enabled=y phases=2 Linecode=1P_OH_AL_2/0_Rucina_0_416_0_2_2_2_2_2_2_2_2_2_2_2_2_2_2_2_2_2_2_2_2_2_2_2_2_2_2_2_2_2

New Line.l(r:p1rdt7770lv-p1rlv12227) Units=km Length=0.001 bus1=p1rdt7770lv.1.2 bus2=p1rlv12227.1.2 switch=n enabled=y phases=2 Linecode=1P_OH_AL_4_Periwinkle_0_416_0_2_2_2_2_2_2_2_2_2_2_2_2_2_2_2_2_2_2_2_2_2_2_2_2_2_2_2_2_2

New Line.l(r:p1rdt7927lv-p1rlv12625) Units=km Length=0.001 bus1=p1rdt7927lv.1.2 bus2=p1rlv12625.1.2 switch=n enabled=y phases=2 Linecode=1P_OH_AL_4_Periwinkle_0_416_0_2_2_2_2_2_2_2_2_2_2_2_2_2_2_2_2_2_2_2_2_2_2_2_2_2_2_2_2_2

New Line.l(r:p1rdt7987lv-p1rlv12759) Units=km Length=0.0264504 bus1=p1rdt7987lv.1.2 bus2=p1rlv12759.1.2 switch=n enabled=y phases=2 Linecode=1P_OH_AL_2/0_Rucina_0_416_0_2_2_2_2_2_2_2_2_2_2_2_2_2_2_2_2_2_2_2_2_2_2_2_2_2_2_2_2_2

New Line.l(r:p1rdt8122lv-p1rlv13143) Units=km Length=0.001 bus1=p1rdt8122lv.1.2 bus2=p1rlv13143.1.2 switch=n enabled=y phases=2 Linecode=1P_OH_AL_4_Periwinkle_0_416_0_2_2_2_2_2_2_2_2_2_2_2_2_2_2_2_2_2_2_2_2_2_2_2_2_2_2_2_2_2

New Line.l(r:p1rdt8171lv-p1rlv13267) Units=km Length=0.001 bus1=p1rdt8171lv.1.2 bus2=p1rlv13267.1.2 switch=n enabled=y phases=2 Linecode=1P_OH_AL_4_Periwinkle_0_416_0_2_2_2_2_2_2_2_2_2_2_2_2_2_2_2_2_2_2_2_2_2_2_2_2_2_2_2_2_2

New Line.l(r:p1rdt8220lv-p1rlv13402) Units=km Length=0.018505 bus1=p1rdt8220lv.1.2 bus2=p1rlv13402.1.2 switch=n enabled=y phases=2 Linecode=1P_OH_AL_2/0_Rucina_0_416_0_2_2_2_2_2_2_2_2_2_2_2_2_2_2_2_2_2_2_2_2_2_2_2_2_2_2_2_2_2

New Line.l(r:p1rdt8221lv-p1rlv13404) Units=km Length=0.001 bus1=p1rdt8221lv.1.2 bus2=p1rlv13404.1.2 switch=n enabled=y phases=2 Linecode=1P_OH_AL_4_Periwinkle_0_416_0_2_2_2_2_2_2_2_2_2_2_2_2_2_2_2_2_2_2_2_2_2_2_2_2_2_2_2_2_2

New Line.l(r:p1rdt8313lv-p1rlv13659) Units=km Length=0.0453271 bus1=p1rdt8313lv.1.2 bus2=p1rlv13659.1.2 switch=n enabled=y phases=2 Linecode=1P_OH_AL_4/0_Zuzara_0_416_0_2_2_2_2_2_2_2_2_2_2_2_2_2_2_2_2_2_2_2_2_2_2_2_2_2_2_2_2_2

New Line.l(r:p1rdt8314lv-p1rlv13660) Units=km Length=0.001 bus1=p1rdt8314lv.1.2 bus2=p1rlv13660.1.2 switch=n enabled=y phases=2 Linecode=1P_OH_AL_4_Periwinkle_0_416_0_2_2_2_2_2_2_2_2_2_2_2_2_2_2_2_2_2_2_2_2_2_2_2_2_2_2_2_2_2

New Line.l(r:p1rdt2193-p1rdt5478) Units=km Length=0.177047 bus1=p1rdt5478.2 bus2=p1rdt2193.2 switch=n enabled=y phases=1 Linecode=1P_OH_AL_ACSR_#2_Sparrow_12_47_0_1_1_1_1_1_1_1_1_1_1_1_1_1_1_1_1_1_1_1_1_1_1_1_1_1_1_1_1_1

New Line.l(r:p1rdt2076-p1rdt5478) Units=km Length=0.0314828 bus1=p1rdt2076.2 bus2=p1rdt5478.2 switch=n enabled=y phases=1 Linecode=1P_OH_AL_ACSR_#2_Sparrow_12_47_0_1_1_1_1_1_1_1_1_1_1_1_1_1_1_1_1_1_1_1_1_1_1_1_1_1_1_1_1_1

New Line.l(r:p1rdt2076-p1rdt4783) Units=km Length=0.0659084 bus1=p1rdt4783.2 bus2=p1rdt2076.2 switch=n enabled=y phases=1 Linecode=1P_OH_AL_ACSR_#2_Sparrow_12_47_0_1_1_1_1_1_1_1_1_1_1_1_1_1_1_1_1_1_1_1_1_1_1_1_1_1_1_1_1_1

New Line.l(r:p1rdt3397-p1rdt4783) Units=km Length=0.148934 bus1=p1rdt3397-p1rdt4783x.2 bus2=p1rdt4783.2 switch=n enabled=y phases=1 Linecode=1P_OH_AL_ACSR_#2_Sparrow_12_47_0_1_1_1_1_1_1_1_1_1_1_1_1_1_1_1_1_1_1_1_1_1_1_1_1_1_1_1_1_1

New Line.l(r:p1rdt6192-p1rdt7987) Units=km Length=0.187476 bus1=p1rdt7987.1 bus2=p1rdt6192.1 switch=n enabled=y phases=1 Linecode=1P_OH_AL_ACSR_#2_Sparrow_12_47_0_1_1_1_1_1_1_1_1_1_1_1_1_1_1_1_1_1_1_1_1_1_1_1_1_1_1_1_1_1

New Line.l(r:p1rdt3588-p1rdt7987)_s0 Units=km Length=0.208968 bus1=p1rdt3588.1 bus2=p1rdt3588-p1rdt7987x.1 switch=n enabled=y phases=1 Linecode=1P_OH_AL_ACSR_#2_Sparrow_12_47_0_1_1_1_1_1_1_1_1_1_1_1_1_1_1_1_1_1_1_1_1_1_1_1_1_1_1_1_1_1

New Line.l(r:p1rdt3588-p1rdt7987)_s1 Units=km Length=0.0291674 bus1=p1rdt3588-p1rdt7987x.1 bus2=p1rdt7987.1 switch=n enabled=y phases=1 Linecode=1P_OH_AL_ACSR_#2_Sparrow_12_47_0_1_1_1_1_1_1_1_1_1_1_1_1_1_1_1_1_1_1_1_1_1_1_1_1_1_1_1_1_1

New Line.l(r:p1rdt1273-p1rdt3588) Units=km Length=0.207077 bus1=p1rdt1273.1 bus2=p1rdt3588.1 switch=n enabled=y phases=1 Linecode=1P_OH_AL_ACSR_#2_Sparrow_12_47_0_1_1_1_1_1_1_1_1_1_1_1_1_1_1_1_1_1_1_1_1_1_1_1_1_1_1_1_1_1

New Line.l(r:p1rdt1273-p1rdt4784) Units=km Length=0.102417 bus1=p1rdt1273.1 bus2=p1rdt4784.1 switch=n enabled=y phases=1 Linecode=1P_OH_AL_ACSR_#2_Sparrow_12_47_0_1_1_1_1_1_1_1_1_1_1_1_1_1_1_1_1_1_1_1_1_1_1_1_1_1_1_1_1_1

New Line.l(r:p1rdt1273-p1rdt7665) Units=km Length=0.24416100000000002 bus1=p1rdt1273-p1rdt7665x.1 bus2=p1rdt1273.1 switch=n enabled=y phases=1 Linecode=1P_OH_AL_ACSR_#2_Sparrow_12_47_0_1_1_1_1_1_1_1_1_1_1_1_1_1_1_1_1_1_1_1_1_1_1_1_1_1_1_1_1_1

New Line.l(r:p1rdt524-p1rdt653) Units=km Length=0.138714 bus1=p1rdt524-p1rdt653x.3 bus2=p1rdt524.3 switch=n enabled=y phases=1 Linecode=1P_OH_AL_ACSR_#2_Sparrow_12_47_0_1_1_1_1_1_1_1_1_1_1_1_1_1_1_1_1_1_1_1_1_1_1_1_1_1_1_1_1_1

New Line.l(r:p1rdt5000-p1rdt6709)_s0 Units=km Length=0.189227 bus1=p1rdt5000-p1rdt6709xx.1 bus2=p1rdt5000-p1rdt6709x.1 switch=n enabled=y phases=1 Linecode=1P_OH_AL_ACSR_#2_Sparrow_12_47_0_1_1_1_1_1_1_1_1_1_1_1_1_1_1_1_1_1_1_1_1_1_1_1_1_1_1_1_1_1

New Line.l(r:p1rdt5000-p1rdt6709)_s1 Units=km Length=0.458852 bus1=p1rdt5000-p1rdt6709x.1 bus2=p1rdt5000.1 switch=n enabled=y phases=1 Linecode=1P_OH_AL_ACSR_#2_Sparrow_12_47_0_1_1_1_1_1_1_1_1_1_1_1_1_1_1_1_1_1_1_1_1_1_1_1_1_1_1_1_1_1

New Line.l(r:p1rdt4383-p1rdt7312)_s0 Units=km Length=0.294201 bus1=p1rdt7312.2 bus2=p1rdt4383-p1rdt7312x.2 switch=n enabled=y phases=1 Linecode=1P_OH_AL_ACSR_#2_Sparrow_12_47_0_1_1_1_1_1_1_1_1_1_1_1_1_1_1_1_1_1_1_1_1_1_1_1_1_1_1_1_1_1

New Line.l(r:p1rdt4383-p1rdt7312)_s1 Units=km Length=0.0248012 bus1=p1rdt4383-p1rdt7312x.2 bus2=p1rdt4383.2 switch=n enabled=y phases=1 Linecode=1P_OH_AL_ACSR_#2_Sparrow_12_47_0_1_1_1_1_1_1_1_1_1_1_1_1_1_1_1_1_1_1_1_1_1_1_1_1_1_1_1_1_1

New Line.l(r:p1rdt7312-p1rdt7609) Units=km Length=0.16271 bus1=p1rdt7312.2 bus2=p1rdt7609.2 switch=n enabled=y phases=1 Linecode=1P_OH_AL_ACSR_#2_Sparrow_12_47_0_1_1_1_1_1_1_1_1_1_1_1_1_1_1_1_1_1_1_1_1_1_1_1_1_1_1_1_1_1

New Line.l(r:p1rdt6709-p1rdt7312)_s0 Units=km Length=0.284999 bus1=p1rdt6709-p1rdt7312x.2 bus2=p1rdt6709-p1rdt7312xx.2 switch=n enabled=y phases=1 Linecode=1P_OH_AL_ACSR_#2_Sparrow_12_47_0_1_1_1_1_1_1_1_1_1_1_1_1_1_1_1_1_1_1_1_1_1_1_1_1_1_1_1_1_1

New Line.l(r:p1rdt6709-p1rdt7312)_s1 Units=km Length=0.0878628 bus1=p1rdt6709-p1rdt7312xx.2 bus2=p1rdt7312.2 switch=n enabled=y phases=1 Linecode=1P_OH_AL_ACSR_#2_Sparrow_12_47_0_1_1_1_1_1_1_1_1_1_1_1_1_1_1_1_1_1_1_1_1_1_1_1_1_1_1_1_1_1

New Line.l(r:p1rdt136-p1rdt8314) Units=km Length=0.20333 bus1=p1rdt8314.3 bus2=p1rdt136.3 switch=n enabled=y phases=1 Linecode=1P_OH_AL_ACSR_#2_Sparrow_12_47_0_1_1_1_1_1_1_1_1_1_1_1_1_1_1_1_1_1_1_1_1_1_1_1_1_1_1_1_1_1

New Line.l(r:p1rdt4384-p1rdt8314) Units=km Length=0.0894143 bus1=p1rdt4384-p1rdt8314x.3 bus2=p1rdt8314.3 switch=n enabled=y phases=1 Linecode=1P_OH_AL_ACSR_#2_Sparrow_12_47_0_1_1_1_1_1_1_1_1_1_1_1_1_1_1_1_1_1_1_1_1_1_1_1_1_1_1_1_1_1

New Line.l(r:p1rdt4782-p1rdt8313) Units=km Length=0.270363 bus1=p1rdt8313.2 bus2=p1rdt4782.2 switch=n enabled=y phases=1 Linecode=1P_OH_AL_ACSR_#2_Sparrow_12_47_0_1_1_1_1_1_1_1_1_1_1_1_1_1_1_1_1_1_1_1_1_1_1_1_1_1_1_1_1_1

New Line.l(r:p1rdt805-p1rdt8313) Units=km Length=0.0382019 bus1=p1rdt805.2 bus2=p1rdt8313.2 switch=n enabled=y phases=1 Linecode=1P_OH_AL_ACSR_#2_Sparrow_12_47_0_1_1_1_1_1_1_1_1_1_1_1_1_1_1_1_1_1_1_1_1_1_1_1_1_1_1_1_1_1

New Line.l(r:p1rdt805-p1rdt8220) Units=km Length=0.36118400000000006 bus1=p1rdt8220.2 bus2=p1rdt805.2 switch=n enabled=y phases=1 Linecode=1P_OH_AL_ACSR_#2_Sparrow_12_47_0_1_1_1_1_1_1_1_1_1_1_1_1_1_1_1_1_1_1_1_1_1_1_1_1_1_1_1_1_1

New Line.l(r:p1rdt6337-p1rdt8220)_s0 Units=km Length=0.270517 bus1=p1rdt6337.2 bus2=p1rdt6337-p1rdt8220x.2 switch=n enabled=y phases=1 Linecode=1P_OH_AL_ACSR_#2_Sparrow_12_47_0_1_1_1_1_1_1_1_1_1_1_1_1_1_1_1_1_1_1_1_1_1_1_1_1_1_1_1_1_1

New Line.l(r:p1rdt6337-p1rdt8220)_s1 Units=km Length=0.281377 bus1=p1rdt6337-p1rdt8220x.2 bus2=p1rdt8220.2 switch=n enabled=y phases=1 Linecode=1P_OH_AL_ACSR_#2_Sparrow_12_47_0_1_1_1_1_1_1_1_1_1_1_1_1_1_1_1_1_1_1_1_1_1_1_1_1_1_1_1_1_1

New Line.l(r:p1rdt401-p1rdt6337) Units=km Length=0.0619365 bus1=p1rdt401.2 bus2=p1rdt6337.2 switch=n enabled=y phases=1 Linecode=1P_OH_AL_ACSR_#2_Sparrow_12_47_0_1_1_1_1_1_1_1_1_1_1_1_1_1_1_1_1_1_1_1_1_1_1_1_1_1_1_1_1_1

New Line.l(r:p1rdt401-p1rdt6943)_s0 Units=km Length=0.151721 bus1=p1rdt401-p1rdt6943xxx.2 bus2=p1rdt401-p1rdt6943xx.2 switch=n enabled=y phases=1 Linecode=1P_UG_AL_#2_15_12_47_0_1_1_1_1_1_1_1_1_1_1_1_1_1_1_1_1_1_1_1_1_1_1_1_1_1_1_1_1_1

New Line.l(r:p1rdt401-p1rdt6943)_s1 Units=km Length=0.377632 bus1=p1rdt401-p1rdt6943xx.2 bus2=p1rdt401-p1rdt6943x.2 switch=n enabled=y phases=1 Linecode=1P_OH_AL_ACSR_#2_Sparrow_12_47_0_1_1_1_1_1_1_1_1_1_1_1_1_1_1_1_1_1_1_1_1_1_1_1_1_1_1_1_1_1

New Line.l(r:p1rdt4999-p1rdt7770) Units=km Length=0.0634045 bus1=p1rdt4999.1 bus2=p1rdt7770.1 switch=n enabled=y phases=1 Linecode=1P_OH_AL_ACSR_#2_Sparrow_12_47_0_1_1_1_1_1_1_1_1_1_1_1_1_1_1_1_1_1_1_1_1_1_1_1_1_1_1_1_1_1

New Line.l(r:p1rdt4999-p1rdt5785) Units=km Length=0.314141 bus1=p1rdt4999-p1rdt5785x.1 bus2=p1rdt4999.1 switch=n enabled=y phases=1 Linecode=1P_OH_AL_ACSR_#2_Sparrow_12_47_0_1_1_1_1_1_1_1_1_1_1_1_1_1_1_1_1_1_1_1_1_1_1_1_1_1_1_1_1_1

New Line.l(r:p1rdt5786-p1rdt651) Units=km Length=0.0506977 bus1=p1rdt5786.3 bus2=p1rdt651.3 switch=n enabled=y phases=1 Linecode=1P_OH_AL_ACSR_#2_Sparrow_12_47_0_1_1_1_1_1_1_1_1_1_1_1_1_1_1_1_1_1_1_1_1_1_1_1_1_1_1_1_1_1

New Line.l(r:p1rdt5709-p1rdt5786)_s0 Units=km Length=0.0877215 bus1=p1rdt5786.3 bus2=p1rdt5709-p1rdt5786x.3 switch=n enabled=y phases=1 Linecode=1P_OH_AL_ACSR_#2_Sparrow_12_47_0_1_1_1_1_1_1_1_1_1_1_1_1_1_1_1_1_1_1_1_1_1_1_1_1_1_1_1_1_1

New Line.l(r:p1rdt5709-p1rdt5786)_s1 Units=km Length=1.61429 bus1=p1rdt5709-p1rdt5786x.3 bus2=p1rdt5709.3 switch=n enabled=y phases=1 Linecode=1P_OH_AL_ACSR_#2_Sparrow_12_47_0_1_1_1_1_1_1_1_1_1_1_1_1_1_1_1_1_1_1_1_1_1_1_1_1_1_1_1_1_1

New Line.l(r:p1rdt5786-p1rdt8122) Units=km Length=0.17663 bus1=p1rdt5786.3 bus2=p1rdt8122.3 switch=n enabled=y phases=1 Linecode=1P_OH_AL_ACSR_#2_Sparrow_12_47_0_1_1_1_1_1_1_1_1_1_1_1_1_1_1_1_1_1_1_1_1_1_1_1_1_1_1_1_1_1

New Line.l(r:p1rdt5252-p1rdt5786)_s0 Units=km Length=0.190751 bus1=p1rdt5252.3 bus2=p1rdt5252-p1rdt5786x.3 switch=n enabled=y phases=1 Linecode=1P_OH_AL_ACSR_#2_Sparrow_12_47_0_1_1_1_1_1_1_1_1_1_1_1_1_1_1_1_1_1_1_1_1_1_1_1_1_1_1_1_1_1

New Line.l(r:p1rdt5252-p1rdt5786)_s1 Units=km Length=0.517025 bus1=p1rdt5252-p1rdt5786x.3 bus2=p1rdt5786.3 switch=n enabled=y phases=1 Linecode=1P_OH_AL_ACSR_#2_Sparrow_12_47_0_1_1_1_1_1_1_1_1_1_1_1_1_1_1_1_1_1_1_1_1_1_1_1_1_1_1_1_1_1

New Line.l(r:p1rdt5252-p1rdt5785) Units=km Length=0.186627 bus1=p1rdt5252-p1rdt5785x.3 bus2=p1rdt5252.3 switch=n enabled=y phases=1 Linecode=1P_OH_AL_ACSR_#2_Sparrow_12_47_0_1_1_1_1_1_1_1_1_1_1_1_1_1_1_1_1_1_1_1_1_1_1_1_1_1_1_1_1_1

New Line.l(r:p1rdt4857-p1rdt6190) Units=km Length=0.229649 bus1=p1rdt4857.1 bus2=p1rdt6190.1 switch=n enabled=y phases=1 Linecode=1P_OH_AL_ACSR_#2_Sparrow_12_47_0_1_1_1_1_1_1_1_1_1_1_1_1_1_1_1_1_1_1_1_1_1_1_1_1_1_1_1_1_1

New Line.l(r:p1rdt2293-p1rdt4857) Units=km Length=0.261568 bus1=p1rdt2293.1 bus2=p1rdt4857.1 switch=n enabled=y phases=1 Linecode=1P_OH_AL_ACSR_#2_Sparrow_12_47_0_1_1_1_1_1_1_1_1_1_1_1_1_1_1_1_1_1_1_1_1_1_1_1_1_1_1_1_1_1

New Line.l(r:p1rdt2293-p1rdt2294)_s0 Units=km Length=0.36419 bus1=p1rdt2293-p1rdt2294xx.1 bus2=p1rdt2293-p1rdt2294x.1 switch=n enabled=y phases=1 Linecode=1P_OH_AL_ACSR_#2_Sparrow_12_47_0_1_1_1_1_1_1_1_1_1_1_1_1_1_1_1_1_1_1_1_1_1_1_1_1_1_1_1_1_1

New Line.l(r:p1rdt2293-p1rdt2294)_s1 Units=km Length=0.082133 bus1=p1rdt2293-p1rdt2294x.1 bus2=p1rdt2293.1 switch=n enabled=y phases=1 Linecode=1P_OH_AL_ACSR_#2_Sparrow_12_47_0_1_1_1_1_1_1_1_1_1_1_1_1_1_1_1_1_1_1_1_1_1_1_1_1_1_1_1_1_1

New Line.l(r:p1rdt7369-p1rdt8221)_s0 Units=km Length=0.0997915 bus1=p1rdt8221.1 bus2=p1rdt7369-p1rdt8221x.1 switch=n enabled=y phases=1 Linecode=1P_OH_AL_ACSR_#2_Sparrow_12_47_0_1_1_1_1_1_1_1_1_1_1_1_1_1_1_1_1_1_1_1_1_1_1_1_1_1_1_1_1_1

New Line.l(r:p1rdt7369-p1rdt8221)_s1 Units=km Length=0.0482105 bus1=p1rdt7369-p1rdt8221x.1 bus2=p1rdt7369.1 switch=n enabled=y phases=1 Linecode=1P_OH_AL_ACSR_#2_Sparrow_12_47_0_1_1_1_1_1_1_1_1_1_1_1_1_1_1_1_1_1_1_1_1_1_1_1_1_1_1_1_1_1

New Line.l(r:p1rdt6710-p1rdt8221) Units=km Length=0.237166 bus1=p1rdt6710-p1rdt8221x.1 bus2=p1rdt8221.1 switch=n enabled=y phases=1 Linecode=1P_OH_AL_ACSR_#2_Sparrow_12_47_0_1_1_1_1_1_1_1_1_1_1_1_1_1_1_1_1_1_1_1_1_1_1_1_1_1_1_1_1_1

New Line.l(r:p1rdt4858-p1rdt6463) Units=km Length=0.0878462 bus1=p1rdt6463.2 bus2=p1rdt4858.2 switch=n enabled=y phases=1 Linecode=1P_OH_AL_ACSR_#2_Sparrow_12_47_0_1_1_1_1_1_1_1_1_1_1_1_1_1_1_1_1_1_1_1_1_1_1_1_1_1_1_1_1_1

New Line.l(r:p1rdt6397-p1rdt7484)_s0 Units=km Length=0.334005 bus1=p1rdt7484.2 bus2=p1rdt6397-p1rdt7484x.2 switch=n enabled=y phases=1 Linecode=1P_OH_AL_ACSR_#2_Sparrow_12_47_0_1_1_1_1_1_1_1_1_1_1_1_1_1_1_1_1_1_1_1_1_1_1_1_1_1_1_1_1_1

New Line.l(r:p1rdt6397-p1rdt7484)_s1 Units=km Length=0.0850192 bus1=p1rdt6397-p1rdt7484x.2 bus2=p1rdt6397.2 switch=n enabled=y phases=1 Linecode=1P_OH_AL_ACSR_#2_Sparrow_12_47_0_1_1_1_1_1_1_1_1_1_1_1_1_1_1_1_1_1_1_1_1_1_1_1_1_1_1_1_1_1

New Line.l(r:p1rdt6463-p1rdt7484) Units=km Length=0.589222 bus1=p1rdt6463.2 bus2=p1rdt7484.2 switch=n enabled=y phases=1 Linecode=1P_OH_AL_ACSR_#2_Sparrow_12_47_0_1_1_1_1_1_1_1_1_1_1_1_1_1_1_1_1_1_1_1_1_1_1_1_1_1_1_1_1_1

New Line.l(r:p1rdt3587-p1rdt6463) Units=km Length=0.159533 bus1=p1rdt3587.2 bus2=p1rdt6463.2 switch=n enabled=y phases=1 Linecode=1P_OH_AL_ACSR_#2_Sparrow_12_47_0_1_1_1_1_1_1_1_1_1_1_1_1_1_1_1_1_1_1_1_1_1_1_1_1_1_1_1_1_1

New Line.l(r:p1rdt1612-p1rdt3587) Units=km Length=0.253899 bus1=p1rdt1612-p1rdt3587x.2 bus2=p1rdt3587.2 switch=n enabled=y phases=1 Linecode=1P_OH_AL_ACSR_#2_Sparrow_12_47_0_1_1_1_1_1_1_1_1_1_1_1_1_1_1_1_1_1_1_1_1_1_1_1_1_1_1_1_1_1

New Line.l(r:p1rdt4476-p1rdt525) Units=km Length=0.502997 bus1=p1rdt4476-p1rdt525x.3 bus2=p1rdt525.3 switch=n enabled=y phases=1 Linecode=1P_OH_AL_ACSR_#2_Sparrow_12_47_0_1_1_1_1_1_1_1_1_1_1_1_1_1_1_1_1_1_1_1_1_1_1_1_1_1_1_1_1_1

New Line.l(r:p1rdt4476-p1rdt6839) Units=km Length=0.164033 bus1=p1rdt4476-p1rdt6839x.2 bus2=p1rdt6839.2 switch=n enabled=y phases=1 Linecode=1P_OH_AL_ACSR_#2_Sparrow_12_47_0_1_1_1_1_1_1_1_1_1_1_1_1_1_1_1_1_1_1_1_1_1_1_1_1_1_1_1_1_1

New Line.l(r:p1rdt278-p1rdt7927) Units=km Length=0.27725600000000006 bus1=p1rdt7927.1 bus2=p1rdt278.1 switch=n enabled=y phases=1 Linecode=1P_OH_AL_ACSR_#2_Sparrow_12_47_0_1_1_1_1_1_1_1_1_1_1_1_1_1_1_1_1_1_1_1_1_1_1_1_1_1_1_1_1_1

New Line.l(r:p1rdt18-p1rdt7927) Units=km Length=0.073035 bus1=p1rdt18.1 bus2=p1rdt7927.1 switch=n enabled=y phases=1 Linecode=1P_OH_AL_ACSR_#2_Sparrow_12_47_0_1_1_1_1_1_1_1_1_1_1_1_1_1_1_1_1_1_1_1_1_1_1_1_1_1_1_1_1_1

New Line.l(r:p1rdt18-p1rdt6396) Units=km Length=0.0854139 bus1=p1rdt6396.1 bus2=p1rdt18.1 switch=n enabled=y phases=1 Linecode=1P_OH_AL_ACSR_#2_Sparrow_12_47_0_1_1_1_1_1_1_1_1_1_1_1_1_1_1_1_1_1_1_1_1_1_1_1_1_1_1_1_1_1

New Line.l(r:p1rdt6396-p1rdt7986) Units=km Length=2.1904300000000005 bus1=p1rdt6396-p1rdt7986x.1 bus2=p1rdt6396.1 switch=n enabled=y phases=1 Linecode=1P_OH_AL_ACSR_#2_Sparrow_12_47_0_1_1_1_1_1_1_1_1_1_1_1_1_1_1_1_1_1_1_1_1_1_1_1_1_1_1_1_1_1

New Line.l(r:p1rdt2899-p1rdt806) Units=km Length=0.137963 bus1=p1rdt2899.2 bus2=p1rdt806.2 switch=n enabled=y phases=1 Linecode=1P_OH_AL_ACSR_#2_Sparrow_12_47_0_1_1_1_1_1_1_1_1_1_1_1_1_1_1_1_1_1_1_1_1_1_1_1_1_1_1_1_1_1

New Line.l(r:p1rdt2899-p1rdt5097) Units=km Length=0.11940200000000001 bus1=p1rdt5097.2 bus2=p1rdt2899.2 switch=n enabled=y phases=1 Linecode=1P_OH_AL_ACSR_#2_Sparrow_12_47_0_1_1_1_1_1_1_1_1_1_1_1_1_1_1_1_1_1_1_1_1_1_1_1_1_1_1_1_1_1

New Line.l(r:p1rdt2602-p1rdt5097)_s0 Units=km Length=0.154714 bus1=p1rdt2602.2 bus2=p1rdt2602-p1rdt5097x.2 switch=n enabled=y phases=1 Linecode=1P_OH_AL_ACSR_#2_Sparrow_12_47_0_1_1_1_1_1_1_1_1_1_1_1_1_1_1_1_1_1_1_1_1_1_1_1_1_1_1_1_1_1

New Line.l(r:p1rdt2602-p1rdt5097)_s1 Units=km Length=0.0101157 bus1=p1rdt2602-p1rdt5097x.2 bus2=p1rdt5097.2 switch=n enabled=y phases=1 Linecode=1P_OH_AL_ACSR_#2_Sparrow_12_47_0_1_1_1_1_1_1_1_1_1_1_1_1_1_1_1_1_1_1_1_1_1_1_1_1_1_1_1_1_1

New Line.l(r:p1rdt2602-p1rdt2603) Units=km Length=0.0348311 bus1=p1rdt2603.2 bus2=p1rdt2602.2 switch=n enabled=y phases=1 Linecode=1P_OH_AL_ACSR_#2_Sparrow_12_47_0_1_1_1_1_1_1_1_1_1_1_1_1_1_1_1_1_1_1_1_1_1_1_1_1_1_1_1_1_1

New Line.l(r:p1rdt2603-p1rdt3307) Units=km Length=0.0774109 bus1=p1rdt2603-p1rdt3307x.2 bus2=p1rdt2603.2 switch=n enabled=y phases=1 Linecode=1P_OH_AL_ACSR_#2_Sparrow_12_47_0_1_1_1_1_1_1_1_1_1_1_1_1_1_1_1_1_1_1_1_1_1_1_1_1_1_1_1_1_1

New Line.l(r:p1rdt3307-p1rdt4385) Units=km Length=0.219876 bus1=p1rdt3307-p1rdt4385x.1 bus2=p1rdt4385.1 switch=n enabled=y phases=1 Linecode=1P_OH_AL_ACSR_#2_Sparrow_12_47_0_1_1_1_1_1_1_1_1_1_1_1_1_1_1_1_1_1_1_1_1_1_1_1_1_1_1_1_1_1

New Line.l(r:p1rdt1841-p1rdt5850)_s0 Units=km Length=0.14664 bus1=p1rdt1841-p1rdt5850x.1 bus2=p1rdt1841-p1rdt5850xx.1 switch=n enabled=y phases=1 Linecode=1P_OH_AL_ACSR_#2_Sparrow_12_47_0_1_1_1_1_1_1_1_1_1_1_1_1_1_1_1_1_1_1_1_1_1_1_1_1_1_1_1_1_1

New Line.l(r:p1rdt1841-p1rdt5850)_s1 Units=km Length=0.112649 bus1=p1rdt1841-p1rdt5850xx.1 bus2=p1rdt5850.1 switch=n enabled=y phases=1 Linecode=1P_OH_AL_ACSR_#2_Sparrow_12_47_0_1_1_1_1_1_1_1_1_1_1_1_1_1_1_1_1_1_1_1_1_1_1_1_1_1_1_1_1_1

New Line.l(r:p1rdt3397-p1rdt6999) Units=km Length=0.661746 bus1=p1rdt6999.1.2.3 bus2=p1rdt3397.1.2.3 switch=n enabled=y phases=3 Linecode=3P_OH_AL_ACSR_4/0_Penguin_12_47_0_3_3_3_3_3_3_3_3_3_3_3_3_3_3_3_3_3_3_3_3_3_3_3_3_3_3_3_3_3

New Line.l(r:p1rdt4384-p1rdt6709)_s0 Units=km Length=0.0554771 bus1=p1rdt4384.1.2.3 bus2=p1rdt4384-p1rdt6709x.1.2.3 switch=n enabled=y phases=3 Linecode=3P_OH_AL_ACSR_4/0_Penguin_12_47_0_3_3_3_3_3_3_3_3_3_3_3_3_3_3_3_3_3_3_3_3_3_3_3_3_3_3_3_3_3

New Line.l(r:p1rdt4384-p1rdt6709)_s1 Units=km Length=0.524997 bus1=p1rdt4384-p1rdt6709x.1.2.3 bus2=p1rdt6709.1.2.3 switch=n enabled=y phases=3 Linecode=3P_OH_AL_ACSR_4/0_Penguin_12_47_0_3_3_3_3_3_3_3_3_3_3_3_3_3_3_3_3_3_3_3_3_3_3_3_3_3_3_3_3_3

New Line.l(r:p1rdt4384-p1rdt4475) Units=km Length=0.265587 bus1=p1rdt4475.1.2.3 bus2=p1rdt4384.1.2.3 switch=n enabled=y phases=3 Linecode=3P_OH_AL_ACSR_4/0_Penguin_12_47_0_3_3_3_3_3_3_3_3_3_3_3_3_3_3_3_3_3_3_3_3_3_3_3_3_3_3_3_3_3

New Line.l(r:p1rdt3395-p1rdt4475) Units=km Length=0.180472 bus1=p1rdt3395.1.2.3 bus2=p1rdt4475.1.2.3 switch=n enabled=y phases=3 Linecode=3P_OH_AL_ACSR_4/0_Penguin_12_47_0_3_3_3_3_3_3_3_3_3_3_3_3_3_3_3_3_3_3_3_3_3_3_3_3_3_3_3_3_3

New Line.l(r:p1rdt1951-p1rdt6943)_s0 Units=km Length=0.115063 bus1=p1rdt1951-p1rdt6943x.1.2.3 bus2=p1rdt1951-p1rdt6943xx.1.2.3 switch=n enabled=y phases=3 Linecode=3P_UG_AL_4/0_25_12_47_0_3_3_3_3_3_3_3_3_3_3_3_3_3_3_3_3_3_3_3_3_3_3_3_3_3_3_3_3_3

New Line.l(r:p1rdt1951-p1rdt6943)_s1 Units=km Length=0.118468 bus1=p1rdt1951-p1rdt6943xx.1.2.3 bus2=p1rdt1951-p1rdt6943xxx.1.2.3 switch=n enabled=y phases=3 Linecode=3P_OH_AL_ACSR_4/0_Penguin_12_47_0_3_3_3_3_3_3_3_3_3_3_3_3_3_3_3_3_3_3_3_3_3_3_3_3_3_3_3_3_3

New Line.l(r:p1rdt1951-p1rdt5181) Units=km Length=0.195984 bus1=p1rdt5181.1.2.3 bus2=p1rdt1951.1.2.3 switch=n enabled=y phases=3 Linecode=3P_OH_AL_ACSR_4/0_Penguin_12_47_0_3_3_3_3_3_3_3_3_3_3_3_3_3_3_3_3_3_3_3_3_3_3_3_3_3_3_3_3_3

New Line.l(r:p1rdt5785-p1rdt7311) Units=km Length=0.0951439 bus1=p1rdt7311.1.2.3 bus2=p1rdt5785.1.2.3 switch=n enabled=y phases=3 Linecode=3P_OH_AL_ACSR_4/0_Penguin_12_47_0_3_3_3_3_3_3_3_3_3_3_3_3_3_3_3_3_3_3_3_3_3_3_3_3_3_3_3_3_3

New Line.l(r:p1rdt4223-p1rdt7311) Units=km Length=0.0732535 bus1=p1rdt4223-p1rdt7311x.1.2.3 bus2=p1rdt4223-p1rdt7311xx.1.2.3 switch=n enabled=y phases=3 Linecode=3P_UG_AL_4/0_25_12_47_0_3_3_3_3_3_3_3_3_3_3_3_3_3_3_3_3_3_3_3_3_3_3_3_3_3_3_3_3_3

New Line.l(r:p1rdt135-p1rdt4223)_s0 Units=km Length=0.23915200000000003 bus1=p1rdt135.1.2.3 bus2=p1rdt135-p1rdt4223x.1.2.3 switch=n enabled=y phases=3 Linecode=3P_OH_AL_ACSR_4/0_Penguin_12_47_0_3_3_3_3_3_3_3_3_3_3_3_3_3_3_3_3_3_3_3_3_3_3_3_3_3_3_3_3_3

New Line.l(r:p1rdt135-p1rdt4223)_s1 Units=km Length=0.026200800000000003 bus1=p1rdt135-p1rdt4223x.1.2.3 bus2=p1rdt4223.1.2.3 switch=n enabled=y phases=3 Linecode=3P_OH_AL_ACSR_4/0_Penguin_12_47_0_3_3_3_3_3_3_3_3_3_3_3_3_3_3_3_3_3_3_3_3_3_3_3_3_3_3_3_3_3

New Line.l(r:p1rdt135-p1rdt2294) Units=km Length=0.124002 bus1=p1rdt2294.1.2.3 bus2=p1rdt135.1.2.3 switch=n enabled=y phases=3 Linecode=3P_OH_AL_ACSR_4/0_Penguin_12_47_0_3_3_3_3_3_3_3_3_3_3_3_3_3_3_3_3_3_3_3_3_3_3_3_3_3_3_3_3_3

New Line.l(r:p1rdt1509-p1rdt2294) Units=km Length=0.258142 bus1=p1rdt1509.1.2.3 bus2=p1rdt2294.1.2.3 switch=n enabled=y phases=3 Linecode=3P_OH_AL_ACSR_4/0_Penguin_12_47_0_3_3_3_3_3_3_3_3_3_3_3_3_3_3_3_3_3_3_3_3_3_3_3_3_3_3_3_3_3

New Line.l(r:p1rdt1509-p1rdt4856) Units=km Length=0.0830341 bus1=p1rdt4856.1.2.3 bus2=p1rdt1509.1.2.3 switch=n enabled=y phases=3 Linecode=3P_OH_AL_ACSR_4/0_Penguin_12_47_0_3_3_3_3_3_3_3_3_3_3_3_3_3_3_3_3_3_3_3_3_3_3_3_3_3_3_3_3_3

New Line.l(r:p1rdt4856-p1rdt5181) Units=km Length=0.259482 bus1=p1rdt5181.1.2.3 bus2=p1rdt4856.1.2.3 switch=n enabled=y phases=3 Linecode=3P_OH_AL_ACSR_4/0_Penguin_12_47_0_3_3_3_3_3_3_3_3_3_3_3_3_3_3_3_3_3_3_3_3_3_3_3_3_3_3_3_3_3

New Line.l(r:p1rdt2402-p1rdt5181) Units=km Length=0.6062670000000001 bus1=p1rdt2402.1.2.3 bus2=p1rdt5181.1.2.3 switch=n enabled=y phases=3 Linecode=3P_OH_AL_ACSR_4/0_Penguin_12_47_0_3_3_3_3_3_3_3_3_3_3_3_3_3_3_3_3_3_3_3_3_3_3_3_3_3_3_3_3_3

New Line.l(r:p1rdt2402-p1rdt4712) Units=km Length=0.111894 bus1=p1rdt4712.1.2.3 bus2=p1rdt2402.1.2.3 switch=n enabled=y phases=3 Linecode=3P_OH_AL_ACSR_4/0_Penguin_12_47_0_3_3_3_3_3_3_3_3_3_3_3_3_3_3_3_3_3_3_3_3_3_3_3_3_3_3_3_3_3

New Line.l(r:p1rdt4712-p1rdt6710) Units=km Length=0.22509500000000002 bus1=p1rdt6710.1.2.3 bus2=p1rdt4712.1.2.3 switch=n enabled=y phases=3 Linecode=3P_OH_AL_ACSR_4/0_Penguin_12_47_0_3_3_3_3_3_3_3_3_3_3_3_3_3_3_3_3_3_3_3_3_3_3_3_3_3_3_3_3_3

New Line.l(r:p1rdt3395-p1rdt6710) Units=km Length=0.240227 bus1=p1rdt3395.1.2.3 bus2=p1rdt6710.1.2.3 switch=n enabled=y phases=3 Linecode=3P_OH_AL_ACSR_4/0_Penguin_12_47_0_3_3_3_3_3_3_3_3_3_3_3_3_3_3_3_3_3_3_3_3_3_3_3_3_3_3_3_3_3

New Line.l(r:p1rdt3395-p1rdt653) Units=km Length=0.12149700000000001 bus1=p1rdt653.1.2.3 bus2=p1rdt3395.1.2.3 switch=n enabled=y phases=3 Linecode=3P_OH_AL_ACSR_4/0_Penguin_12_47_0_3_3_3_3_3_3_3_3_3_3_3_3_3_3_3_3_3_3_3_3_3_3_3_3_3_3_3_3_3

New Line.l(r:p1rdt1612-p1rdt653) Units=km Length=0.278951 bus1=p1rdt1612.1.2.3 bus2=p1rdt653.1.2.3 switch=n enabled=y phases=3 Linecode=3P_OH_AL_ACSR_4/0_Penguin_12_47_0_3_3_3_3_3_3_3_3_3_3_3_3_3_3_3_3_3_3_3_3_3_3_3_3_3_3_3_3_3

New Line.l(r:p1rdt1612-p1rdt2799) Units=km Length=0.504181 bus1=p1rdt2799.1.2.3 bus2=p1rdt1612.1.2.3 switch=n enabled=y phases=3 Linecode=3P_OH_AL_ACSR_4/0_Penguin_12_47_0_3_3_3_3_3_3_3_3_3_3_3_3_3_3_3_3_3_3_3_3_3_3_3_3_3_3_3_3_3

New Line.l(r:p1rdt4476-p1rdt7986)_s0 Units=km Length=0.639933 bus1=p1rdt4476.1.2.3 bus2=p1rdt4476-p1rdt7986x.1.2.3 switch=n enabled=y phases=3 Linecode=3P_OH_AL_ACSR_4/0_Penguin_12_47_0_3_3_3_3_3_3_3_3_3_3_3_3_3_3_3_3_3_3_3_3_3_3_3_3_3_3_3_3_3

New Line.l(r:p1rdt4476-p1rdt7986)_s1 Units=km Length=0.136626 bus1=p1rdt4476-p1rdt7986x.1.2.3 bus2=p1rdt7986.1.2.3 switch=n enabled=y phases=3 Linecode=3P_OH_AL_ACSR_4/0_Penguin_12_47_0_3_3_3_3_3_3_3_3_3_3_3_3_3_3_3_3_3_3_3_3_3_3_3_3_3_3_3_3_3

New Line.l(r:p1rdt2799-p1rdt4476)_s0 Units=km Length=0.238756 bus1=p1rdt2799.1.2.3 bus2=p1rdt2799-p1rdt4476x.1.2.3 switch=n enabled=y phases=3 Linecode=3P_OH_AL_ACSR_4/0_Penguin_12_47_0_3_3_3_3_3_3_3_3_3_3_3_3_3_3_3_3_3_3_3_3_3_3_3_3_3_3_3_3_3

New Line.l(r:p1rdt2799-p1rdt4476)_s1 Units=km Length=0.352039 bus1=p1rdt2799-p1rdt4476x.1.2.3 bus2=p1rdt4476.1.2.3 switch=n enabled=y phases=3 Linecode=3P_OH_AL_ACSR_4/0_Penguin_12_47_0_3_3_3_3_3_3_3_3_3_3_3_3_3_3_3_3_3_3_3_3_3_3_3_3_3_3_3_3_3

New Line.l(r:p1rdt2799-p1rdt3982) Units=km Length=0.132039 bus1=p1rdt3982.1.2.3 bus2=p1rdt2799.1.2.3 switch=n enabled=y phases=3 Linecode=3P_OH_AL_ACSR_4/0_Penguin_12_47_0_3_3_3_3_3_3_3_3_3_3_3_3_3_3_3_3_3_3_3_3_3_3_3_3_3_3_3_3_3

New Line.l(r:p1rdt20-p1rdt3982) Units=km Length=0.209841 bus1=p1rdt20.1.2.3 bus2=p1rdt3982.1.2.3 switch=n enabled=y phases=3 Linecode=3P_OH_AL_ACSR_4/0_Penguin_12_47_0_3_3_3_3_3_3_3_3_3_3_3_3_3_3_3_3_3_3_3_3_3_3_3_3_3_3_3_3_3

New Line.l(r:p1rdt20-p1rdt3398) Units=km Length=0.146351 bus1=p1rdt3398.1.2.3 bus2=p1rdt20.1.2.3 switch=n enabled=y phases=3 Linecode=3P_OH_AL_ACSR_4/0_Penguin_12_47_0_3_3_3_3_3_3_3_3_3_3_3_3_3_3_3_3_3_3_3_3_3_3_3_3_3_3_3_3_3

New Line.l(r:p1rdt1841-p1rdt3307) Units=km Length=0.05497610000000001 bus1=p1rdt1841.1.2.3 bus2=p1rdt3307.1.2.3 switch=n enabled=y phases=3 Linecode=3P_OH_AL_ACSR_4/0_Penguin_12_47_0_3_3_3_3_3_3_3_3_3_3_3_3_3_3_3_3_3_3_3_3_3_3_3_3_3_3_3_3_3

New Line.l(r:p1rdt1841-p1rdt5253)_s0 Units=km Length=0.209597 bus1=p1rdt5253.1.2.3 bus2=p1rdt1841-p1rdt5253x.1.2.3 switch=n enabled=y phases=3 Linecode=3P_OH_AL_ACSR_4/0_Penguin_12_47_0_3_3_3_3_3_3_3_3_3_3_3_3_3_3_3_3_3_3_3_3_3_3_3_3_3_3_3_3_3

New Line.l(r:p1rdt1841-p1rdt5253)_s1 Units=km Length=0.0539812 bus1=p1rdt1841-p1rdt5253x.1.2.3 bus2=p1rdt1841.1.2.3 switch=n enabled=y phases=3 Linecode=3P_OH_AL_ACSR_4/0_Penguin_12_47_0_3_3_3_3_3_3_3_3_3_3_3_3_3_3_3_3_3_3_3_3_3_3_3_3_3_3_3_3_3

New Line.l(r:p1rdt3398-p1rdt5253) Units=km Length=0.324582 bus1=p1rdt3398.1.2.3 bus2=p1rdt5253.1.2.3 switch=n enabled=y phases=3 Linecode=3P_OH_AL_ACSR_4/0_Penguin_12_47_0_3_3_3_3_3_3_3_3_3_3_3_3_3_3_3_3_3_3_3_3_3_3_3_3_3_3_3_3_3

New Line.l(r:p1rdt3398-p1rdt7665) Units=km Length=0.0697601 bus1=p1rdt7665.1.2.3 bus2=p1rdt3398.1.2.3 switch=n enabled=y phases=3 Linecode=3P_OH_AL_ACSR_4/0_Penguin_12_47_0_3_3_3_3_3_3_3_3_3_3_3_3_3_3_3_3_3_3_3_3_3_3_3_3_3_3_3_3_3

New Line.l(r:p1rdt7665-p1rdt8171) Units=km Length=0.230527 bus1=p1rdt8171.1.2.3 bus2=p1rdt7665.1.2.3 switch=n enabled=y phases=3 Linecode=3P_OH_AL_ACSR_4/0_Penguin_12_47_0_3_3_3_3_3_3_3_3_3_3_3_3_3_3_3_3_3_3_3_3_3_3_3_3_3_3_3_3_3

New Line.l(r:p1rdt5788-p1rdt8171) Units=km Length=0.0642006 bus1=p1rdt5788.1.2.3 bus2=p1rdt8171.1.2.3 switch=n enabled=y phases=3 Linecode=3P_OH_AL_ACSR_4/0_Penguin_12_47_0_3_3_3_3_3_3_3_3_3_3_3_3_3_3_3_3_3_3_3_3_3_3_3_3_3_3_3_3_3

New Line.l(r:p1rdt5788-p1rdt6999) Units=km Length=0.504199 bus1=p1rdt6999.1.2.3 bus2=p1rdt5788.1.2.3 switch=n enabled=y phases=3 Linecode=3P_OH_AL_ACSR_4/0_Penguin_12_47_0_3_3_3_3_3_3_3_3_3_3_3_3_3_3_3_3_3_3_3_3_3_3_3_3_3_3_3_3_3

New Line.l(r:p1rdt6999-p1rhs4_1247) Units=km Length=0.225368 bus1=p1rdt6999-p1rhs4_1247x.1.2.3 bus2=p1rdt6999-p1rhs4_1247x_b1_1.1.2.3 switch=n enabled=y phases=3 Linecode=3P_OH_AL_ACSR_4/0_Penguin_12_47_0_3_3_3_3_3_3_3_3_3_3_3_3_3_3_3_3_3_3_3_3_3_3_3_3_3_3_3_3_3

New Line.l(r:p1rdt7429lv-p1rlv11398) Units=km Length=0.00307508 bus1=p1rdt7429lv.1.2.3 bus2=p1rlv11398.1.2.3 switch=n enabled=y phases=3 Linecode=3P_UG_AL_350kcmil_15_0_416_0_3_3_3_3_3_3_3_3_3_3_3_3_3_3_3_3_3_3_3_3_3_3_3_3_3_3_3_3_3

New Line.l(r:p1rdt3396-p1rdt7429) Units=km Length=0.689136 bus1=p1rdt3396.1.2.3 bus2=p1rdt7429.1.2.3 switch=n enabled=y phases=3 Linecode=3P_OH_AL_ACSR_4/0_Penguin_12_47_0_3_3_3_3_3_3_3_3_3_3_3_3_3_3_3_3_3_3_3_3_3_3_3_3_3_3_3_3_3

New Line.l(r:p1rdt3396-p1rdt8171)_s0 Units=km Length=0.232839 bus1=p1rdt8171.1.2.3 bus2=p1rdt3396-p1rdt8171x.1.2.3 switch=n enabled=y phases=3 Linecode=3P_OH_AL_ACSR_4/0_Penguin_12_47_0_3_3_3_3_3_3_3_3_3_3_3_3_3_3_3_3_3_3_3_3_3_3_3_3_3_3_3_3_3

New Line.l(r:p1rdt3396-p1rdt8171)_s1 Units=km Length=0.353565 bus1=p1rdt3396-p1rdt8171x.1.2.3 bus2=p1rdt3396.1.2.3 switch=n enabled=y phases=3 Linecode=3P_OH_AL_ACSR_4/0_Penguin_12_47_0_3_3_3_3_3_3_3_3_3_3_3_3_3_3_3_3_3_3_3_3_3_3_3_3_3_3_3_3_3

New Line.l(r:p1rdt6943lv-p1rlv10288) Units=km Length=0.08835240000000001 bus1=p1rdt6943lv.1.2.3 bus2=p1rlv10288.1.2.3 switch=n enabled=y phases=3 Linecode=3P_UG_AL_350kcmil_15_0_416_0_3_3_3_3_3_3_3_3_3_3_3_3_3_3_3_3_3_3_3_3_3_3_3_3_3_3_3_3_3

New Line.l(r:p1rdt6582lv-p1rlv9481) Units=km Length=0.00579967 bus1=p1rdt6582lv.1.2.3 bus2=p1rlv9481.1.2.3 switch=n enabled=y phases=3 Linecode=3P_UG_AL_350kcmil_15_0_416_0_3_3_3_3_3_3_3_3_3_3_3_3_3_3_3_3_3_3_3_3_3_3_3_3_3_3_3_3_3

New Line.l(r:p1rdt5785-p1rdt6582) Units=km Length=0.455241 bus1=p1rdt5785.1.2.3 bus2=p1rdt6582.1.2.3 switch=n enabled=y phases=3 Linecode=3P_OH_AL_ACSR_4/0_Penguin_12_47_0_3_3_3_3_3_3_3_3_3_3_3_3_3_3_3_3_3_3_3_3_3_3_3_3_3_3_3_3_3

New Line.l(r:p1rdt7986lv-p1rlv12758) Units=km Length=0.001 bus1=p1rdt7986lv.1.2.3 bus2=p1rlv12758.1.2.3 switch=n enabled=y phases=3 Linecode=3P_UG_AL_350kcmil_15_0_416_0_3_3_3_3_3_3_3_3_3_3_3_3_3_3_3_3_3_3_3_3_3_3_3_3_3_3_3_3_3

New Line.l(r:p1rdt8123lv-p1rlv13144) Units=km Length=0.001 bus1=p1rdt8123lv.1.2.3 bus2=p1rlv13144.1.2.3 switch=n enabled=y phases=3 Linecode=3P_UG_AL_350kcmil_15_0_416_0_3_3_3_3_3_3_3_3_3_3_3_3_3_3_3_3_3_3_3_3_3_3_3_3_3_3_3_3_3

New Line.l(r:p1rdt3982-p1rdt8123) Units=km Length=0.04181200000000001 bus1=p1rdt3982.1.2.3 bus2=p1rdt8123.1.2.3 switch=n enabled=y phases=3 Linecode=3P_OH_AL_ACSR_4/0_Penguin_12_47_0_3_3_3_3_3_3_3_3_3_3_3_3_3_3_3_3_3_3_3_3_3_3_3_3_3_3_3_3_3

New Line.l(r:p1rdt3397-p1rdt5851)_s0 Units=km Length=0.398191 bus1=p1rdt3397-p1rdt5851x.1.2.3 bus2=p1rdt3397-p1rdt5851xx.1.2.3 switch=n enabled=y phases=3 Linecode=3P_OH_AL_ACSR_1033kcmil_Curlew_12.47_1_3_3_3_3_3_3_3_3_3_3_3_3_3_3_3_3_3_3_3_3_3_3_3_3_3_3_3_3_3

New Line.padswitch(r:p1rdt401-p1rdt6943)p1r_2545 Units=km Length=0.001 bus1=p1rdt401-p1rdt6943xxxx.2 bus2=p1rdt401-p1rdt6943xxx.2 switch=y enabled=y phases=1 Linecode=padswitch_1_1_1_1_1_1_1_1_1_1_1_1_1_1_1_1_1_1_1_1_1_1_1_1_1_1_1_1_1

New Line.padswitch(r:p1rdt401-p1rdt6943)p1r_2546 Units=km Length=0.001 bus1=p1rdt401-p1rdt6943x.2 bus2=p1rdt401.2 switch=y enabled=y phases=1 Linecode=padswitch_1_1_1_1_1_1_1_1_1_1_1_1_1_1_1_1_1_1_1_1_1_1_1_1_1_1_1_1_1_1

New Line.padswitch(r:p1rdt1951-p1rdt6943)p1r_2547 Units=km Length=0.001 bus1=p1rdt1951.1.2.3 bus2=p1rdt1951-p1rdt6943x.1.2.3 switch=y enabled=y phases=3 Linecode=padswitch_3_3_3_3_3_3_3_3_3_3_3_3_3_3_3_3_3_3_3_3_3_3_3_3_3_3_3_3_3

New Line.padswitch(r:p1rdt1951-p1rdt6943)p1r_2548 Units=km Length=0.001 bus1=p1rdt1951-p1rdt6943xxx.1.2.3 bus2=p1rdt6943.1.2.3 switch=y enabled=y phases=3 Linecode=padswitch_3_3_3_3_3_3_3_3_3_3_3_3_3_3_3_3_3_3_3_3_3_3_3_3_3_3_3_3_3

New Line.padswitch(r:p1rdt4223-p1rdt7311)p1r_2549 Units=km Length=0.001 bus1=p1rdt4223.1.2.3 bus2=p1rdt4223-p1rdt7311x.1.2.3 switch=y enabled=y phases=3 Linecode=padswitch_3_3_3_3_3_3_3_3_3_3_3_3_3_3_3_3_3_3_3_3_3_3_3_3_3_3_3_3_3

New Line.padswitch(r:p1rdt4223-p1rdt7311)p1r_2550 Units=km Length=0.001 bus1=p1rdt4223-p1rdt7311xx.1.2.3 bus2=p1rdt7311.1.2.3 switch=y enabled=y phases=3 Linecode=padswitch_3_3_3_3_3_3_3_3_3_3_3_3_3_3_3_3_3_3_3_3_3_3_3_3_3_3_3_3_3_3

New Line.elbswitch(r:p1rdt3397-p1rdt5851)p1r_2848 Units=km Length=0.001 bus1=p1rdt3397.1.2.3 bus2=p1rdt3397-p1rdt5851x.1.2.3 switch=y enabled=n phases=3 Linecode=elbswitch_3_3_3_3_3_3_3_3_3_3_3_3_3_3_3_3_3_3_3_3_3_3_3_3_3_3_3_3_3

New Line.fuse(r:p1rdt524-p1rdt653)p1r_2995 Units=km Length=0.001 bus1=p1rdt653.3 bus2=p1rdt524-p1rdt653x.3 switch=n enabled=y phases=1 Linecode=fuse_1_1_1_1_1_1_1_1_1_1_1_1_1_1_1_1_1_1_1_1_1_1_1_1_1_1_1_1_1

New Fuse.Fuse_fuse(r:p1rdt524-p1rdt653)p1r_2995 monitoredobj=Line.fuse(r:p1rdt524-p1rdt653)p1r_2995 enabled=y ratedcurrent=100.0

New Line.fuse(r:p1rdt1612-p1rdt3587)p1r_3214 Units=km Length=0.001 bus1=p1rdt1612.2 bus2=p1rdt1612-p1rdt3587x.2 switch=n enabled=y phases=1 Linecode=fuse_1_1_1_1_1_1_1_1_1_1_1_1_1_1_1_1_1_1_1_1_1_1_1_1_1_1_1_1_1

New Fuse.Fuse_fuse(r:p1rdt1612-p1rdt3587)p1r_3214 monitoredobj=Line.fuse(r:p1rdt1612-p1rdt3587)p1r_3214 enabled=y ratedcurrent=100.0

New Line.fuse(r:p1rdt1841-p1rdt5850)p1r_3261 Units=km Length=0.001 bus1=p1rdt1841.1 bus2=p1rdt1841-p1rdt5850x.1 switch=n enabled=y phases=1 Linecode=fuse_1_1_1_1_1_1_1_1_1_1_1_1_1_1_1_1_1_1_1_1_1_1_1_1_1_1_1_1_1

New Fuse.Fuse_fuse(r:p1rdt1841-p1rdt5850)p1r_3261 monitoredobj=Line.fuse(r:p1rdt1841-p1rdt5850)p1r_3261 enabled=y ratedcurrent=100.0

New Line.fuse(r:p1rdt2293-p1rdt2294)p1r_3382 Units=km Length=0.001 bus1=p1rdt2294.1 bus2=p1rdt2293-p1rdt2294xx.1 switch=n enabled=y phases=1 Linecode=fuse_1_1_1_1_1_1_1_1_1_1_1_1_1_1_1_1_1_1_1_1_1_1_1_1_1_1_1_1_1

New Fuse.Fuse_fuse(r:p1rdt2293-p1rdt2294)p1r_3382 monitoredobj=Line.fuse(r:p1rdt2293-p1rdt2294)p1r_3382 enabled=y ratedcurrent=100.0

New Line.fuse(r:p1rdt2603-p1rdt3307)p1r_3637 Units=km Length=0.001 bus1=p1rdt3307.2 bus2=p1rdt2603-p1rdt3307x.2 switch=n enabled=y phases=1 Linecode=fuse_1_4_1_1_1_1_1_1_1_1_1_1_1_1_1_1_1_1_1_1_1_1_1_1_1_1_1_1_1_1

New Fuse.Fuse_fuse(r:p1rdt2603-p1rdt3307)p1r_3637 monitoredobj=Line.fuse(r:p1rdt2603-p1rdt3307)p1r_3637 enabled=y ratedcurrent=100.0

New Line.fuse(r:p1rdt3307-p1rdt4385)p1r_3638 Units=km Length=0.001 bus1=p1rdt3307.1 bus2=p1rdt3307-p1rdt4385x.1 switch=n enabled=y phases=1 Linecode=fuse_1_4_1_3_1_1_1_1_1_1_1_1_1_1_1_1_1_1_1_1_1_1_1_1_1_1_1_1_1_1_1

New Fuse.Fuse_fuse(r:p1rdt3307-p1rdt4385)p1r_3638 monitoredobj=Line.fuse(r:p1rdt3307-p1rdt4385)p1r_3638 enabled=y ratedcurrent=100.0

New Line.fuse(r:p1rdt3397-p1rdt4783)p1r_3664 Units=km Length=0.001 bus1=p1rdt3397.2 bus2=p1rdt3397-p1rdt4783x.2 switch=n enabled=y phases=1 Linecode=fuse_1_4_1_3_1_1_1_1_1_1_1_1_1_1_1_1_1_1_1_1_1_1_1_1_1_1_1_1_1_1_1

New Fuse.Fuse_fuse(r:p1rdt3397-p1rdt4783)p1r_3664 monitoredobj=Line.fuse(r:p1rdt3397-p1rdt4783)p1r_3664 enabled=y ratedcurrent=100.0

New Line.fuse(r:p1rdt4384-p1rdt8314)p1r_3878 Units=km Length=0.001 bus1=p1rdt4384.3 bus2=p1rdt4384-p1rdt8314x.3 switch=n enabled=y phases=1 Linecode=fuse_1_1_1_1_1_1_1_1_1_1_1_1_1_1_1_1_1_1_1_1_1_1_1_1_1_1_1_1_1

New Fuse.Fuse_fuse(r:p1rdt4384-p1rdt8314)p1r_3878 monitoredobj=Line.fuse(r:p1rdt4384-p1rdt8314)p1r_3878 enabled=y ratedcurrent=100.0

New Line.fuse(r:p1rdt4476-p1rdt525)p1r_3891 Units=km Length=0.001 bus1=p1rdt4476.3 bus2=p1rdt4476-p1rdt525x.3 switch=n enabled=y phases=1 Linecode=fuse_1_1_1_1_1_1_1_1_1_1_1_1_1_1_1_1_1_1_1_1_1_1_1_1_1_1_1_1_1

New Fuse.Fuse_fuse(r:p1rdt4476-p1rdt525)p1r_3891 monitoredobj=Line.fuse(r:p1rdt4476-p1rdt525)p1r_3891 enabled=y ratedcurrent=100.0

New Line.fuse(r:p1rdt4476-p1rdt6839)p1r_3892 Units=km Length=0.001 bus1=p1rdt4476.2 bus2=p1rdt4476-p1rdt6839x.2 switch=n enabled=y phases=1 Linecode=fuse_1_1_1_1_1_1_1_1_1_1_1_1_1_1_1_1_1_1_1_1_1_1_1_1_1_1_1_1_1

New Fuse.Fuse_fuse(r:p1rdt4476-p1rdt6839)p1r_3892 monitoredobj=Line.fuse(r:p1rdt4476-p1rdt6839)p1r_3892 enabled=y ratedcurrent=100.0

New Line.fuse(r:p1rdt4999-p1rdt5785)p1r_4172 Units=km Length=0.001 bus1=p1rdt5785.1 bus2=p1rdt4999-p1rdt5785x.1 switch=n enabled=y phases=1 Linecode=fuse_1_4_1_3_1_1_1_1_1_1_1_1_1_1_1_1_1_1_1_1_1_1_1_1_1_1_1_1_1_1_1

New Fuse.Fuse_fuse(r:p1rdt4999-p1rdt5785)p1r_4172 monitoredobj=Line.fuse(r:p1rdt4999-p1rdt5785)p1r_4172 enabled=y ratedcurrent=100.0

New Line.fuse(r:p1rdt5252-p1rdt5785)p1r_4173 Units=km Length=0.001 bus1=p1rdt5785.3 bus2=p1rdt5252-p1rdt5785x.3 switch=n enabled=y phases=1 Linecode=fuse_1_4_1_3_1_1_1_1_1_1_1_1_1_1_1_1_1_1_1_1_1_1_1_1_1_1_1_1_1_1_1

New Fuse.Fuse_fuse(r:p1rdt5252-p1rdt5785)p1r_4173 monitoredobj=Line.fuse(r:p1rdt5252-p1rdt5785)p1r_4173 enabled=y ratedcurrent=100.0

New Line.fuse(r:p1rdt5000-p1rdt6709)p1r_4365 Units=km Length=0.001 bus1=p1rdt6709.1 bus2=p1rdt5000-p1rdt6709xx.1 switch=n enabled=y phases=1 Linecode=fuse_1_1_1_1_1_1_1_1_1_1_1_1_1_1_1_1_1_1_1_1_1_1_1_1_1_1_1_1_1

New Fuse.Fuse_fuse(r:p1rdt5000-p1rdt6709)p1r_4365 monitoredobj=Line.fuse(r:p1rdt5000-p1rdt6709)p1r_4365 enabled=y ratedcurrent=100.0

New Line.fuse(r:p1rdt6709-p1rdt7312)p1r_4366 Units=km Length=0.001 bus1=p1rdt6709.2 bus2=p1rdt6709-p1rdt7312x.2 switch=n enabled=y phases=1 Linecode=fuse_1_1_1_1_1_1_1_1_1_1_1_1_1_1_1_1_1_1_1_1_1_1_1_1_1_1_1_1_1

New Fuse.Fuse_fuse(r:p1rdt6709-p1rdt7312)p1r_4366 monitoredobj=Line.fuse(r:p1rdt6709-p1rdt7312)p1r_4366 enabled=y ratedcurrent=100.0

New Line.fuse(r:p1rdt6710-p1rdt8221)p1r_4367 Units=km Length=0.001 bus1=p1rdt6710.1 bus2=p1rdt6710-p1rdt8221x.1 switch=n enabled=y phases=1 Linecode=fuse_1_1_1_1_1_1_1_1_1_1_1_1_1_1_1_1_1_1_1_1_1_1_1_1_1_1_1_1_1

New Fuse.Fuse_fuse(r:p1rdt6710-p1rdt8221)p1r_4367 monitoredobj=Line.fuse(r:p1rdt6710-p1rdt8221)p1r_4367 enabled=y ratedcurrent=100.0

New Line.fuse(r:p1rdt401-p1rdt6943)p1r_4412 Units=km Length=0.001 bus1=p1rdt6943.2 bus2=p1rdt401-p1rdt6943xxxx.2 switch=n enabled=y phases=1 Linecode=fuse_1_1_1_1_1_1_1_1_1_1_1_1_1_1_1_1_1_1_1_1_1_1_1_1_1_1_1_1_1

New Fuse.Fuse_fuse(r:p1rdt401-p1rdt6943)p1r_4412 monitoredobj=Line.fuse(r:p1rdt401-p1rdt6943)p1r_4412 enabled=y ratedcurrent=100.0

New Line.fuse(r:p1rdt1273-p1rdt7665)p1r_4592 Units=km Length=0.001 bus1=p1rdt7665.1 bus2=p1rdt1273-p1rdt7665x.1 switch=n enabled=y phases=1 Linecode=fuse_1_1_1_1_1_1_1_1_1_1_1_1_1_1_1_1_1_1_1_1_1_1_1_1_1_1_1_1_1

New Fuse.Fuse_fuse(r:p1rdt1273-p1rdt7665)p1r_4592 monitoredobj=Line.fuse(r:p1rdt1273-p1rdt7665)p1r_4592 enabled=y ratedcurrent=100.0

New Line.fuse(r:p1rdt6396-p1rdt7986)p1r_4656 Units=km Length=0.001 bus1=p1rdt7986.1 bus2=p1rdt6396-p1rdt7986x.1 switch=n enabled=y phases=1 Linecode=fuse_1_1_1_1_1_1_1_1_1_1_1_1_1_1_1_1_1_1_1_1_1_1_1_1_1_1_1_1_1

New Fuse.Fuse_fuse(r:p1rdt6396-p1rdt7986)p1r_4656 monitoredobj=Line.fuse(r:p1rdt6396-p1rdt7986)p1r_4656 enabled=y ratedcurrent=100.0

New Line.l(r:p1rdt6999-p1rhs4_1247)_disconnect Units=km Length=0.001 bus1=p1rdt6999-p1rhs4_1247x_b1_1.1.2.3 bus2=p1rdt6999-p1rhs4_1247x_b2_1.1.2.3 switch=y enabled=y phases=3 Linecode=3P_OH_AL_ACSR_4/0_Penguin_12_47_0_3_3_3_3_3_3_3_3_3_3_3_3_3_3_3_3_3_3_3_3_3_3_3_3_3_3_3_3_3

New Line.l(r:p1rdt6999-p1rhs4_1247)_cont Units=km Length=2.037312 bus1=p1rdt6999-p1rhs4_1247x_b2_1.1.2.3 bus2=p1rdt6999.1.2.3 switch=n enabled=y phases=3 Linecode=3P_OH_AL_ACSR_4/0_Penguin_12_47_0_3_3_3_3_3_3_3_3_3_3_3_3_3_3_3_3_3_3_3_3_3_3_3_3_3_3_3_3_3
