New RegControl.reg_creguladortension(r:p1rdt4165-p1rdt7015) transformer=trans_reg_creguladortension(r:p1rdt4165-p1rdt7015) winding=2 ptratio=59.99631547328862 band=2.4 vreg = 123.60000000000001

New RegControl.reg_creguladortension(r:p1rdt1628-p1rdt2910) transformer=trans_reg_creguladortension(r:p1rdt1628-p1rdt2910) winding=2 ptratio=59.99631547328862 band=2.4 vreg = 123.60000000000001

New RegControl.reg_creguladortension(r:p1rdt428-p1rdt6205) transformer=trans_reg_creguladortension(r:p1rdt428-p1rdt6205) winding=2 ptratio=60.0 band=2.4 vreg = 123.60000000000001
