New Line.l(r:p1rdm68-p1rlv33) Units=km Length=0.0453362 bus1=p1rdm68.1.2 bus2=p1rlv33.1.2 switch=n enabled=y phases=2 Linecode=1P_OH_AL_4/0_Zuzara_0_416_0_2_2_2_2_2_2_2_2_2_2_2_2_2_2_2_2_2_2_2_2_2_2_2_2_2_2_2_2_2

New Line.l(r:p1rdm68-p1rdt32lv) Units=km Length=0.0168941 bus1=p1rdt32lv.1.2 bus2=p1rdm68.1.2 switch=n enabled=y phases=2 Linecode=1P_OH_AL_2/0_Rucina_0_416_0_2_2_2_2_2_2_2_2_2_2_2_2_2_2_2_2_2_2_2_2_2_2_2_2_2_2_2_2_2

New Line.l(r:p1rdm69-p1rlv12396) Units=km Length=0.039120100000000005 bus1=p1rdm69.1.2 bus2=p1rlv12396.1.2 switch=n enabled=y phases=2 Linecode=1P_OH_AL_4/0_Zuzara_0_416_0_2_2_2_2_2_2_2_2_2_2_2_2_2_2_2_2_2_2_2_2_2_2_2_2_2_2_2_2_2

New Line.l(r:p1rdm69-p1rdt32lv) Units=km Length=0.0168894 bus1=p1rdt32lv.1.2 bus2=p1rdm69.1.2 switch=n enabled=y phases=2 Linecode=1P_OH_AL_2/0_Rucina_0_416_0_2_2_2_2_2_2_2_2_2_2_2_2_2_2_2_2_2_2_2_2_2_2_2_2_2_2_2_2_2

New Line.l(r:p1rdt154lv-p1rlv159) Units=km Length=0.001 bus1=p1rdt154lv.1.2 bus2=p1rlv159.1.2 switch=n enabled=y phases=2 Linecode=1P_OH_AL_4_Periwinkle_0_416_0_2_2_2_2_2_2_2_2_2_2_2_2_2_2_2_2_2_2_2_2_2_2_2_2_2_2_2_2_2

New Line.l(r:p1rdt291lv-p1rlv299) Units=km Length=0.0562772 bus1=p1rdt291lv.1.2 bus2=p1rlv299.1.2 switch=n enabled=y phases=2 Linecode=1P_OH_AL_4/0_Zuzara_0_416_0_2_2_2_2_2_2_2_2_2_2_2_2_2_2_2_2_2_2_2_2_2_2_2_2_2_2_2_2_2

New Line.l(r:p1rdm686-p1rlv5273) Units=km Length=0.043895 bus1=p1rdm686.1.2 bus2=p1rlv5273.1.2 switch=n enabled=y phases=2 Linecode=1P_OH_AL_4/0_Zuzara_0_416_0_2_2_2_2_2_2_2_2_2_2_2_2_2_2_2_2_2_2_2_2_2_2_2_2_2_2_2_2_2

New Line.l(r:p1rdm686-p1rdt291lv) Units=km Length=0.0189717 bus1=p1rdt291lv.1.2 bus2=p1rdm686.1.2 switch=n enabled=y phases=2 Linecode=1P_OH_AL_2/0_Rucina_0_416_0_2_2_2_2_2_2_2_2_2_2_2_2_2_2_2_2_2_2_2_2_2_2_2_2_2_2_2_2_2

New Line.l(r:p1rdm687-p1rlv300) Units=km Length=0.0170996 bus1=p1rdm687.1.2 bus2=p1rlv300.1.2 switch=n enabled=y phases=2 Linecode=1P_OH_AL_2/0_Rucina_0_416_0_2_2_2_2_2_2_2_2_2_2_2_2_2_2_2_2_2_2_2_2_2_2_2_2_2_2_2_2_2

New Line.l(r:p1rdm687-p1rlv13426) Units=km Length=0.009059250000000001 bus1=p1rdm687.1.2 bus2=p1rlv13426.1.2 switch=n enabled=y phases=2 Linecode=1P_OH_AL_2/0_Rucina_0_416_0_2_2_2_2_2_2_2_2_2_2_2_2_2_2_2_2_2_2_2_2_2_2_2_2_2_2_2_2_2

New Line.l(r:p1rdm687-p1rdt292lv) Units=km Length=0.0119886 bus1=p1rdt292lv.1.2 bus2=p1rdm687.1.2 switch=n enabled=y phases=2 Linecode=1P_OH_AL_2/0_Rucina_0_416_0_2_2_2_2_2_2_2_2_2_2_2_2_2_2_2_2_2_2_2_2_2_2_2_2_2_2_2_2_2

New Line.l(r:p1rdm688-p1rlv6082) Units=km Length=0.028632400000000002 bus1=p1rdm688.1.2 bus2=p1rlv6082.1.2 switch=n enabled=y phases=2 Linecode=1P_OH_AL_4/0_Zuzara_0_416_0_2_2_2_2_2_2_2_2_2_2_2_2_2_2_2_2_2_2_2_2_2_2_2_2_2_2_2_2_2

New Line.l(r:p1rdm688-p1rdt292lv) Units=km Length=0.0306254 bus1=p1rdt292lv.1.2 bus2=p1rdm688.1.2 switch=n enabled=y phases=2 Linecode=1P_OH_AL_4/0_Zuzara_0_416_0_2_2_2_2_2_2_2_2_2_2_2_2_2_2_2_2_2_2_2_2_2_2_2_2_2_2_2_2_2

New Line.l(r:p1rdt418lv-p1rlv427) Units=km Length=0.0143794 bus1=p1rdt418lv.1.2 bus2=p1rlv427.1.2 switch=n enabled=y phases=2 Linecode=1P_OH_AL_2/0_Rucina_0_416_0_2_2_2_2_2_2_2_2_2_2_2_2_2_2_2_2_2_2_2_2_2_2_2_2_2_2_2_2_2

New Line.l(r:p1rdt418lv-p1rlv1376) Units=km Length=0.0378494 bus1=p1rdt418lv.1.2 bus2=p1rlv1376.1.2 switch=n enabled=y phases=2 Linecode=1P_OH_AL_4/0_Zuzara_0_416_0_2_2_2_2_2_2_2_2_2_2_2_2_2_2_2_2_2_2_2_2_2_2_2_2_2_2_2_2_2

New Line.l(r:p1rdt418lv-p1rlv11269) Units=km Length=0.0312958 bus1=p1rdt418lv.1.2 bus2=p1rlv11269.1.2 switch=n enabled=y phases=2 Linecode=1P_OH_AL_4/0_Zuzara_0_416_0_2_2_2_2_2_2_2_2_2_2_2_2_2_2_2_2_2_2_2_2_2_2_2_2_2_2_2_2_2

New Line.l(r:p1rdt427lv-p1rlv436) Units=km Length=0.0268322 bus1=p1rdt427lv.1.2 bus2=p1rlv436.1.2 switch=n enabled=y phases=2 Linecode=1P_OH_AL_2/0_Rucina_0_416_0_2_2_2_2_2_2_2_2_2_2_2_2_2_2_2_2_2_2_2_2_2_2_2_2_2_2_2_2_2

New Line.l(r:p1rdt427lv-p1rlv8436) Units=km Length=0.0268322 bus1=p1rdt427lv.1.2 bus2=p1rlv8436.1.2 switch=n enabled=y phases=2 Linecode=1P_OH_AL_2/0_Rucina_0_416_0_2_2_2_2_2_2_2_2_2_2_2_2_2_2_2_2_2_2_2_2_2_2_2_2_2_2_2_2_2

New Line.l(r:p1rdt539lv-p1rlv553) Units=km Length=0.001 bus1=p1rdt539lv.1.2 bus2=p1rlv553.1.2 switch=n enabled=y phases=2 Linecode=1P_OH_AL_4_Periwinkle_0_416_0_2_2_2_2_2_2_2_2_2_2_2_2_2_2_2_2_2_2_2_2_2_2_2_2_2_2_2_2_2

New Line.l(r:p1rdt670lv-p1rlv694) Units=km Length=0.0904372 bus1=p1rdt670lv.1.2 bus2=p1rlv694.1.2 switch=n enabled=y phases=2 Linecode=1P_OH_AL_4/0_Zuzara_0_416_0_2_2_2_2_2_2_2_2_2_2_2_2_2_2_2_2_2_2_2_2_2_2_2_2_2_2_2_2_2

New Line.l(r:p1rdt670lv-p1rlv7521) Units=km Length=0.0820684 bus1=p1rdt670lv.1.2 bus2=p1rlv7521.1.2 switch=n enabled=y phases=2 Linecode=1P_OH_AL_4/0_Zuzara_0_416_0_2_2_2_2_2_2_2_2_2_2_2_2_2_2_2_2_2_2_2_2_2_2_2_2_2_2_2_2_2

New Line.l(r:p1rdt670lv-p1rlv7664) Units=km Length=0.0913214 bus1=p1rdt670lv.1.2 bus2=p1rlv7664.1.2 switch=n enabled=y phases=2 Linecode=1P_OH_AL_4/0_Zuzara_0_416_0_2_2_2_2_2_2_2_2_2_2_2_2_2_2_2_2_2_2_2_2_2_2_2_2_2_2_2_2_2

New Line.l(r:p1rdt670lv-p1rlv13423) Units=km Length=0.0573184 bus1=p1rdt670lv.1.2 bus2=p1rlv13423.1.2 switch=n enabled=y phases=2 Linecode=1P_OH_AL_4/0_Zuzara_0_416_0_2_2_2_2_2_2_2_2_2_2_2_2_2_2_2_2_2_2_2_2_2_2_2_2_2_2_2_2_2

New Line.l(r:p1rdm1850-p1rlv852) Units=km Length=0.0388082 bus1=p1rdm1850.1.2 bus2=p1rlv852.1.2 switch=n enabled=y phases=2 Linecode=1P_OH_AL_4/0_Zuzara_0_416_0_2_2_2_2_2_2_2_2_2_2_2_2_2_2_2_2_2_2_2_2_2_2_2_2_2_2_2_2_2

New Line.l(r:p1rdm1850-p1rdt816lv) Units=km Length=0.0376167 bus1=p1rdt816lv.1.2 bus2=p1rdm1850.1.2 switch=n enabled=y phases=2 Linecode=1P_OH_AL_4/0_Zuzara_0_416_0_2_2_2_2_2_2_2_2_2_2_2_2_2_2_2_2_2_2_2_2_2_2_2_2_2_2_2_2_2

New Line.l(r:p1rdm1851-p1rlv10060) Units=km Length=0.0193423 bus1=p1rdm1851.1.2 bus2=p1rlv10060.1.2 switch=n enabled=y phases=2 Linecode=1P_OH_AL_2/0_Rucina_0_416_0_2_2_2_2_2_2_2_2_2_2_2_2_2_2_2_2_2_2_2_2_2_2_2_2_2_2_2_2_2

New Line.l(r:p1rdm1851-p1rdt816lv) Units=km Length=0.0188027 bus1=p1rdt816lv.1.2 bus2=p1rdm1851.1.2 switch=n enabled=y phases=2 Linecode=1P_OH_AL_2/0_Rucina_0_416_0_2_2_2_2_2_2_2_2_2_2_2_2_2_2_2_2_2_2_2_2_2_2_2_2_2_2_2_2_2

New Line.l(r:p1rdt939lv-p1rlv985) Units=km Length=0.0321654 bus1=p1rdt939lv.1.2 bus2=p1rlv985.1.2 switch=n enabled=y phases=2 Linecode=1P_OH_AL_4/0_Zuzara_0_416_0_2_2_2_2_2_2_2_2_2_2_2_2_2_2_2_2_2_2_2_2_2_2_2_2_2_2_2_2_2

New Line.l(r:p1rdm2163-p1rlv1003) Units=km Length=0.00791061 bus1=p1rdm2163.1.2 bus2=p1rlv1003.1.2 switch=n enabled=y phases=2 Linecode=1P_OH_AL_2/0_Rucina_0_416_0_2_2_2_2_2_2_2_2_2_2_2_2_2_2_2_2_2_2_2_2_2_2_2_2_2_2_2_2_2

New Line.l(r:p1rdm2163-p1rdt955lv) Units=km Length=0.0537597 bus1=p1rdt955lv.1.2 bus2=p1rdm2163.1.2 switch=n enabled=y phases=2 Linecode=1P_OH_AL_4/0_Zuzara_0_416_0_2_2_2_2_2_2_2_2_2_2_2_2_2_2_2_2_2_2_2_2_2_2_2_2_2_2_2_2_2

New Line.l(r:p1rdm2164-p1rlv10733) Units=km Length=0.00424264 bus1=p1rdm2164.1.2 bus2=p1rlv10733.1.2 switch=n enabled=y phases=2 Linecode=1P_OH_AL_2/0_Rucina_0_416_0_2_2_2_2_2_2_2_2_2_2_2_2_2_2_2_2_2_2_2_2_2_2_2_2_2_2_2_2_2

New Line.l(r:p1rdm2164-p1rdt955lv) Units=km Length=0.0568285 bus1=p1rdt955lv.1.2 bus2=p1rdm2164.1.2 switch=n enabled=y phases=2 Linecode=1P_OH_AL_4/0_Zuzara_0_416_0_2_2_2_2_2_2_2_2_2_2_2_2_2_2_2_2_2_2_2_2_2_2_2_2_2_2_2_2_2

New Line.l(r:p1rdt1048lv-p1rlv1374) Units=km Length=0.00801524 bus1=p1rdt1048lv.1.2 bus2=p1rlv1374.1.2 switch=n enabled=y phases=2 Linecode=1P_OH_AL_2/0_Rucina_0_416_0_2_2_2_2_2_2_2_2_2_2_2_2_2_2_2_2_2_2_2_2_2_2_2_2_2_2_2_2_2

New Line.l(r:p1rdm2349-p1rlv1107) Units=km Length=0.00568793 bus1=p1rdm2349.1.2 bus2=p1rlv1107.1.2 switch=n enabled=y phases=2 Linecode=1P_OH_AL_2/0_Rucina_0_416_0_2_2_2_2_2_2_2_2_2_2_2_2_2_2_2_2_2_2_2_2_2_2_2_2_2_2_2_2_2

New Line.l(r:p1rdm2349-p1rdt1048lv) Units=km Length=0.0194008 bus1=p1rdt1048lv.1.2 bus2=p1rdm2349.1.2 switch=n enabled=y phases=2 Linecode=1P_OH_AL_2/0_Rucina_0_416_0_2_2_2_2_2_2_2_2_2_2_2_2_2_2_2_2_2_2_2_2_2_2_2_2_2_2_2_2_2

New Line.l(r:p1rdt1050lv-p1rlv1109) Units=km Length=0.001 bus1=p1rdt1050lv.1.2 bus2=p1rlv1109.1.2 switch=n enabled=y phases=2 Linecode=1P_OH_AL_4_Periwinkle_0_416_0_2_2_2_2_2_2_2_2_2_2_2_2_2_2_2_2_2_2_2_2_2_2_2_2_2_2_2_2_2

New Line.l(r:p1rdt1288lv-p1rlv1375) Units=km Length=0.001 bus1=p1rdt1288lv.1.2 bus2=p1rlv1375.1.2 switch=n enabled=y phases=2 Linecode=1P_OH_AL_4_Periwinkle_0_416_0_2_2_2_2_2_2_2_2_2_2_2_2_2_2_2_2_2_2_2_2_2_2_2_2_2_2_2_2_2

New Line.l(r:p1rdt1413lv-p1rlv1517) Units=km Length=0.0233398 bus1=p1rdt1413lv.1.2 bus2=p1rlv1517.1.2 switch=n enabled=y phases=2 Linecode=1P_OH_AL_2/0_Rucina_0_416_0_2_2_2_2_2_2_2_2_2_2_2_2_2_2_2_2_2_2_2_2_2_2_2_2_2_2_2_2_2

New Line.l(r:p1rdt1413lv-p1rlv12245) Units=km Length=0.0233398 bus1=p1rdt1413lv.1.2 bus2=p1rlv12245.1.2 switch=n enabled=y phases=2 Linecode=1P_OH_AL_2/0_Rucina_0_416_0_2_2_2_2_2_2_2_2_2_2_2_2_2_2_2_2_2_2_2_2_2_2_2_2_2_2_2_2_2

New Line.l(r:p1rdt1414lv-p1rlv1518) Units=km Length=0.0472019 bus1=p1rdt1414lv.1.2 bus2=p1rlv1518.1.2 switch=n enabled=y phases=2 Linecode=1P_UG_AL_1/0_Brenau_0_416_0_2_2_2_2_2_2_2_2_2_2_2_2_2_2_2_2_2_2_2_2_2_2_2_2_2_2_2_2_2

New Line.l(r:p1rdt1414lv-p1rlv8975) Units=km Length=0.0472019 bus1=p1rdt1414lv.1.2 bus2=p1rlv8975.1.2 switch=n enabled=y phases=2 Linecode=1P_UG_AL_1/0_Brenau_0_416_0_2_2_2_2_2_2_2_2_2_2_2_2_2_2_2_2_2_2_2_2_2_2_2_2_2_2_2_2_2

New Line.l(r:p1rdm3112-p1rlv1519) Units=km Length=0.09760850000000001 bus1=p1rdm3112.1.2 bus2=p1rlv1519.1.2 switch=n enabled=y phases=2 Linecode=1P_OH_AL_4/0_Zuzara_0_416_0_2_2_2_2_2_2_2_2_2_2_2_2_2_2_2_2_2_2_2_2_2_2_2_2_2_2_2_2_2

New Line.l(r:p1rdm3112-p1rdt1415lv) Units=km Length=0.017472 bus1=p1rdt1415lv.1.2 bus2=p1rdm3112.1.2 switch=n enabled=y phases=2 Linecode=1P_OH_AL_2/0_Rucina_0_416_0_2_2_2_2_2_2_2_2_2_2_2_2_2_2_2_2_2_2_2_2_2_2_2_2_2_2_2_2_2

New Line.l(r:p1rdm3113-p1rlv8976) Units=km Length=0.05557480000000001 bus1=p1rdm3113.1.2 bus2=p1rlv8976.1.2 switch=n enabled=y phases=2 Linecode=1P_OH_AL_4/0_Zuzara_0_416_0_2_2_2_2_2_2_2_2_2_2_2_2_2_2_2_2_2_2_2_2_2_2_2_2_2_2_2_2_2

New Line.l(r:p1rdm3113-p1rdt1415lv) Units=km Length=0.0174632 bus1=p1rdt1415lv.1.2 bus2=p1rdm3113.1.2 switch=n enabled=y phases=2 Linecode=1P_OH_AL_2/0_Rucina_0_416_0_2_2_2_2_2_2_2_2_2_2_2_2_2_2_2_2_2_2_2_2_2_2_2_2_2_2_2_2_2

New Line.l(r:p1rdt1416lv-p1rlv1520) Units=km Length=0.0121446 bus1=p1rdt1416lv.1.2 bus2=p1rlv1520.1.2 switch=n enabled=y phases=2 Linecode=1P_OH_AL_2/0_Rucina_0_416_0_2_2_2_2_2_2_2_2_2_2_2_2_2_2_2_2_2_2_2_2_2_2_2_2_2_2_2_2_2

New Line.l(r:p1rdt1416lv-p1rlv3516) Units=km Length=0.0121446 bus1=p1rdt1416lv.1.2 bus2=p1rlv3516.1.2 switch=n enabled=y phases=2 Linecode=1P_OH_AL_2/0_Rucina_0_416_0_2_2_2_2_2_2_2_2_2_2_2_2_2_2_2_2_2_2_2_2_2_2_2_2_2_2_2_2_2

New Line.l(r:p1rdm3347-p1rlv1651) Units=km Length=0.0204591 bus1=p1rdm3347.1.2 bus2=p1rlv1651.1.2 switch=n enabled=y phases=2 Linecode=1P_OH_AL_2/0_Rucina_0_416_0_2_2_2_2_2_2_2_2_2_2_2_2_2_2_2_2_2_2_2_2_2_2_2_2_2_2_2_2_2

New Line.l(r:p1rdm3347-p1rdt1525lv) Units=km Length=0.0705881 bus1=p1rdt1525lv.1.2 bus2=p1rdm3347.1.2 switch=n enabled=y phases=2 Linecode=1P_OH_AL_4/0_Zuzara_0_416_0_2_2_2_2_2_2_2_2_2_2_2_2_2_2_2_2_2_2_2_2_2_2_2_2_2_2_2_2_2

New Line.l(r:p1rdm3349-p1rlv7111) Units=km Length=0.0170638 bus1=p1rdm3349.1.2 bus2=p1rlv7111.1.2 switch=n enabled=y phases=2 Linecode=1P_UG_AL_1/0_Brenau_0_416_0_2_2_2_2_2_2_2_2_2_2_2_2_2_2_2_2_2_2_2_2_2_2_2_2_2_2_2_2_2

New Line.l(r:p1rdm3348-p1rlv6584) Units=km Length=0.00940394 bus1=p1rdm3348.1.2 bus2=p1rlv6584.1.2 switch=n enabled=y phases=2 Linecode=1P_UG_AL_1/0_Brenau_0_416_0_2_2_2_2_2_2_2_2_2_2_2_2_2_2_2_2_2_2_2_2_2_2_2_2_2_2_2_2_2

New Line.l(r:p1rdm3348-p1rdm3349) Units=km Length=0.0284518 bus1=p1rdm3349.1.2 bus2=p1rdm3348.1.2 switch=n enabled=y phases=2 Linecode=1P_UG_AL_1/0_Brenau_0_416_0_2_2_2_2_2_2_2_2_2_2_2_2_2_2_2_2_2_2_2_2_2_2_2_2_2_2_2_2_2

New Line.l(r:p1rdm3349-p1rdt1525lv) Units=km Length=0.00948095 bus1=p1rdt1525lv.1.2 bus2=p1rdm3349.1.2 switch=n enabled=y phases=2 Linecode=1P_UG_AL_1/0_Brenau_0_416_0_2_2_2_2_2_2_2_2_2_2_2_2_2_2_2_2_2_2_2_2_2_2_2_2_2_2_2_2_2

New Line.l(r:p1rdt1627lv-p1rlv1770) Units=km Length=0.0289125 bus1=p1rdt1627lv.1.2 bus2=p1rlv1770.1.2 switch=n enabled=y phases=2 Linecode=1P_OH_AL_4/0_Zuzara_0_416_0_2_2_2_2_2_2_2_2_2_2_2_2_2_2_2_2_2_2_2_2_2_2_2_2_2_2_2_2_2

New Line.l(r:p1rdt1736lv-p1rlv1902) Units=km Length=0.0404354 bus1=p1rdt1736lv.1.2 bus2=p1rlv1902.1.2 switch=n enabled=y phases=2 Linecode=1P_OH_AL_4/0_Zuzara_0_416_0_2_2_2_2_2_2_2_2_2_2_2_2_2_2_2_2_2_2_2_2_2_2_2_2_2_2_2_2_2

New Line.l(r:p1rdt1736lv-p1rlv8837) Units=km Length=0.0966756 bus1=p1rdt1736lv.1.2 bus2=p1rlv8837.1.2 switch=n enabled=y phases=2 Linecode=1P_OH_AL_4/0_Zuzara_0_416_0_2_2_2_2_2_2_2_2_2_2_2_2_2_2_2_2_2_2_2_2_2_2_2_2_2_2_2_2_2

New Line.l(r:p1rdt1737lv-p1rlv1903) Units=km Length=0.0102453 bus1=p1rdt1737lv.1.2 bus2=p1rlv1903.1.2 switch=n enabled=y phases=2 Linecode=1P_OH_AL_2/0_Rucina_0_416_0_2_2_2_2_2_2_2_2_2_2_2_2_2_2_2_2_2_2_2_2_2_2_2_2_2_2_2_2_2

New Line.l(r:p1rdt1737lv-p1rlv6335) Units=km Length=0.0515857 bus1=p1rdt1737lv.1.2 bus2=p1rlv6335.1.2 switch=n enabled=y phases=2 Linecode=1P_OH_AL_4/0_Zuzara_0_416_0_2_2_2_2_2_2_2_2_2_2_2_2_2_2_2_2_2_2_2_2_2_2_2_2_2_2_2_2_2

New Line.l(r:p1rdt1737lv-p1rlv8711) Units=km Length=0.055641300000000005 bus1=p1rdt1737lv.1.2 bus2=p1rlv8711.1.2 switch=n enabled=y phases=2 Linecode=1P_OH_AL_4/0_Zuzara_0_416_0_2_2_2_2_2_2_2_2_2_2_2_2_2_2_2_2_2_2_2_2_2_2_2_2_2_2_2_2_2

New Line.l(r:p1rdt1741lv-p1rlv1908) Units=km Length=0.001 bus1=p1rdt1741lv.1.2 bus2=p1rlv1908.1.2 switch=n enabled=y phases=2 Linecode=1P_OH_AL_4_Periwinkle_0_416_0_2_2_2_2_2_2_2_2_2_2_2_2_2_2_2_2_2_2_2_2_2_2_2_2_2_2_2_2_2

New Line.l(r:p1rdt1742lv-p1rlv1909) Units=km Length=0.047436 bus1=p1rdt1742lv.1.2 bus2=p1rlv1909.1.2 switch=n enabled=y phases=2 Linecode=1P_OH_AL_4/0_Zuzara_0_416_0_2_2_2_2_2_2_2_2_2_2_2_2_2_2_2_2_2_2_2_2_2_2_2_2_2_2_2_2_2

New Line.l(r:p1rdm4491-p1rlv2327) Units=km Length=0.00734025 bus1=p1rdm4491.1.2 bus2=p1rlv2327.1.2 switch=n enabled=y phases=2 Linecode=1P_OH_AL_2/0_Rucina_0_416_0_2_2_2_2_2_2_2_2_2_2_2_2_2_2_2_2_2_2_2_2_2_2_2_2_2_2_2_2_2

New Line.l(r:p1rdm4491-p1rdt2089lv) Units=km Length=0.0181026 bus1=p1rdt2089lv.1.2 bus2=p1rdm4491.1.2 switch=n enabled=y phases=2 Linecode=1P_OH_AL_2/0_Rucina_0_416_0_2_2_2_2_2_2_2_2_2_2_2_2_2_2_2_2_2_2_2_2_2_2_2_2_2_2_2_2_2

New Line.l(r:p1rdm4492-p1rlv13028) Units=km Length=0.00785685 bus1=p1rdm4492.1.2 bus2=p1rlv13028.1.2 switch=n enabled=y phases=2 Linecode=1P_OH_AL_2/0_Rucina_0_416_0_2_2_2_2_2_2_2_2_2_2_2_2_2_2_2_2_2_2_2_2_2_2_2_2_2_2_2_2_2

New Line.l(r:p1rdm4492-p1rdt2089lv) Units=km Length=0.0181044 bus1=p1rdt2089lv.1.2 bus2=p1rdm4492.1.2 switch=n enabled=y phases=2 Linecode=1P_OH_AL_2/0_Rucina_0_416_0_2_2_2_2_2_2_2_2_2_2_2_2_2_2_2_2_2_2_2_2_2_2_2_2_2_2_2_2_2

New Line.l(r:p1rdt2411lv-p1rlv2724) Units=km Length=0.06436570000000001 bus1=p1rdt2411lv.1.2 bus2=p1rlv2724.1.2 switch=n enabled=y phases=2 Linecode=1P_OH_AL_4/0_Zuzara_0_416_0_2_2_2_2_2_2_2_2_2_2_2_2_2_2_2_2_2_2_2_2_2_2_2_2_2_2_2_2_2

New Line.l(r:p1rdt2412lv-p1rlv2725) Units=km Length=0.040576900000000006 bus1=p1rdt2412lv.1.2 bus2=p1rlv2725.1.2 switch=n enabled=y phases=2 Linecode=1P_OH_AL_4/0_Zuzara_0_416_0_2_2_2_2_2_2_2_2_2_2_2_2_2_2_2_2_2_2_2_2_2_2_2_2_2_2_2_2_2

New Line.l(r:p1rdt2412lv-p1rlv10859) Units=km Length=0.0906846 bus1=p1rdt2412lv.1.2 bus2=p1rlv10859.1.2 switch=n enabled=y phases=2 Linecode=1P_OH_AL_4/0_Zuzara_0_416_0_2_2_2_2_2_2_2_2_2_2_2_2_2_2_2_2_2_2_2_2_2_2_2_2_2_2_2_2_2

New Line.l(r:p1rdt2615lv-p1rlv2983) Units=km Length=0.001 bus1=p1rdt2615lv.1.2 bus2=p1rlv2983.1.2 switch=n enabled=y phases=2 Linecode=1P_OH_AL_4_Periwinkle_0_416_0_2_2_2_2_2_2_2_2_2_2_2_2_2_2_2_2_2_2_2_2_2_2_2_2_2_2_2_2_2

New Line.l(r:p1rdt2718lv-p1rlv3110) Units=km Length=0.03694530000000001 bus1=p1rdt2718lv.1.2 bus2=p1rlv3110.1.2 switch=n enabled=y phases=2 Linecode=1P_OH_AL_4/0_Zuzara_0_416_0_2_2_2_2_2_2_2_2_2_2_2_2_2_2_2_2_2_2_2_2_2_2_2_2_2_2_2_2_2

New Line.l(r:p1rdt2718lv-p1rlv6334)_s0 Units=km Length=0.0192329 bus1=p1rdt2718lv.1.2 bus2=p1rdt2718lv-p1rlv6334x.1.2 switch=n enabled=y phases=2 Linecode=1P_OH_AL_2/0_Rucina_0_416_0_2_2_2_2_2_2_2_2_2_2_2_2_2_2_2_2_2_2_2_2_2_2_2_2_2_2_2_2_2

New Line.l(r:p1rdt2718lv-p1rlv6334)_s1 Units=km Length=0.006930470000000001 bus1=p1rdt2718lv-p1rlv6334x.1.2 bus2=p1rlv6334.1.2 switch=n enabled=y phases=2 Linecode=1P_OH_AL_2/0_Rucina_0_416_0_2_2_2_2_2_2_2_2_2_2_2_2_2_2_2_2_2_2_2_2_2_2_2_2_2_2_2_2_2

New Line.l(r:p1rdt2718lv-p1rlv9928)_s0 Units=km Length=0.0275919 bus1=p1rdt2718lv.1.2 bus2=p1rdt2718lv-p1rlv9928x.1.2 switch=n enabled=y phases=2 Linecode=1P_OH_AL_4/0_Zuzara_0_416_0_2_2_2_2_2_2_2_2_2_2_2_2_2_2_2_2_2_2_2_2_2_2_2_2_2_2_2_2_2

New Line.l(r:p1rdt2718lv-p1rlv9928)_s1 Units=km Length=0.00942889 bus1=p1rdt2718lv-p1rlv9928x.1.2 bus2=p1rlv9928.1.2 switch=n enabled=y phases=2 Linecode=1P_OH_AL_2/0_Rucina_0_416_0_2_2_2_2_2_2_2_2_2_2_2_2_2_2_2_2_2_2_2_2_2_2_2_2_2_2_2_2_2

New Line.l(r:p1rdt2813lv-p1rlv3234) Units=km Length=0.0686801 bus1=p1rdt2813lv.1.2 bus2=p1rlv3234.1.2 switch=n enabled=y phases=2 Linecode=1P_OH_AL_4/0_Zuzara_0_416_0_2_2_2_2_2_2_2_2_2_2_2_2_2_2_2_2_2_2_2_2_2_2_2_2_2_2_2_2_2

New Line.l(r:p1rdt2813lv-p1rlv10858) Units=km Length=0.0997818 bus1=p1rdt2813lv.1.2 bus2=p1rlv10858.1.2 switch=n enabled=y phases=2 Linecode=1P_OH_AL_4/0_Zuzara_0_416_0_2_2_2_2_2_2_2_2_2_2_2_2_2_2_2_2_2_2_2_2_2_2_2_2_2_2_2_2_2

New Line.l(r:p1rdt2814lv-p1rlv3235) Units=km Length=0.041497 bus1=p1rdt2814lv.1.2 bus2=p1rlv3235.1.2 switch=n enabled=y phases=2 Linecode=1P_OH_AL_4/0_Zuzara_0_416_0_2_2_2_2_2_2_2_2_2_2_2_2_2_2_2_2_2_2_2_2_2_2_2_2_2_2_2_2_2

New Line.l(r:p1rdt2820lv-p1rlv3246) Units=km Length=0.020089600000000003 bus1=p1rdt2820lv.1.2 bus2=p1rlv3246.1.2 switch=n enabled=y phases=2 Linecode=1P_OH_AL_2/0_Rucina_0_416_0_2_2_2_2_2_2_2_2_2_2_2_2_2_2_2_2_2_2_2_2_2_2_2_2_2_2_2_2_2

New Line.l(r:p1rdt2820lv-p1rlv8443) Units=km Length=0.020089600000000003 bus1=p1rdt2820lv.1.2 bus2=p1rlv8443.1.2 switch=n enabled=y phases=2 Linecode=1P_OH_AL_2/0_Rucina_0_416_0_2_2_2_2_2_2_2_2_2_2_2_2_2_2_2_2_2_2_2_2_2_2_2_2_2_2_2_2_2

New Line.l(r:p1rdt3131lv-p1rlv11414) Units=km Length=0.0224925 bus1=p1rdt3131lv.1.2 bus2=p1rlv11414.1.2 switch=n enabled=y phases=2 Linecode=1P_OH_AL_2/0_Rucina_0_416_0_2_2_2_2_2_2_2_2_2_2_2_2_2_2_2_2_2_2_2_2_2_2_2_2_2_2_2_2_2

New Line.l(r:p1rdm6437-p1rlv3668) Units=km Length=0.046006 bus1=p1rdm6437.1.2 bus2=p1rlv3668.1.2 switch=n enabled=y phases=2 Linecode=1P_OH_AL_4/0_Zuzara_0_416_0_2_2_2_2_2_2_2_2_2_2_2_2_2_2_2_2_2_2_2_2_2_2_2_2_2_2_2_2_2

New Line.l(r:p1rdm6437-p1rdt3131lv) Units=km Length=0.0172003 bus1=p1rdt3131lv.1.2 bus2=p1rdm6437.1.2 switch=n enabled=y phases=2 Linecode=1P_OH_AL_2/0_Rucina_0_416_0_2_2_2_2_2_2_2_2_2_2_2_2_2_2_2_2_2_2_2_2_2_2_2_2_2_2_2_2_2

New Line.l(r:p1rdt3315lv-p1rlv3911) Units=km Length=0.0289121 bus1=p1rdt3315lv.1.2 bus2=p1rlv3911.1.2 switch=n enabled=y phases=2 Linecode=1P_OH_AL_4/0_Zuzara_0_416_0_2_2_2_2_2_2_2_2_2_2_2_2_2_2_2_2_2_2_2_2_2_2_2_2_2_2_2_2_2

New Line.l(r:p1rdt3315lv-p1rlv5542) Units=km Length=0.04907330000000001 bus1=p1rdt3315lv.1.2 bus2=p1rlv5542.1.2 switch=n enabled=y phases=2 Linecode=1P_OH_AL_4/0_Zuzara_0_416_0_2_2_2_2_2_2_2_2_2_2_2_2_2_2_2_2_2_2_2_2_2_2_2_2_2_2_2_2_2

New Line.l(r:p1rdt3315lv-p1rlv7242) Units=km Length=0.0362082 bus1=p1rdt3315lv.1.2 bus2=p1rlv7242.1.2 switch=n enabled=y phases=2 Linecode=1P_OH_AL_4/0_Zuzara_0_416_0_2_2_2_2_2_2_2_2_2_2_2_2_2_2_2_2_2_2_2_2_2_2_2_2_2_2_2_2_2

New Line.l(r:p1rdt3315lv-p1rlv9236) Units=km Length=0.00755988 bus1=p1rdt3315lv.1.2 bus2=p1rlv9236.1.2 switch=n enabled=y phases=2 Linecode=1P_OH_AL_2/0_Rucina_0_416_0_2_2_2_2_2_2_2_2_2_2_2_2_2_2_2_2_2_2_2_2_2_2_2_2_2_2_2_2_2

New Line.l(r:p1rdt3315lv-p1rlv11152) Units=km Length=0.04342220000000001 bus1=p1rdt3315lv.1.2 bus2=p1rlv11152.1.2 switch=n enabled=y phases=2 Linecode=1P_OH_AL_4/0_Zuzara_0_416_0_2_2_2_2_2_2_2_2_2_2_2_2_2_2_2_2_2_2_2_2_2_2_2_2_2_2_2_2_2

New Line.l(r:p1rdt3315lv-p1rlv13424) Units=km Length=0.0555929 bus1=p1rdt3315lv.1.2 bus2=p1rlv13424.1.2 switch=n enabled=y phases=2 Linecode=1P_OH_AL_4/0_Zuzara_0_416_0_2_2_2_2_2_2_2_2_2_2_2_2_2_2_2_2_2_2_2_2_2_2_2_2_2_2_2_2_2

New Line.l(r:p1rdt3316lv-p1rlv3912) Units=km Length=0.00860201 bus1=p1rdt3316lv.1.2 bus2=p1rlv3912.1.2 switch=n enabled=y phases=2 Linecode=1P_OH_AL_2/0_Rucina_0_416_0_2_2_2_2_2_2_2_2_2_2_2_2_2_2_2_2_2_2_2_2_2_2_2_2_2_2_2_2_2

New Line.l(r:p1rdt3316lv-p1rlv5813) Units=km Length=0.00860201 bus1=p1rdt3316lv.1.2 bus2=p1rlv5813.1.2 switch=n enabled=y phases=2 Linecode=1P_OH_AL_2/0_Rucina_0_416_0_2_2_2_2_2_2_2_2_2_2_2_2_2_2_2_2_2_2_2_2_2_2_2_2_2_2_2_2_2

New Line.l(r:p1rdt3406lv-p1rlv4041) Units=km Length=0.0421453 bus1=p1rdt3406lv.1.2 bus2=p1rlv4041.1.2 switch=n enabled=y phases=2 Linecode=1P_OH_AL_4/0_Zuzara_0_416_0_2_2_2_2_2_2_2_2_2_2_2_2_2_2_2_2_2_2_2_2_2_2_2_2_2_2_2_2_2

New Line.l(r:p1rdm6929-p1rlv10584) Units=km Length=0.0349237 bus1=p1rdm6929.1.2 bus2=p1rlv10584.1.2 switch=n enabled=y phases=2 Linecode=1P_OH_AL_4/0_Zuzara_0_416_0_2_2_2_2_2_2_2_2_2_2_2_2_2_2_2_2_2_2_2_2_2_2_2_2_2_2_2_2_2

New Line.l(r:p1rdm6929-p1rdt3406lv) Units=km Length=0.0181301 bus1=p1rdt3406lv.1.2 bus2=p1rdm6929.1.2 switch=n enabled=y phases=2 Linecode=1P_OH_AL_2/0_Rucina_0_416_0_2_2_2_2_2_2_2_2_2_2_2_2_2_2_2_2_2_2_2_2_2_2_2_2_2_2_2_2_2

New Line.l(r:p1rdt3407lv-p1rlv4042) Units=km Length=0.0466184 bus1=p1rdt3407lv.1.2 bus2=p1rlv4042.1.2 switch=n enabled=y phases=2 Linecode=1P_OH_AL_4/0_Zuzara_0_416_0_2_2_2_2_2_2_2_2_2_2_2_2_2_2_2_2_2_2_2_2_2_2_2_2_2_2_2_2_2

New Line.l(r:p1rdt3408lv-p1rlv5417) Units=km Length=0.0458954 bus1=p1rdt3408lv.1.2 bus2=p1rlv5417.1.2 switch=n enabled=y phases=2 Linecode=1P_OH_AL_4/0_Zuzara_0_416_0_2_2_2_2_2_2_2_2_2_2_2_2_2_2_2_2_2_2_2_2_2_2_2_2_2_2_2_2_2

New Line.l(r:p1rdt3408lv-p1rlv10179) Units=km Length=0.0612627 bus1=p1rdt3408lv.1.2 bus2=p1rlv10179.1.2 switch=n enabled=y phases=2 Linecode=1P_OH_AL_4/0_Zuzara_0_416_0_2_2_2_2_2_2_2_2_2_2_2_2_2_2_2_2_2_2_2_2_2_2_2_2_2_2_2_2_2

New Line.l(r:p1rdm6931-p1rlv4043) Units=km Length=0.0190415 bus1=p1rdm6931.1.2 bus2=p1rlv4043.1.2 switch=n enabled=y phases=2 Linecode=1P_OH_AL_2/0_Rucina_0_416_0_2_2_2_2_2_2_2_2_2_2_2_2_2_2_2_2_2_2_2_2_2_2_2_2_2_2_2_2_2

New Line.l(r:p1rdm6931-p1rdt3408lv) Units=km Length=0.014227100000000001 bus1=p1rdt3408lv.1.2 bus2=p1rdm6931.1.2 switch=n enabled=y phases=2 Linecode=1P_OH_AL_2/0_Rucina_0_416_0_2_2_2_2_2_2_2_2_2_2_2_2_2_2_2_2_2_2_2_2_2_2_2_2_2_2_2_2_2

New Line.l(r:p1rdt3600lv-p1rlv4317) Units=km Length=0.08471550000000001 bus1=p1rdt3600lv.1.2 bus2=p1rlv4317.1.2 switch=n enabled=y phases=2 Linecode=1P_OH_AL_4/0_Zuzara_0_416_0_2_2_2_2_2_2_2_2_2_2_2_2_2_2_2_2_2_2_2_2_2_2_2_2_2_2_2_2_2

New Line.l(r:p1rdt3601lv-p1rlv4318) Units=km Length=0.0208935 bus1=p1rdt3601lv.1.2 bus2=p1rlv4318.1.2 switch=n enabled=y phases=2 Linecode=1P_OH_AL_2/0_Rucina_0_416_0_2_2_2_2_2_2_2_2_2_2_2_2_2_2_2_2_2_2_2_2_2_2_2_2_2_2_2_2_2

New Line.l(r:p1rdt3601lv-p1rlv13425) Units=km Length=0.0208935 bus1=p1rdt3601lv.1.2 bus2=p1rlv13425.1.2 switch=n enabled=y phases=2 Linecode=1P_OH_AL_2/0_Rucina_0_416_0_2_2_2_2_2_2_2_2_2_2_2_2_2_2_2_2_2_2_2_2_2_2_2_2_2_2_2_2_2

New Line.l(r:p1rdt3709lv-p1rlv4477) Units=km Length=0.0103661 bus1=p1rdt3709lv.1.2 bus2=p1rlv4477.1.2 switch=n enabled=y phases=2 Linecode=1P_OH_AL_2/0_Rucina_0_416_0_2_2_2_2_2_2_2_2_2_2_2_2_2_2_2_2_2_2_2_2_2_2_2_2_2_2_2_2_2

New Line.l(r:p1rdm7451-p1rlv6451) Units=km Length=0.0372188 bus1=p1rdm7451.1.2 bus2=p1rlv6451.1.2 switch=n enabled=y phases=2 Linecode=1P_OH_AL_4/0_Zuzara_0_416_0_2_2_2_2_2_2_2_2_2_2_2_2_2_2_2_2_2_2_2_2_2_2_2_2_2_2_2_2_2

New Line.l(r:p1rdm7451-p1rdt3709lv) Units=km Length=0.0192035 bus1=p1rdt3709lv.1.2 bus2=p1rdm7451.1.2 switch=n enabled=y phases=2 Linecode=1P_OH_AL_2/0_Rucina_0_416_0_2_2_2_2_2_2_2_2_2_2_2_2_2_2_2_2_2_2_2_2_2_2_2_2_2_2_2_2_2

New Line.l(r:p1rdt3893lv-p1rlv4750) Units=km Length=0.06447 bus1=p1rdt3893lv.1.2 bus2=p1rlv4750.1.2 switch=n enabled=y phases=2 Linecode=1P_OH_AL_4/0_Zuzara_0_416_0_2_2_2_2_2_2_2_2_2_2_2_2_2_2_2_2_2_2_2_2_2_2_2_2_2_2_2_2_2

New Line.l(r:p1rdt3893lv-p1rlv9235) Units=km Length=0.0884242 bus1=p1rdt3893lv.1.2 bus2=p1rlv9235.1.2 switch=n enabled=y phases=2 Linecode=1P_OH_AL_4/0_Zuzara_0_416_0_2_2_2_2_2_2_2_2_2_2_2_2_2_2_2_2_2_2_2_2_2_2_2_2_2_2_2_2_2

New Line.l(r:p1rdt3996lv-p1rlv4907) Units=km Length=0.03727690000000001 bus1=p1rdt3996lv.1.2 bus2=p1rlv4907.1.2 switch=n enabled=y phases=2 Linecode=1P_OH_AL_4/0_Zuzara_0_416_0_2_2_2_2_2_2_2_2_2_2_2_2_2_2_2_2_2_2_2_2_2_2_2_2_2_2_2_2_2

New Line.l(r:p1rdt4074lv-p1rlv5027) Units=km Length=0.00820039 bus1=p1rdt4074lv.1.2 bus2=p1rlv5027.1.2 switch=n enabled=y phases=2 Linecode=1P_OH_AL_2/0_Rucina_0_416_0_2_2_2_2_2_2_2_2_2_2_2_2_2_2_2_2_2_2_2_2_2_2_2_2_2_2_2_2_2

New Line.l(r:p1rdt4074lv-p1rlv5150) Units=km Length=0.0220761 bus1=p1rdt4074lv.1.2 bus2=p1rlv5150.1.2 switch=n enabled=y phases=2 Linecode=1P_OH_AL_2/0_Rucina_0_416_0_2_2_2_2_2_2_2_2_2_2_2_2_2_2_2_2_2_2_2_2_2_2_2_2_2_2_2_2_2

New Line.l(r:p1rdt4315lv-p1rlv5416) Units=km Length=0.0421763 bus1=p1rdt4315lv.1.2 bus2=p1rlv5416.1.2 switch=n enabled=y phases=2 Linecode=1P_OH_AL_4/0_Zuzara_0_416_0_2_2_2_2_2_2_2_2_2_2_2_2_2_2_2_2_2_2_2_2_2_2_2_2_2_2_2_2_2

New Line.l(r:p1rdt4315lv-p1rlv10059) Units=km Length=0.0361671 bus1=p1rdt4315lv.1.2 bus2=p1rlv10059.1.2 switch=n enabled=y phases=2 Linecode=1P_OH_AL_4/0_Zuzara_0_416_0_2_2_2_2_2_2_2_2_2_2_2_2_2_2_2_2_2_2_2_2_2_2_2_2_2_2_2_2_2

New Line.l(r:p1rdt4315lv-p1rlv12106) Units=km Length=0.0100257 bus1=p1rdt4315lv.1.2 bus2=p1rlv12106.1.2 switch=n enabled=y phases=2 Linecode=1P_OH_AL_2/0_Rucina_0_416_0_2_2_2_2_2_2_2_2_2_2_2_2_2_2_2_2_2_2_2_2_2_2_2_2_2_2_2_2_2

New Line.l(r:p1rdt4320lv-p1rlv5428) Units=km Length=0.0247538 bus1=p1rdt4320lv.1.2 bus2=p1rlv5428.1.2 switch=n enabled=y phases=2 Linecode=1P_OH_AL_2/0_Rucina_0_416_0_2_2_2_2_2_2_2_2_2_2_2_2_2_2_2_2_2_2_2_2_2_2_2_2_2_2_2_2_2

New Line.l(r:p1rdt4484lv-p1rlv5694) Units=km Length=0.0386907 bus1=p1rdt4484lv.1.2 bus2=p1rlv5694.1.2 switch=n enabled=y phases=2 Linecode=1P_OH_AL_4/0_Zuzara_0_416_0_2_2_2_2_2_2_2_2_2_2_2_2_2_2_2_2_2_2_2_2_2_2_2_2_2_2_2_2_2

New Line.l(r:p1rdt4792lv-p1rlv6201) Units=km Length=0.001 bus1=p1rdt4792lv.1.2 bus2=p1rlv6201.1.2 switch=n enabled=y phases=2 Linecode=1P_OH_AL_4_Periwinkle_0_416_0_2_2_2_2_2_2_2_2_2_2_2_2_2_2_2_2_2_2_2_2_2_2_2_2_2_2_2_2_2

New Line.l(r:p1rdt5009lv-p1rlv6569) Units=km Length=0.0152755 bus1=p1rdt5009lv.1.2 bus2=p1rlv6569.1.2 switch=n enabled=y phases=2 Linecode=1P_OH_AL_2/0_Rucina_0_416_0_2_2_2_2_2_2_2_2_2_2_2_2_2_2_2_2_2_2_2_2_2_2_2_2_2_2_2_2_2

New Line.l(r:p1rdt5009lv-p1rlv10856) Units=km Length=0.0152755 bus1=p1rdt5009lv.1.2 bus2=p1rlv10856.1.2 switch=n enabled=y phases=2 Linecode=1P_OH_AL_2/0_Rucina_0_416_0_2_2_2_2_2_2_2_2_2_2_2_2_2_2_2_2_2_2_2_2_2_2_2_2_2_2_2_2_2

New Line.l(r:p1rdt5010lv-p1rlv9350) Units=km Length=0.0758674 bus1=p1rdt5010lv.1.2 bus2=p1rlv9350.1.2 switch=n enabled=y phases=2 Linecode=1P_OH_AL_4/0_Zuzara_0_416_0_2_2_2_2_2_2_2_2_2_2_2_2_2_2_2_2_2_2_2_2_2_2_2_2_2_2_2_2_2

New Line.l(r:p1rdm9528-p1rlv6570) Units=km Length=0.0306566 bus1=p1rdm9528.1.2 bus2=p1rlv6570.1.2 switch=n enabled=y phases=2 Linecode=1P_OH_AL_4/0_Zuzara_0_416_0_2_2_2_2_2_2_2_2_2_2_2_2_2_2_2_2_2_2_2_2_2_2_2_2_2_2_2_2_2

New Line.l(r:p1rdm9528-p1rdt5010lv) Units=km Length=0.0188141 bus1=p1rdt5010lv.1.2 bus2=p1rdm9528.1.2 switch=n enabled=y phases=2 Linecode=1P_OH_AL_2/0_Rucina_0_416_0_2_2_2_2_2_2_2_2_2_2_2_2_2_2_2_2_2_2_2_2_2_2_2_2_2_2_2_2_2

New Line.l(r:p1rdm9530-p1rlv12397) Units=km Length=0.0368347 bus1=p1rdm9530.1.2 bus2=p1rlv12397.1.2 switch=n enabled=y phases=2 Linecode=1P_OH_AL_4/0_Zuzara_0_416_0_2_2_2_2_2_2_2_2_2_2_2_2_2_2_2_2_2_2_2_2_2_2_2_2_2_2_2_2_2

New Line.l(r:p1rdm9530-p1rdt5010lv) Units=km Length=0.0188027 bus1=p1rdt5010lv.1.2 bus2=p1rdm9530.1.2 switch=n enabled=y phases=2 Linecode=1P_OH_AL_2/0_Rucina_0_416_0_2_2_2_2_2_2_2_2_2_2_2_2_2_2_2_2_2_2_2_2_2_2_2_2_2_2_2_2_2

New Line.l(r:p1rdt5189lv-p1rlv6839) Units=km Length=0.027322 bus1=p1rdt5189lv.1.2 bus2=p1rlv6839.1.2 switch=n enabled=y phases=2 Linecode=1P_OH_AL_4/0_Zuzara_0_416_0_2_2_2_2_2_2_2_2_2_2_2_2_2_2_2_2_2_2_2_2_2_2_2_2_2_2_2_2_2

New Line.l(r:p1rdt5190lv-p1rlv6840) Units=km Length=0.001 bus1=p1rdt5190lv.1.2 bus2=p1rlv6840.1.2 switch=n enabled=y phases=2 Linecode=1P_OH_AL_4_Periwinkle_0_416_0_2_2_2_2_2_2_2_2_2_2_2_2_2_2_2_2_2_2_2_2_2_2_2_2_2_2_2_2_2

New Line.l(r:p1rdt5260lv-p1rlv6954) Units=km Length=0.06190590000000001 bus1=p1rdt5260lv.1.2 bus2=p1rlv6954.1.2 switch=n enabled=y phases=2 Linecode=1P_OH_AL_4/0_Zuzara_0_416_0_2_2_2_2_2_2_2_2_2_2_2_2_2_2_2_2_2_2_2_2_2_2_2_2_2_2_2_2_2

New Line.l(r:p1rdt5260lv-p1rlv13679) Units=km Length=0.06190590000000001 bus1=p1rdt5260lv.1.2 bus2=p1rlv13679.1.2 switch=n enabled=y phases=2 Linecode=1P_OH_AL_4/0_Zuzara_0_416_0_2_2_2_2_2_2_2_2_2_2_2_2_2_2_2_2_2_2_2_2_2_2_2_2_2_2_2_2_2

New Line.l(r:p1rdt5261lv-p1rlv6955) Units=km Length=0.001 bus1=p1rdt5261lv.1.2 bus2=p1rlv6955.1.2 switch=n enabled=y phases=2 Linecode=1P_OH_AL_4_Periwinkle_0_416_0_2_2_2_2_2_2_2_2_2_2_2_2_2_2_2_2_2_2_2_2_2_2_2_2_2_2_2_2_2

New Line.l(r:p1rdt5344lv-p1rlv7099) Units=km Length=0.0434247 bus1=p1rdt5344lv.1.2 bus2=p1rlv7099.1.2 switch=n enabled=y phases=2 Linecode=1P_OH_AL_4/0_Zuzara_0_416_0_2_2_2_2_2_2_2_2_2_2_2_2_2_2_2_2_2_2_2_2_2_2_2_2_2_2_2_2_2

New Line.l(r:p1rdt5344lv-p1rlv9930) Units=km Length=0.0391668 bus1=p1rdt5344lv.1.2 bus2=p1rlv9930.1.2 switch=n enabled=y phases=2 Linecode=1P_OH_AL_4/0_Zuzara_0_416_0_2_2_2_2_2_2_2_2_2_2_2_2_2_2_2_2_2_2_2_2_2_2_2_2_2_2_2_2_2

New Line.l(r:p1rdt5344lv-p1rlv10061) Units=km Length=0.0423678 bus1=p1rdt5344lv.1.2 bus2=p1rlv10061.1.2 switch=n enabled=y phases=2 Linecode=1P_OH_AL_4/0_Zuzara_0_416_0_2_2_2_2_2_2_2_2_2_2_2_2_2_2_2_2_2_2_2_2_2_2_2_2_2_2_2_2_2

New Line.l(r:p1rdt5421lv-p1rlv7241) Units=km Length=0.0416574 bus1=p1rdt5421lv.1.2 bus2=p1rlv7241.1.2 switch=n enabled=y phases=2 Linecode=1P_OH_AL_4/0_Zuzara_0_416_0_2_2_2_2_2_2_2_2_2_2_2_2_2_2_2_2_2_2_2_2_2_2_2_2_2_2_2_2_2

New Line.l(r:p1rdt5655lv-p1rlv7663) Units=km Length=0.0423958 bus1=p1rdt5655lv.1.2 bus2=p1rlv7663.1.2 switch=n enabled=y phases=2 Linecode=1P_OH_AL_4/0_Zuzara_0_416_0_2_2_2_2_2_2_2_2_2_2_2_2_2_2_2_2_2_2_2_2_2_2_2_2_2_2_2_2_2

New Line.l(r:p1rdt5655lv-p1rlv11701) Units=km Length=0.0695056 bus1=p1rdt5655lv.1.2 bus2=p1rlv11701.1.2 switch=n enabled=y phases=2 Linecode=1P_OH_AL_4/0_Zuzara_0_416_0_2_2_2_2_2_2_2_2_2_2_2_2_2_2_2_2_2_2_2_2_2_2_2_2_2_2_2_2_2

New Line.l(r:p1rdt5658lv-p1rlv8977) Units=km Length=0.0664592 bus1=p1rdt5658lv.1.2 bus2=p1rlv8977.1.2 switch=n enabled=y phases=2 Linecode=1P_OH_AL_4/0_Zuzara_0_416_0_2_2_2_2_2_2_2_2_2_2_2_2_2_2_2_2_2_2_2_2_2_2_2_2_2_2_2_2_2

New Line.l(r:p1rdm10486-p1rlv7668) Units=km Length=0.0498843 bus1=p1rdm10486.1.2 bus2=p1rlv7668.1.2 switch=n enabled=y phases=2 Linecode=1P_OH_AL_4/0_Zuzara_0_416_0_2_2_2_2_2_2_2_2_2_2_2_2_2_2_2_2_2_2_2_2_2_2_2_2_2_2_2_2_2

New Line.l(r:p1rdm10486-p1rdt5658lv) Units=km Length=0.0102152 bus1=p1rdt5658lv.1.2 bus2=p1rdm10486.1.2 switch=n enabled=y phases=2 Linecode=1P_OH_AL_2/0_Rucina_0_416_0_2_2_2_2_2_2_2_2_2_2_2_2_2_2_2_2_2_2_2_2_2_2_2_2_2_2_2_2_2

New Line.l(r:p1rdt5723lv-p1rlv7797) Units=km Length=0.0717393 bus1=p1rdt5723lv.1.2 bus2=p1rlv7797.1.2 switch=n enabled=y phases=2 Linecode=1P_OH_AL_4/0_Zuzara_0_416_0_2_2_2_2_2_2_2_2_2_2_2_2_2_2_2_2_2_2_2_2_2_2_2_2_2_2_2_2_2

New Line.l(r:p1rdt5925lv-p1rlv8172) Units=km Length=0.0352911 bus1=p1rdt5925lv.1.2 bus2=p1rlv8172.1.2 switch=n enabled=y phases=2 Linecode=1P_OH_AL_4/0_Zuzara_0_416_0_2_2_2_2_2_2_2_2_2_2_2_2_2_2_2_2_2_2_2_2_2_2_2_2_2_2_2_2_2

New Line.l(r:p1rdt5994lv-p1rlv11838) Units=km Length=0.0727536 bus1=p1rdt5994lv.1.2 bus2=p1rlv11838.1.2 switch=n enabled=y phases=2 Linecode=1P_OH_AL_4/0_Zuzara_0_416_0_2_2_2_2_2_2_2_2_2_2_2_2_2_2_2_2_2_2_2_2_2_2_2_2_2_2_2_2_2

New Line.l(r:p1rdm10970-p1rlv8300) Units=km Length=0.0780075 bus1=p1rdm10970.1.2 bus2=p1rlv8300.1.2 switch=n enabled=y phases=2 Linecode=1P_OH_AL_4/0_Zuzara_0_416_0_2_2_2_2_2_2_2_2_2_2_2_2_2_2_2_2_2_2_2_2_2_2_2_2_2_2_2_2_2

New Line.l(r:p1rdm10970-p1rdt5994lv) Units=km Length=0.0104428 bus1=p1rdt5994lv.1.2 bus2=p1rdm10970.1.2 switch=n enabled=y phases=2 Linecode=1P_OH_AL_2/0_Rucina_0_416_0_2_2_2_2_2_2_2_2_2_2_2_2_2_2_2_2_2_2_2_2_2_2_2_2_2_2_2_2_2

New Line.l(r:p1rdm11066-p1rlv8432) Units=km Length=0.0123693 bus1=p1rdm11066.1.2 bus2=p1rlv8432.1.2 switch=n enabled=y phases=2 Linecode=1P_UG_AL_1/0_Brenau_0_416_0_2_2_2_2_2_2_2_2_2_2_2_2_2_2_2_2_2_2_2_2_2_2_2_2_2_2_2_2_2

New Line.l(r:p1rdm11066-p1rdt6065lv) Units=km Length=0.0190787 bus1=p1rdt6065lv.1.2 bus2=p1rdm11066.1.2 switch=n enabled=y phases=2 Linecode=1P_UG_AL_1/0_Brenau_0_416_0_2_2_2_2_2_2_2_2_2_2_2_2_2_2_2_2_2_2_2_2_2_2_2_2_2_2_2_2_2

New Line.l(r:p1rdm11067-p1rlv11700) Units=km Length=0.0295183 bus1=p1rdm11067.1.2 bus2=p1rlv11700.1.2 switch=n enabled=y phases=2 Linecode=1P_UG_AL_1/0_Brenau_0_416_0_2_2_2_2_2_2_2_2_2_2_2_2_2_2_2_2_2_2_2_2_2_2_2_2_2_2_2_2_2

New Line.l(r:p1rdm11067-p1rdt6065lv) Units=km Length=0.019081 bus1=p1rdt6065lv.1.2 bus2=p1rdm11067.1.2 switch=n enabled=y phases=2 Linecode=1P_UG_AL_1/0_Brenau_0_416_0_2_2_2_2_2_2_2_2_2_2_2_2_2_2_2_2_2_2_2_2_2_2_2_2_2_2_2_2_2

New Line.l(r:p1rdt6067lv-p1rlv8435) Units=km Length=0.015955 bus1=p1rdt6067lv.1.2 bus2=p1rlv8435.1.2 switch=n enabled=y phases=2 Linecode=1P_OH_AL_2/0_Rucina_0_416_0_2_2_2_2_2_2_2_2_2_2_2_2_2_2_2_2_2_2_2_2_2_2_2_2_2_2_2_2_2

New Line.l(r:p1rdt6067lv-p1rlv9099) Units=km Length=0.015955 bus1=p1rdt6067lv.1.2 bus2=p1rlv9099.1.2 switch=n enabled=y phases=2 Linecode=1P_OH_AL_2/0_Rucina_0_416_0_2_2_2_2_2_2_2_2_2_2_2_2_2_2_2_2_2_2_2_2_2_2_2_2_2_2_2_2_2

New Line.l(r:p1rdt6136lv-p1rlv8568) Units=km Length=0.001 bus1=p1rdt6136lv.1.2 bus2=p1rlv8568.1.2 switch=n enabled=y phases=2 Linecode=1P_OH_AL_4_Periwinkle_0_416_0_2_2_2_2_2_2_2_2_2_2_2_2_2_2_2_2_2_2_2_2_2_2_2_2_2_2_2_2_2

New Line.l(r:p1rdt6272lv-p1rlv8838) Units=km Length=0.05167420000000001 bus1=p1rdt6272lv.1.2 bus2=p1rlv8838.1.2 switch=n enabled=y phases=2 Linecode=1P_OH_AL_4/0_Zuzara_0_416_0_2_2_2_2_2_2_2_2_2_2_2_2_2_2_2_2_2_2_2_2_2_2_2_2_2_2_2_2_2

New Line.l(r:p1rdm11360-p1rlv9776) Units=km Length=0.0242177 bus1=p1rdm11360.1.2 bus2=p1rlv9776.1.2 switch=n enabled=y phases=2 Linecode=1P_OH_AL_2/0_Rucina_0_416_0_2_2_2_2_2_2_2_2_2_2_2_2_2_2_2_2_2_2_2_2_2_2_2_2_2_2_2_2_2

New Line.l(r:p1rdm11360-p1rdt6272lv) Units=km Length=0.0193183 bus1=p1rdt6272lv.1.2 bus2=p1rdm11360.1.2 switch=n enabled=y phases=2 Linecode=1P_OH_AL_2/0_Rucina_0_416_0_2_2_2_2_2_2_2_2_2_2_2_2_2_2_2_2_2_2_2_2_2_2_2_2_2_2_2_2_2

New Line.l(r:p1rdt6345lv-p1rlv11162) Units=km Length=0.0158779 bus1=p1rdt6345lv.1.2 bus2=p1rlv11162.1.2 switch=n enabled=y phases=2 Linecode=1P_OH_AL_2/0_Rucina_0_416_0_2_2_2_2_2_2_2_2_2_2_2_2_2_2_2_2_2_2_2_2_2_2_2_2_2_2_2_2_2

New Line.l(r:p1rdm11457-p1rlv8985) Units=km Length=0.0157542 bus1=p1rdm11457.1.2 bus2=p1rlv8985.1.2 switch=n enabled=y phases=2 Linecode=1P_OH_AL_2/0_Rucina_0_416_0_2_2_2_2_2_2_2_2_2_2_2_2_2_2_2_2_2_2_2_2_2_2_2_2_2_2_2_2_2

New Line.l(r:p1rdm11457-p1rlv10313) Units=km Length=0.00823312 bus1=p1rdm11457.1.2 bus2=p1rlv10313.1.2 switch=n enabled=y phases=2 Linecode=1P_OH_AL_2/0_Rucina_0_416_0_2_2_2_2_2_2_2_2_2_2_2_2_2_2_2_2_2_2_2_2_2_2_2_2_2_2_2_2_2

New Line.l(r:p1rdm11457-p1rdt6345lv) Units=km Length=0.0321404 bus1=p1rdt6345lv.1.2 bus2=p1rdm11457.1.2 switch=n enabled=y phases=2 Linecode=1P_OH_AL_4/0_Zuzara_0_416_0_2_2_2_2_2_2_2_2_2_2_2_2_2_2_2_2_2_2_2_2_2_2_2_2_2_2_2_2_2

New Line.l(r:p1rdm11461-p1rlv12928) Units=km Length=0.00471781 bus1=p1rdm11461.1.2 bus2=p1rlv12928.1.2 switch=n enabled=y phases=2 Linecode=1P_OH_AL_2/0_Rucina_0_416_0_2_2_2_2_2_2_2_2_2_2_2_2_2_2_2_2_2_2_2_2_2_2_2_2_2_2_2_2_2

New Line.l(r:p1rdm11458-p1rlv9508) Units=km Length=0.0061745 bus1=p1rdm11458.1.2 bus2=p1rlv9508.1.2 switch=n enabled=y phases=2 Linecode=1P_OH_AL_2/0_Rucina_0_416_0_2_2_2_2_2_2_2_2_2_2_2_2_2_2_2_2_2_2_2_2_2_2_2_2_2_2_2_2_2

New Line.l(r:p1rdm11458-p1rdm11461) Units=km Length=0.0694409 bus1=p1rdm11461.1.2 bus2=p1rdm11458.1.2 switch=n enabled=y phases=2 Linecode=1P_OH_AL_4/0_Zuzara_0_416_0_2_2_2_2_2_2_2_2_2_2_2_2_2_2_2_2_2_2_2_2_2_2_2_2_2_2_2_2_2

New Line.l(r:p1rdm11461-p1rdt6345lv) Units=km Length=0.012344600000000002 bus1=p1rdt6345lv.1.2 bus2=p1rdm11461.1.2 switch=n enabled=y phases=2 Linecode=1P_OH_AL_2/0_Rucina_0_416_0_2_2_2_2_2_2_2_2_2_2_2_2_2_2_2_2_2_2_2_2_2_2_2_2_2_2_2_2_2

New Line.l(r:p1rdt6405lv-p1rlv9098) Units=km Length=0.001 bus1=p1rdt6405lv.1.2 bus2=p1rlv9098.1.2 switch=n enabled=y phases=2 Linecode=1P_OH_AL_4_Periwinkle_0_416_0_2_2_2_2_2_2_2_2_2_2_2_2_2_2_2_2_2_2_2_2_2_2_2_2_2_2_2_2_2

New Line.l(r:p1rdt6587lv-p1rlv9494) Units=km Length=0.0191422 bus1=p1rdt6587lv.1.2 bus2=p1rlv9494.1.2 switch=n enabled=y phases=2 Linecode=1P_OH_AL_2/0_Rucina_0_416_0_2_2_2_2_2_2_2_2_2_2_2_2_2_2_2_2_2_2_2_2_2_2_2_2_2_2_2_2_2

New Line.l(r:p1rdt6721lv-p1rlv9775) Units=km Length=0.001 bus1=p1rdt6721lv.1.2 bus2=p1rlv9775.1.2 switch=n enabled=y phases=2 Linecode=1P_OH_AL_4_Periwinkle_0_416_0_2_2_2_2_2_2_2_2_2_2_2_2_2_2_2_2_2_2_2_2_2_2_2_2_2_2_2_2_2

New Line.l(r:p1rdt6722lv-p1rlv9777) Units=km Length=0.0362961 bus1=p1rdt6722lv.1.2 bus2=p1rlv9777.1.2 switch=n enabled=y phases=2 Linecode=1P_OH_AL_4/0_Zuzara_0_416_0_2_2_2_2_2_2_2_2_2_2_2_2_2_2_2_2_2_2_2_2_2_2_2_2_2_2_2_2_2

New Line.l(r:p1rdt6722lv-p1rlv12521) Units=km Length=0.0362961 bus1=p1rdt6722lv.1.2 bus2=p1rlv12521.1.2 switch=n enabled=y phases=2 Linecode=1P_OH_AL_4/0_Zuzara_0_416_0_2_2_2_2_2_2_2_2_2_2_2_2_2_2_2_2_2_2_2_2_2_2_2_2_2_2_2_2_2

New Line.l(r:p1rdt6784lv-p1rlv9929) Units=km Length=0.0218695 bus1=p1rdt6784lv.1.2 bus2=p1rlv9929.1.2 switch=n enabled=y phases=2 Linecode=1P_OH_AL_2/0_Rucina_0_416_0_2_2_2_2_2_2_2_2_2_2_2_2_2_2_2_2_2_2_2_2_2_2_2_2_2_2_2_2_2

New Line.l(r:p1rdt6846lv-p1rlv10058) Units=km Length=0.001 bus1=p1rdt6846lv.1.2 bus2=p1rlv10058.1.2 switch=n enabled=y phases=2 Linecode=1P_OH_AL_4_Periwinkle_0_416_0_2_2_2_2_2_2_2_2_2_2_2_2_2_2_2_2_2_2_2_2_2_2_2_2_2_2_2_2_2

New Line.l(r:p1rdt6894lv-p1rlv10178) Units=km Length=0.0549571 bus1=p1rdt6894lv.1.2 bus2=p1rlv10178.1.2 switch=n enabled=y phases=2 Linecode=1P_OH_AL_4/0_Zuzara_0_416_0_2_2_2_2_2_2_2_2_2_2_2_2_2_2_2_2_2_2_2_2_2_2_2_2_2_2_2_2_2

New Line.l(r:p1rdt7127lv-p1rlv10730) Units=km Length=0.0879445 bus1=p1rdt7127lv.1.2 bus2=p1rlv10730.1.2 switch=n enabled=y phases=2 Linecode=1P_OH_AL_4/0_Zuzara_0_416_0_2_2_2_2_2_2_2_2_2_2_2_2_2_2_2_2_2_2_2_2_2_2_2_2_2_2_2_2_2

New Line.l(r:p1rdm12518-p1rlv10857) Units=km Length=0.0210347 bus1=p1rdm12518.1.2 bus2=p1rlv10857.1.2 switch=n enabled=y phases=2 Linecode=1P_OH_AL_2/0_Rucina_0_416_0_2_2_2_2_2_2_2_2_2_2_2_2_2_2_2_2_2_2_2_2_2_2_2_2_2_2_2_2_2

New Line.l(r:p1rdm12518-p1rdt7186lv) Units=km Length=0.0179494 bus1=p1rdt7186lv.1.2 bus2=p1rdm12518.1.2 switch=n enabled=y phases=2 Linecode=1P_OH_AL_2/0_Rucina_0_416_0_2_2_2_2_2_2_2_2_2_2_2_2_2_2_2_2_2_2_2_2_2_2_2_2_2_2_2_2_2

New Line.l(r:p1rdm12519-p1rlv12395) Units=km Length=0.0146314 bus1=p1rdm12519.1.2 bus2=p1rlv12395.1.2 switch=n enabled=y phases=2 Linecode=1P_OH_AL_2/0_Rucina_0_416_0_2_2_2_2_2_2_2_2_2_2_2_2_2_2_2_2_2_2_2_2_2_2_2_2_2_2_2_2_2

New Line.l(r:p1rdm12519-p1rdt7186lv) Units=km Length=0.05243010000000001 bus1=p1rdt7186lv.1.2 bus2=p1rdm12519.1.2 switch=n enabled=y phases=2 Linecode=1P_OH_AL_4/0_Zuzara_0_416_0_2_2_2_2_2_2_2_2_2_2_2_2_2_2_2_2_2_2_2_2_2_2_2_2_2_2_2_2_2

New Line.l(r:p1rdt7187lv-p1rlv10860) Units=km Length=0.001 bus1=p1rdt7187lv.1.2 bus2=p1rlv10860.1.2 switch=n enabled=y phases=2 Linecode=1P_OH_AL_4_Periwinkle_0_416_0_2_2_2_2_2_2_2_2_2_2_2_2_2_2_2_2_2_2_2_2_2_2_2_2_2_2_2_2_2

New Line.l(r:p1rdt7248lv-p1rlv10995) Units=km Length=0.0691592 bus1=p1rdt7248lv.1.2 bus2=p1rlv10995.1.2 switch=n enabled=y phases=2 Linecode=1P_OH_AL_4/0_Zuzara_0_416_0_2_2_2_2_2_2_2_2_2_2_2_2_2_2_2_2_2_2_2_2_2_2_2_2_2_2_2_2_2

New Line.l(r:p1rdt7319lv-p1rlv11151) Units=km Length=0.0183986 bus1=p1rdt7319lv.1.2 bus2=p1rlv11151.1.2 switch=n enabled=y phases=2 Linecode=1P_OH_AL_2/0_Rucina_0_416_0_2_2_2_2_2_2_2_2_2_2_2_2_2_2_2_2_2_2_2_2_2_2_2_2_2_2_2_2_2

New Line.l(r:p1rdt7319lv-p1rlv13680) Units=km Length=0.0183986 bus1=p1rdt7319lv.1.2 bus2=p1rlv13680.1.2 switch=n enabled=y phases=2 Linecode=1P_OH_AL_2/0_Rucina_0_416_0_2_2_2_2_2_2_2_2_2_2_2_2_2_2_2_2_2_2_2_2_2_2_2_2_2_2_2_2_2

New Line.l(r:p1rdt7375lv-p1rlv11268) Units=km Length=0.0116818 bus1=p1rdt7375lv.1.2 bus2=p1rlv11268.1.2 switch=n enabled=y phases=2 Linecode=1P_OH_AL_2/0_Rucina_0_416_0_2_2_2_2_2_2_2_2_2_2_2_2_2_2_2_2_2_2_2_2_2_2_2_2_2_2_2_2_2

New Line.l(r:p1rdt7615lv-p1rlv11837) Units=km Length=0.013696200000000002 bus1=p1rdt7615lv.1.2 bus2=p1rlv11837.1.2 switch=n enabled=y phases=2 Linecode=1P_OH_AL_2/0_Rucina_0_416_0_2_2_2_2_2_2_2_2_2_2_2_2_2_2_2_2_2_2_2_2_2_2_2_2_2_2_2_2_2

New Line.l(r:p1rdt7616lv-p1rlv11839) Units=km Length=0.001 bus1=p1rdt7616lv.1.2 bus2=p1rlv11839.1.2 switch=n enabled=y phases=2 Linecode=1P_OH_AL_4_Periwinkle_0_416_0_2_2_2_2_2_2_2_2_2_2_2_2_2_2_2_2_2_2_2_2_2_2_2_2_2_2_2_2_2

New Line.l(r:p1rdt7669lv-p1rlv11973) Units=km Length=0.0649424 bus1=p1rdt7669lv.1.2 bus2=p1rlv11973.1.2 switch=n enabled=y phases=2 Linecode=1P_OH_AL_4/0_Zuzara_0_416_0_2_2_2_2_2_2_2_2_2_2_2_2_2_2_2_2_2_2_2_2_2_2_2_2_2_2_2_2_2

New Line.l(r:p1rdt7715lv-p1rlv12107) Units=km Length=0.01315 bus1=p1rdt7715lv.1.2 bus2=p1rlv12107.1.2 switch=n enabled=y phases=2 Linecode=1P_OH_AL_2/0_Rucina_0_416_0_2_2_2_2_2_2_2_2_2_2_2_2_2_2_2_2_2_2_2_2_2_2_2_2_2_2_2_2_2

New Line.l(r:p1rdt7715lv-p1rlv13157) Units=km Length=0.01315 bus1=p1rdt7715lv.1.2 bus2=p1rlv13157.1.2 switch=n enabled=y phases=2 Linecode=1P_OH_AL_2/0_Rucina_0_416_0_2_2_2_2_2_2_2_2_2_2_2_2_2_2_2_2_2_2_2_2_2_2_2_2_2_2_2_2_2

New Line.l(r:p1rdt7716lv-p1rlv12108) Units=km Length=0.001 bus1=p1rdt7716lv.1.2 bus2=p1rlv12108.1.2 switch=n enabled=y phases=2 Linecode=1P_OH_AL_4_Periwinkle_0_416_0_2_2_2_2_2_2_2_2_2_2_2_2_2_2_2_2_2_2_2_2_2_2_2_2_2_2_2_2_2

New Line.l(r:p1rdt7851lv-p1rlv12394) Units=km Length=0.0151411 bus1=p1rdt7851lv.1.2 bus2=p1rlv12394.1.2 switch=n enabled=y phases=2 Linecode=1P_OH_AL_2/0_Rucina_0_416_0_2_2_2_2_2_2_2_2_2_2_2_2_2_2_2_2_2_2_2_2_2_2_2_2_2_2_2_2_2

New Line.l(r:p1rdt7889lv-p1rlv12520) Units=km Length=0.001 bus1=p1rdt7889lv.1.2 bus2=p1rlv12520.1.2 switch=n enabled=y phases=2 Linecode=1P_OH_AL_4_Periwinkle_0_416_0_2_2_2_2_2_2_2_2_2_2_2_2_2_2_2_2_2_2_2_2_2_2_2_2_2_2_2_2_2

New Line.l(r:p1rdt7890lv-p1rlv12522) Units=km Length=0.001 bus1=p1rdt7890lv.1.2 bus2=p1rlv12522.1.2 switch=n enabled=y phases=2 Linecode=1P_OH_AL_4_Periwinkle_0_416_0_2_2_2_2_2_2_2_2_2_2_2_2_2_2_2_2_2_2_2_2_2_2_2_2_2_2_2_2_2

New Line.l(r:p1rdt7934lv-p1rlv12639) Units=km Length=0.072786 bus1=p1rdt7934lv.1.2 bus2=p1rlv12639.1.2 switch=n enabled=y phases=2 Linecode=1P_OH_AL_4/0_Zuzara_0_416_0_2_2_2_2_2_2_2_2_2_2_2_2_2_2_2_2_2_2_2_2_2_2_2_2_2_2_2_2_2

New Line.l(r:p1rdt7935lv-p1rlv12640) Units=km Length=0.0369371 bus1=p1rdt7935lv.1.2 bus2=p1rlv12640.1.2 switch=n enabled=y phases=2 Linecode=1P_OH_AL_4/0_Zuzara_0_416_0_2_2_2_2_2_2_2_2_2_2_2_2_2_2_2_2_2_2_2_2_2_2_2_2_2_2_2_2_2

New Line.l(r:p1rdt7995lv-p1rlv12774) Units=km Length=0.0431473 bus1=p1rdt7995lv.1.2 bus2=p1rlv12774.1.2 switch=n enabled=y phases=2 Linecode=1P_OH_AL_4/0_Zuzara_0_416_0_2_2_2_2_2_2_2_2_2_2_2_2_2_2_2_2_2_2_2_2_2_2_2_2_2_2_2_2_2

New Line.l(r:p1rdt7995lv-p1rlv13805) Units=km Length=0.0431473 bus1=p1rdt7995lv.1.2 bus2=p1rlv13805.1.2 switch=n enabled=y phases=2 Linecode=1P_OH_AL_4/0_Zuzara_0_416_0_2_2_2_2_2_2_2_2_2_2_2_2_2_2_2_2_2_2_2_2_2_2_2_2_2_2_2_2_2

New Line.l(r:p1rdt8089lv-p1rlv13029) Units=km Length=0.0784457 bus1=p1rdt8089lv.1.2 bus2=p1rlv13029.1.2 switch=n enabled=y phases=2 Linecode=1P_OH_AL_4/0_Zuzara_0_416_0_2_2_2_2_2_2_2_2_2_2_2_2_2_2_2_2_2_2_2_2_2_2_2_2_2_2_2_2_2

New Line.l(r:p1rdt8130lv-p1rlv13158) Units=km Length=0.001 bus1=p1rdt8130lv.1.2 bus2=p1rlv13158.1.2 switch=n enabled=y phases=2 Linecode=1P_OH_AL_4_Periwinkle_0_416_0_2_2_2_2_2_2_2_2_2_2_2_2_2_2_2_2_2_2_2_2_2_2_2_2_2_2_2_2_2

New Line.l(r:p1rdt8182lv-p1rlv13289) Units=km Length=0.0418674 bus1=p1rdt8182lv.1.2 bus2=p1rlv13289.1.2 switch=n enabled=y phases=2 Linecode=1P_OH_AL_4/0_Zuzara_0_416_0_2_2_2_2_2_2_2_2_2_2_2_2_2_2_2_2_2_2_2_2_2_2_2_2_2_2_2_2_2

New Line.l(r:p1rdt8183lv-p1rlv13294) Units=km Length=0.0335282 bus1=p1rdt8183lv.1.2 bus2=p1rlv13294.1.2 switch=n enabled=y phases=2 Linecode=1P_OH_AL_4/0_Zuzara_0_416_0_2_2_2_2_2_2_2_2_2_2_2_2_2_2_2_2_2_2_2_2_2_2_2_2_2_2_2_2_2

New Line.l(r:p1rdt8323lv-p1rlv13681) Units=km Length=0.0223938 bus1=p1rdt8323lv.1.2 bus2=p1rlv13681.1.2 switch=n enabled=y phases=2 Linecode=1P_OH_AL_2/0_Rucina_0_416_0_2_2_2_2_2_2_2_2_2_2_2_2_2_2_2_2_2_2_2_2_2_2_2_2_2_2_2_2_2

New Line.l(r:p1rdt8324lv-p1rlv13682) Units=km Length=0.0633502 bus1=p1rdt8324lv.1.2 bus2=p1rlv13682.1.2 switch=n enabled=y phases=2 Linecode=1P_OH_AL_4/0_Zuzara_0_416_0_2_2_2_2_2_2_2_2_2_2_2_2_2_2_2_2_2_2_2_2_2_2_2_2_2_2_2_2_2

New Line.l(r:p1rdt6587-p1rdt7187) Units=km Length=0.279882 bus1=p1rdt6587-p1rdt7187x.3 bus2=p1rdt7187.3 switch=n enabled=y phases=1 Linecode=1P_OH_AL_ACSR_#2_Sparrow_12_47_0_1_1_1_1_1_1_1_1_1_1_1_1_1_1_1_1_1_1_1_1_1_1_1_1_1_1_1_1_1

New Line.l(r:p1rdt2615-p1rdt3601) Units=km Length=0.0895621 bus1=p1rdt2615-p1rdt3601x.3 bus2=p1rdt2615-p1rdt3601x_b1_1.3 switch=n enabled=y phases=1 Linecode=1P_OH_AL_ACSR_#2_Sparrow_12_47_0_1_1_1_1_1_1_1_1_1_1_1_1_1_1_1_1_1_1_1_1_1_1_1_1_1_1_1_1_1

New Line.l(r:p1rdt1415-p1rdt2718)_s0 Units=km Length=0.129174 bus1=p1rdt1415-p1rdt2718x.2 bus2=p1rdt1415-p1rdt2718xx.2 switch=n enabled=y phases=1 Linecode=1P_OH_AL_ACSR_#2_Sparrow_12_47_0_1_1_1_1_1_1_1_1_1_1_1_1_1_1_1_1_1_1_1_1_1_1_1_1_1_1_1_1_1

New Line.l(r:p1rdt1415-p1rdt2718)_s1 Units=km Length=0.006930470000000001 bus1=p1rdt1415-p1rdt2718xx.2 bus2=p1rdt2718.2 switch=n enabled=y phases=1 Linecode=1P_OH_AL_ACSR_#2_Sparrow_12_47_0_1_1_1_1_1_1_1_1_1_1_1_1_1_1_1_1_1_1_1_1_1_1_1_1_1_1_1_1_1

New Line.l(r:p1rdt1413-p1rdt1414)_s0 Units=km Length=0.19486100000000003 bus1=p1rdt1413-p1rdt1414xx.1 bus2=p1rdt1413-p1rdt1414xxx.1 switch=n enabled=y phases=1 Linecode=1P_UG_AL_#2_15_12_47_0_1_1_1_1_1_1_1_1_1_1_1_1_1_1_1_1_1_1_1_1_1_1_1_1_1_1_1_1_1

New Line.l(r:p1rdt1413-p1rdt1414)_s1 Units=km Length=0.176312 bus1=p1rdt1413-p1rdt1414xxx.1 bus2=p1rdt1413-p1rdt1414xxxx.1 switch=n enabled=y phases=1 Linecode=1P_OH_AL_ACSR_#2_Sparrow_12_47_0_1_1_1_1_1_1_1_1_1_1_1_1_1_1_1_1_1_1_1_1_1_1_1_1_1_1_1_1_1

New Line.l(r:p1rdt1627-p1rdt1736) Units=km Length=0.403765 bus1=p1rdt1736.3 bus2=p1rdt1627.3 switch=n enabled=y phases=1 Linecode=1P_OH_AL_ACSR_#2_Sparrow_12_47_0_1_1_1_1_1_1_1_1_1_1_1_1_1_1_1_1_1_1_1_1_1_1_1_1_1_1_1_1_1

New Line.l(r:p1rdt1736-p1rdt7889) Units=km Length=0.529898 bus1=p1rdt1736.3 bus2=p1rdt7889.3 switch=n enabled=y phases=1 Linecode=1P_OH_AL_ACSR_#2_Sparrow_12_47_0_1_1_1_1_1_1_1_1_1_1_1_1_1_1_1_1_1_1_1_1_1_1_1_1_1_1_1_1_1

New Line.l(r:p1rdt1736-p1rdt3406) Units=km Length=0.741067 bus1=p1rdt1736-p1rdt3406x.3 bus2=p1rdt1736.3 switch=n enabled=y phases=1 Linecode=1P_OH_AL_ACSR_#2_Sparrow_12_47_0_1_1_1_1_1_1_1_1_1_1_1_1_1_1_1_1_1_1_1_1_1_1_1_1_1_1_1_1_1

New Line.l(r:p1rdt5654-p1rdt7851) Units=km Length=0.0354863 bus1=p1rdt5654-p1rdt7851x.2 bus2=p1rdt7851.2 switch=n enabled=y phases=1 Linecode=1P_OH_AL_ACSR_#2_Sparrow_12_47_0_1_1_1_1_1_1_1_1_1_1_1_1_1_1_1_1_1_1_1_1_1_1_1_1_1_1_1_1_1

New Line.l(r:p1rdt4867-p1rdt6065) Units=km Length=0.028618 bus1=p1rdt4867-p1rdt6065xx.3 bus2=p1rdt4867-p1rdt6065xxx.3 switch=n enabled=y phases=1 Linecode=1P_UG_AL_#2_15_12_47_0_1_1_1_1_1_1_1_1_1_1_1_1_1_1_1_1_1_1_1_1_1_1_1_1_1_1_1_1_1

New Line.l(r:p1rdt7186-p1rdt7934) Units=km Length=0.0179494 bus1=p1rdt7934.2 bus2=p1rdt7186.2 switch=n enabled=y phases=1 Linecode=1P_OH_AL_ACSR_#2_Sparrow_12_47_0_1_1_1_1_1_1_1_1_1_1_1_1_1_1_1_1_1_1_1_1_1_1_1_1_1_1_1_1_1

New Line.l(r:p1rdt4867-p1rdt7934) Units=km Length=0.126523 bus1=p1rdt4867-p1rdt7934x.2 bus2=p1rdt7934.2 switch=n enabled=y phases=1 Linecode=1P_OH_AL_ACSR_#2_Sparrow_12_47_0_1_1_1_1_1_1_1_1_1_1_1_1_1_1_1_1_1_1_1_1_1_1_1_1_1_1_1_1_1

New Line.l(r:p1rdt5260-p1rdt6405) Units=km Length=0.0506481 bus1=p1rdt5260-p1rdt6405x.2 bus2=p1rdt6405.2 switch=n enabled=y phases=1 Linecode=1P_OH_AL_ACSR_#2_Sparrow_12_47_0_1_1_1_1_1_1_1_1_1_1_1_1_1_1_1_1_1_1_1_1_1_1_1_1_1_1_1_1_1

New Line.l(r:p1rdt3893-p1rdt6845) Units=km Length=0.128158 bus1=p1rdt3893-p1rdt6845x.3 bus2=p1rdt3893.3 switch=n enabled=y phases=1 Linecode=1P_OH_AL_ACSR_#2_Sparrow_12_47_0_1_1_1_1_1_1_1_1_1_1_1_1_1_1_1_1_1_1_1_1_1_1_1_1_1_1_1_1_1

New Line.l(r:p1rdt1742-p1rdt8183) Units=km Length=0.30582 bus1=p1rdt1742-p1rdt8183x.2 bus2=p1rdt1742.2 switch=n enabled=y phases=1 Linecode=1P_OH_AL_ACSR_#2_Sparrow_12_47_0_1_1_1_1_1_1_1_1_1_1_1_1_1_1_1_1_1_1_1_1_1_1_1_1_1_1_1_1_1

New Line.l(r:p1rdt32-p1rdt6894) Units=km Length=0.131275 bus1=p1rdt32.1 bus2=p1rdt6894.1 switch=n enabled=y phases=1 Linecode=1P_OH_AL_ACSR_#2_Sparrow_12_47_0_1_1_1_1_1_1_1_1_1_1_1_1_1_1_1_1_1_1_1_1_1_1_1_1_1_1_1_1_1

New Line.l(r:p1rdt32-p1rdt6272) Units=km Length=0.125508 bus1=p1rdt6272.1 bus2=p1rdt32.1 switch=n enabled=y phases=1 Linecode=1P_OH_AL_ACSR_#2_Sparrow_12_47_0_1_1_1_1_1_1_1_1_1_1_1_1_1_1_1_1_1_1_1_1_1_1_1_1_1_1_1_1_1

New Line.l(r:p1rdt6272-p1rdt6721) Units=km Length=0.201659 bus1=p1rdt6272.1 bus2=p1rdt6721.1 switch=n enabled=y phases=1 Linecode=1P_OH_AL_ACSR_#2_Sparrow_12_47_0_1_1_1_1_1_1_1_1_1_1_1_1_1_1_1_1_1_1_1_1_1_1_1_1_1_1_1_1_1

New Line.l(r:p1rdt6272-p1rdt8182) Units=km Length=0.34028700000000006 bus1=p1rdt6272-p1rdt8182x.1 bus2=p1rdt6272.1 switch=n enabled=y phases=1 Linecode=1P_OH_AL_ACSR_#2_Sparrow_12_47_0_1_1_1_1_1_1_1_1_1_1_1_1_1_1_1_1_1_1_1_1_1_1_1_1_1_1_1_1_1

New Line.l(r:p1rdt3600-p1rdt4315) Units=km Length=0.0808795 bus1=p1rdt4315.2 bus2=p1rdt3600.2 switch=n enabled=y phases=1 Linecode=1P_OH_AL_ACSR_#2_Sparrow_12_47_0_1_1_1_1_1_1_1_1_1_1_1_1_1_1_1_1_1_1_1_1_1_1_1_1_1_1_1_1_1

New Line.l(r:p1rdt1288-p1rdt4315)_s0 Units=km Length=0.14806 bus1=p1rdt1288-p1rdt4315x.2 bus2=p1rdt1288-p1rdt4315xx.2 switch=n enabled=y phases=1 Linecode=1P_OH_AL_ACSR_#2_Sparrow_12_47_0_1_1_1_1_1_1_1_1_1_1_1_1_1_1_1_1_1_1_1_1_1_1_1_1_1_1_1_1_1

New Line.l(r:p1rdt1288-p1rdt4315)_s1 Units=km Length=0.131383 bus1=p1rdt1288-p1rdt4315xx.2 bus2=p1rdt4315.2 switch=n enabled=y phases=1 Linecode=1P_OH_AL_ACSR_#2_Sparrow_12_47_0_1_1_1_1_1_1_1_1_1_1_1_1_1_1_1_1_1_1_1_1_1_1_1_1_1_1_1_1_1

New Line.l(r:p1rdt1737-p1rdt7616)_s0 Units=km Length=0.284399 bus1=p1rdt1737.3 bus2=p1rdt1737-p1rdt7616x.3 switch=n enabled=y phases=1 Linecode=1P_OH_AL_ACSR_#2_Sparrow_12_47_0_1_1_1_1_1_1_1_1_1_1_1_1_1_1_1_1_1_1_1_1_1_1_1_1_1_1_1_1_1

New Line.l(r:p1rdt1737-p1rdt7616)_s1 Units=km Length=0.0738533 bus1=p1rdt1737-p1rdt7616x.3 bus2=p1rdt7616.3 switch=n enabled=y phases=1 Linecode=1P_OH_AL_ACSR_#2_Sparrow_12_47_0_1_1_1_1_1_1_1_1_1_1_1_1_1_1_1_1_1_1_1_1_1_1_1_1_1_1_1_1_1

New Line.l(r:p1rdt1737-p1rdt292)_s0 Units=km Length=0.126755 bus1=p1rdt292.3 bus2=p1rdt1737-p1rdt292x.3 switch=n enabled=y phases=1 Linecode=1P_OH_AL_ACSR_#2_Sparrow_12_47_0_1_1_1_1_1_1_1_1_1_1_1_1_1_1_1_1_1_1_1_1_1_1_1_1_1_1_1_1_1

New Line.l(r:p1rdt1737-p1rdt292)_s1 Units=km Length=1.12526 bus1=p1rdt1737-p1rdt292x.3 bus2=p1rdt1737.3 switch=n enabled=y phases=1 Linecode=1P_OH_AL_ACSR_#2_Sparrow_12_47_0_1_1_1_1_1_1_1_1_1_1_1_1_1_1_1_1_1_1_1_1_1_1_1_1_1_1_1_1_1

New Line.l(r:p1rdt292-p1rdt6136)_s0 Units=km Length=0.14603900000000003 bus1=p1rdt292-p1rdt6136xx.3 bus2=p1rdt292-p1rdt6136x.3 switch=n enabled=y phases=1 Linecode=1P_OH_AL_ACSR_#2_Sparrow_12_47_0_1_1_1_1_1_1_1_1_1_1_1_1_1_1_1_1_1_1_1_1_1_1_1_1_1_1_1_1_1

New Line.l(r:p1rdt292-p1rdt6136)_s1 Units=km Length=0.602917 bus1=p1rdt292-p1rdt6136x.3 bus2=p1rdt292.3 switch=n enabled=y phases=1 Linecode=1P_OH_AL_ACSR_#2_Sparrow_12_47_0_1_1_1_1_1_1_1_1_1_1_1_1_1_1_1_1_1_1_1_1_1_1_1_1_1_1_1_1_1

New Line.l(r:p1rdt1050-p1rdt5261)_s0 Units=km Length=0.254927 bus1=p1rdt1050.2 bus2=p1rdt1050-p1rdt5261x.2 switch=n enabled=y phases=1 Linecode=1P_OH_AL_ACSR_#2_Sparrow_12_47_0_1_1_1_1_1_1_1_1_1_1_1_1_1_1_1_1_1_1_1_1_1_1_1_1_1_1_1_1_1

New Line.l(r:p1rdt1050-p1rdt5261)_s1 Units=km Length=0.00385866 bus1=p1rdt1050-p1rdt5261x.2 bus2=p1rdt5261.2 switch=n enabled=y phases=1 Linecode=1P_OH_AL_ACSR_#2_Sparrow_12_47_0_1_1_1_1_1_1_1_1_1_1_1_1_1_1_1_1_1_1_1_1_1_1_1_1_1_1_1_1_1

New Line.l(r:p1rdt1050-p1rdt6136) Units=km Length=0.14501 bus1=p1rdt1050-p1rdt6136x.2 bus2=p1rdt1050.2 switch=n enabled=y phases=1 Linecode=1P_OH_AL_ACSR_#2_Sparrow_12_47_0_1_1_1_1_1_1_1_1_1_1_1_1_1_1_1_1_1_1_1_1_1_1_1_1_1_1_1_1_1

New Line.l(r:p1rdt5010-p1rdt816) Units=km Length=0.0564194 bus1=p1rdt816.1 bus2=p1rdt5010.1 switch=n enabled=y phases=1 Linecode=1P_OH_AL_ACSR_#2_Sparrow_12_47_0_1_1_1_1_1_1_1_1_1_1_1_1_1_1_1_1_1_1_1_1_1_1_1_1_1_1_1_1_1

New Line.l(r:p1rdt2814-p1rdt816) Units=km Length=0.188639 bus1=p1rdt2814.1 bus2=p1rdt816.1 switch=n enabled=y phases=1 Linecode=1P_OH_AL_ACSR_#2_Sparrow_12_47_0_1_1_1_1_1_1_1_1_1_1_1_1_1_1_1_1_1_1_1_1_1_1_1_1_1_1_1_1_1

New Line.l(r:p1rdt2814-p1rdt6136)_s0 Units=km Length=0.219583 bus1=p1rdt2814-p1rdt6136xx.1 bus2=p1rdt2814-p1rdt6136x.1 switch=n enabled=y phases=1 Linecode=1P_OH_AL_ACSR_#2_Sparrow_12_47_0_1_1_1_1_1_1_1_1_1_1_1_1_1_1_1_1_1_1_1_1_1_1_1_1_1_1_1_1_1

New Line.l(r:p1rdt2814-p1rdt6136)_s1 Units=km Length=0.166787 bus1=p1rdt2814-p1rdt6136x.1 bus2=p1rdt2814.1 switch=n enabled=y phases=1 Linecode=1P_OH_AL_ACSR_#2_Sparrow_12_47_0_1_1_1_1_1_1_1_1_1_1_1_1_1_1_1_1_1_1_1_1_1_1_1_1_1_1_1_1_1

New Line.l(r:p1rdt4320-p1rdt6345) Units=km Length=0.517106 bus1=p1rdt4320.2 bus2=p1rdt6345.2 switch=n enabled=y phases=1 Linecode=1P_OH_AL_ACSR_#2_Sparrow_12_47_0_1_1_1_1_1_1_1_1_1_1_1_1_1_1_1_1_1_1_1_1_1_1_1_1_1_1_1_1_1

New Line.l(r:p1rdt1525-p1rdt4320) Units=km Length=0.118615 bus1=p1rdt1525-p1rdt4320x.2 bus2=p1rdt4320.2 switch=n enabled=y phases=1 Linecode=1P_OH_AL_ACSR_#2_Sparrow_12_47_0_1_1_1_1_1_1_1_1_1_1_1_1_1_1_1_1_1_1_1_1_1_1_1_1_1_1_1_1_1

New Line.l(r:p1rdt7995-p1rdt8130)_s0 Units=km Length=0.815468 bus1=p1rdt7995-p1rdt8130xx.2 bus2=p1rdt7995-p1rdt8130x.2 switch=n enabled=y phases=1 Linecode=1P_OH_AL_ACSR_#2_Sparrow_12_47_0_1_1_1_1_1_1_1_1_1_1_1_1_1_1_1_1_1_1_1_1_1_1_1_1_1_1_1_1_1

New Line.l(r:p1rdt7995-p1rdt8130)_s1 Units=km Length=0.0121663 bus1=p1rdt7995-p1rdt8130x.2 bus2=p1rdt7995.2 switch=n enabled=y phases=1 Linecode=1P_OH_AL_ACSR_#2_Sparrow_12_47_0_1_1_1_1_1_1_1_1_1_1_1_1_1_1_1_1_1_1_1_1_1_1_1_1_1_1_1_1_1

New Line.l(r:p1rdt418-p1rdt7319) Units=km Length=0.23471 bus1=p1rdt418-p1rdt7319x.3 bus2=p1rdt418.3 switch=n enabled=y phases=1 Linecode=1P_OH_AL_ACSR_#2_Sparrow_12_47_0_1_1_1_1_1_1_1_1_1_1_1_1_1_1_1_1_1_1_1_1_1_1_1_1_1_1_1_1_1

New Line.l(r:p1rdt154-p1rdt8323) Units=km Length=0.254465 bus1=p1rdt154-p1rdt8323x.3 bus2=p1rdt154.3 switch=n enabled=y phases=1 Linecode=1P_OH_AL_ACSR_#2_Sparrow_12_47_0_1_1_1_1_1_1_1_1_1_1_1_1_1_1_1_1_1_1_1_1_1_1_1_1_1_1_1_1_1

New Line.l(r:p1rdt670-p1rdt939) Units=km Length=0.001 bus1=p1rdt670.2 bus2=p1rdt939.2 switch=n enabled=y phases=1 Linecode=1P_OH_AL_ACSR_#2_Sparrow_12_47_0_1_1_1_1_1_1_1_1_1_1_1_1_1_1_1_1_1_1_1_1_1_1_1_1_1_1_1_1_1

New Line.l(r:p1rdt670-p1rdt8323) Units=km Length=0.41149900000000006 bus1=p1rdt670-p1rdt8323x.2 bus2=p1rdt670.2 switch=n enabled=y phases=1 Linecode=1P_OH_AL_ACSR_#2_Sparrow_12_47_0_1_1_1_1_1_1_1_1_1_1_1_1_1_1_1_1_1_1_1_1_1_1_1_1_1_1_1_1_1

New Line.l(r:p1rdt2813-p1rdt8323) Units=km Length=0.0563754 bus1=p1rdt2813-p1rdt8323x.3 bus2=p1rdt2813.3 switch=n enabled=y phases=1 Linecode=1P_OH_AL_ACSR_#2_Sparrow_12_47_0_1_1_1_1_1_1_1_1_1_1_1_1_1_1_1_1_1_1_1_1_1_1_1_1_1_1_1_1_1

New Line.l(r:p1rdt5190-p1rdt7716) Units=km Length=0.300232 bus1=p1rdt5190.1 bus2=p1rdt7716.1 switch=n enabled=y phases=1 Linecode=1P_OH_AL_ACSR_#2_Sparrow_12_47_0_1_1_1_1_1_1_1_1_1_1_1_1_1_1_1_1_1_1_1_1_1_1_1_1_1_1_1_1_1

New Line.l(r:p1rdt3408-p1rdt5190) Units=km Length=0.293527 bus1=p1rdt3408.1 bus2=p1rdt5190.1 switch=n enabled=y phases=1 Linecode=1P_OH_AL_ACSR_#2_Sparrow_12_47_0_1_1_1_1_1_1_1_1_1_1_1_1_1_1_1_1_1_1_1_1_1_1_1_1_1_1_1_1_1

New Line.l(r:p1rdt5344-p1rdt7890) Units=km Length=0.29413800000000007 bus1=p1rdt7890.1 bus2=p1rdt5344.1 switch=n enabled=y phases=1 Linecode=1P_OH_AL_ACSR_#2_Sparrow_12_47_0_1_1_1_1_1_1_1_1_1_1_1_1_1_1_1_1_1_1_1_1_1_1_1_1_1_1_1_1_1

New Line.l(r:p1rdt3408-p1rdt7890) Units=km Length=0.422541 bus1=p1rdt3408.1 bus2=p1rdt7890.1 switch=n enabled=y phases=1 Linecode=1P_OH_AL_ACSR_#2_Sparrow_12_47_0_1_1_1_1_1_1_1_1_1_1_1_1_1_1_1_1_1_1_1_1_1_1_1_1_1_1_1_1_1

New Line.l(r:p1rdt3408-p1rdt5925) Units=km Length=0.0374367 bus1=p1rdt5925.1 bus2=p1rdt3408.1 switch=n enabled=y phases=1 Linecode=1P_OH_AL_ACSR_#2_Sparrow_12_47_0_1_1_1_1_1_1_1_1_1_1_1_1_1_1_1_1_1_1_1_1_1_1_1_1_1_1_1_1_1

New Line.l(r:p1rdt5925-p1rdt8089) Units=km Length=0.001 bus1=p1rdt5925.1 bus2=p1rdt8089.1 switch=n enabled=y phases=1 Linecode=1P_OH_AL_ACSR_#2_Sparrow_12_47_0_1_1_1_1_1_1_1_1_1_1_1_1_1_1_1_1_1_1_1_1_1_1_1_1_1_1_1_1_1

New Line.l(r:p1rdt5925-p1rdt8323) Units=km Length=0.46898300000000004 bus1=p1rdt5925-p1rdt8323x.1 bus2=p1rdt5925.1 switch=n enabled=y phases=1 Linecode=1P_OH_AL_ACSR_#2_Sparrow_12_47_0_1_1_1_1_1_1_1_1_1_1_1_1_1_1_1_1_1_1_1_1_1_1_1_1_1_1_1_1_1

New Line.l(r:p1rdt7248-p1rdt7715) Units=km Length=0.505565 bus1=p1rdt7248-p1rdt7715x.3 bus2=p1rdt7715.3 switch=n enabled=y phases=1 Linecode=1P_OH_AL_ACSR_#2_Sparrow_12_47_0_1_1_1_1_1_1_1_1_1_1_1_1_1_1_1_1_1_1_1_1_1_1_1_1_1_1_1_1_1

New Line.l(r:p1rdt2089-p1rdt4074) Units=km Length=0.100657 bus1=p1rdt2089.1 bus2=p1rdt4074.1 switch=n enabled=y phases=1 Linecode=1P_OH_AL_ACSR_#2_Sparrow_12_47_0_1_1_1_1_1_1_1_1_1_1_1_1_1_1_1_1_1_1_1_1_1_1_1_1_1_1_1_1_1

New Line.l(r:p1rdt2089-p1rdt6784) Units=km Length=0.0698159 bus1=p1rdt6784.1 bus2=p1rdt2089.1 switch=n enabled=y phases=1 Linecode=1P_OH_AL_ACSR_#2_Sparrow_12_47_0_1_1_1_1_1_1_1_1_1_1_1_1_1_1_1_1_1_1_1_1_1_1_1_1_1_1_1_1_1

New Line.l(r:p1rdt291-p1rdt6784) Units=km Length=0.11360100000000001 bus1=p1rdt291-p1rdt6784x.1 bus2=p1rdt6784.1 switch=n enabled=y phases=1 Linecode=1P_OH_AL_ACSR_#2_Sparrow_12_47_0_1_1_1_1_1_1_1_1_1_1_1_1_1_1_1_1_1_1_1_1_1_1_1_1_1_1_1_1_1

New Line.l(r:p1rdt3316-p1rdt8324) Units=km Length=0.141839 bus1=p1rdt3316-p1rdt8324x.3 bus2=p1rdt3316.3 switch=n enabled=y phases=1 Linecode=1P_OH_AL_ACSR_#2_Sparrow_12_47_0_1_1_1_1_1_1_1_1_1_1_1_1_1_1_1_1_1_1_1_1_1_1_1_1_1_1_1_1_1

New Line.l(r:p1rdt1413-p1rdt3406)_s0 Units=km Length=0.12340300000000001 bus1=p1rdt1413.1.2.3 bus2=p1rdt1413-p1rdt3406x.1.2.3 switch=n enabled=y phases=3 Linecode=3P_OH_AL_ACSR_4/0_Penguin_12_47_0_3_3_3_3_3_3_3_3_3_3_3_3_3_3_3_3_3_3_3_3_3_3_3_3_3_3_3_3_3

New Line.l(r:p1rdt1413-p1rdt3406)_s1 Units=km Length=0.189859 bus1=p1rdt1413-p1rdt3406x.1.2.3 bus2=p1rdt3406.1.2.3 switch=n enabled=y phases=3 Linecode=3P_OH_AL_ACSR_4/0_Penguin_12_47_0_3_3_3_3_3_3_3_3_3_3_3_3_3_3_3_3_3_3_3_3_3_3_3_3_3_3_3_3_3

New Line.l(r:p1rdt1413-p1rdt5009) Units=km Length=0.280391 bus1=p1rdt1413.1.2.3 bus2=p1rdt5009.1.2.3 switch=n enabled=y phases=3 Linecode=3P_OH_AL_ACSR_4/0_Penguin_12_47_0_3_3_3_3_3_3_3_3_3_3_3_3_3_3_3_3_3_3_3_3_3_3_3_3_3_3_3_3_3

New Line.l(r:p1rdt1413-p1rdt1741) Units=km Length=0.704998 bus1=p1rdt1741.1.2.3 bus2=p1rdt1413.1.2.3 switch=n enabled=y phases=3 Linecode=3P_OH_AL_ACSR_4/0_Penguin_12_47_0_3_3_3_3_3_3_3_3_3_3_3_3_3_3_3_3_3_3_3_3_3_3_3_3_3_3_3_3_3

New Line.l(r:p1rdt1517-p1rdt5260) Units=km Length=0.0192705 bus1=p1rdt5260.1.2.3 bus2=p1rdt1517.1.2.3 switch=n enabled=y phases=3 Linecode=3P_OH_AL_ACSR_4/0_Penguin_12_47_0_3_3_3_3_3_3_3_3_3_3_3_3_3_3_3_3_3_3_3_3_3_3_3_3_3_3_3_3_3

New Line.l(r:p1rdt5260-p1rdt6135) Units=km Length=0.118071 bus1=p1rdt6135.1.2.3 bus2=p1rdt5260.1.2.3 switch=n enabled=y phases=3 Linecode=3P_OH_AL_ACSR_4/0_Penguin_12_47_0_3_3_3_3_3_3_3_3_3_3_3_3_3_3_3_3_3_3_3_3_3_3_3_3_3_3_3_3_3

New Line.l(r:p1rdt6135-p1rdt7375)_s0 Units=km Length=0.103505 bus1=p1rdt6135.1.2.3 bus2=p1rdt6135-p1rdt7375x.1.2.3 switch=n enabled=y phases=3 Linecode=3P_OH_AL_ACSR_4/0_Penguin_12_47_0_3_3_3_3_3_3_3_3_3_3_3_3_3_3_3_3_3_3_3_3_3_3_3_3_3_3_3_3_3

New Line.l(r:p1rdt6135-p1rdt7375)_s1 Units=km Length=0.0469734 bus1=p1rdt6135-p1rdt7375x.1.2.3 bus2=p1rdt7375.1.2.3 switch=n enabled=y phases=3 Linecode=3P_OH_AL_ACSR_4/0_Penguin_12_47_0_3_3_3_3_3_3_3_3_3_3_3_3_3_3_3_3_3_3_3_3_3_3_3_3_3_3_3_3_3

New Line.l(r:p1rdt4792-p1rdt6135) Units=km Length=0.091514 bus1=p1rdt4792.1.2.3 bus2=p1rdt6135.1.2.3 switch=n enabled=y phases=3 Linecode=3P_OH_AL_ACSR_4/0_Penguin_12_47_0_3_3_3_3_3_3_3_3_3_3_3_3_3_3_3_3_3_3_3_3_3_3_3_3_3_3_3_3_3

New Line.l(r:p1rdt4792-p1rdt7127)_s0 Units=km Length=0.15864000000000003 bus1=p1rdt7127.1.2.3 bus2=p1rdt4792-p1rdt7127x.1.2.3 switch=n enabled=y phases=3 Linecode=3P_OH_AL_ACSR_4/0_Penguin_12_47_0_3_3_3_3_3_3_3_3_3_3_3_3_3_3_3_3_3_3_3_3_3_3_3_3_3_3_3_3_3

New Line.l(r:p1rdt4792-p1rdt7127)_s1 Units=km Length=0.0588766 bus1=p1rdt4792-p1rdt7127x.1.2.3 bus2=p1rdt4792.1.2.3 switch=n enabled=y phases=3 Linecode=3P_OH_AL_ACSR_4/0_Penguin_12_47_0_3_3_3_3_3_3_3_3_3_3_3_3_3_3_3_3_3_3_3_3_3_3_3_3_3_3_3_3_3

New Line.l(r:p1rdt6067-p1rdt7127) Units=km Length=0.08433660000000001 bus1=p1rdt6067.1.2.3 bus2=p1rdt6067_b1_1.1.2.3 switch=n enabled=y phases=3 Linecode=3P_OH_AL_ACSR_4/0_Penguin_12_47_0_3_3_3_3_3_3_3_3_3_3_3_3_3_3_3_3_3_3_3_3_3_3_3_3_3_3_3_3_3

New Line.l(r:p1rdt3996-p1rdt6067) Units=km Length=0.675227 bus1=p1rdt3996.1.2.3 bus2=p1rdt6067.1.2.3 switch=n enabled=y phases=3 Linecode=3P_OH_AL_ACSR_4/0_Penguin_12_47_0_3_3_3_3_3_3_3_3_3_3_3_3_3_3_3_3_3_3_3_3_3_3_3_3_3_3_3_3_3

New Line.l(r:p1rdt3996-p1rdt6845)_s0 Units=km Length=0.734186 bus1=p1rdt3996.1.2.3 bus2=p1rdt3996-p1rdt6845x.1.2.3 switch=n enabled=y phases=3 Linecode=3P_OH_AL_ACSR_4/0_Penguin_12_47_0_3_3_3_3_3_3_3_3_3_3_3_3_3_3_3_3_3_3_3_3_3_3_3_3_3_3_3_3_3

New Line.l(r:p1rdt3996-p1rdt6845)_s1 Units=km Length=0.650618 bus1=p1rdt3996-p1rdt6845x.1.2.3 bus2=p1rdt3996-p1rdt6845xx.1.2.3 switch=n enabled=y phases=3 Linecode=3P_OH_AL_ACSR_4/0_Penguin_12_47_0_3_3_3_3_3_3_3_3_3_3_3_3_3_3_3_3_3_3_3_3_3_3_3_3_3_3_3_3_3

New Line.l(r:p1rdt3996-p1rdt6845)_s2 Units=km Length=0.0564821 bus1=p1rdt3996-p1rdt6845xx.1.2.3 bus2=p1rdt6845.1.2.3 switch=n enabled=y phases=3 Linecode=3P_OH_AL_ACSR_4/0_Penguin_12_47_0_3_3_3_3_3_3_3_3_3_3_3_3_3_3_3_3_3_3_3_3_3_3_3_3_3_3_3_3_3

New Line.l(r:p1rdt1741-p1rdt3996)_s0 Units=km Length=0.11333600000000002 bus1=p1rdt1741.1.2.3 bus2=p1rdt1741-p1rdt3996x.1.2.3 switch=n enabled=y phases=3 Linecode=3P_OH_AL_ACSR_4/0_Penguin_12_47_0_3_3_3_3_3_3_3_3_3_3_3_3_3_3_3_3_3_3_3_3_3_3_3_3_3_3_3_3_3

New Line.l(r:p1rdt1741-p1rdt3996)_s1 Units=km Length=0.7985 bus1=p1rdt1741-p1rdt3996x.1.2.3 bus2=p1rdt3996.1.2.3 switch=n enabled=y phases=3 Linecode=3P_OH_AL_ACSR_4/0_Penguin_12_47_0_3_3_3_3_3_3_3_3_3_3_3_3_3_3_3_3_3_3_3_3_3_3_3_3_3_3_3_3_3

New Line.l(r:p1rdt1741-p1rdt427)_s0 Units=km Length=0.254281 bus1=p1rdt427.1.2.3 bus2=p1rdt1741-p1rdt427x.1.2.3 switch=n enabled=y phases=3 Linecode=3P_OH_AL_ACSR_4/0_Penguin_12_47_0_3_3_3_3_3_3_3_3_3_3_3_3_3_3_3_3_3_3_3_3_3_3_3_3_3_3_3_3_3

New Line.l(r:p1rdt1741-p1rdt427)_s1 Units=km Length=0.0128146 bus1=p1rdt1741-p1rdt427x.1.2.3 bus2=p1rdt1741.1.2.3 switch=n enabled=y phases=3 Linecode=3P_OH_AL_ACSR_4/0_Penguin_12_47_0_3_3_3_3_3_3_3_3_3_3_3_3_3_3_3_3_3_3_3_3_3_3_3_3_3_3_3_3_3

New Line.l(r:p1rdt427-p1rdt8183) Units=km Length=0.49228 bus1=p1rdt8183.1.2.3 bus2=p1rdt427.1.2.3 switch=n enabled=y phases=3 Linecode=3P_OH_AL_ACSR_4/0_Penguin_12_47_0_3_3_3_3_3_3_3_3_3_3_3_3_3_3_3_3_3_3_3_3_3_3_3_3_3_3_3_3_3

New Line.l(r:p1rdt5658-p1rdt8183) Units=km Length=0.19667 bus1=p1rdt5658.1.2.3 bus2=p1rdt5658-p1rdt8183x.1.2.3 switch=n enabled=y phases=3 Linecode=3P_OH_AL_ACSR_4/0_Penguin_12_47_0_3_3_3_3_3_3_3_3_3_3_3_3_3_3_3_3_3_3_3_3_3_3_3_3_3_3_3_3_3

New Line.l(r:p1rdt5658-p1rdt7010)_s0 Units=km Length=0.224215 bus1=p1rdt7010.1.2.3 bus2=p1rdt5658-p1rdt7010xxx.1.2.3 switch=n enabled=y phases=3 Linecode=3P_OH_AL_ACSR_4/0_Penguin_12_47_0_3_3_3_3_3_3_3_3_3_3_3_3_3_3_3_3_3_3_3_3_3_3_3_3_3_3_3_3_3

New Line.l(r:p1rdt5658-p1rdt7010)_s1 Units=km Length=10.0065 bus1=p1rdt5658-p1rdt7010xxx.1.2.3 bus2=p1rdt5658-p1rdt7010xx.1.2.3 switch=n enabled=y phases=3 Linecode=3P_OH_AL_ACSR_4/0_Penguin_12_47_0_3_3_3_3_3_3_3_3_3_3_3_3_3_3_3_3_3_3_3_3_3_3_3_3_3_3_3_3_3

New Line.l(r:p1rdt5658-p1rdt7010)_s2 Units=km Length=0.15034300000000003 bus1=p1rdt5658-p1rdt7010xx.1.2.3 bus2=p1rdt5658-p1rdt7010x.1.2.3 switch=n enabled=y phases=3 Linecode=3P_OH_AL_ACSR_4/0_Penguin_12_47_0_3_3_3_3_3_3_3_3_3_3_3_3_3_3_3_3_3_3_3_3_3_3_3_3_3_3_3_3_3

New Line.l(r:p1rdt6846-p1rdt7010)_s0 Units=km Length=0.608697 bus1=p1rdt6846.1.2.3 bus2=p1rdt6846-p1rdt7010x.1.2.3 switch=n enabled=y phases=3 Linecode=3P_OH_AL_ACSR_4/0_Penguin_12_47_0_3_3_3_3_3_3_3_3_3_3_3_3_3_3_3_3_3_3_3_3_3_3_3_3_3_3_3_3_3

New Line.l(r:p1rdt6846-p1rdt7010)_s1 Units=km Length=5.65445 bus1=p1rdt6846-p1rdt7010x.1.2.3 bus2=p1rdt7010.1.2.3 switch=n enabled=y phases=3 Linecode=3P_OH_AL_ACSR_4/0_Penguin_12_47_0_3_3_3_3_3_3_3_3_3_3_3_3_3_3_3_3_3_3_3_3_3_3_3_3_3_3_3_3_3

New Line.l(r:p1rdt2411-p1rdt6846)_s0 Units=km Length=0.149102 bus1=p1rdt2411.1.2.3 bus2=p1rdt2411-p1rdt6846x.1.2.3 switch=n enabled=y phases=3 Linecode=3P_OH_AL_ACSR_4/0_Penguin_12_47_0_3_3_3_3_3_3_3_3_3_3_3_3_3_3_3_3_3_3_3_3_3_3_3_3_3_3_3_3_3

New Line.l(r:p1rdt2411-p1rdt6846)_s1 Units=km Length=0.151377 bus1=p1rdt2411-p1rdt6846x.1.2.3 bus2=p1rdt6846.1.2.3 switch=n enabled=y phases=3 Linecode=3P_OH_AL_ACSR_4/0_Penguin_12_47_0_3_3_3_3_3_3_3_3_3_3_3_3_3_3_3_3_3_3_3_3_3_3_3_3_3_3_3_3_3

New Line.l(r:p1rdt2411-p1rdt8182) Units=km Length=0.269495 bus1=p1rdt8182.1.2.3 bus2=p1rdt2411.1.2.3 switch=n enabled=y phases=3 Linecode=3P_OH_AL_ACSR_4/0_Penguin_12_47_0_3_3_3_3_3_3_3_3_3_3_3_3_3_3_3_3_3_3_3_3_3_3_3_3_3_3_3_3_3

New Line.l(r:p1rdt5421-p1rdt8182) Units=km Length=0.107015 bus1=p1rdt5421.1.2.3 bus2=p1rdt8182.1.2.3 switch=n enabled=y phases=3 Linecode=3P_OH_AL_ACSR_4/0_Penguin_12_47_0_3_3_3_3_3_3_3_3_3_3_3_3_3_3_3_3_3_3_3_3_3_3_3_3_3_3_3_3_3

New Line.l(r:p1rdt5421-p1rdt5655) Units=km Length=0.0530286 bus1=p1rdt5655.1.2.3 bus2=p1rdt5421.1.2.3 switch=n enabled=y phases=3 Linecode=3P_OH_AL_ACSR_4/0_Penguin_12_47_0_3_3_3_3_3_3_3_3_3_3_3_3_3_3_3_3_3_3_3_3_3_3_3_3_3_3_3_3_3

New Line.l(r:p1rdt5189-p1rdt5655) Units=km Length=0.13432 bus1=p1rdt5189.1.2.3 bus2=p1rdt5655.1.2.3 switch=n enabled=y phases=3 Linecode=3P_OH_AL_ACSR_4/0_Penguin_12_47_0_3_3_3_3_3_3_3_3_3_3_3_3_3_3_3_3_3_3_3_3_3_3_3_3_3_3_3_3_3

New Line.l(r:p1rdt1415-p1rdt5189) Units=km Length=0.161559 bus1=p1rdt1415.1.2.3 bus2=p1rdt5189.1.2.3 switch=n enabled=y phases=3 Linecode=3P_OH_AL_ACSR_4/0_Penguin_12_47_0_3_3_3_3_3_3_3_3_3_3_3_3_3_3_3_3_3_3_3_3_3_3_3_3_3_3_3_3_3

New Line.l(r:p1rdt1415-p1rdt5994) Units=km Length=0.0349263 bus1=p1rdt5994.1.2.3 bus2=p1rdt1415.1.2.3 switch=n enabled=y phases=3 Linecode=3P_OH_AL_ACSR_4/0_Penguin_12_47_0_3_3_3_3_3_3_3_3_3_3_3_3_3_3_3_3_3_3_3_3_3_3_3_3_3_3_3_3_3

New Line.l(r:p1rdt2412-p1rdt5994) Units=km Length=0.0747064 bus1=p1rdt2412.1.2.3 bus2=p1rdt5994.1.2.3 switch=n enabled=y phases=3 Linecode=3P_OH_AL_ACSR_4/0_Penguin_12_47_0_3_3_3_3_3_3_3_3_3_3_3_3_3_3_3_3_3_3_3_3_3_3_3_3_3_3_3_3_3

New Line.l(r:p1rdt2412-p1rdt3407) Units=km Length=0.0179692 bus1=p1rdt3407.1.2.3 bus2=p1rdt2412.1.2.3 switch=n enabled=y phases=3 Linecode=3P_OH_AL_ACSR_4/0_Penguin_12_47_0_3_3_3_3_3_3_3_3_3_3_3_3_3_3_3_3_3_3_3_3_3_3_3_3_3_3_3_3_3

New Line.l(r:p1rdt1288-p1rdt3407)_s0 Units=km Length=0.0803207 bus1=p1rdt1288.1.2.3 bus2=p1rdt1288-p1rdt3407x.1.2.3 switch=n enabled=y phases=3 Linecode=3P_OH_AL_ACSR_4/0_Penguin_12_47_0_3_3_3_3_3_3_3_3_3_3_3_3_3_3_3_3_3_3_3_3_3_3_3_3_3_3_3_3_3

New Line.l(r:p1rdt1288-p1rdt3407)_s1 Units=km Length=0.0705129 bus1=p1rdt1288-p1rdt3407x.1.2.3 bus2=p1rdt3407.1.2.3 switch=n enabled=y phases=3 Linecode=3P_OH_AL_ACSR_4/0_Penguin_12_47_0_3_3_3_3_3_3_3_3_3_3_3_3_3_3_3_3_3_3_3_3_3_3_3_3_3_3_3_3_3

New Line.l(r:p1rdt1288-p1rdt3315) Units=km Length=0.626926 bus1=p1rdt3315.1.2.3 bus2=p1rdt1288.1.2.3 switch=n enabled=y phases=3 Linecode=3P_OH_AL_ACSR_4/0_Penguin_12_47_0_3_3_3_3_3_3_3_3_3_3_3_3_3_3_3_3_3_3_3_3_3_3_3_3_3_3_3_3_3

New Line.l(r:p1rdt2820-p1rdt3131) Units=km Length=0.652652 bus1=p1rdt2820.1.2.3 bus2=p1rdt3131.1.2.3 switch=n enabled=y phases=3 Linecode=3P_OH_AL_ACSR_4/0_Penguin_12_47_0_3_3_3_3_3_3_3_3_3_3_3_3_3_3_3_3_3_3_3_3_3_3_3_3_3_3_3_3_3

New Line.l(r:p1rdt2820-p1rdt6722) Units=km Length=0.421402 bus1=p1rdt6722.1.2.3 bus2=p1rdt2820.1.2.3 switch=n enabled=y phases=3 Linecode=3P_OH_AL_ACSR_4/0_Penguin_12_47_0_3_3_3_3_3_3_3_3_3_3_3_3_3_3_3_3_3_3_3_3_3_3_3_3_3_3_3_3_3

New Line.l(r:p1rdt4484-p1rdt6722) Units=km Length=0.366741 bus1=p1rdt4484.1.2.3 bus2=p1rdt6722.1.2.3 switch=n enabled=y phases=3 Linecode=3P_OH_AL_ACSR_4/0_Penguin_12_47_0_3_3_3_3_3_3_3_3_3_3_3_3_3_3_3_3_3_3_3_3_3_3_3_3_3_3_3_3_3

New Line.l(r:p1rdt4484-p1rdt539) Units=km Length=0.6370330000000001 bus1=p1rdt539.1.2.3 bus2=p1rdt4484.1.2.3 switch=n enabled=y phases=3 Linecode=3P_OH_AL_ACSR_4/0_Penguin_12_47_0_3_3_3_3_3_3_3_3_3_3_3_3_3_3_3_3_3_3_3_3_3_3_3_3_3_3_3_3_3

New Line.l(r:p1rdt1416-p1rdt539) Units=km Length=0.045051600000000004 bus1=p1rdt1416.1.2.3 bus2=p1rdt539.1.2.3 switch=n enabled=y phases=3 Linecode=3P_OH_AL_ACSR_4/0_Penguin_12_47_0_3_3_3_3_3_3_3_3_3_3_3_3_3_3_3_3_3_3_3_3_3_3_3_3_3_3_3_3_3

New Line.l(r:p1rdt1416-p1rdt8130)_s0 Units=km Length=0.817163 bus1=p1rdt8130.1.2.3 bus2=p1rdt1416-p1rdt8130x.1.2.3 switch=n enabled=y phases=3 Linecode=3P_OH_AL_ACSR_4/0_Penguin_12_47_0_3_3_3_3_3_3_3_3_3_3_3_3_3_3_3_3_3_3_3_3_3_3_3_3_3_3_3_3_3

New Line.l(r:p1rdt1416-p1rdt8130)_s1 Units=km Length=0.0242698 bus1=p1rdt1416-p1rdt8130x.1.2.3 bus2=p1rdt1416.1.2.3 switch=n enabled=y phases=3 Linecode=3P_OH_AL_ACSR_4/0_Penguin_12_47_0_3_3_3_3_3_3_3_3_3_3_3_3_3_3_3_3_3_3_3_3_3_3_3_3_3_3_3_3_3

New Line.l(r:p1rdt6136-p1rdt8130) Units=km Length=0.484345 bus1=p1rdt6136.1.2.3 bus2=p1rdt8130.1.2.3 switch=n enabled=y phases=3 Linecode=3P_OH_AL_ACSR_4/0_Penguin_12_47_0_3_3_3_3_3_3_3_3_3_3_3_3_3_3_3_3_3_3_3_3_3_3_3_3_3_3_3_3_3

New Line.l(r:p1rdt3315-p1rdt6136) Units=km Length=0.593674 bus1=p1rdt3315.1.2.3 bus2=p1rdt6136.1.2.3 switch=n enabled=y phases=3 Linecode=3P_OH_AL_ACSR_4/0_Penguin_12_47_0_3_3_3_3_3_3_3_3_3_3_3_3_3_3_3_3_3_3_3_3_3_3_3_3_3_3_3_3_3

New Line.l(r:p1rdt3315-p1rdt3601)_s0 Units=km Length=1.40574 bus1=p1rdt3601.1.2.3 bus2=p1rdt3315-p1rdt3601x.1.2.3 switch=n enabled=y phases=3 Linecode=3P_OH_AL_ACSR_4/0_Penguin_12_47_0_3_3_3_3_3_3_3_3_3_3_3_3_3_3_3_3_3_3_3_3_3_3_3_3_3_3_3_3_3

New Line.l(r:p1rdt3315-p1rdt3601)_s1 Units=km Length=0.164322 bus1=p1rdt3315-p1rdt3601x.1.2.3 bus2=p1rdt3315.1.2.3 switch=n enabled=y phases=3 Linecode=3P_OH_AL_ACSR_4/0_Penguin_12_47_0_3_3_3_3_3_3_3_3_3_3_3_3_3_3_3_3_3_3_3_3_3_3_3_3_3_3_3_3_3

New Line.l(r:p1rdt3601-p1rdt7935) Units=km Length=0.288311 bus1=p1rdt7935.1.2.3 bus2=p1rdt3601.1.2.3 switch=n enabled=y phases=3 Linecode=3P_OH_AL_ACSR_4/0_Penguin_12_47_0_3_3_3_3_3_3_3_3_3_3_3_3_3_3_3_3_3_3_3_3_3_3_3_3_3_3_3_3_3

New Line.l(r:p1rdt7319-p1rdt8323) Units=km Length=0.767456 bus1=p1rdt7319.1.2.3 bus2=p1rdt8323.1.2.3 switch=n enabled=y phases=3 Linecode=3P_OH_AL_ACSR_4/0_Penguin_12_47_0_3_3_3_3_3_3_3_3_3_3_3_3_3_3_3_3_3_3_3_3_3_3_3_3_3_3_3_3_3

New Line.l(r:p1rdt7248-p1rdt7319) Units=km Length=0.458181 bus1=p1rdt7248.1.2.3 bus2=p1rdt7319.1.2.3 switch=n enabled=y phases=3 Linecode=3P_OH_AL_ACSR_4/0_Penguin_12_47_0_3_3_3_3_3_3_3_3_3_3_3_3_3_3_3_3_3_3_3_3_3_3_3_3_3_3_3_3_3

New Line.l(r:p1rdt7248-p1rdt7935) Units=km Length=0.43104900000000007 bus1=p1rdt7935.1.2.3 bus2=p1rdt7248.1.2.3 switch=n enabled=y phases=3 Linecode=3P_OH_AL_ACSR_4/0_Penguin_12_47_0_3_3_3_3_3_3_3_3_3_3_3_3_3_3_3_3_3_3_3_3_3_3_3_3_3_3_3_3_3

New Line.l(r:p1rdt5723-p1rdt7935) Units=km Length=0.0576532 bus1=p1rdt5723.1.2.3 bus2=p1rdt7935.1.2.3 switch=n enabled=y phases=3 Linecode=3P_OH_AL_ACSR_4/0_Penguin_12_47_0_3_3_3_3_3_3_3_3_3_3_3_3_3_3_3_3_3_3_3_3_3_3_3_3_3_3_3_3_3

New Line.l(r:p1rdt291-p1rdt5723) Units=km Length=0.11091 bus1=p1rdt291.1.2.3 bus2=p1rdt5723.1.2.3 switch=n enabled=y phases=3 Linecode=3P_OH_AL_ACSR_4/0_Penguin_12_47_0_3_3_3_3_3_3_3_3_3_3_3_3_3_3_3_3_3_3_3_3_3_3_3_3_3_3_3_3_3

New Line.l(r:p1rdt291-p1rdt8324) Units=km Length=0.11385 bus1=p1rdt8324.1.2.3 bus2=p1rdt291.1.2.3 switch=n enabled=y phases=3 Linecode=3P_OH_AL_ACSR_4/0_Penguin_12_47_0_3_3_3_3_3_3_3_3_3_3_3_3_3_3_3_3_3_3_3_3_3_3_3_3_3_3_3_3_3

New Line.l(r:p1rdt6587-p1rdt8324) Units=km Length=0.26656 bus1=p1rdt6587.1.2.3 bus2=p1rdt8324.1.2.3 switch=n enabled=y phases=3 Linecode=3P_OH_AL_ACSR_4/0_Penguin_12_47_0_3_3_3_3_3_3_3_3_3_3_3_3_3_3_3_3_3_3_3_3_3_3_3_3_3_3_3_3_3

New Line.l(r:p1rdt3709-p1rdt6587) Units=km Length=0.0383971 bus1=p1rdt3709.1.2.3 bus2=p1rdt6587.1.2.3 switch=n enabled=y phases=3 Linecode=3P_OH_AL_ACSR_4/0_Penguin_12_47_0_3_3_3_3_3_3_3_3_3_3_3_3_3_3_3_3_3_3_3_3_3_3_3_3_3_3_3_3_3

New Line.l(r:p1rdt3709-p1rdt7669) Units=km Length=0.0960077 bus1=p1rdt7669.1.2.3 bus2=p1rdt3709.1.2.3 switch=n enabled=y phases=3 Linecode=3P_OH_AL_ACSR_4/0_Penguin_12_47_0_3_3_3_3_3_3_3_3_3_3_3_3_3_3_3_3_3_3_3_3_3_3_3_3_3_3_3_3_3

New Line.l(r:p1rdt7669-p1rhs7_1247) Units=km Length=0.542137 bus1=p1rdt7669-p1rhs7_1247x.1.2.3 bus2=p1rdt7669.1.2.3 switch=n enabled=y phases=3 Linecode=3P_OH_AL_ACSR_4/0_Penguin_12_47_0_3_3_3_3_3_3_3_3_3_3_3_3_3_3_3_3_3_3_3_3_3_3_3_3_3_3_3_3_3

New Line.l(r:p1rdt7010lv-p1rlv10444) Units=km Length=0.00829073 bus1=p1rdt7010lv.1.2.3 bus2=p1rlv10444.1.2.3 switch=n enabled=y phases=3 Linecode=3P_UG_AL_350kcmil_15_0_416_0_3_3_3_3_3_3_3_3_3_3_3_3_3_3_3_3_3_3_3_3_3_3_3_3_3_3_3_3_3

New Line.l(r:p1rdt5654lv-p1rlv7662) Units=km Length=0.011095200000000001 bus1=p1rdt5654lv.1.2.3 bus2=p1rlv7662.1.2.3 switch=n enabled=y phases=3 Linecode=3P_UG_AL_350kcmil_15_0_416_0_3_3_3_3_3_3_3_3_3_3_3_3_3_3_3_3_3_3_3_3_3_3_3_3_3_3_3_3_3

New Line.l(r:p1rdt5654-p1rdt7615) Units=km Length=0.0546419 bus1=p1rdt7615.1.2.3 bus2=p1rdt5654.1.2.3 switch=n enabled=y phases=3 Linecode=3P_OH_AL_ACSR_4/0_Penguin_12_47_0_3_3_3_3_3_3_3_3_3_3_3_3_3_3_3_3_3_3_3_3_3_3_3_3_3_3_3_3_3

New Line.l(r:p1rdt3406-p1rdt7615) Units=km Length=0.184035 bus1=p1rdt3406.1.2.3 bus2=p1rdt7615.1.2.3 switch=n enabled=y phases=3 Linecode=3P_OH_AL_ACSR_4/0_Penguin_12_47_0_3_3_3_3_3_3_3_3_3_3_3_3_3_3_3_3_3_3_3_3_3_3_3_3_3_3_3_3_3

New Line.l(r:p1rdt4867lv-p1rlv6333) Units=km Length=0.026411 bus1=p1rdt4867lv.1.2.3 bus2=p1rlv6333.1.2.3 switch=n enabled=y phases=3 Linecode=3P_UG_AL_350kcmil_15_0_416_0_3_3_3_3_3_3_3_3_3_3_3_3_3_3_3_3_3_3_3_3_3_3_3_3_3_3_3_3_3

New Line.l(r:p1rdt4867-p1rdt5009)_s0 Units=km Length=0.10967 bus1=p1rdt4867-p1rdt5009xxx.1.2.3 bus2=p1rdt4867-p1rdt5009xx.1.2.3 switch=n enabled=y phases=3 Linecode=3P_UG_AL_4/0_25_12_47_0_3_3_3_3_3_3_3_3_3_3_3_3_3_3_3_3_3_3_3_3_3_3_3_3_3_3_3_3_3

New Line.l(r:p1rdt4867-p1rdt5009)_s1 Units=km Length=0.0483793 bus1=p1rdt4867-p1rdt5009xx.1.2.3 bus2=p1rdt4867-p1rdt5009x.1.2.3 switch=n enabled=y phases=3 Linecode=3P_OH_AL_ACSR_4/0_Penguin_12_47_0_3_3_3_3_3_3_3_3_3_3_3_3_3_3_3_3_3_3_3_3_3_3_3_3_3_3_3_3_3

New Line.l(r:p1rdt6135lv-p1rlv8567) Units=km Length=0.001 bus1=p1rdt6135lv.1.2.3 bus2=p1rlv8567.1.2.3 switch=n enabled=y phases=3 Linecode=3P_UG_AL_4/0_15_0_416_0_3_3_3_3_3_3_3_3_3_3_3_3_3_3_3_3_3_3_3_3_3_3_3_3_3_3_3_3_3

New Line.l(r:p1rdt1517lv-p1rlv1638) Units=km Length=0.001 bus1=p1rdt1517lv.1.2.3 bus2=p1rlv1638.1.2.3 switch=n enabled=y phases=3 Linecode=3P_UG_AL_350kcmil_15_0_416_0_3_3_3_3_3_3_3_3_3_3_3_3_3_3_3_3_3_3_3_3_3_3_3_3_3_3_3_3_3

New Line.l(r:p1rdt5796lv-p1rlv7924) Units=km Length=0.001 bus1=p1rdt5796lv.1.2.3 bus2=p1rlv7924.1.2.3 switch=n enabled=y phases=3 Linecode=3P_UG_AL_350kcmil_15_0_416_0_3_3_3_3_3_3_3_3_3_3_3_3_3_3_3_3_3_3_3_3_3_3_3_3_3_3_3_3_3

New Line.l(r:p1rdt1517-p1rdt5796) Units=km Length=0.0114541 bus1=p1rdt1517.1.2.3 bus2=p1rdt5796.1.2.3 switch=n enabled=y phases=3 Linecode=3P_OH_AL_ACSR_4/0_Penguin_12_47_0_3_3_3_3_3_3_3_3_3_3_3_3_3_3_3_3_3_3_3_3_3_3_3_3_3_3_3_3_3

New Line.l(r:p1rdt7375-p1rmv2) Units=km Length=0.089886 bus1=p1rdt7375.1.2.3 bus2=p1rmv2.1.2.3 switch=n enabled=y phases=3 Linecode=3P_OH_AL_ACSR_4/0_Penguin_12_47_0_3_3_3_3_3_3_3_3_3_3_3_3_3_3_3_3_3_3_3_3_3_3_3_3_3_3_3_3_3

New Line.l(r:p1rdt1049lv-p1rlv1108) Units=km Length=0.00871304 bus1=p1rdt1049lv.1.2.3 bus2=p1rlv1108.1.2.3 switch=n enabled=y phases=3 Linecode=3P_UG_AL_350kcmil_15_0_416_0_3_3_3_3_3_3_3_3_3_3_3_3_3_3_3_3_3_3_3_3_3_3_3_3_3_3_3_3_3

New Line.l(r:p1rdt1048-p1rdt1049) Units=km Length=0.097026 bus1=p1rdt1048.1.2.3 bus2=p1rdt1049.1.2.3 switch=n enabled=y phases=3 Linecode=3P_OH_AL_ACSR_4/0_Penguin_12_47_0_3_3_3_3_3_3_3_3_3_3_3_3_3_3_3_3_3_3_3_3_3_3_3_3_3_3_3_3_3

New Line.l(r:p1rdt1048-p1rdt7375) Units=km Length=0.0388143 bus1=p1rdt7375.1.2.3 bus2=p1rdt1048.1.2.3 switch=n enabled=y phases=3 Linecode=3P_OH_AL_ACSR_4/0_Penguin_12_47_0_3_3_3_3_3_3_3_3_3_3_3_3_3_3_3_3_3_3_3_3_3_3_3_3_3_3_3_3_3

New Line.l(r:p1rdt6845lv-p1rlv10056) Units=km Length=0.0450283 bus1=p1rdt6845lv.1.2.3 bus2=p1rlv10056.1.2.3 switch=n enabled=y phases=3 Linecode=3P_UG_AL_350kcmil_15_0_416_0_3_3_3_3_3_3_3_3_3_3_3_3_3_3_3_3_3_3_3_3_3_3_3_3_3_3_3_3_3

New Line.l(r:p1rdt7070lv-p1rlv10588) Units=km Length=0.020126 bus1=p1rdt7070lv.1.2.3 bus2=p1rlv10588.1.2.3 switch=n enabled=y phases=3 Linecode=3P_UG_AL_350kcmil_15_0_416_0_3_3_3_3_3_3_3_3_3_3_3_3_3_3_3_3_3_3_3_3_3_3_3_3_3_3_3_3_3

New Line.l(r:p1rdt7070-p1rdt955) Units=km Length=0.16807400000000003 bus1=p1rdt955.1.2.3 bus2=p1rdt7070.1.2.3 switch=n enabled=y phases=3 Linecode=3P_OH_AL_ACSR_4/0_Penguin_12_47_0_3_3_3_3_3_3_3_3_3_3_3_3_3_3_3_3_3_3_3_3_3_3_3_3_3_3_3_3_3

New Line.l(r:p1rdt1525-p1rdt955) Units=km Length=0.42876 bus1=p1rdt1525.1.2.3 bus2=p1rdt955.1.2.3 switch=n enabled=y phases=3 Linecode=3P_OH_AL_ACSR_4/0_Penguin_12_47_0_3_3_3_3_3_3_3_3_3_3_3_3_3_3_3_3_3_3_3_3_3_3_3_3_3_3_3_3_3

New Line.l(r:p1rdt1525-p1rdt3131) Units=km Length=0.343602 bus1=p1rdt3131.1.2.3 bus2=p1rdt1525.1.2.3 switch=n enabled=y phases=3 Linecode=3P_OH_AL_ACSR_4/0_Penguin_12_47_0_3_3_3_3_3_3_3_3_3_3_3_3_3_3_3_3_3_3_3_3_3_3_3_3_3_3_3_3_3

New Line.l(r:p1rdt1049-p1rdt1399)_s0 Units=km Length=16.0884 bus1=p1rdt1049-p1rdt1399xxx.1.2.3 bus2=p1rdt1049-p1rdt1399xx.1.2.3 switch=n enabled=y phases=3 Linecode=3P_OH_AL_ACSR_1033kcmil_Curlew_12.47_1_3_3_3_3_3_3_3_3_3_3_3_3_3_3_3_3_3_3_3_3_3_3_3_3_3_3_3_3_3

New Line.l(r:p1rdt1049-p1rdt1399)_s1 Units=km Length=1.5552 bus1=p1rdt1049-p1rdt1399xx.1.2.3 bus2=p1rdt1049-p1rdt1399x.1.2.3 switch=n enabled=y phases=3 Linecode=3P_OH_AL_ACSR_1033kcmil_Curlew_12.47_1_3_3_3_3_3_3_3_3_3_3_3_3_3_3_3_3_3_3_3_3_3_3_3_3_3_3_3_3_3

New Line.l(r:p1rdt1049-p1rdt1399)_s2 Units=km Length=0.37364 bus1=p1rdt1049-p1rdt1399x.1.2.3 bus2=p1rdt1049.1.2.3 switch=n enabled=y phases=3 Linecode=3P_OH_AL_ACSR_1033kcmil_Curlew_12.47_1_3_3_3_3_3_3_3_3_3_3_3_3_3_3_3_3_3_3_3_3_3_3_3_3_3_3_3_3_3

New Line.padswitch(r:p1rdt1413-p1rdt1414)p1r_2782 Units=km Length=0.001 bus1=p1rdt1413-p1rdt1414x.1 bus2=p1rdt1413-p1rdt1414xx.1 switch=y enabled=y phases=1 Linecode=padswitch_1_1_1_1_1_1_1_1_1_1_1_1_1_1_1_1_1_1_1_1_1_1_1_1_1_1_1_1_1

New Line.padswitch(r:p1rdt1413-p1rdt1414)p1r_2783 Units=km Length=0.001 bus1=p1rdt1413-p1rdt1414xxxx.1 bus2=p1rdt1414.1 switch=y enabled=y phases=1 Linecode=padswitch_1_1_1_1_1_1_1_1_1_1_1_1_1_1_1_1_1_1_1_1_1_1_1_1_1_1_1_1_1_1

New Line.padswitch(r:p1rdt4867-p1rdt6065)p1r_2784 Units=km Length=0.001 bus1=p1rdt4867-p1rdt6065x.3 bus2=p1rdt4867-p1rdt6065xx.3 switch=y enabled=y phases=1 Linecode=padswitch_1_1_1_1_1_1_1_1_1_1_1_1_1_1_1_1_1_1_1_1_1_1_1_1_1_1_1_1_1

New Line.padswitch(r:p1rdt4867-p1rdt6065)p1r_2785 Units=km Length=0.001 bus1=p1rdt4867-p1rdt6065xxx.3 bus2=p1rdt6065.3 switch=y enabled=y phases=1 Linecode=padswitch_1_1_1_1_1_1_1_1_1_1_1_1_1_1_1_1_1_1_1_1_1_1_1_1_1_1_1_1_1_1

New Line.padswitch(r:p1rdt4867-p1rdt5009)p1r_2786 Units=km Length=0.001 bus1=p1rdt5009.1.2.3 bus2=p1rdt4867-p1rdt5009xxx.1.2.3 switch=y enabled=y phases=3 Linecode=padswitch_3_3_3_3_3_3_3_3_3_3_3_3_3_3_3_3_3_3_3_3_3_3_3_3_3_3_3_3_3

New Line.padswitch(r:p1rdt4867-p1rdt5009)p1r_2787 Units=km Length=0.001 bus1=p1rdt4867-p1rdt5009x.1.2.3 bus2=p1rdt4867.1.2.3 switch=y enabled=y phases=3 Linecode=padswitch_3_3_3_3_3_3_3_3_3_3_3_3_3_3_3_3_3_3_3_3_3_3_3_3_3_3_3_3_3

New Line.elbswitch(r:p1rdt4242-p1rdt7070)p1r_2847 Units=km Length=0.001 bus1=p1rdt7070.1.2.3 bus2=p1rdt4242-p1rdt7070xx.1.2.3 switch=y enabled=n phases=3 Linecode=elbswitch_3_3_3_3_3_3_3_3_3_3_3_3_3_3_3_3_3_3_3_3_3_3_3_3_3_3_3_3_3

New Line.fuse(r:p1rdt291-p1rdt6784)p1r_2913 Units=km Length=0.001 bus1=p1rdt291.1 bus2=p1rdt291-p1rdt6784x.1 switch=n enabled=y phases=1 Linecode=fuse_1_1_1_1_1_1_1_1_1_1_1_1_1_1_1_1_1_1_1_1_1_1_1_1_1_1_1_1_1

New Fuse.Fuse_fuse(r:p1rdt291-p1rdt6784)p1r_2913 monitoredobj=Line.fuse(r:p1rdt291-p1rdt6784)p1r_2913 enabled=y ratedcurrent=100.0

New Line.fuse(r:p1rdt1288-p1rdt4315)p1r_3144 Units=km Length=0.001 bus1=p1rdt1288.2 bus2=p1rdt1288-p1rdt4315x.2 switch=n enabled=y phases=1 Linecode=fuse_1_1_1_1_1_1_1_1_1_1_1_1_1_1_1_1_1_1_1_1_1_1_1_1_1_1_1_1_1

New Fuse.Fuse_fuse(r:p1rdt1288-p1rdt4315)p1r_3144 monitoredobj=Line.fuse(r:p1rdt1288-p1rdt4315)p1r_3144 enabled=y ratedcurrent=100.0

New Line.fuse(r:p1rdt1413-p1rdt1414)p1r_3181 Units=km Length=0.001 bus1=p1rdt1413.1 bus2=p1rdt1413-p1rdt1414x.1 switch=n enabled=y phases=1 Linecode=fuse_1_1_1_1_1_1_1_1_1_1_1_1_1_1_1_1_1_1_1_1_1_1_1_1_1_1_1_1_1

New Fuse.Fuse_fuse(r:p1rdt1413-p1rdt1414)p1r_3181 monitoredobj=Line.fuse(r:p1rdt1413-p1rdt1414)p1r_3181 enabled=y ratedcurrent=100.0

New Line.fuse(r:p1rdt1415-p1rdt2718)p1r_3182 Units=km Length=0.001 bus1=p1rdt1415.2 bus2=p1rdt1415-p1rdt2718x.2 switch=n enabled=y phases=1 Linecode=fuse_1_1_1_1_1_1_1_1_1_1_1_1_1_1_1_1_1_1_1_1_1_1_1_1_1_1_1_1_1

New Fuse.Fuse_fuse(r:p1rdt1415-p1rdt2718)p1r_3182 monitoredobj=Line.fuse(r:p1rdt1415-p1rdt2718)p1r_3182 enabled=y ratedcurrent=100.0

New Line.fuse(r:p1rdt1525-p1rdt4320)p1r_3203 Units=km Length=0.001 bus1=p1rdt1525.2 bus2=p1rdt1525-p1rdt4320x.2 switch=n enabled=y phases=1 Linecode=fuse_1_1_1_1_1_1_1_1_1_1_1_1_1_1_1_1_1_1_1_1_1_1_1_1_1_1_1_1_1

New Fuse.Fuse_fuse(r:p1rdt1525-p1rdt4320)p1r_3203 monitoredobj=Line.fuse(r:p1rdt1525-p1rdt4320)p1r_3203 enabled=y ratedcurrent=100.0

New Line.fuse(r:p1rdt1736-p1rdt3406)p1r_3665 Units=km Length=0.001 bus1=p1rdt3406.3 bus2=p1rdt1736-p1rdt3406x.3 switch=n enabled=y phases=1 Linecode=fuse_1_1_1_1_1_1_1_1_1_1_1_1_1_1_1_1_1_1_1_1_1_1_1_1_1_1_1_1_1

New Fuse.Fuse_fuse(r:p1rdt1736-p1rdt3406)p1r_3665 monitoredobj=Line.fuse(r:p1rdt1736-p1rdt3406)p1r_3665 enabled=y ratedcurrent=100.0

New Line.fuse(r:p1rdt2615-p1rdt3601)p1r_3703 Units=km Length=0.001 bus1=p1rdt3601.3 bus2=p1rdt2615-p1rdt3601x.3 switch=n enabled=y phases=1 Linecode=fuse_1_1_1_1_1_1_1_1_1_1_1_1_1_1_1_1_1_1_1_1_1_1_1_1_1_1_1_1_1

New Fuse.Fuse_fuse(r:p1rdt2615-p1rdt3601)p1r_3703 monitoredobj=Line.fuse(r:p1rdt2615-p1rdt3601)p1r_3703 enabled=y ratedcurrent=100.0

New Line.fuse(r:p1rdt4867-p1rdt6065)p1r_3982 Units=km Length=0.001 bus1=p1rdt4867.3 bus2=p1rdt4867-p1rdt6065x.3 switch=n enabled=y phases=1 Linecode=fuse_1_1_1_1_1_1_1_1_1_1_1_1_1_1_1_1_1_1_1_1_1_1_1_1_1_1_1_1_1

New Fuse.Fuse_fuse(r:p1rdt4867-p1rdt6065)p1r_3982 monitoredobj=Line.fuse(r:p1rdt4867-p1rdt6065)p1r_3982 enabled=y ratedcurrent=100.0

New Line.fuse(r:p1rdt4867-p1rdt7934)p1r_3983 Units=km Length=0.001 bus1=p1rdt4867.2 bus2=p1rdt4867-p1rdt7934x.2 switch=n enabled=y phases=1 Linecode=fuse_1_1_1_1_1_1_1_1_1_1_1_1_1_1_1_1_1_1_1_1_1_1_1_1_1_1_1_1_1

New Fuse.Fuse_fuse(r:p1rdt4867-p1rdt7934)p1r_3983 monitoredobj=Line.fuse(r:p1rdt4867-p1rdt7934)p1r_3983 enabled=y ratedcurrent=100.0

New Line.fuse(r:p1rdt5260-p1rdt6405)p1r_4052 Units=km Length=0.001 bus1=p1rdt5260.2 bus2=p1rdt5260-p1rdt6405x.2 switch=n enabled=y phases=1 Linecode=fuse_1_1_1_1_1_1_1_1_1_1_1_1_1_1_1_1_1_1_1_1_1_1_1_1_1_1_1_1_1

New Fuse.Fuse_fuse(r:p1rdt5260-p1rdt6405)p1r_4052 monitoredobj=Line.fuse(r:p1rdt5260-p1rdt6405)p1r_4052 enabled=y ratedcurrent=100.0

New Line.fuse(r:p1rdt5654-p1rdt7851)p1r_4147 Units=km Length=0.001 bus1=p1rdt5654.2 bus2=p1rdt5654-p1rdt7851x.2 switch=n enabled=y phases=1 Linecode=fuse_1_4_1_1_1_1_1_1_1_1_1_1_1_1_1_1_1_1_1_1_1_1_1_1_1_1_1_1_1_1

New Fuse.Fuse_fuse(r:p1rdt5654-p1rdt7851)p1r_4147 monitoredobj=Line.fuse(r:p1rdt5654-p1rdt7851)p1r_4147 enabled=y ratedcurrent=100.0

New Line.fuse(r:p1rdt292-p1rdt6136)p1r_4251 Units=km Length=0.001 bus1=p1rdt6136.3 bus2=p1rdt292-p1rdt6136xx.3 switch=n enabled=y phases=1 Linecode=fuse_1_1_1_1_1_1_1_1_1_1_1_1_1_1_1_1_1_1_1_1_1_1_1_1_1_1_1_1_1

New Fuse.Fuse_fuse(r:p1rdt292-p1rdt6136)p1r_4251 monitoredobj=Line.fuse(r:p1rdt292-p1rdt6136)p1r_4251 enabled=y ratedcurrent=100.0

New Line.fuse(r:p1rdt1050-p1rdt6136)p1r_4252 Units=km Length=0.001 bus1=p1rdt6136.2 bus2=p1rdt1050-p1rdt6136x.2 switch=n enabled=y phases=1 Linecode=fuse_1_1_1_1_1_1_1_1_1_1_1_1_1_1_1_1_1_1_1_1_1_1_1_1_1_1_1_1_1

New Fuse.Fuse_fuse(r:p1rdt1050-p1rdt6136)p1r_4252 monitoredobj=Line.fuse(r:p1rdt1050-p1rdt6136)p1r_4252 enabled=y ratedcurrent=100.0

New Line.fuse(r:p1rdt2814-p1rdt6136)p1r_4253 Units=km Length=0.001 bus1=p1rdt6136.1 bus2=p1rdt2814-p1rdt6136xx.1 switch=n enabled=y phases=1 Linecode=fuse_1_1_1_1_1_1_1_1_1_1_1_1_1_1_1_1_1_1_1_1_1_1_1_1_1_1_1_1_1

New Fuse.Fuse_fuse(r:p1rdt2814-p1rdt6136)p1r_4253 monitoredobj=Line.fuse(r:p1rdt2814-p1rdt6136)p1r_4253 enabled=y ratedcurrent=100.0

New Line.fuse(r:p1rdt6587-p1rdt7187)p1r_4332 Units=km Length=0.001 bus1=p1rdt6587.3 bus2=p1rdt6587-p1rdt7187x.3 switch=n enabled=y phases=1 Linecode=fuse_1_1_1_1_1_1_1_1_1_1_1_1_1_1_1_1_1_1_1_1_1_1_1_1_1_1_1_1_1

New Fuse.Fuse_fuse(r:p1rdt6587-p1rdt7187)p1r_4332 monitoredobj=Line.fuse(r:p1rdt6587-p1rdt7187)p1r_4332 enabled=y ratedcurrent=100.0

New Line.fuse(r:p1rdt3893-p1rdt6845)p1r_4394 Units=km Length=0.001 bus1=p1rdt6845.3 bus2=p1rdt3893-p1rdt6845x.3 switch=n enabled=y phases=1 Linecode=fuse_1_1_1_1_1_1_1_1_1_1_1_1_1_1_1_1_1_1_1_1_1_1_1_1_1_1_1_1_1

New Fuse.Fuse_fuse(r:p1rdt3893-p1rdt6845)p1r_4394 monitoredobj=Line.fuse(r:p1rdt3893-p1rdt6845)p1r_4394 enabled=y ratedcurrent=100.0

New Line.fuse(r:p1rdt7248-p1rdt7715)p1r_4485 Units=km Length=0.001 bus1=p1rdt7248.3 bus2=p1rdt7248-p1rdt7715x.3 switch=n enabled=y phases=1 Linecode=fuse_1_1_1_1_1_1_1_1_1_1_1_1_1_1_1_1_1_1_1_1_1_1_1_1_1_1_1_1_1

New Fuse.Fuse_fuse(r:p1rdt7248-p1rdt7715)p1r_4485 monitoredobj=Line.fuse(r:p1rdt7248-p1rdt7715)p1r_4485 enabled=y ratedcurrent=100.0

New Line.fuse(r:p1rdt418-p1rdt7319)p1r_4510 Units=km Length=0.001 bus1=p1rdt7319.3 bus2=p1rdt418-p1rdt7319x.3 switch=n enabled=y phases=1 Linecode=fuse_1_1_1_1_1_1_1_1_1_1_1_1_1_1_1_1_1_1_1_1_1_1_1_1_1_1_1_1_1

New Fuse.Fuse_fuse(r:p1rdt418-p1rdt7319)p1r_4510 monitoredobj=Line.fuse(r:p1rdt418-p1rdt7319)p1r_4510 enabled=y ratedcurrent=100.0

New Line.fuse(r:p1rdt7995-p1rdt8130)p1r_4679 Units=km Length=0.001 bus1=p1rdt8130.2 bus2=p1rdt7995-p1rdt8130xx.2 switch=n enabled=y phases=1 Linecode=fuse_1_1_1_1_1_1_1_1_1_1_1_1_1_1_1_1_1_1_1_1_1_1_1_1_1_1_1_1_1

New Fuse.Fuse_fuse(r:p1rdt7995-p1rdt8130)p1r_4679 monitoredobj=Line.fuse(r:p1rdt7995-p1rdt8130)p1r_4679 enabled=y ratedcurrent=100.0

New Line.fuse(r:p1rdt6272-p1rdt8182)p1r_4693 Units=km Length=0.001 bus1=p1rdt8182.1 bus2=p1rdt6272-p1rdt8182x.1 switch=n enabled=y phases=1 Linecode=fuse_1_1_1_1_1_1_1_1_1_1_1_1_1_1_1_1_1_1_1_1_1_1_1_1_1_1_1_1_1

New Fuse.Fuse_fuse(r:p1rdt6272-p1rdt8182)p1r_4693 monitoredobj=Line.fuse(r:p1rdt6272-p1rdt8182)p1r_4693 enabled=y ratedcurrent=100.0

New Line.fuse(r:p1rdt1742-p1rdt8183)p1r_4694 Units=km Length=0.001 bus1=p1rdt8183.2 bus2=p1rdt1742-p1rdt8183x.2 switch=n enabled=y phases=1 Linecode=fuse_1_1_1_1_1_1_1_1_1_1_1_1_1_1_1_1_1_1_1_1_1_1_1_1_1_1_1_1_1

New Fuse.Fuse_fuse(r:p1rdt1742-p1rdt8183)p1r_4694 monitoredobj=Line.fuse(r:p1rdt1742-p1rdt8183)p1r_4694 enabled=y ratedcurrent=100.0

New Line.fuse(r:p1rdt154-p1rdt8323)p1r_4730 Units=km Length=0.001 bus1=p1rdt8323.3 bus2=p1rdt154-p1rdt8323x.3 switch=n enabled=y phases=1 Linecode=fuse_1_4_1_3_1_1_1_1_1_1_1_1_1_1_1_1_1_1_1_1_1_1_1_1_1_1_1_1_1_1_1

New Fuse.Fuse_fuse(r:p1rdt154-p1rdt8323)p1r_4730 monitoredobj=Line.fuse(r:p1rdt154-p1rdt8323)p1r_4730 enabled=y ratedcurrent=100.0

New Line.fuse(r:p1rdt670-p1rdt8323)p1r_4731 Units=km Length=0.001 bus1=p1rdt8323.2 bus2=p1rdt670-p1rdt8323x.2 switch=n enabled=y phases=1 Linecode=fuse_1_4_1_3_1_1_1_1_1_1_1_1_1_1_1_1_1_1_1_1_1_1_1_1_1_1_1_1_1_1_1

New Fuse.Fuse_fuse(r:p1rdt670-p1rdt8323)p1r_4731 monitoredobj=Line.fuse(r:p1rdt670-p1rdt8323)p1r_4731 enabled=y ratedcurrent=100.0

New Line.fuse(r:p1rdt2813-p1rdt8323)p1r_4732 Units=km Length=0.001 bus1=p1rdt8323.3 bus2=p1rdt2813-p1rdt8323x.3 switch=n enabled=y phases=1 Linecode=fuse_1_4_1_3_1_1_1_1_1_1_1_1_1_1_1_1_1_1_1_1_1_1_1_1_1_1_1_1_1_1_1

New Fuse.Fuse_fuse(r:p1rdt2813-p1rdt8323)p1r_4732 monitoredobj=Line.fuse(r:p1rdt2813-p1rdt8323)p1r_4732 enabled=y ratedcurrent=100.0

New Line.fuse(r:p1rdt5925-p1rdt8323)p1r_4733 Units=km Length=0.001 bus1=p1rdt8323.1 bus2=p1rdt5925-p1rdt8323x.1 switch=n enabled=y phases=1 Linecode=fuse_1_4_1_3_1_1_1_1_1_1_1_1_1_1_1_1_1_1_1_1_1_1_1_1_1_1_1_1_1_1_1

New Fuse.Fuse_fuse(r:p1rdt5925-p1rdt8323)p1r_4733 monitoredobj=Line.fuse(r:p1rdt5925-p1rdt8323)p1r_4733 enabled=y ratedcurrent=100.0

New Line.fuse(r:p1rdt3316-p1rdt8324)p1r_4734 Units=km Length=0.001 bus1=p1rdt8324.3 bus2=p1rdt3316-p1rdt8324x.3 switch=n enabled=y phases=1 Linecode=fuse_1_1_1_1_1_1_1_1_1_1_1_1_1_1_1_1_1_1_1_1_1_1_1_1_1_1_1_1_1

New Fuse.Fuse_fuse(r:p1rdt3316-p1rdt8324)p1r_4734 monitoredobj=Line.fuse(r:p1rdt3316-p1rdt8324)p1r_4734 enabled=y ratedcurrent=100.0

New Line.l(r:p1rdt2615-p1rdt3601)_disconnect Units=km Length=0.001 bus1=p1rdt2615-p1rdt3601x_b1_1.3 bus2=p1rdt2615-p1rdt3601x_b2_1.3 switch=y enabled=y phases=1 Linecode=1P_OH_AL_ACSR_#2_Sparrow_12_47_0_1_1_1_1_1_1_1_1_1_1_1_1_1_1_1_1_1_1_1_1_1_1_1_1_1_1_1_1_1

New Line.l(r:p1rdt2615-p1rdt3601)_cont Units=km Length=0.8150589 bus1=p1rdt2615-p1rdt3601x_b2_1.3 bus2=p1rdt2615.3 switch=n enabled=y phases=1 Linecode=1P_OH_AL_ACSR_#2_Sparrow_12_47_0_1_1_1_1_1_1_1_1_1_1_1_1_1_1_1_1_1_1_1_1_1_1_1_1_1_1_1_1_1

New Line.l(r:p1rdt6067-p1rdt7127)_disconnect Units=km Length=0.001 bus1=p1rdt6067_b1_1.1.2.3 bus2=p1rdt6067_b2_1.1.2.3 switch=y enabled=y phases=3 Linecode=3P_OH_AL_ACSR_4/0_Penguin_12_47_0_3_3_3_3_3_3_3_3_3_3_3_3_3_3_3_3_3_3_3_3_3_3_3_3_3_3_3_3_3

New Line.l(r:p1rdt6067-p1rdt7127)_cont Units=km Length=0.7680294 bus1=p1rdt6067_b2_1.1.2.3 bus2=p1rdt7127.1.2.3 switch=n enabled=y phases=3 Linecode=3P_OH_AL_ACSR_4/0_Penguin_12_47_0_3_3_3_3_3_3_3_3_3_3_3_3_3_3_3_3_3_3_3_3_3_3_3_3_3_3_3_3_3
