New RegControl.reg_creguladortension(r:p1rdt5658-p1rdt7010) transformer=trans_reg_creguladortension(r:p1rdt5658-p1rdt7010) winding=2 ptratio=59.99631547328862 band=2.4 vreg = 123.60000000000001

New RegControl.reg_creguladortension(r:p1rdt5658-p1rdt8183) transformer=trans_reg_creguladortension(r:p1rdt5658-p1rdt8183) winding=2 ptratio=59.99631547328862 band=2.4 vreg = 123.60000000000001
