New Capacitor.p1uc2 Bus1=p1udt8413 phases=3 Kv=12.47 conn=Wye Kvar=450.0

New CapControl.p1uc2 Capacitor=p1uc2 Element=Line.padswitch(r:p1udt8399-p1udt8413)p1u_233456 Terminal=1 delay=100.0 Type=voltage Vmin=120.5 Vmax=125.0 Ptratio=59.99631547328862 Ctratio=100.0

New Capacitor.p1uc3 Bus1=p1udt10725 phases=3 Kv=12.47 conn=Wye Kvar=450.0

New CapControl.p1uc3 Capacitor=p1uc3 Element=Line.l(r:p1udt10725-p1udt21925) Terminal=1 delay=100.0 Type=voltage Vmin=120.5 Vmax=125.0 Ptratio=59.99631547328862 Ctratio=100.0
