New Capacitor.p1uc68 Bus1=p1udt21988 phases=3 Kv=12.47 conn=Wye Kvar=300.0

New CapControl.p1uc68 Capacitor=p1uc68 Element=Line.padswitch(r:p1udt19957-p1udt21988)p1u_247410 Terminal=1 delay=100.0 Type=voltage Vmin=120.5 Vmax=125.0 Ptratio=59.99631547328862 Ctratio=100.0
