New Capacitor.p1uc65 Bus1=p1umv13 phases=3 Kv=12.47 conn=Wye Kvar=450.0

New CapControl.p1uc65 Capacitor=p1uc65 Element=Line.l(r:p1udt18942-p1umv13) Terminal=1 delay=100.0 Type=voltage Vmin=120.5 Vmax=125.0 Ptratio=59.99631547328862 Ctratio=100.0

New Capacitor.p1uc70 Bus1=p1udt20016 phases=3 Kv=12.47 conn=Wye Kvar=300.0

New CapControl.p1uc70 Capacitor=p1uc70 Element=Line.l(r:p1udt17566-p1udt20016) Terminal=1 delay=100.0 Type=voltage Vmin=120.5 Vmax=125.0 Ptratio=59.99631547328862 Ctratio=100.0
