New Line.l(r:p1udt720lv-p1ulv5139) Units=km Length=0.0243022 bus1=p1udt720lv.1.2 bus2=p1ulv5139.1.2 switch=n enabled=y phases=2 Linecode=1P_OH_AL_2/0_Rucina_0_416_0_2_2_2_2

New Line.l(r:p1udm2630-p1ulv730) Units=km Length=0.0388429 bus1=p1udm2630.1.2 bus2=p1ulv730.1.2 switch=n enabled=y phases=2 Linecode=1P_OH_AL_4/0_Zuzara_0_416_0_2_2_2_2

New Line.l(r:p1udm2630-p1udt720lv) Units=km Length=0.0190455 bus1=p1udt720lv.1.2 bus2=p1udm2630.1.2 switch=n enabled=y phases=2 Linecode=1P_OH_AL_2/0_Rucina_0_416_0_2_2_2_2

New Line.l(r:p1udt3766lv-p1ulv4096) Units=km Length=0.0102273 bus1=p1udt3766lv.1.2 bus2=p1ulv4096.1.2 switch=n enabled=y phases=2 Linecode=1P_OH_AL_2/0_Rucina_0_416_0_2_2_2_2

New Line.l(r:p1udt6286lv-p1ulv7281) Units=km Length=0.0070597 bus1=p1udt6286lv.1.2 bus2=p1ulv7281.1.2 switch=n enabled=y phases=2 Linecode=1P_OH_AL_2/0_Rucina_0_416_0_2_2_2_2

New Line.l(r:p1udt7166lv-p1ulv8505) Units=km Length=0.005308 bus1=p1udt7166lv.1.2 bus2=p1ulv8505.1.2 switch=n enabled=y phases=2 Linecode=1P_OH_AL_2/0_Rucina_0_416_0_2_2_2_2

New Line.l(r:p1udt9574lv-p1ulv12256) Units=km Length=0.00984992 bus1=p1udt9574lv.1.2 bus2=p1ulv12256.1.2 switch=n enabled=y phases=2 Linecode=1P_OH_AL_2/0_Rucina_0_416_0_2_2_2_2

New Line.l(r:p1udt10880lv-p1ulv14496) Units=km Length=0.0117749 bus1=p1udt10880lv.1.2 bus2=p1ulv14496.1.2 switch=n enabled=y phases=2 Linecode=1P_OH_AL_2/0_Rucina_0_416_0_2_2_2_2

New Line.l(r:p1udt11354lv-p1ulv15340) Units=km Length=0.001 bus1=p1udt11354lv.1.2 bus2=p1ulv15340.1.2 switch=n enabled=y phases=2 Linecode=1P_OH_AL_4_Periwinkle_0_416_0_2_2_2_2

New Line.l(r:p1udt15667lv-p1ulv24754) Units=km Length=0.0345454 bus1=p1udt15667lv.1.2 bus2=p1ulv24754.1.2 switch=n enabled=y phases=2 Linecode=1P_OH_AL_4/0_Zuzara_0_416_0_2_2_2_2

New Line.l(r:p1udt17143lv-p1ulv28771) Units=km Length=0.00908653 bus1=p1udt17143lv.1.2 bus2=p1ulv28771.1.2 switch=n enabled=y phases=2 Linecode=1P_OH_AL_2/0_Rucina_0_416_0_2_2_2_2

New Line.l(r:p1udt17566lv-p1ulv30010) Units=km Length=0.0151683 bus1=p1udt17566lv.1.2 bus2=p1ulv30010.1.2 switch=n enabled=y phases=2 Linecode=1P_UG_AL_1/0_Brenau_0_416_0_2_2_2_2

New Line.l(r:p1udm55507-p1ulv34912) Units=km Length=0.00734302 bus1=p1udm55507.1.2 bus2=p1ulv34912.1.2 switch=n enabled=y phases=2 Linecode=1P_OH_AL_2/0_Rucina_0_416_0_2_2_2_2

New Line.l(r:p1udm55507-p1udt19066lv) Units=km Length=0.0297156 bus1=p1udt19066lv.1.2 bus2=p1udm55507.1.2 switch=n enabled=y phases=2 Linecode=1P_OH_AL_4/0_Zuzara_0_416_0_2_2_2_2

New Line.l(r:p1udm55508-p1ulv38053) Units=km Length=0.0105339 bus1=p1udm55508.1.2 bus2=p1ulv38053.1.2 switch=n enabled=y phases=2 Linecode=1P_OH_AL_2/0_Rucina_0_416_0_2_2_2_2

New Line.l(r:p1udm55508-p1udt19066lv) Units=km Length=0.0448151 bus1=p1udt19066lv.1.2 bus2=p1udm55508.1.2 switch=n enabled=y phases=2 Linecode=1P_OH_AL_4/0_Zuzara_0_416_0_2_2_2_2

New Line.l(r:p1udt19612lv-p1ulv36795) Units=km Length=0.0150989 bus1=p1udt19612lv.1.2 bus2=p1ulv36795.1.2 switch=n enabled=y phases=2 Linecode=1P_OH_AL_2/0_Rucina_0_416_0_2_2_2_2

New Line.l(r:p1udt22980lv-p1ulv51854) Units=km Length=0.027033400000000003 bus1=p1udt22980lv.1.2 bus2=p1ulv51854.1.2 switch=n enabled=y phases=2 Linecode=1P_OH_AL_4/0_Zuzara_0_416_0_2_2_2_2

New Line.l(r:p1udt23016lv-p1ulv52062) Units=km Length=0.0107153 bus1=p1udt23016lv.1.2 bus2=p1ulv52062.1.2 switch=n enabled=y phases=2 Linecode=1P_OH_AL_2/0_Rucina_0_416_0_2_2_2_2

New Line.l(r:p1udt24640lv-p1ulv61060) Units=km Length=0.0175046 bus1=p1udt24640lv.1.2 bus2=p1ulv61060.1.2 switch=n enabled=y phases=2 Linecode=1P_OH_AL_2/0_Rucina_0_416_0_2_2_2_2

New Line.l(r:p1udt17497-p1udt720) Units=km Length=0.157421 bus1=p1udt17497-p1udt720x.1 bus2=p1udt720.1 switch=n enabled=y phases=1 Linecode=1P_OH_AL_ACSR_#2_Sparrow_12_47_0_1_1_1_1

New Line.l(r:p1udt22907-p1udt23016) Units=km Length=0.0671615 bus1=p1udt22907-p1udt23016x.1 bus2=p1udt23016.1 switch=n enabled=y phases=1 Linecode=1P_OH_AL_ACSR_#2_Sparrow_12_47_0_1_1_1_1

New Line.l(r:p1udt3766-p1udt8398) Units=km Length=0.0182039 bus1=p1udt3766-p1udt8398x.2 bus2=p1udt3766.2 switch=n enabled=y phases=1 Linecode=1P_OH_AL_ACSR_#2_Sparrow_12_47_0_1_1_1_1

New Line.l(r:p1udt12690-p1udt9574) Units=km Length=0.0629016 bus1=p1udt12690-p1udt9574x.3 bus2=p1udt9574.3 switch=n enabled=y phases=1 Linecode=1P_OH_AL_ACSR_#2_Sparrow_12_47_0_1_1_1_1

New Line.l(r:p1udt19432-p1udt24640) Units=km Length=0.0357001 bus1=p1udt19432-p1udt24640x.2 bus2=p1udt24640.2 switch=n enabled=y phases=1 Linecode=1P_OH_AL_ACSR_#2_Sparrow_12_47_0_1_1_1_1

New Line.l(r:p1udt15667-p1udt22980) Units=km Length=0.0853727 bus1=p1udt15667-p1udt22980x.3 bus2=p1udt15667.3 switch=n enabled=y phases=1 Linecode=1P_OH_AL_ACSR_#2_Sparrow_12_47_0_1_1_1_1

New Line.l(r:p1udt17566-p1udt18942) Units=km Length=0.31432 bus1=p1udt17566.1.2.3 bus2=p1udt18942.1.2.3 switch=n enabled=y phases=3 Linecode=3P_OH_AL_ACSR_4/0_Penguin_12_47_0_3_3_3_3

New Line.l(r:p1udt19847-p1udt22639) Units=km Length=0.054739300000000005 bus1=p1udt22639.1.2.3 bus2=p1udt19847.1.2.3 switch=n enabled=y phases=3 Linecode=3P_OH_AL_ACSR_4/0_Penguin_12_47_0_3_3_3_3

New Line.l(r:p1udt22639-p1udt7166) Units=km Length=0.0194879 bus1=p1udt7166.1.2.3 bus2=p1udt22639.1.2.3 switch=n enabled=y phases=3 Linecode=3P_OH_AL_ACSR_4/0_Penguin_12_47_0_3_3_3_3

New Line.l(r:p1udt20016-p1udt7166) Units=km Length=0.461749 bus1=p1udt20016.1.2.3 bus2=p1udt7166.1.2.3 switch=n enabled=y phases=3 Linecode=3P_OH_AL_ACSR_4/0_Penguin_12_47_0_3_3_3_3

New Line.l(r:p1udt17566-p1udt20016) Units=km Length=0.35525900000000005 bus1=p1udt17566.1.2.3 bus2=p1udt20016.1.2.3 switch=n enabled=y phases=3 Linecode=3P_OH_AL_ACSR_4/0_Penguin_12_47_0_3_3_3_3

New Line.l(r:p1udt17566-p1umv40) Units=km Length=0.333076 bus1=p1umv40.1.2.3 bus2=p1udt17566.1.2.3 switch=n enabled=y phases=3 Linecode=3P_OH_AL_ACSR_4/0_Penguin_12_47_0_3_3_3_3

New Line.l(r:p1udt19848-p1udt20645) Units=km Length=0.124493 bus1=p1udt19848.1.2.3 bus2=p1udt20645.1.2.3 switch=n enabled=y phases=3 Linecode=3P_OH_AL_ACSR_4/0_Penguin_12_47_0_3_3_3_3

New Line.l(r:p1udt19848-p1umv40) Units=km Length=0.714466 bus1=p1umv40.1.2.3 bus2=p1udt19848.1.2.3 switch=n enabled=y phases=3 Linecode=3P_OH_AL_ACSR_4/0_Penguin_12_47_0_3_3_3_3

New Line.l(r:p1udt12259-p1umv40) Units=km Length=0.522126 bus1=p1udt12259.1.2.3 bus2=p1umv40.1.2.3 switch=n enabled=y phases=3 Linecode=3P_OH_AL_ACSR_4/0_Penguin_12_47_0_3_3_3_3

New Line.l(r:p1udt12258-p1udt12259) Units=km Length=0.238988 bus1=p1udt12258.1.2.3 bus2=p1udt12259.1.2.3 switch=n enabled=y phases=3 Linecode=3P_OH_AL_ACSR_4/0_Penguin_12_47_0_3_3_3_3

New Line.l(r:p1udt11921-p1udt12258) Units=km Length=0.590924 bus1=p1udt11921.1.2.3 bus2=p1udt12258.1.2.3 switch=n enabled=y phases=3 Linecode=3P_OH_AL_ACSR_4/0_Penguin_12_47_0_3_3_3_3

New Line.l(r:p1udt11921-p1udt23437) Units=km Length=0.0270736 bus1=p1udt23437.1.2.3 bus2=p1udt11921.1.2.3 switch=n enabled=y phases=3 Linecode=3P_OH_AL_ACSR_4/0_Penguin_12_47_0_3_3_3_3

New Line.l(r:p1udt17497-p1udt23437) Units=km Length=0.0965278 bus1=p1udt17497.1.2.3 bus2=p1udt23437.1.2.3 switch=n enabled=y phases=3 Linecode=3P_OH_AL_ACSR_4/0_Penguin_12_47_0_3_3_3_3

New Line.l(r:p1udt17497-p1udt4611) Units=km Length=0.0890486 bus1=p1udt4611.1.2.3 bus2=p1udt17497.1.2.3 switch=n enabled=y phases=3 Linecode=3P_OH_AL_ACSR_4/0_Penguin_12_47_0_3_3_3_3

New Line.l(r:p1udt22980-p1udt4611) Units=km Length=0.111444 bus1=p1udt22980.1.2.3 bus2=p1udt4611.1.2.3 switch=n enabled=y phases=3 Linecode=3P_OH_AL_ACSR_4/0_Penguin_12_47_0_3_3_3_3

New Line.l(r:p1udt22980-p1uhs10_1247) Units=km Length=0.267794 bus1=p1udt22980-p1uhs10_1247x.1.2.3 bus2=p1udt22980.1.2.3 switch=n enabled=y phases=3 Linecode=3P_OH_AL_ACSR_4/0_Penguin_12_47_0_3_3_3_3

New Line.l(r:p1udt4611lv-p1ulv5138) Units=km Length=0.0125323 bus1=p1udt4611lv.1.2.3 bus2=p1ulv5138.1.2.3 switch=n enabled=y phases=3 Linecode=3P_UG_AL_750kcmil_25_0_416_0_3_3_3_3

New Line.l(r:p1udt17497lv-p1ulv29809) Units=km Length=0.0123428 bus1=p1udt17497lv.1.2.3 bus2=p1ulv29809.1.2.3 switch=n enabled=y phases=3 Linecode=3P_UG_AL_750kcmil_25_0_416_0_3_3_3_3

New Line.l(r:p1udt23437lv-p1ulv54412) Units=km Length=0.00833495 bus1=p1udt23437lv.1.2.3 bus2=p1ulv54412.1.2.3 switch=n enabled=y phases=3 Linecode=3P_UG_AL_750kcmil_25_0_416_0_3_3_3_3

New Line.l(r:p1udt11921lv-p1ulv16419) Units=km Length=0.0128026 bus1=p1udt11921lv.1.2.3 bus2=p1ulv16419.1.2.3 switch=n enabled=y phases=3 Linecode=3P_UG_AL_750kcmil_25_0_416_0_3_3_3_3

New Line.l(r:p1udt12258lv-p1ulv17045) Units=km Length=0.0131086 bus1=p1udt12258lv.1.2.3 bus2=p1ulv17045.1.2.3 switch=n enabled=y phases=3 Linecode=3P_UG_AL_350kcmil_15_0_416_0_3_3_3_3

New Line.l(r:p1udt12259lv-p1ulv17046) Units=km Length=0.0157003 bus1=p1udt12259lv.1.2.3 bus2=p1ulv17046.1.2.3 switch=n enabled=y phases=3 Linecode=3P_UG_AL_750kcmil_25_0_416_0_3_3_3_3

New Line.l(r:p1udt18942lv-p1ulv34505) Units=km Length=0.0169484 bus1=p1udt18942lv.1.2.3 bus2=p1ulv34505.1.2.3 switch=n enabled=y phases=3 Linecode=3P_UG_AL_750kcmil_25_0_416_0_3_3_3_3

New Line.l(r:p1udt18942-p1umv13) Units=km Length=0.254977 bus1=p1udt18942.1.2.3 bus2=p1umv13.1.2.3 switch=n enabled=y phases=3 Linecode=3P_OH_AL_ACSR_4/0_Penguin_12_47_0_3_3_3_3

New Line.l(r:p1udt21762lv-p1ulv45868) Units=km Length=0.00926409 bus1=p1udt21762lv.1.2.3 bus2=p1ulv45868.1.2.3 switch=n enabled=y phases=3 Linecode=3P_UG_AL_750kcmil_25_0_416_0_3_3_3_3

New Line.l(r:p1udt24978lv-p1ulv63198) Units=km Length=0.0217799 bus1=p1udt24978lv.1.2.3 bus2=p1ulv63198.1.2.3 switch=n enabled=y phases=3 Linecode=3P_UG_AL_750kcmil_25_0_416_0_3_3_3_3

New Line.l(r:p1udt21762-p1udt24978) Units=km Length=0.252308 bus1=p1udt21762.1.2.3 bus2=p1udt24978.1.2.3 switch=n enabled=y phases=3 Linecode=3P_OH_AL_ACSR_4/0_Penguin_12_47_0_3_3_3_3

New Line.l(r:p1udt18942-p1udt21762) Units=km Length=0.0801328 bus1=p1udt18942.1.2.3 bus2=p1udt21762.1.2.3 switch=n enabled=y phases=3 Linecode=3P_OH_AL_ACSR_4/0_Penguin_12_47_0_3_3_3_3

New Line.l(r:p1udt20016lv-p1ulv38247) Units=km Length=0.0107734 bus1=p1udt20016lv.1.2.3 bus2=p1ulv38247.1.2.3 switch=n enabled=y phases=3 Linecode=3P_UG_AL_750kcmil_25_0_416_0_3_3_3_3

New Line.l(r:p1udt22639lv-p1ulv50156) Units=km Length=0.01227 bus1=p1udt22639lv.1.2.3 bus2=p1ulv50156.1.2.3 switch=n enabled=y phases=3 Linecode=3P_UG_AL_350kcmil_15_0_416_0_3_3_3_3

New Line.l(r:p1udt19847lv-p1ulv37631) Units=km Length=0.0116431 bus1=p1udt19847lv.1.2.3 bus2=p1ulv37631.1.2.3 switch=n enabled=y phases=3 Linecode=3P_UG_AL_350kcmil_15_0_416_0_3_3_3_3

New Line.l(r:p1udt22521lv-p1ulv49553) Units=km Length=0.00824103 bus1=p1udt22521lv.1.2.3 bus2=p1ulv49553.1.2.3 switch=n enabled=y phases=3 Linecode=3P_UG_AL_350kcmil_15_0_416_0_3_3_3_3

New Line.l(r:p1udt12689lv-p1ulv17911) Units=km Length=0.017887 bus1=p1udt12689lv.1.2.3 bus2=p1ulv17911.1.2.3 switch=n enabled=y phases=3 Linecode=3P_UG_AL_350kcmil_15_0_416_0_3_3_3_3

New Line.l(r:p1udt9573lv-p1ulv12255) Units=km Length=0.00793453 bus1=p1udt9573lv.1.2.3 bus2=p1ulv12255.1.2.3 switch=n enabled=y phases=3 Linecode=3P_UG_AL_350kcmil_15_0_416_0_3_3_3_3

New Line.l(r:p1udt24569lv-p1ulv60662) Units=km Length=0.00974306 bus1=p1udt24569lv.1.2.3 bus2=p1ulv60662.1.2.3 switch=n enabled=y phases=3 Linecode=3P_UG_AL_350kcmil_15_0_416_0_3_3_3_3

New Line.l(r:p1udt24569-p1udt9573) Units=km Length=0.0353633 bus1=p1udt9573.1.2.3 bus2=p1udt24569.1.2.3 switch=n enabled=y phases=3 Linecode=3P_OH_AL_ACSR_4/0_Penguin_12_47_0_3_3_3_3

New Line.l(r:p1udt6286-p1udt9573) Units=km Length=0.0983488 bus1=p1udt6286.1.2.3 bus2=p1udt9573.1.2.3 switch=n enabled=y phases=3 Linecode=3P_OH_AL_ACSR_4/0_Penguin_12_47_0_3_3_3_3

New Line.l(r:p1udt25267lv-p1ulv65089) Units=km Length=0.00456951 bus1=p1udt25267lv.1.2.3 bus2=p1ulv65089.1.2.3 switch=n enabled=y phases=3 Linecode=3P_UG_AL_350kcmil_15_0_416_0_3_3_3_3

New Line.l(r:p1udt14728lv-p1ulv22373) Units=km Length=0.0107046 bus1=p1udt14728lv.1.2.3 bus2=p1ulv22373.1.2.3 switch=n enabled=y phases=3 Linecode=3P_UG_AL_350kcmil_15_0_416_0_3_3_3_3

New Line.l(r:p1udt14728lv-p1ulv58230) Units=km Length=0.013996000000000001 bus1=p1udt14728lv.1.2.3 bus2=p1ulv58230.1.2.3 switch=n enabled=y phases=3 Linecode=3P_UG_AL_350kcmil_15_0_416_0_3_3_3_3

New Line.l(r:p1udm61978-p1ulv54004) Units=km Length=0.00699546 bus1=p1udm61978.1.2.3 bus2=p1ulv54004.1.2.3 switch=n enabled=y phases=3 Linecode=3P_UG_AL_750kcmil_25_0_416_0_3_3_3_3

New Line.l(r:p1udm61978-p1udt23367lv) Units=km Length=0.0383125 bus1=p1udt23367lv.1.2.3 bus2=p1udm61978.1.2.3 switch=n enabled=y phases=3 Linecode=3P_UG_AL_750kcmil_25_0_416_0_3_3_3_3

New Line.l(r:p1udm61979-p1ulv58229) Units=km Length=0.0125798 bus1=p1udm61979.1.2.3 bus2=p1ulv58229.1.2.3 switch=n enabled=y phases=3 Linecode=3P_UG_AL_350kcmil_15_0_416_0_3_3_3_3

New Line.l(r:p1udm61979-p1udt23367lv) Units=km Length=0.0358799 bus1=p1udt23367lv.1.2.3 bus2=p1udm61979.1.2.3 switch=n enabled=y phases=3 Linecode=3P_UG_AL_350kcmil_15_0_416_0_3_3_3_3

New Line.l(r:p1udt14728-p1udt23367) Units=km Length=0.189264 bus1=p1udt14728.1.2.3 bus2=p1udt23367.1.2.3 switch=n enabled=y phases=3 Linecode=3P_OH_AL_ACSR_4/0_Penguin_12_47_0_3_3_3_3

New Line.l(r:p1udt14728-p1udt25267) Units=km Length=0.0500783 bus1=p1udt25267.1.2.3 bus2=p1udt14728.1.2.3 switch=n enabled=y phases=3 Linecode=3P_OH_AL_ACSR_4/0_Penguin_12_47_0_3_3_3_3

New Line.l(r:p1udt25267-p1udt6286) Units=km Length=0.0493608 bus1=p1udt6286.1.2.3 bus2=p1udt25267.1.2.3 switch=n enabled=y phases=3 Linecode=3P_OH_AL_ACSR_4/0_Penguin_12_47_0_3_3_3_3

New Line.l(r:p1udt12689-p1udt6286) Units=km Length=0.0317075 bus1=p1udt12689.1.2.3 bus2=p1udt6286.1.2.3 switch=n enabled=y phases=3 Linecode=3P_OH_AL_ACSR_4/0_Penguin_12_47_0_3_3_3_3

New Line.l(r:p1udt12689-p1udt22521) Units=km Length=0.0252058 bus1=p1udt22521.1.2.3 bus2=p1udt12689.1.2.3 switch=n enabled=y phases=3 Linecode=3P_OH_AL_ACSR_4/0_Penguin_12_47_0_3_3_3_3

New Line.l(r:p1udt21616lv-p1ulv45217) Units=km Length=0.010006900000000003 bus1=p1udt21616lv.1.2.3 bus2=p1ulv45217.1.2.3 switch=n enabled=y phases=3 Linecode=3P_UG_AL_350kcmil_15_0_416_0_3_3_3_3

New Line.l(r:p1udt18557lv-p1ulv33227) Units=km Length=0.00952347 bus1=p1udt18557lv.1.2.3 bus2=p1ulv33227.1.2.3 switch=n enabled=y phases=3 Linecode=3P_UG_AL_350kcmil_15_0_416_0_3_3_3_3

New Line.l(r:p1udt18557-p1udt21616) Units=km Length=0.0575515 bus1=p1udt21616.1.2.3 bus2=p1udt18557.1.2.3 switch=n enabled=y phases=3 Linecode=3P_OH_AL_ACSR_4/0_Penguin_12_47_0_3_3_3_3

New Line.l(r:p1udt21616-p1udt22521) Units=km Length=0.0343951 bus1=p1udt22521.1.2.3 bus2=p1udt21616.1.2.3 switch=n enabled=y phases=3 Linecode=3P_OH_AL_ACSR_4/0_Penguin_12_47_0_3_3_3_3

New Line.l(r:p1udt19847-p1udt22521) Units=km Length=0.0954237 bus1=p1udt19847.1.2.3 bus2=p1udt22521.1.2.3 switch=n enabled=y phases=3 Linecode=3P_OH_AL_ACSR_4/0_Penguin_12_47_0_3_3_3_3

New Line.l(r:p1udt22907lv-p1ulv51412) Units=km Length=0.00809777 bus1=p1udt22907lv.1.2.3 bus2=p1ulv51412.1.2.3 switch=n enabled=y phases=3 Linecode=3P_UG_AL_350kcmil_15_0_416_0_3_3_3_3

New Line.l(r:p1udt19847-p1udt22907) Units=km Length=0.100686 bus1=p1udt19847.1.2.3 bus2=p1udt22907.1.2.3 switch=n enabled=y phases=3 Linecode=3P_OH_AL_ACSR_4/0_Penguin_12_47_0_3_3_3_3

New Line.l(r:p1udt23713lv-p1ulv55840) Units=km Length=0.00832866 bus1=p1udt23713lv.1.2.3 bus2=p1ulv55840.1.2.3 switch=n enabled=y phases=3 Linecode=3P_UG_AL_350kcmil_15_0_416_0_3_3_3_3

New Line.l(r:p1udt22639-p1udt23713) Units=km Length=0.0592449 bus1=p1udt22639.1.2.3 bus2=p1udt23713.1.2.3 switch=n enabled=y phases=3 Linecode=3P_OH_AL_ACSR_4/0_Penguin_12_47_0_3_3_3_3

New Line.l(r:p1udt24684lv-p1ulv61296) Units=km Length=0.013133 bus1=p1udt24684lv.1.2.3 bus2=p1ulv61296.1.2.3 switch=n enabled=y phases=3 Linecode=3P_UG_AL_350kcmil_15_0_416_0_3_3_3_3

New Line.l(r:p1udt18748lv-p1ulv33870) Units=km Length=0.007480430000000001 bus1=p1udt18748lv.1.2.3 bus2=p1ulv33870.1.2.3 switch=n enabled=y phases=3 Linecode=3P_UG_AL_350kcmil_15_0_416_0_3_3_3_3

New Line.l(r:p1udt18748-p1udt24684) Units=km Length=0.0286025 bus1=p1udt24684.1.2.3 bus2=p1udt18748.1.2.3 switch=n enabled=y phases=3 Linecode=3P_OH_AL_ACSR_4/0_Penguin_12_47_0_3_3_3_3

New Line.l(r:p1udt24684-p1udt7166) Units=km Length=0.0929125 bus1=p1udt7166.1.2.3 bus2=p1udt24684.1.2.3 switch=n enabled=y phases=3 Linecode=3P_OH_AL_ACSR_4/0_Penguin_12_47_0_3_3_3_3

New Line.l(r:p1udt19848lv-p1ulv37632) Units=km Length=0.0122118 bus1=p1udt19848lv.1.2.3 bus2=p1ulv37632.1.2.3 switch=n enabled=y phases=3 Linecode=3P_UG_AL_350kcmil_15_0_416_0_3_3_3_3

New Line.l(r:p1udt20645lv-p1ulv40802) Units=km Length=0.0158223 bus1=p1udt20645lv.1.2.3 bus2=p1ulv40802.1.2.3 switch=n enabled=y phases=3 Linecode=3P_UG_AL_350kcmil_15_0_416_0_3_3_3_3

New Line.l(r:p1udt19499lv-p1ulv36418) Units=km Length=0.00670168 bus1=p1udt19499lv.1.2.3 bus2=p1ulv36418.1.2.3 switch=n enabled=y phases=3 Linecode=3P_UG_AL_350kcmil_15_0_416_0_3_3_3_3

New Line.l(r:p1udt8397lv-p1ulv10364) Units=km Length=0.0175455 bus1=p1udt8397lv.1.2.3 bus2=p1ulv10364.1.2.3 switch=n enabled=y phases=3 Linecode=3P_UG_AL_350kcmil_15_0_416_0_3_3_3_3

New Line.l(r:p1udt17971lv-p1ulv31257) Units=km Length=0.00879128 bus1=p1udt17971lv.1.2.3 bus2=p1ulv31257.1.2.3 switch=n enabled=y phases=3 Linecode=3P_UG_AL_350kcmil_15_0_416_0_3_3_3_3

New Line.l(r:p1udt17567lv-p1ulv30012) Units=km Length=0.012835 bus1=p1udt17567lv.1.2.3 bus2=p1ulv30012.1.2.3 switch=n enabled=y phases=3 Linecode=3P_UG_AL_350kcmil_15_0_416_0_3_3_3_3

New Line.l(r:p1udt8794lv-p1ulv10984) Units=km Length=0.00941416 bus1=p1udt8794lv.1.2.3 bus2=p1ulv10984.1.2.3 switch=n enabled=y phases=3 Linecode=3P_UG_AL_350kcmil_15_0_416_0_3_3_3_3

New Line.l(r:p1udt17567-p1udt8794) Units=km Length=0.0333281 bus1=p1udt17567.1.2.3 bus2=p1udt8794.1.2.3 switch=n enabled=y phases=3 Linecode=3P_OH_AL_ACSR_4/0_Penguin_12_47_0_3_3_3_3

New Line.l(r:p1udt17567-p1udt17971) Units=km Length=0.0521734 bus1=p1udt17971.1.2.3 bus2=p1udt17567.1.2.3 switch=n enabled=y phases=3 Linecode=3P_OH_AL_ACSR_4/0_Penguin_12_47_0_3_3_3_3

New Line.l(r:p1udt22029lv-p1ulv47110) Units=km Length=0.017501800000000005 bus1=p1udt22029lv.1.2.3 bus2=p1ulv47110.1.2.3 switch=n enabled=y phases=3 Linecode=3P_UG_AL_350kcmil_15_0_416_0_3_3_3_3

New Line.l(r:p1udt17971-p1udt22029) Units=km Length=0.0354271 bus1=p1udt17971.1.2.3 bus2=p1udt22029.1.2.3 switch=n enabled=y phases=3 Linecode=3P_OH_AL_ACSR_4/0_Penguin_12_47_0_3_3_3_3

New Line.l(r:p1udt17971-p1udt8397) Units=km Length=0.105357 bus1=p1udt8397.1.2.3 bus2=p1udt17971.1.2.3 switch=n enabled=y phases=3 Linecode=3P_OH_AL_ACSR_4/0_Penguin_12_47_0_3_3_3_3

New Line.l(r:p1udt19499-p1udt8397) Units=km Length=0.0345113 bus1=p1udt19499.1.2.3 bus2=p1udt8397.1.2.3 switch=n enabled=y phases=3 Linecode=3P_OH_AL_ACSR_4/0_Penguin_12_47_0_3_3_3_3

New Line.l(r:p1udt19499-p1udt20645) Units=km Length=0.0476225 bus1=p1udt20645.1.2.3 bus2=p1udt19499.1.2.3 switch=n enabled=y phases=3 Linecode=3P_OH_AL_ACSR_4/0_Penguin_12_47_0_3_3_3_3

New Line.l(r:p1udt22412lv-p1ulv48974) Units=km Length=0.0137501 bus1=p1udt22412lv.1.2.3 bus2=p1ulv48974.1.2.3 switch=n enabled=y phases=3 Linecode=3P_UG_AL_350kcmil_15_0_416_0_3_3_3_3

New Line.l(r:p1udt8398lv-p1ulv10365) Units=km Length=0.0103916 bus1=p1udt8398lv.1.2.3 bus2=p1ulv10365.1.2.3 switch=n enabled=y phases=3 Linecode=3P_UG_AL_350kcmil_15_0_416_0_3_3_3_3

New Line.l(r:p1udt21617lv-p1ulv45218) Units=km Length=0.00684113 bus1=p1udt21617lv.1.2.3 bus2=p1ulv45218.1.2.3 switch=n enabled=y phases=3 Linecode=3P_UG_AL_350kcmil_15_0_416_0_3_3_3_3

New Line.l(r:p1udt21617lv-p1ulv58231) Units=km Length=0.0109946 bus1=p1udt21617lv.1.2.3 bus2=p1ulv58231.1.2.3 switch=n enabled=y phases=3 Linecode=3P_UG_AL_350kcmil_15_0_416_0_3_3_3_3

New Line.l(r:p1udt19066-p1udt21617) Units=km Length=0.027557200000000004 bus1=p1udt19066.1.2.3 bus2=p1udt21617.1.2.3 switch=n enabled=y phases=3 Linecode=3P_OH_AL_ACSR_4/0_Penguin_12_47_0_3_3_3_3

New Line.l(r:p1udt22488lv-p1ulv49344) Units=km Length=0.0185325 bus1=p1udt22488lv.1.2.3 bus2=p1ulv49344.1.2.3 switch=n enabled=y phases=3 Linecode=3P_UG_AL_350kcmil_15_0_416_0_3_3_3_3

New Line.l(r:p1udt10881lv-p1ulv14500) Units=km Length=0.00337713 bus1=p1udt10881lv.1.2.3 bus2=p1ulv14500.1.2.3 switch=n enabled=y phases=3 Linecode=3P_UG_AL_350kcmil_15_0_416_0_3_3_3_3

New Line.l(r:p1udt10881lv-p1ulv52487) Units=km Length=0.0147478 bus1=p1udt10881lv.1.2.3 bus2=p1ulv52487.1.2.3 switch=n enabled=y phases=3 Linecode=3P_UG_AL_350kcmil_15_0_416_0_3_3_3_3

New Line.l(r:p1udt10881-p1udt22488) Units=km Length=0.050482 bus1=p1udt22488.1.2.3 bus2=p1udt10881.1.2.3 switch=n enabled=y phases=3 Linecode=3P_OH_AL_ACSR_4/0_Penguin_12_47_0_3_3_3_3

New Line.l(r:p1udt19066-p1udt22488) Units=km Length=0.0456531 bus1=p1udt19066.1.2.3 bus2=p1udt22488.1.2.3 switch=n enabled=y phases=3 Linecode=3P_OH_AL_ACSR_4/0_Penguin_12_47_0_3_3_3_3

New Line.l(r:p1udt19066-p1udt8398) Units=km Length=0.0764259 bus1=p1udt8398.1.2.3 bus2=p1udt19066.1.2.3 switch=n enabled=y phases=3 Linecode=3P_OH_AL_ACSR_4/0_Penguin_12_47_0_3_3_3_3

New Line.l(r:p1udt22412-p1udt8398) Units=km Length=0.122684 bus1=p1udt22412.1.2.3 bus2=p1udt8398.1.2.3 switch=n enabled=y phases=3 Linecode=3P_OH_AL_ACSR_4/0_Penguin_12_47_0_3_3_3_3

New Line.l(r:p1udt12690lv-p1ulv17912) Units=km Length=0.00231234 bus1=p1udt12690lv.1.2.3 bus2=p1ulv17912.1.2.3 switch=n enabled=y phases=3 Linecode=3P_UG_AL_350kcmil_15_0_416_0_3_3_3_3

New Line.l(r:p1udt12690-p1udt22412) Units=km Length=0.140388 bus1=p1udt22412.1.2.3 bus2=p1udt12690.1.2.3 switch=n enabled=y phases=3 Linecode=3P_OH_AL_ACSR_4/0_Penguin_12_47_0_3_3_3_3

New Line.l(r:p1udt9929lv-p1ulv12857) Units=km Length=0.00923732 bus1=p1udt9929lv.1.2.3 bus2=p1ulv12857.1.2.3 switch=n enabled=y phases=3 Linecode=3P_UG_AL_350kcmil_15_0_416_0_3_3_3_3

New Line.l(r:p1udt14216lv-p1ulv21166) Units=km Length=0.001 bus1=p1udt14216lv.1.2.3 bus2=p1ulv21166.1.2.3 switch=n enabled=y phases=3 Linecode=3P_UG_AL_350kcmil_15_0_416_0_3_3_3_3

New Line.l(r:p1udt11354-p1udt14216) Units=km Length=0.023265 bus1=p1udt11354.1.2.3 bus2=p1udt14216.1.2.3 switch=n enabled=y phases=3 Linecode=3P_OH_AL_ACSR_4/0_Penguin_12_47_0_3_3_3_3

New Line.l(r:p1udt11354-p1udt9929) Units=km Length=0.24855600000000003 bus1=p1udt9929.1.2.3 bus2=p1udt9929_b1_1.1.2.3 switch=n enabled=y phases=3 Linecode=3P_OH_AL_ACSR_4/0_Penguin_12_47_0_3_3_3_3

New Line.l(r:p1udt20172lv-p1ulv38917) Units=km Length=0.0168841 bus1=p1udt20172lv.1.2.3 bus2=p1ulv38917.1.2.3 switch=n enabled=y phases=3 Linecode=3P_UG_AL_350kcmil_15_0_416_0_3_3_3_3

New Line.l(r:p1udt20172-p1udt9929) Units=km Length=0.797513 bus1=p1udt9929.1.2.3 bus2=p1udt20172.1.2.3 switch=n enabled=y phases=3 Linecode=3P_OH_AL_ACSR_4/0_Penguin_12_47_0_3_3_3_3

New Line.l(r:p1udt17143-p1udt9929) Units=km Length=0.0196322 bus1=p1udt17143.1.2.3 bus2=p1udt9929.1.2.3 switch=n enabled=y phases=3 Linecode=3P_OH_AL_ACSR_4/0_Penguin_12_47_0_3_3_3_3

New Line.l(r:p1udt22522lv-p1ulv49554) Units=km Length=0.011397400000000002 bus1=p1udt22522lv.1.2.3 bus2=p1ulv49554.1.2.3 switch=n enabled=y phases=3 Linecode=3P_UG_AL_350kcmil_15_0_416_0_3_3_3_3

New Line.l(r:p1udt17143-p1udt22522) Units=km Length=0.113536 bus1=p1udt17143.1.2.3 bus2=p1udt22522.1.2.3 switch=n enabled=y phases=3 Linecode=3P_OH_AL_ACSR_4/0_Penguin_12_47_0_3_3_3_3

New Line.l(r:p1udt17143-p1udt22412) Units=km Length=0.0630751 bus1=p1udt22412.1.2.3 bus2=p1udt17143.1.2.3 switch=n enabled=y phases=3 Linecode=3P_OH_AL_ACSR_4/0_Penguin_12_47_0_3_3_3_3

New Line.l(r:p1udt20645-p1udt22412) Units=km Length=0.0324554 bus1=p1udt20645.1.2.3 bus2=p1udt22412.1.2.3 switch=n enabled=y phases=3 Linecode=3P_OH_AL_ACSR_4/0_Penguin_12_47_0_3_3_3_3

New Line.l(r:p1udt24945lv-p1ulv62967) Units=km Length=0.00845682 bus1=p1udt24945lv.1.2.3 bus2=p1ulv62967.1.2.3 switch=n enabled=y phases=3 Linecode=3P_UG_AL_750kcmil_25_0_416_0_3_3_3_3

New Line.l(r:p1udt24945-p1umv40) Units=km Length=0.284639 bus1=p1umv40.1.2.3 bus2=p1udt24945.1.2.3 switch=n enabled=y phases=3 Linecode=3P_OH_AL_ACSR_4/0_Penguin_12_47_0_3_3_3_3

New Line.l(r:p1udt24944lv-p1ulv62966) Units=km Length=0.0157141 bus1=p1udt24944lv.1.2.3 bus2=p1ulv62966.1.2.3 switch=n enabled=y phases=3 Linecode=3P_UG_AL_350kcmil_15_0_416_0_3_3_3_3

New Line.l(r:p1udt19432lv-p1ulv36200) Units=km Length=0.0127132 bus1=p1udt19432lv.1.2.3 bus2=p1ulv36200.1.2.3 switch=n enabled=y phases=3 Linecode=3P_UG_AL_350kcmil_15_0_416_0_3_3_3_3

New Line.l(r:p1udt19432-p1udt24944) Units=km Length=0.0464997 bus1=p1udt24944.1.2.3 bus2=p1udt19432.1.2.3 switch=n enabled=y phases=3 Linecode=3P_OH_AL_ACSR_4/0_Penguin_12_47_0_3_3_3_3

New Line.l(r:p1udt22600lv-p1ulv49951) Units=km Length=0.00993914 bus1=p1udt22600lv.1.2.3 bus2=p1ulv49951.1.2.3 switch=n enabled=y phases=3 Linecode=3P_UG_AL_350kcmil_15_0_416_0_3_3_3_3

New Line.l(r:p1udt24424lv-p1ulv59822) Units=km Length=0.017665 bus1=p1udt24424lv.1.2.3 bus2=p1ulv59822.1.2.3 switch=n enabled=y phases=3 Linecode=3P_UG_AL_350kcmil_15_0_416_0_3_3_3_3

New Line.l(r:p1udt22601lv-p1ulv49952) Units=km Length=0.0136814 bus1=p1udt22601lv.1.2.3 bus2=p1ulv49952.1.2.3 switch=n enabled=y phases=3 Linecode=3P_UG_AL_350kcmil_15_0_416_0_3_3_3_3

New Line.l(r:p1udt18879lv-p1ulv34279) Units=km Length=0.0114506 bus1=p1udt18879lv.1.2.3 bus2=p1ulv34279.1.2.3 switch=n enabled=y phases=3 Linecode=3P_UG_AL_350kcmil_15_0_416_0_3_3_3_3

New Line.l(r:p1udt18879-p1udt19612) Units=km Length=0.005139740000000001 bus1=p1udt19612.1.2.3 bus2=p1udt18879.1.2.3 switch=n enabled=y phases=3 Linecode=3P_OH_AL_ACSR_4/0_Penguin_12_47_0_3_3_3_3

New Line.l(r:p1udt19612-p1udt22601) Units=km Length=0.0318355 bus1=p1udt22601.1.2.3 bus2=p1udt19612.1.2.3 switch=n enabled=y phases=3 Linecode=3P_OH_AL_ACSR_4/0_Penguin_12_47_0_3_3_3_3

New Line.l(r:p1udt22601-p1udt24424) Units=km Length=0.0759446 bus1=p1udt24424.1.2.3 bus2=p1udt22601.1.2.3 switch=n enabled=y phases=3 Linecode=3P_OH_AL_ACSR_4/0_Penguin_12_47_0_3_3_3_3

New Line.l(r:p1udt22600-p1udt24424) Units=km Length=0.0815335 bus1=p1udt22600.1.2.3 bus2=p1udt24424.1.2.3 switch=n enabled=y phases=3 Linecode=3P_OH_AL_ACSR_4/0_Penguin_12_47_0_3_3_3_3

New Line.l(r:p1udt22600-p1udt24944) Units=km Length=0.0611922 bus1=p1udt24944.1.2.3 bus2=p1udt22600.1.2.3 switch=n enabled=y phases=3 Linecode=3P_OH_AL_ACSR_4/0_Penguin_12_47_0_3_3_3_3

New Line.l(r:p1udt12258-p1udt24944) Units=km Length=0.0473182 bus1=p1udt12258.1.2.3 bus2=p1udt24944.1.2.3 switch=n enabled=y phases=3 Linecode=3P_OH_AL_ACSR_4/0_Penguin_12_47_0_3_3_3_3

New Line.l(r:p1udt25231lv-p1ulv64859) Units=km Length=0.011935900000000001 bus1=p1udt25231lv.1.2.3 bus2=p1ulv64859.1.2.3 switch=n enabled=y phases=3 Linecode=3P_UG_AL_4/0_15_0_416_0_3_3_3_3

New Line.l(r:p1udt13540lv-p1ulv19648) Units=km Length=0.0152602 bus1=p1udt13540lv.1.2.3 bus2=p1ulv19648.1.2.3 switch=n enabled=y phases=3 Linecode=3P_UG_AL_350kcmil_15_0_416_0_3_3_3_3

New Line.l(r:p1udt14903lv-p1ulv22809) Units=km Length=0.0127526 bus1=p1udt14903lv.1.2.3 bus2=p1ulv22809.1.2.3 switch=n enabled=y phases=3 Linecode=3P_UG_AL_350kcmil_15_0_416_0_3_3_3_3

New Line.l(r:p1udm46636-p1ulv55628) Units=km Length=0.0117271 bus1=p1udm46636.1.2.3 bus2=p1ulv55628.1.2.3 switch=n enabled=y phases=3 Linecode=3P_UG_AL_350kcmil_15_0_416_0_3_3_3_3

New Line.l(r:p1udm46636-p1udt14903lv) Units=km Length=0.0172769 bus1=p1udt14903lv.1.2.3 bus2=p1udm46636.1.2.3 switch=n enabled=y phases=3 Linecode=3P_UG_AL_350kcmil_15_0_416_0_3_3_3_3

New Line.l(r:p1udt19960lv-p1ulv38048) Units=km Length=0.00873453 bus1=p1udt19960lv.1.2.3 bus2=p1ulv38048.1.2.3 switch=n enabled=y phases=3 Linecode=3P_UG_AL_350kcmil_15_0_416_0_3_3_3_3

New Line.l(r:p1udt25050lv-p1ulv63593) Units=km Length=0.00997729 bus1=p1udt25050lv.1.2.3 bus2=p1ulv63593.1.2.3 switch=n enabled=y phases=3 Linecode=3P_UG_AL_350kcmil_15_0_416_0_3_3_3_3

New Line.l(r:p1udt14643lv-p1ulv22161) Units=km Length=0.0128654 bus1=p1udt14643lv.1.2.3 bus2=p1ulv22161.1.2.3 switch=n enabled=y phases=3 Linecode=3P_UG_AL_350kcmil_15_0_416_0_3_3_3_3

New Line.l(r:p1udt14904lv-p1ulv22810) Units=km Length=0.0195973 bus1=p1udt14904lv.1.2.3 bus2=p1ulv22810.1.2.3 switch=n enabled=y phases=3 Linecode=3P_UG_AL_350kcmil_15_0_416_0_3_3_3_3

New Line.l(r:p1udt21990lv-p1ulv46898) Units=km Length=0.0139493 bus1=p1udt21990lv.1.2.3 bus2=p1ulv46898.1.2.3 switch=n enabled=y phases=3 Linecode=3P_UG_AL_350kcmil_15_0_416_0_3_3_3_3

New Line.l(r:p1udt22367lv-p1ulv48739) Units=km Length=0.0118085 bus1=p1udt22367lv.1.2.3 bus2=p1ulv48739.1.2.3 switch=n enabled=y phases=3 Linecode=3P_UG_AL_350kcmil_15_0_416_0_3_3_3_3

New Line.l(r:p1udt6097lv-p1ulv7032) Units=km Length=0.015085300000000001 bus1=p1udt6097lv.1.2.3 bus2=p1ulv7032.1.2.3 switch=n enabled=y phases=3 Linecode=3P_UG_AL_350kcmil_15_0_416_0_3_3_3_3

New Line.l(r:p1udt10880-p1udt6097) Units=km Length=0.0286146 bus1=p1udt10880.1.2.3 bus2=p1udt6097.1.2.3 switch=n enabled=y phases=3 Linecode=3P_OH_AL_ACSR_4/0_Penguin_12_47_0_3_3_3_3

New Line.l(r:p1udt10880-p1udt22367) Units=km Length=0.0318697 bus1=p1udt22367.1.2.3 bus2=p1udt10880.1.2.3 switch=n enabled=y phases=3 Linecode=3P_OH_AL_ACSR_4/0_Penguin_12_47_0_3_3_3_3

New Line.l(r:p1udt21990-p1udt22367) Units=km Length=0.0397063 bus1=p1udt21990.1.2.3 bus2=p1udt22367.1.2.3 switch=n enabled=y phases=3 Linecode=3P_OH_AL_ACSR_4/0_Penguin_12_47_0_3_3_3_3

New Line.l(r:p1udt14904-p1udt21990) Units=km Length=0.0577593 bus1=p1udt14904.1.2.3 bus2=p1udt21990.1.2.3 switch=n enabled=y phases=3 Linecode=3P_OH_AL_ACSR_4/0_Penguin_12_47_0_3_3_3_3

New Line.l(r:p1udt22602lv-p1ulv49953) Units=km Length=0.0139153 bus1=p1udt22602lv.1.2.3 bus2=p1ulv49953.1.2.3 switch=n enabled=y phases=3 Linecode=3P_UG_AL_350kcmil_15_0_416_0_3_3_3_3

New Line.l(r:p1udm61027-p1ulv58611) Units=km Length=0.010007 bus1=p1udm61027.1.2.3 bus2=p1ulv58611.1.2.3 switch=n enabled=y phases=3 Linecode=3P_UG_AL_350kcmil_15_0_416_0_3_3_3_3

New Line.l(r:p1udm61027-p1udt22602lv) Units=km Length=0.011320200000000002 bus1=p1udt22602lv.1.2.3 bus2=p1udm61027.1.2.3 switch=n enabled=y phases=3 Linecode=3P_UG_AL_350kcmil_15_0_416_0_3_3_3_3

New Line.l(r:p1udt14904-p1udt22602) Units=km Length=0.0423661 bus1=p1udt14904.1.2.3 bus2=p1udt22602.1.2.3 switch=n enabled=y phases=3 Linecode=3P_OH_AL_ACSR_4/0_Penguin_12_47_0_3_3_3_3

New Line.l(r:p1udt14643-p1udt14904) Units=km Length=0.105943 bus1=p1udt14643.1.2.3 bus2=p1udt14904.1.2.3 switch=n enabled=y phases=3 Linecode=3P_OH_AL_ACSR_4/0_Penguin_12_47_0_3_3_3_3

New Line.l(r:p1udt14643-p1udt25050) Units=km Length=0.075613 bus1=p1udt25050.1.2.3 bus2=p1udt14643.1.2.3 switch=n enabled=y phases=3 Linecode=3P_OH_AL_ACSR_4/0_Penguin_12_47_0_3_3_3_3

New Line.l(r:p1udt18477lv-p1ulv32967) Units=km Length=0.0161821 bus1=p1udt18477lv.1.2.3 bus2=p1ulv32967.1.2.3 switch=n enabled=y phases=3 Linecode=3P_UG_AL_350kcmil_15_0_416_0_3_3_3_3

New Line.l(r:p1udt18477-p1udt25050) Units=km Length=0.0755266 bus1=p1udt25050.1.2.3 bus2=p1udt18477.1.2.3 switch=n enabled=y phases=3 Linecode=3P_OH_AL_ACSR_4/0_Penguin_12_47_0_3_3_3_3

New Line.l(r:p1udt19960-p1udt25050) Units=km Length=0.0395033 bus1=p1udt19960.1.2.3 bus2=p1udt25050.1.2.3 switch=n enabled=y phases=3 Linecode=3P_OH_AL_ACSR_4/0_Penguin_12_47_0_3_3_3_3

New Line.l(r:p1udt14903-p1udt19960) Units=km Length=0.0466328 bus1=p1udt14903.1.2.3 bus2=p1udt19960.1.2.3 switch=n enabled=y phases=3 Linecode=3P_OH_AL_ACSR_4/0_Penguin_12_47_0_3_3_3_3

New Line.l(r:p1udt13540-p1udt14903) Units=km Length=0.0706835 bus1=p1udt13540.1.2.3 bus2=p1udt14903.1.2.3 switch=n enabled=y phases=3 Linecode=3P_OH_AL_ACSR_4/0_Penguin_12_47_0_3_3_3_3

New Line.l(r:p1udt13540-p1udt25231) Units=km Length=0.093953 bus1=p1udt25231.1.2.3 bus2=p1udt13540.1.2.3 switch=n enabled=y phases=3 Linecode=3P_OH_AL_ACSR_4/0_Penguin_12_47_0_3_3_3_3

New Line.l(r:p1udt12258-p1udt25231) Units=km Length=0.0557045 bus1=p1udt12258.1.2.3 bus2=p1udt25231.1.2.3 switch=n enabled=y phases=3 Linecode=3P_OH_AL_ACSR_4/0_Penguin_12_47_0_3_3_3_3

New Line.l(r:p1udt22522-p1udt8794) Units=km Length=0.0863176 bus1=p1udt22522-p1udt8794x.1.2.3 bus2=p1udt8794.1.2.3 switch=n enabled=y phases=3 Linecode=3P_OH_AL_ACSR_1033kcmil_Curlew_12.47_1_3_3_3_3

New Line.elbswitch(r:p1udt22522-p1udt8794)p1u_265942 Units=km Length=0.001 bus1=p1udt22522.1.2.3 bus2=p1udt22522-p1udt8794x.1.2.3 switch=y enabled=n phases=3 Linecode=elbswitch_3_3_3_3

New Line.fuse(r:p1udt3766-p1udt8398)p1u_266788 Units=km Length=0.001 bus1=p1udt8398.2 bus2=p1udt3766-p1udt8398x.2 switch=n enabled=y phases=1 Linecode=fuse_1_1_1_1

New Fuse.Fuse_fuse(r:p1udt3766-p1udt8398)p1u_266788 monitoredobj=Line.fuse(r:p1udt3766-p1udt8398)p1u_266788 enabled=y ratedcurrent=100.0

New Line.fuse(r:p1udt12690-p1udt9574)p1u_267234 Units=km Length=0.001 bus1=p1udt12690.3 bus2=p1udt12690-p1udt9574x.3 switch=n enabled=y phases=1 Linecode=fuse_1_1_1_1

New Fuse.Fuse_fuse(r:p1udt12690-p1udt9574)p1u_267234 monitoredobj=Line.fuse(r:p1udt12690-p1udt9574)p1u_267234 enabled=y ratedcurrent=100.0

New Line.fuse(r:p1udt17497-p1udt720)p1u_267715 Units=km Length=0.001 bus1=p1udt17497.1 bus2=p1udt17497-p1udt720x.1 switch=n enabled=y phases=1 Linecode=fuse_1_1_1_1

New Fuse.Fuse_fuse(r:p1udt17497-p1udt720)p1u_267715 monitoredobj=Line.fuse(r:p1udt17497-p1udt720)p1u_267715 enabled=y ratedcurrent=100.0

New Line.fuse(r:p1udt19432-p1udt24640)p1u_267902 Units=km Length=0.001 bus1=p1udt19432.2 bus2=p1udt19432-p1udt24640x.2 switch=n enabled=y phases=1 Linecode=fuse_1_6_1_1_1

New Fuse.Fuse_fuse(r:p1udt19432-p1udt24640)p1u_267902 monitoredobj=Line.fuse(r:p1udt19432-p1udt24640)p1u_267902 enabled=y ratedcurrent=100.0

New Line.fuse(r:p1udt22907-p1udt23016)p1u_268245 Units=km Length=0.001 bus1=p1udt22907.1 bus2=p1udt22907-p1udt23016x.1 switch=n enabled=y phases=1 Linecode=fuse_1_1_1_1

New Fuse.Fuse_fuse(r:p1udt22907-p1udt23016)p1u_268245 monitoredobj=Line.fuse(r:p1udt22907-p1udt23016)p1u_268245 enabled=y ratedcurrent=100.0

New Line.fuse(r:p1udt15667-p1udt22980)p1u_268254 Units=km Length=0.001 bus1=p1udt22980.3 bus2=p1udt15667-p1udt22980x.3 switch=n enabled=y phases=1 Linecode=fuse_1_1_1_1

New Fuse.Fuse_fuse(r:p1udt15667-p1udt22980)p1u_268254 monitoredobj=Line.fuse(r:p1udt15667-p1udt22980)p1u_268254 enabled=y ratedcurrent=100.0

New Line.l(r:p1udt11354-p1udt9929)_disconnect Units=km Length=0.001 bus1=p1udt9929_b1_1.1.2.3 bus2=p1udt9929_b2_1.1.2.3 switch=y enabled=y phases=3 Linecode=3P_OH_AL_ACSR_4/0_Penguin_12_47_0_3_3_3_3

New Line.l(r:p1udt11354-p1udt9929)_cont Units=km Length=2.246004 bus1=p1udt9929_b2_1.1.2.3 bus2=p1udt11354.1.2.3 switch=n enabled=y phases=3 Linecode=3P_OH_AL_ACSR_4/0_Penguin_12_47_0_3_3_3_3
