New Line.l(r:p1udm2632-p1ulv731) Units=km Length=0.0201115 bus1=p1udm2632.1.2 bus2=p1ulv731.1.2 switch=n enabled=y phases=2 Linecode=1P_OH_AL_2/0_Rucina_0_416_0_2_2_2_2

New Line.l(r:p1udm2633-p1ulv45670) Units=km Length=0.0126831 bus1=p1udm2633.1.2 bus2=p1ulv45670.1.2 switch=n enabled=y phases=2 Linecode=1P_UG_AL_4/0_Sweetbriar_0_416_0_2_2_2_2

New Line.l(r:p1udm2632-p1udm2633) Units=km Length=0.0998035 bus1=p1udm2632.1.2 bus2=p1udm2633.1.2 switch=n enabled=y phases=2 Linecode=1P_OH_AL_4/0_Zuzara_0_416_0_2_2_2_2

New Line.l(r:p1udm2632-p1udt721lv) Units=km Length=0.0387459 bus1=p1udt721lv.1.2 bus2=p1udm2632.1.2 switch=n enabled=y phases=2 Linecode=1P_OH_AL_4/0_Zuzara_0_416_0_2_1_2_2_2

New Line.l(r:p1udt3634lv-p1ulv3928) Units=km Length=0.0107208 bus1=p1udt3634lv.1.2 bus2=p1ulv3928.1.2 switch=n enabled=y phases=2 Linecode=1P_OH_AL_2/0_Rucina_0_416_0_2_2_2_2

New Line.l(r:p1udm12831-p1ulv56835) Units=km Length=0.00470205 bus1=p1udm12831.1.2 bus2=p1ulv56835.1.2 switch=n enabled=y phases=2 Linecode=1P_OH_AL_2/0_Rucina_0_416_0_2_2_2_2

New Line.l(r:p1udm12831-p1udt3634lv) Units=km Length=0.0100917 bus1=p1udt3634lv.1.2 bus2=p1udm12831.1.2 switch=n enabled=y phases=2 Linecode=1P_OH_AL_2/0_Rucina_0_416_0_2_2_2_2

New Line.l(r:p1udt4104lv-p1ulv4496) Units=km Length=0.0161586 bus1=p1udt4104lv.1.2 bus2=p1ulv4496.1.2 switch=n enabled=y phases=2 Linecode=1P_OH_AL_2/0_Rucina_0_416_0_2_2_2_2

New Line.l(r:p1udt8250lv-p1ulv10141) Units=km Length=0.0234068 bus1=p1udt8250lv.1.2 bus2=p1ulv10141.1.2 switch=n enabled=y phases=2 Linecode=1P_UG_AL_4/0_Sweetbriar_0_416_0_2_2_2_2

New Line.l(r:p1udt13537lv-p1ulv19642) Units=km Length=0.015859 bus1=p1udt13537lv.1.2 bus2=p1ulv19642.1.2 switch=n enabled=y phases=2 Linecode=1P_OH_AL_2/0_Rucina_0_416_0_2_2_2_2

New Line.l(r:p1udm43263-p1ulv64858) Units=km Length=0.0123649 bus1=p1udm43263.1.2 bus2=p1ulv64858.1.2 switch=n enabled=y phases=2 Linecode=1P_OH_AL_2/0_Rucina_0_416_0_2_2_2_2

New Line.l(r:p1udm43263-p1udt13537lv) Units=km Length=0.00961459 bus1=p1udt13537lv.1.2 bus2=p1udm43263.1.2 switch=n enabled=y phases=2 Linecode=1P_OH_AL_2/0_Rucina_0_416_0_2_2_2_2

New Line.l(r:p1udt15923lv-p1ulv25394) Units=km Length=0.0109476 bus1=p1udt15923lv.1.2 bus2=p1ulv25394.1.2 switch=n enabled=y phases=2 Linecode=1P_OH_AL_2/0_Rucina_0_416_0_2_2_2_2

New Line.l(r:p1udt22741lv-p1ulv50616) Units=km Length=0.011481 bus1=p1udt22741lv.1.2 bus2=p1ulv50616.1.2 switch=n enabled=y phases=2 Linecode=1P_OH_AL_2/0_Rucina_0_416_0_2_2_2_2

New Line.l(r:p1udt22978lv-p1ulv51852) Units=km Length=0.0125529 bus1=p1udt22978lv.1.2 bus2=p1ulv51852.1.2 switch=n enabled=y phases=2 Linecode=1P_OH_AL_2/0_Rucina_0_416_0_2_2_2_2

New Line.l(r:p1udt23894lv-p1ulv56806) Units=km Length=0.0135313 bus1=p1udt23894lv.1.2 bus2=p1ulv56806.1.2 switch=n enabled=y phases=2 Linecode=1P_OH_AL_2/0_Rucina_0_416_0_2_2_2_2

New Line.l(r:p1udt24645lv-p1ulv61097) Units=km Length=0.0116178 bus1=p1udt24645lv.1.2 bus2=p1ulv61097.1.2 switch=n enabled=y phases=2 Linecode=1P_OH_AL_2/0_Rucina_0_416_0_2_2_2_2

New Line.l(r:p1udt25237lv-p1ulv64891) Units=km Length=0.0122037 bus1=p1udt25237lv.1.2 bus2=p1ulv64891.1.2 switch=n enabled=y phases=2 Linecode=1P_OH_AL_2/0_Rucina_0_416_0_2_2_2_2

New Line.l(r:p1udt13537-p1udt4104) Units=km Length=0.0570321 bus1=p1udt4104.3 bus2=p1udt13537.3 switch=n enabled=y phases=1 Linecode=1P_OH_AL_ACSR_#2_Sparrow_12_47_0_1_1_1_1

New Line.l(r:p1udt4104-p1udt721) Units=km Length=0.155827 bus1=p1udt4104-p1udt721x.3 bus2=p1udt4104.3 switch=n enabled=y phases=1 Linecode=1P_OH_AL_ACSR_#2_Sparrow_12_47_0_1_1_1_1

New Line.l(r:p1udt23894-p1udt24645) Units=km Length=0.0347354 bus1=p1udt23894.2 bus2=p1udt24645.2 switch=n enabled=y phases=1 Linecode=1P_OH_AL_ACSR_#2_Sparrow_12_47_0_1_1_1_1

New Line.l(r:p1udt23894-p1udt25237) Units=km Length=0.0382249 bus1=p1udt25237.2 bus2=p1udt23894.2 switch=n enabled=y phases=1 Linecode=1P_OH_AL_ACSR_#2_Sparrow_12_47_0_1_1_1_1

New Line.l(r:p1udt15923-p1udt25237) Units=km Length=0.07952090000000002 bus1=p1udt15923-p1udt25237x.2 bus2=p1udt25237.2 switch=n enabled=y phases=1 Linecode=1P_OH_AL_ACSR_#2_Sparrow_12_47_0_1_1_1_1

New Line.l(r:p1udt25232-p1udt8250) Units=km Length=0.113738 bus1=p1udt25232-p1udt8250x.1 bus2=p1udt8250.1 switch=n enabled=y phases=1 Linecode=1P_OH_AL_ACSR_#2_Sparrow_12_47_0_1_1_1_1

New Line.l(r:p1udt18288-p1udt22741) Units=km Length=0.13213 bus1=p1udt18288.1.2.3 bus2=p1udt22741.1.2.3 switch=n enabled=y phases=3 Linecode=3P_OH_AL_ACSR_4/0_Penguin_12_47_0_3_3_3_3

New Line.l(r:p1udt18288-p1udt6120) Units=km Length=0.263849 bus1=p1udt6120.1.2.3 bus2=p1udt18288.1.2.3 switch=n enabled=y phases=3 Linecode=3P_OH_AL_ACSR_4/0_Penguin_12_47_0_3_3_3_3

New Line.l(r:p1udt6120-p1uhs10_1247) Units=km Length=0.310001 bus1=p1udt6120-p1uhs10_1247x.1.2.3 bus2=p1udt6120.1.2.3 switch=n enabled=y phases=3 Linecode=3P_OH_AL_ACSR_4/0_Penguin_12_47_0_3_3_3_3

New Line.l(r:p1udt6120lv-p1ulv7061) Units=km Length=0.0150789 bus1=p1udt6120lv.1.2.3 bus2=p1ulv7061.1.2.3 switch=n enabled=y phases=3 Linecode=3P_UG_AL_750kcmil_25_0_416_0_3_3_3_3

New Line.l(r:p1udt18288lv-p1ulv32342) Units=km Length=0.0135285 bus1=p1udt18288lv.1.2.3 bus2=p1ulv32342.1.2.3 switch=n enabled=y phases=3 Linecode=3P_UG_AL_350kcmil_15_0_416_0_3_3_3_3

New Line.l(r:p1udt23550lv-p1ulv55040) Units=km Length=0.0147492 bus1=p1udt23550lv.1.2.3 bus2=p1ulv55040.1.2.3 switch=n enabled=y phases=3 Linecode=3P_UG_AL_350kcmil_15_0_416_0_3_3_3_3

New Line.l(r:p1udt18696lv-p1ulv33664) Units=km Length=0.006611270000000001 bus1=p1udt18696lv.1.2.3 bus2=p1ulv33664.1.2.3 switch=n enabled=y phases=3 Linecode=3P_UG_AL_350kcmil_15_0_416_0_3_3_3_3

New Line.l(r:p1udt18696-p1udt3634) Units=km Length=0.010094 bus1=p1udt3634.1.2.3 bus2=p1udt18696.1.2.3 switch=n enabled=y phases=3 Linecode=3P_OH_AL_ACSR_4/0_Penguin_12_47_0_3_3_3_3

New Line.l(r:p1udt23550-p1udt3634) Units=km Length=0.0514957 bus1=p1udt23550.1.2.3 bus2=p1udt3634.1.2.3 switch=n enabled=y phases=3 Linecode=3P_OH_AL_ACSR_4/0_Penguin_12_47_0_3_3_3_3

New Line.l(r:p1udt22978-p1udt23550) Units=km Length=0.0418951 bus1=p1udt22978.1.2.3 bus2=p1udt23550.1.2.3 switch=n enabled=y phases=3 Linecode=3P_OH_AL_ACSR_4/0_Penguin_12_47_0_3_3_3_3

New Line.l(r:p1udt15923-p1udt22978) Units=km Length=0.0624861 bus1=p1udt15923.1.2.3 bus2=p1udt22978.1.2.3 switch=n enabled=y phases=3 Linecode=3P_OH_AL_ACSR_4/0_Penguin_12_47_0_3_3_3_3

New Line.l(r:p1udt15923-p1udt721) Units=km Length=0.057069600000000005 bus1=p1udt721.1.2.3 bus2=p1udt15923.1.2.3 switch=n enabled=y phases=3 Linecode=3P_OH_AL_ACSR_4/0_Penguin_12_47_0_3_3_3_3

New Line.l(r:p1udt18288-p1udt721) Units=km Length=0.157667 bus1=p1udt18288.1.2.3 bus2=p1udt721.1.2.3 switch=n enabled=y phases=3 Linecode=3P_OH_AL_ACSR_4/0_Penguin_12_47_0_3_3_3_3

New Line.l(r:p1udt1320lv-p1ulv1361) Units=km Length=0.00900724 bus1=p1udt1320lv.1.2.3 bus2=p1ulv1361.1.2.3 switch=n enabled=y phases=3 Linecode=3P_UG_AL_350kcmil_15_0_416_0_3_3_3_3

New Line.l(r:p1udt5618lv-p1ulv6407) Units=km Length=0.0135195 bus1=p1udt5618lv.1.2.3 bus2=p1ulv6407.1.2.3 switch=n enabled=y phases=3 Linecode=3P_UG_AL_350kcmil_15_0_416_0_3_3_3_3

New Line.l(r:p1udt10879lv-p1ulv14495) Units=km Length=0.0172952 bus1=p1udt10879lv.1.2.3 bus2=p1ulv14495.1.2.3 switch=n enabled=y phases=3 Linecode=3P_UG_AL_350kcmil_15_0_416_0_3_3_3_3

New Line.l(r:p1udt25152lv-p1ulv64243) Units=km Length=0.00966911 bus1=p1udt25152lv.1.2.3 bus2=p1ulv64243.1.2.3 switch=n enabled=y phases=3 Linecode=3P_UG_AL_350kcmil_15_0_416_0_3_3_3_3

New Line.l(r:p1udt9037lv-p1ulv11382) Units=km Length=0.010486200000000001 bus1=p1udt9037lv.1.2.3 bus2=p1ulv11382.1.2.3 switch=n enabled=y phases=3 Linecode=3P_UG_AL_350kcmil_15_0_416_0_3_3_3_3

New Line.l(r:p1udt10180lv-p1ulv13273) Units=km Length=0.008042790000000001 bus1=p1udt10180lv.1.2.3 bus2=p1ulv13273.1.2.3 switch=n enabled=y phases=3 Linecode=3P_UG_AL_350kcmil_15_0_416_0_3_3_3_3

New Line.l(r:p1udt10180-p1udt9037) Units=km Length=0.0551757 bus1=p1udt9037.1.2.3 bus2=p1udt10180.1.2.3 switch=n enabled=y phases=3 Linecode=3P_OH_AL_ACSR_4/0_Penguin_12_47_0_3_3_3_3

New Line.l(r:p1udt25232lv-p1ulv64860) Units=km Length=0.0200692 bus1=p1udt25232lv.1.2.3 bus2=p1ulv64860.1.2.3 switch=n enabled=y phases=3 Linecode=3P_UG_AL_350kcmil_15_0_416_0_3_3_3_3

New Line.l(r:p1udt9813lv-p1ulv12643) Units=km Length=0.0106232 bus1=p1udt9813lv.1.2.3 bus2=p1ulv12643.1.2.3 switch=n enabled=y phases=3 Linecode=3P_UG_AL_350kcmil_15_0_416_0_3_3_3_3

New Line.l(r:p1udt25232-p1udt9813) Units=km Length=0.10779300000000001 bus1=p1udt25232.1.2.3 bus2=p1udt9813.1.2.3 switch=n enabled=y phases=3 Linecode=3P_OH_AL_ACSR_4/0_Penguin_12_47_0_3_3_3_3

New Line.l(r:p1udt25232-p1udt9037) Units=km Length=0.0758627 bus1=p1udt9037.1.2.3 bus2=p1udt25232.1.2.3 switch=n enabled=y phases=3 Linecode=3P_OH_AL_ACSR_4/0_Penguin_12_47_0_3_3_3_3

New Line.l(r:p1udt25152-p1udt9037) Units=km Length=0.09827920000000001 bus1=p1udt25152.1.2.3 bus2=p1udt9037.1.2.3 switch=n enabled=y phases=3 Linecode=3P_OH_AL_ACSR_4/0_Penguin_12_47_0_3_3_3_3

New Line.l(r:p1udt10879-p1udt25152) Units=km Length=0.0213014 bus1=p1udt10879.1.2.3 bus2=p1udt25152.1.2.3 switch=n enabled=y phases=3 Linecode=3P_OH_AL_ACSR_4/0_Penguin_12_47_0_3_3_3_3

New Line.l(r:p1udt10879-p1udt5618) Units=km Length=0.475494 bus1=p1udt5618.1.2.3 bus2=p1udt10879.1.2.3 switch=n enabled=y phases=3 Linecode=3P_OH_AL_ACSR_4/0_Penguin_12_47_0_3_3_3_3

New Line.l(r:p1udt1320-p1udt5618) Units=km Length=0.28216 bus1=p1udt1320.1.2.3 bus2=p1udt5618.1.2.3 switch=n enabled=y phases=3 Linecode=3P_OH_AL_ACSR_4/0_Penguin_12_47_0_3_3_3_3

New Line.l(r:p1udt12593lv-p1ulv17703) Units=km Length=0.014566200000000001 bus1=p1udt12593lv.1.2.3 bus2=p1ulv17703.1.2.3 switch=n enabled=y phases=3 Linecode=3P_UG_AL_350kcmil_15_0_416_0_3_3_3_3

New Line.l(r:p1udt23214lv-p1ulv53106) Units=km Length=0.0141989 bus1=p1udt23214lv.1.2.3 bus2=p1ulv53106.1.2.3 switch=n enabled=y phases=3 Linecode=3P_UG_AL_350kcmil_15_0_416_0_3_3_3_3

New Line.l(r:p1udt21016lv-p1ulv42472) Units=km Length=0.0135002 bus1=p1udt21016lv.1.2.3 bus2=p1ulv42472.1.2.3 switch=n enabled=y phases=3 Linecode=3P_UG_AL_350kcmil_15_0_416_0_3_3_3_3

New Line.l(r:p1udt11557lv-p1ulv15739) Units=km Length=0.0182253 bus1=p1udt11557lv.1.2.3 bus2=p1ulv15739.1.2.3 switch=n enabled=y phases=3 Linecode=3P_UG_AL_350kcmil_15_0_416_0_3_3_3_3

New Line.l(r:p1udt11557-p1udt21016) Units=km Length=0.0598931 bus1=p1udt21016.1.2.3 bus2=p1udt11557.1.2.3 switch=n enabled=y phases=3 Linecode=3P_OH_AL_ACSR_4/0_Penguin_12_47_0_3_3_3_3

New Line.l(r:p1udt20443lv-p1ulv39980) Units=km Length=0.0127953 bus1=p1udt20443lv.1.2.3 bus2=p1ulv39980.1.2.3 switch=n enabled=y phases=3 Linecode=3P_UG_AL_350kcmil_15_0_416_0_3_3_3_3

New Line.l(r:p1udt20443-p1udt21016) Units=km Length=0.0500832 bus1=p1udt21016.1.2.3 bus2=p1udt20443.1.2.3 switch=n enabled=y phases=3 Linecode=3P_OH_AL_ACSR_4/0_Penguin_12_47_0_3_3_3_3

New Line.l(r:p1udt21016-p1udt23214) Units=km Length=0.0289783 bus1=p1udt23214.1.2.3 bus2=p1udt21016.1.2.3 switch=n enabled=y phases=3 Linecode=3P_OH_AL_ACSR_4/0_Penguin_12_47_0_3_3_3_3

New Line.l(r:p1udt12593-p1udt23214) Units=km Length=0.0624051 bus1=p1udt12593.1.2.3 bus2=p1udt23214.1.2.3 switch=n enabled=y phases=3 Linecode=3P_OH_AL_ACSR_4/0_Penguin_12_47_0_3_3_3_3

New Line.l(r:p1udt12593-p1udt1320) Units=km Length=0.203647 bus1=p1udt1320.1.2.3 bus2=p1udt12593.1.2.3 switch=n enabled=y phases=3 Linecode=3P_OH_AL_ACSR_4/0_Penguin_12_47_0_3_3_3_3

New Line.l(r:p1udt1320-p1udt22741) Units=km Length=0.0284635 bus1=p1udt22741.1.2.3 bus2=p1udt1320.1.2.3 switch=n enabled=y phases=3 Linecode=3P_OH_AL_ACSR_4/0_Penguin_12_47_0_3_3_3_3

New Line.l(r:p1udt22864lv-p1ulv51227) Units=km Length=0.0106528 bus1=p1udt22864lv.1.2.3 bus2=p1ulv51227.1.2.3 switch=n enabled=y phases=3 Linecode=3P_UG_AL_350kcmil_15_0_416_0_3_3_3_3

New Line.l(r:p1udt17089lv-p1ulv28601) Units=km Length=0.010555800000000002 bus1=p1udt17089lv.1.2.3 bus2=p1ulv28601.1.2.3 switch=n enabled=y phases=3 Linecode=3P_UG_AL_350kcmil_15_0_416_0_3_3_3_3

New Line.l(r:p1udt10897lv-p1ulv14530) Units=km Length=0.0109944 bus1=p1udt10897lv.1.2.3 bus2=p1ulv14530.1.2.3 switch=n enabled=y phases=3 Linecode=3P_UG_AL_350kcmil_15_0_416_0_3_3_3_3

New Line.l(r:p1udt22981lv-p1ulv51857) Units=km Length=0.00918399 bus1=p1udt22981lv.1.2.3 bus2=p1ulv51857.1.2.3 switch=n enabled=y phases=3 Linecode=3P_UG_AL_350kcmil_15_0_416_0_3_3_3_3

New Line.l(r:p1udt24745lv-p1ulv61724) Units=km Length=0.012064700000000001 bus1=p1udt24745lv.1.2.3 bus2=p1ulv61724.1.2.3 switch=n enabled=y phases=3 Linecode=3P_UG_AL_350kcmil_15_0_416_0_3_3_3_3

New Line.l(r:p1udt23220lv-p1ulv53148) Units=km Length=0.0118129 bus1=p1udt23220lv.1.2.3 bus2=p1ulv53148.1.2.3 switch=n enabled=y phases=3 Linecode=3P_UG_AL_350kcmil_15_0_416_0_3_3_3_3

New Line.l(r:p1udt23220-p1udt24745) Units=km Length=0.0552409 bus1=p1udt24745.1.2.3 bus2=p1udt23220.1.2.3 switch=n enabled=y phases=3 Linecode=3P_OH_AL_ACSR_4/0_Penguin_12_47_0_3_3_3_3

New Line.l(r:p1udt22981-p1udt24745) Units=km Length=0.0362364 bus1=p1udt22981.1.2.3 bus2=p1udt24745.1.2.3 switch=n enabled=y phases=3 Linecode=3P_OH_AL_ACSR_4/0_Penguin_12_47_0_3_3_3_3

New Line.l(r:p1udt10897-p1udt22981) Units=km Length=0.0816744 bus1=p1udt10897.1.2.3 bus2=p1udt22981.1.2.3 switch=n enabled=y phases=3 Linecode=3P_OH_AL_ACSR_4/0_Penguin_12_47_0_3_3_3_3

New Line.l(r:p1udt10897-p1udt17089) Units=km Length=0.0348987 bus1=p1udt17089.1.2.3 bus2=p1udt10897.1.2.3 switch=n enabled=y phases=3 Linecode=3P_OH_AL_ACSR_4/0_Penguin_12_47_0_3_3_3_3

New Line.l(r:p1udt17089-p1udt22864) Units=km Length=0.0337992 bus1=p1udt22864.1.2.3 bus2=p1udt17089.1.2.3 switch=n enabled=y phases=3 Linecode=3P_OH_AL_ACSR_4/0_Penguin_12_47_0_3_3_3_3

New Line.l(r:p1udt22741-p1udt22864) Units=km Length=0.11541 bus1=p1udt22741.1.2.3 bus2=p1udt22864.1.2.3 switch=n enabled=y phases=3 Linecode=3P_OH_AL_ACSR_4/0_Penguin_12_47_0_3_3_3_3

New Line.l(r:p1udt22863lv-p1ulv51226) Units=km Length=0.014389 bus1=p1udt22863lv.1.2.3 bus2=p1ulv51226.1.2.3 switch=n enabled=y phases=3 Linecode=3P_UG_AL_750kcmil_25_0_416_0_3_3_3_3

New Line.l(r:p1udt16172lv-p1ulv26036) Units=km Length=0.0144494 bus1=p1udt16172lv.1.2.3 bus2=p1ulv26036.1.2.3 switch=n enabled=y phases=3 Linecode=3P_UG_AL_750kcmil_25_0_416_0_3_3_3_3

New Line.l(r:p1udt16172-p1udt22863) Units=km Length=0.0824285 bus1=p1udt22863.1.2.3 bus2=p1udt16172.1.2.3 switch=n enabled=y phases=3 Linecode=3P_OH_AL_ACSR_4/0_Penguin_12_47_0_3_3_3_3

New Line.l(r:p1udt22863-p1udt6120) Units=km Length=0.169083 bus1=p1udt6120.1.2.3 bus2=p1udt22863.1.2.3 switch=n enabled=y phases=3 Linecode=3P_OH_AL_ACSR_4/0_Penguin_12_47_0_3_3_3_3

New Line.l(r:p1udt20443-p1udt23220) Units=km Length=0.0623576 bus1=p1udt20443-p1udt23220x.1.2.3 bus2=p1udt23220.1.2.3 switch=n enabled=y phases=3 Linecode=3P_OH_AL_ACSR_1033kcmil_Curlew_12.47_1_3_3_3_3

New Line.elbswitch(r:p1udt20443-p1udt23220)p1u_265865 Units=km Length=0.001 bus1=p1udt20443.1.2.3 bus2=p1udt20443-p1udt23220x.1.2.3 switch=y enabled=n phases=3 Linecode=elbswitch_3_3_3_3

New Line.elbswitch(r:p1udt24639-p1udt9813)p1u_265907 Units=km Length=0.001 bus1=p1udt9813.1.2.3 bus2=p1udt24639-p1udt9813x.1.2.3 switch=y enabled=n phases=3 Linecode=elbswitch_3_3_3_3

New Line.fuse(r:p1udt4104-p1udt721)p1u_266098 Units=km Length=0.001 bus1=p1udt721.3 bus2=p1udt4104-p1udt721x.3 switch=n enabled=y phases=1 Linecode=fuse_1_1_1_1

New Fuse.Fuse_fuse(r:p1udt4104-p1udt721)p1u_266098 monitoredobj=Line.fuse(r:p1udt4104-p1udt721)p1u_266098 enabled=y ratedcurrent=100.0

New Line.fuse(r:p1udt15923-p1udt25237)p1u_267552 Units=km Length=0.001 bus1=p1udt15923.2 bus2=p1udt15923-p1udt25237x.2 switch=n enabled=y phases=1 Linecode=fuse_1_1_1_1

New Fuse.Fuse_fuse(r:p1udt15923-p1udt25237)p1u_267552 monitoredobj=Line.fuse(r:p1udt15923-p1udt25237)p1u_267552 enabled=y ratedcurrent=100.0

New Line.fuse(r:p1udt25232-p1udt8250)p1u_268500 Units=km Length=0.001 bus1=p1udt25232.1 bus2=p1udt25232-p1udt8250x.1 switch=n enabled=y phases=1 Linecode=fuse_1_1_1_1

New Fuse.Fuse_fuse(r:p1udt25232-p1udt8250)p1u_268500 monitoredobj=Line.fuse(r:p1udt25232-p1udt8250)p1u_268500 enabled=y ratedcurrent=100.0
