New Line.l(r:p1udt416lv-p1ulv420) Units=km Length=0.00511032 bus1=p1udt416lv.1.2 bus2=p1ulv420.1.2 switch=n enabled=y phases=2 Linecode=1P_OH_AL_2/0_Rucina_0_416_0_2_2_2_2

New Line.l(r:p1udm3685-p1ulv1021) Units=km Length=0.0203736 bus1=p1udm3685.1.2 bus2=p1ulv1021.1.2 switch=n enabled=y phases=2 Linecode=1P_OH_AL_2/0_Rucina_0_416_0_2_2_2_2

New Line.l(r:p1udm3685-p1udt1001lv) Units=km Length=0.0392599 bus1=p1udt1001lv.1.2 bus2=p1udm3685.1.2 switch=n enabled=y phases=2 Linecode=1P_OH_AL_4/0_Zuzara_0_416_0_2_2_2_2

New Line.l(r:p1udm3686-p1ulv18041) Units=km Length=0.023951 bus1=p1udm3686.1.2 bus2=p1ulv18041.1.2 switch=n enabled=y phases=2 Linecode=1P_OH_AL_2/0_Rucina_0_416_0_2_2_2_2

New Line.l(r:p1udm3686-p1udt1001lv) Units=km Length=0.0583365 bus1=p1udt1001lv.1.2 bus2=p1udm3686.1.2 switch=n enabled=y phases=2 Linecode=1P_OH_AL_4/0_Zuzara_0_416_0_2_2_2_2

New Line.l(r:p1udt2802lv-p1ulv13612) Units=km Length=0.0114806 bus1=p1udt2802lv.1.2 bus2=p1ulv13612.1.2 switch=n enabled=y phases=2 Linecode=1P_OH_AL_2/0_Rucina_0_416_0_2_2_2_2

New Line.l(r:p1udt2802lv-p1ulv39672) Units=km Length=0.012060900000000001 bus1=p1udt2802lv.1.2 bus2=p1ulv39672.1.2 switch=n enabled=y phases=2 Linecode=1P_OH_AL_2/0_Rucina_0_416_0_2_2_2_2

New Line.l(r:p1udm9988-p1ulv2989) Units=km Length=0.009514460000000002 bus1=p1udm9988.1.2 bus2=p1ulv2989.1.2 switch=n enabled=y phases=2 Linecode=1P_OH_AL_2/0_Rucina_0_416_0_2_2_2_2

New Line.l(r:p1udm9988-p1udt2802lv) Units=km Length=0.0336458 bus1=p1udt2802lv.1.2 bus2=p1udm9988.1.2 switch=n enabled=y phases=2 Linecode=1P_OH_AL_4/0_Zuzara_0_416_0_2_2_2_2

New Line.l(r:p1udm9991-p1ulv41533) Units=km Length=0.0053606 bus1=p1udm9991.1.2 bus2=p1ulv41533.1.2 switch=n enabled=y phases=2 Linecode=1P_OH_AL_2/0_Rucina_0_416_0_2_2_2_2

New Line.l(r:p1udm9992-p1ulv50309) Units=km Length=0.0090662 bus1=p1udm9992.1.2 bus2=p1ulv50309.1.2 switch=n enabled=y phases=2 Linecode=1P_OH_AL_2/0_Rucina_0_416_0_2_2_2_2

New Line.l(r:p1udm9991-p1udm9992) Units=km Length=0.0118036 bus1=p1udm9991.1.2 bus2=p1udm9992.1.2 switch=n enabled=y phases=2 Linecode=1P_OH_AL_2/0_Rucina_0_416_0_2_2_2_2

New Line.l(r:p1udm9991-p1udt2802lv) Units=km Length=0.0118036 bus1=p1udt2802lv.1.2 bus2=p1udm9991.1.2 switch=n enabled=y phases=2 Linecode=1P_OH_AL_2/0_Rucina_0_416_0_2_2_2_2

New Line.l(r:p1udt3364lv-p1ulv3614) Units=km Length=0.0277857 bus1=p1udt3364lv.1.2 bus2=p1ulv3614.1.2 switch=n enabled=y phases=2 Linecode=1P_OH_AL_4/0_Zuzara_0_416_0_2_2_2_2

New Line.l(r:p1udt3364lv-p1ulv21896) Units=km Length=0.0461869 bus1=p1udt3364lv.1.2 bus2=p1ulv21896.1.2 switch=n enabled=y phases=2 Linecode=1P_OH_AL_4/0_Zuzara_0_416_0_2_2_2_2

New Line.l(r:p1udm15890-p1ulv5019) Units=km Length=0.0325168 bus1=p1udm15890.1.2 bus2=p1ulv5019.1.2 switch=n enabled=y phases=2 Linecode=1P_OH_AL_4/0_Zuzara_0_416_0_2_2_2_2

New Line.l(r:p1udm15890-p1udt4517lv) Units=km Length=0.019135700000000002 bus1=p1udt4517lv.1.2 bus2=p1udm15890.1.2 switch=n enabled=y phases=2 Linecode=1P_OH_AL_2/0_Rucina_0_416_0_2_2_2_2

New Line.l(r:p1udm15891-p1ulv27012) Units=km Length=0.0570532 bus1=p1udm15891.1.2 bus2=p1ulv27012.1.2 switch=n enabled=y phases=2 Linecode=1P_OH_AL_4/0_Zuzara_0_416_0_2_2_2_2

New Line.l(r:p1udm15891-p1udt4517lv) Units=km Length=0.0191445 bus1=p1udt4517lv.1.2 bus2=p1udm15891.1.2 switch=n enabled=y phases=2 Linecode=1P_OH_AL_2/0_Rucina_0_416_0_2_2_2_2

New Line.l(r:p1udt4878lv-p1ulv5479) Units=km Length=0.013349 bus1=p1udt4878lv.1.2 bus2=p1ulv5479.1.2 switch=n enabled=y phases=2 Linecode=1P_OH_AL_2/0_Rucina_0_416_0_2_2_2_2

New Line.l(r:p1udt4878lv-p1ulv50308) Units=km Length=0.0127532 bus1=p1udt4878lv.1.2 bus2=p1ulv50308.1.2 switch=n enabled=y phases=2 Linecode=1P_OH_AL_2/0_Rucina_0_416_0_2_2_2_2

New Line.l(r:p1udm17056-p1ulv12989) Units=km Length=0.00796575 bus1=p1udm17056.1.2 bus2=p1ulv12989.1.2 switch=n enabled=y phases=2 Linecode=1P_OH_AL_2/0_Rucina_0_416_0_2_2_2_2

New Line.l(r:p1udm17058-p1ulv44746) Units=km Length=0.0145645 bus1=p1udm17058.1.2 bus2=p1ulv44746.1.2 switch=n enabled=y phases=2 Linecode=1P_OH_AL_2/0_Rucina_0_416_0_2_2_2_2

New Line.l(r:p1udm17056-p1udm17058) Units=km Length=0.0476173 bus1=p1udm17056.1.2 bus2=p1udm17058.1.2 switch=n enabled=y phases=2 Linecode=1P_OH_AL_4/0_Zuzara_0_416_0_2_2_2_2

New Line.l(r:p1udm17056-p1udt4878lv) Units=km Length=0.0158728 bus1=p1udt4878lv.1.2 bus2=p1udm17056.1.2 switch=n enabled=y phases=2 Linecode=1P_OH_AL_2/0_Rucina_0_416_0_2_2_2_2

New Line.l(r:p1udm17060-p1ulv52209) Units=km Length=0.0128827 bus1=p1udm17060.1.2 bus2=p1ulv52209.1.2 switch=n enabled=y phases=2 Linecode=1P_OH_AL_2/0_Rucina_0_416_0_2_2_2_2

New Line.l(r:p1udm17057-p1ulv18713) Units=km Length=0.0123316 bus1=p1udm17057.1.2 bus2=p1ulv18713.1.2 switch=n enabled=y phases=2 Linecode=1P_OH_AL_2/0_Rucina_0_416_0_2_2_2_2

New Line.l(r:p1udm17057-p1udm17060) Units=km Length=0.0140134 bus1=p1udm17060.1.2 bus2=p1udm17057.1.2 switch=n enabled=y phases=2 Linecode=1P_OH_AL_2/0_Rucina_0_416_0_2_2_2_2

New Line.l(r:p1udm17060-p1udt4878lv) Units=km Length=0.018144000000000004 bus1=p1udt4878lv.1.2 bus2=p1udm17060.1.2 switch=n enabled=y phases=2 Linecode=1P_OH_AL_2/0_Rucina_0_416_0_2_2_2_2

New Line.l(r:p1udt6821lv-p1ulv8029) Units=km Length=0.029654400000000004 bus1=p1udt6821lv.1.2 bus2=p1ulv8029.1.2 switch=n enabled=y phases=2 Linecode=1P_OH_AL_4/0_Zuzara_0_416_0_2_2_2_2

New Line.l(r:p1udt6823lv-p1ulv9267) Units=km Length=0.00734098 bus1=p1udt6823lv.1.2 bus2=p1ulv9267.1.2 switch=n enabled=y phases=2 Linecode=1P_OH_AL_2/0_Rucina_0_416_0_2_2_2_2

New Line.l(r:p1udm23529-p1ulv8031) Units=km Length=0.0247636 bus1=p1udm23529.1.2 bus2=p1ulv8031.1.2 switch=n enabled=y phases=2 Linecode=1P_OH_AL_2/0_Rucina_0_416_0_2_2_2_2

New Line.l(r:p1udm23529-p1ulv35269) Units=km Length=0.00557886 bus1=p1udm23529.1.2 bus2=p1ulv35269.1.2 switch=n enabled=y phases=2 Linecode=1P_OH_AL_2/0_Rucina_0_416_0_2_2_2_2

New Line.l(r:p1udm23531-p1ulv16780) Units=km Length=0.007309510000000001 bus1=p1udm23531.1.2 bus2=p1ulv16780.1.2 switch=n enabled=y phases=2 Linecode=1P_OH_AL_2/0_Rucina_0_416_0_2_2_2_2

New Line.l(r:p1udm23529-p1udm23531) Units=km Length=0.006691320000000001 bus1=p1udm23529.1.2 bus2=p1udm23531.1.2 switch=n enabled=y phases=2 Linecode=1P_OH_AL_2/0_Rucina_0_416_0_2_2_2_2

New Line.l(r:p1udm23529-p1udt6823lv) Units=km Length=0.0155218 bus1=p1udt6823lv.1.2 bus2=p1udm23529.1.2 switch=n enabled=y phases=2 Linecode=1P_OH_AL_2/0_Rucina_0_416_0_2_2_2_2

New Line.l(r:p1udm23532-p1ulv32047) Units=km Length=0.00560357 bus1=p1udm23532.1.2 bus2=p1ulv32047.1.2 switch=n enabled=y phases=2 Linecode=1P_OH_AL_2/0_Rucina_0_416_0_2_2_2_2

New Line.l(r:p1udm23534-p1ulv39058) Units=km Length=0.0102286 bus1=p1udm23534.1.2 bus2=p1ulv39058.1.2 switch=n enabled=y phases=2 Linecode=1P_OH_AL_2/0_Rucina_0_416_0_2_2_2_2

New Line.l(r:p1udm23532-p1udm23534) Units=km Length=0.0265812 bus1=p1udm23532.1.2 bus2=p1udm23534.1.2 switch=n enabled=y phases=2 Linecode=1P_OH_AL_2/0_Rucina_0_416_0_2_2_2_2

New Line.l(r:p1udm23532-p1udt6823lv) Units=km Length=0.020554600000000003 bus1=p1udt6823lv.1.2 bus2=p1udm23532.1.2 switch=n enabled=y phases=2 Linecode=1P_OH_AL_2/0_Rucina_0_416_0_2_2_2_2

New Line.l(r:p1udt8071lv-p1ulv9871) Units=km Length=0.00498222 bus1=p1udt8071lv.1.2 bus2=p1ulv9871.1.2 switch=n enabled=y phases=2 Linecode=1P_OH_AL_2/0_Rucina_0_416_0_2_2_2_2

New Line.l(r:p1udt11412lv-p1ulv15462) Units=km Length=0.0121113 bus1=p1udt11412lv.1.2 bus2=p1ulv15462.1.2 switch=n enabled=y phases=2 Linecode=1P_OH_AL_2/0_Rucina_0_416_0_2_2_2_2

New Line.l(r:p1udt11753lv-p1ulv16101) Units=km Length=0.0357246 bus1=p1udt11753lv.1.2 bus2=p1ulv16101.1.2 switch=n enabled=y phases=2 Linecode=1P_OH_AL_4/0_Zuzara_0_416_0_2_2_2_2

New Line.l(r:p1udm39489-p1ulv16779) Units=km Length=0.00989267 bus1=p1udm39489.1.2 bus2=p1ulv16779.1.2 switch=n enabled=y phases=2 Linecode=1P_OH_AL_2/0_Rucina_0_416_0_2_2_2_2

New Line.l(r:p1udm39489-p1udt12112lv) Units=km Length=0.011533300000000002 bus1=p1udt12112lv.1.2 bus2=p1udm39489.1.2 switch=n enabled=y phases=2 Linecode=1P_OH_AL_2/0_Rucina_0_416_0_2_2_2_2

New Line.l(r:p1udm39490-p1ulv64600) Units=km Length=0.0100522 bus1=p1udm39490.1.2 bus2=p1ulv64600.1.2 switch=n enabled=y phases=2 Linecode=1P_OH_AL_2/0_Rucina_0_416_0_2_2_2_2

New Line.l(r:p1udm39490-p1udt12112lv) Units=km Length=0.0130372 bus1=p1udt12112lv.1.2 bus2=p1udm39490.1.2 switch=n enabled=y phases=2 Linecode=1P_OH_AL_2/0_Rucina_0_416_0_2_2_2_2

New Line.l(r:p1udm40383-p1ulv17381) Units=km Length=0.014827700000000001 bus1=p1udm40383.1.2 bus2=p1ulv17381.1.2 switch=n enabled=y phases=2 Linecode=1P_OH_AL_2/0_Rucina_0_416_0_2_2_2_2

New Line.l(r:p1udm40383-p1ulv36540) Units=km Length=0.030672 bus1=p1udm40383.1.2 bus2=p1ulv36540.1.2 switch=n enabled=y phases=2 Linecode=1P_OH_AL_4/0_Zuzara_0_416_0_2_2_2_2

New Line.l(r:p1udm40383-p1udt12437lv) Units=km Length=0.0360765 bus1=p1udt12437lv.1.2 bus2=p1udm40383.1.2 switch=n enabled=y phases=2 Linecode=1P_OH_AL_4/0_Zuzara_0_416_0_2_2_2_2

New Line.l(r:p1udm40384-p1ulv20646) Units=km Length=0.0125039 bus1=p1udm40384.1.2 bus2=p1ulv20646.1.2 switch=n enabled=y phases=2 Linecode=1P_OH_AL_2/0_Rucina_0_416_0_2_2_2_2

New Line.l(r:p1udm40384-p1udt12437lv) Units=km Length=0.0374236 bus1=p1udt12437lv.1.2 bus2=p1udm40384.1.2 switch=n enabled=y phases=2 Linecode=1P_OH_AL_4/0_Zuzara_0_416_0_2_2_2_2

New Line.l(r:p1udt12767lv-p1ulv18068) Units=km Length=0.00680783 bus1=p1udt12767lv.1.2 bus2=p1ulv18068.1.2 switch=n enabled=y phases=2 Linecode=1P_OH_AL_2/0_Rucina_0_416_0_2_2_2_2

New Line.l(r:p1udt19878lv-p1ulv37762) Units=km Length=0.0232281 bus1=p1udt19878lv.1.2 bus2=p1ulv37762.1.2 switch=n enabled=y phases=2 Linecode=1P_UG_AL_4/0_Sweetbriar_0_416_0_2_2_2_2

New Line.l(r:p1udt19878lv-p1ulv49667) Units=km Length=0.013147300000000002 bus1=p1udt19878lv.1.2 bus2=p1ulv49667.1.2 switch=n enabled=y phases=2 Linecode=1P_UG_AL_1/0_Brenau_0_416_0_2_2_2_2

New Line.l(r:p1udt19878lv-p1ulv51539) Units=km Length=0.0121341 bus1=p1udt19878lv.1.2 bus2=p1ulv51539.1.2 switch=n enabled=y phases=2 Linecode=1P_UG_AL_2/0_Converse_0_416_0_2_2_2_2

New Line.l(r:p1udt20672lv-p1ulv40926) Units=km Length=0.010692 bus1=p1udt20672lv.1.2 bus2=p1ulv40926.1.2 switch=n enabled=y phases=2 Linecode=1P_OH_AL_2/0_Rucina_0_416_0_2_2_2_2

New Line.l(r:p1udt21395lv-p1ulv44093) Units=km Length=0.0106918 bus1=p1udt21395lv.1.2 bus2=p1ulv44093.1.2 switch=n enabled=y phases=2 Linecode=1P_OH_AL_2/0_Rucina_0_416_0_2_2_2_2

New Line.l(r:p1udt21646lv-p1ulv45357) Units=km Length=0.00982003 bus1=p1udt21646lv.1.2 bus2=p1ulv45357.1.2 switch=n enabled=y phases=2 Linecode=1P_OH_AL_2/0_Rucina_0_416_0_2_2_2_2

New Line.l(r:p1udt22056lv-p1ulv47242) Units=km Length=0.0647037 bus1=p1udt22056lv.1.2 bus2=p1ulv47242.1.2 switch=n enabled=y phases=2 Linecode=1P_UG_AL_4/0_Sweetbriar_0_416_0_2_2_2_2

New Line.l(r:p1udm62246-p1ulv55344) Units=km Length=0.0173261 bus1=p1udm62246.1.2 bus2=p1ulv55344.1.2 switch=n enabled=y phases=2 Linecode=1P_OH_AL_2/0_Rucina_0_416_0_2_2_2_2

New Line.l(r:p1udm62246-p1udt23602lv) Units=km Length=0.0268659 bus1=p1udt23602lv.1.2 bus2=p1udm62246.1.2 switch=n enabled=y phases=2 Linecode=1P_OH_AL_2/0_Rucina_0_416_0_2_2_2_2

New Line.l(r:p1udm62247-p1ulv57768) Units=km Length=0.011544700000000001 bus1=p1udm62247.1.2 bus2=p1ulv57768.1.2 switch=n enabled=y phases=2 Linecode=1P_OH_AL_2/0_Rucina_0_416_0_2_2_2_2

New Line.l(r:p1udm62247-p1udt23602lv) Units=km Length=0.0455605 bus1=p1udt23602lv.1.2 bus2=p1udm62247.1.2 switch=n enabled=y phases=2 Linecode=1P_OH_AL_4/0_Zuzara_0_416_0_2_2_2_2

New Line.l(r:p1udt17998-p1udt8071) Units=km Length=0.133486 bus1=p1udt17998-p1udt8071x.1 bus2=p1udt8071.1 switch=n enabled=y phases=1 Linecode=1P_OH_AL_ACSR_#2_Sparrow_12_47_0_1_1_1_1

New Line.l(r:p1udt19878-p1udt25103) Units=km Length=0.132474 bus1=p1udt19878-p1udt25103xx.2 bus2=p1udt19878-p1udt25103x.2 switch=n enabled=y phases=1 Linecode=1P_UG_AL_#2_15_12_47_0_1_1_1_1

New Line.l(r:p1udt1001-p1udt24376) Units=km Length=0.266912 bus1=p1udt1001-p1udt24376x.3 bus2=p1udt1001.3 switch=n enabled=y phases=1 Linecode=1P_OH_AL_ACSR_#2_Sparrow_12_47_0_1_1_1_1

New Line.l(r:p1udt24376-p1udt3364) Units=km Length=0.37658200000000003 bus1=p1udt24376-p1udt3364x.3 bus2=p1udt3364.3 switch=n enabled=y phases=1 Linecode=1P_OH_AL_ACSR_#2_Sparrow_12_47_0_1_1_1_1

New Line.l(r:p1udt12111-p1umv41) Units=km Length=0.22359400000000001 bus1=p1udt12111.1.2.3 bus2=p1udt12111_b1_1.1.2.3 switch=n enabled=y phases=3 Linecode=3P_OH_AL_ACSR_1033kcmil_Curlew_12.47_1_3_3_3_3

New Line.l(r:p1udt12437-p1udt4878) Units=km Length=0.0691643 bus1=p1udt12437-p1udt4878x.2 bus2=p1udt4878.2 switch=n enabled=y phases=1 Linecode=1P_OH_AL_ACSR_#2_Sparrow_12_47_0_1_1_1_1

New Line.l(r:p1udt11753-p1udt6822) Units=km Length=0.001 bus1=p1udt11753-p1udt6822x.3 bus2=p1udt11753.3 switch=n enabled=y phases=1 Linecode=1P_OH_AL_ACSR_#2_Sparrow_12_47_0_1_1_1_1

New Line.l(r:p1udt4517-p1udt9756) Units=km Length=0.0191445 bus1=p1udt4517-p1udt9756x.1 bus2=p1udt4517.1 switch=n enabled=y phases=1 Linecode=1P_OH_AL_ACSR_#2_Sparrow_12_47_0_1_1_1_1

New Line.l(r:p1udt14275-p1udt20672) Units=km Length=0.001 bus1=p1udt14275-p1udt20672x.1 bus2=p1udt20672.1 switch=n enabled=y phases=1 Linecode=1P_OH_AL_ACSR_#2_Sparrow_12_47_0_1_1_1_1

New Line.l(r:p1udt12111-p1uhs11_1247) Units=km Length=0.019517400000000004 bus1=p1udt12111-p1uhs11_1247x.1.2.3 bus2=p1udt12111.1.2.3 switch=n enabled=y phases=3 Linecode=3P_OH_AL_ACSR_1033kcmil_Curlew_12.47_1_3_3_3_3

New Line.l(r:p1udt17607-p1umv32) Units=km Length=0.24321300000000004 bus1=p1umv32.1.2.3 bus2=p1udt17607.1.2.3 switch=n enabled=y phases=3 Linecode=3P_OH_AL_ACSR_4/0_Penguin_12_47_0_3_3_3_3

New Line.l(r:p1udt24376-p1umv32) Units=km Length=0.482658 bus1=p1udt24376.1.2.3 bus2=p1umv32.1.2.3 switch=n enabled=y phases=3 Linecode=3P_OH_AL_ACSR_4/0_Penguin_12_47_0_3_3_3_3

New Line.l(r:p1udt24376-p1umv41) Units=km Length=0.131513 bus1=p1umv41.1.2.3 bus2=p1udt24376.1.2.3 switch=n enabled=y phases=3 Linecode=3P_OH_AL_ACSR_4/0_Penguin_12_47_0_3_3_3_3

New Line.l(r:p1udt12112-p1udt12437) Units=km Length=0.0868196 bus1=p1udt12437.1.2.3 bus2=p1udt12112.1.2.3 switch=n enabled=y phases=3 Linecode=3P_OH_AL_ACSR_4/0_Penguin_12_47_0_3_3_3_3

New Line.l(r:p1udt12437-p1udt6823) Units=km Length=0.0155218 bus1=p1udt6823.1.2.3 bus2=p1udt12437.1.2.3 switch=n enabled=y phases=3 Linecode=3P_OH_AL_ACSR_4/0_Penguin_12_47_0_3_3_3_3

New Line.l(r:p1udt2802-p1udt6823) Units=km Length=0.0607285 bus1=p1udt2802.1.2.3 bus2=p1udt6823.1.2.3 switch=n enabled=y phases=3 Linecode=3P_OH_AL_ACSR_4/0_Penguin_12_47_0_3_3_3_3

New Line.l(r:p1udt21646-p1udt2802) Units=km Length=0.0636809 bus1=p1udt2802.1.2.3 bus2=p1udt21646.1.2.3 switch=n enabled=y phases=3 Linecode=3P_OH_AL_ACSR_4/0_Penguin_12_47_0_3_3_3_3

New Line.l(r:p1udt21086-p1udt2802) Units=km Length=0.550128 bus1=p1udt21086.1.2.3 bus2=p1udt2802.1.2.3 switch=n enabled=y phases=3 Linecode=3P_OH_AL_ACSR_4/0_Penguin_12_47_0_3_3_3_3

New Line.l(r:p1udt21086-p1udt21647) Units=km Length=0.455891 bus1=p1udt21647.1.2.3 bus2=p1udt21086.1.2.3 switch=n enabled=y phases=3 Linecode=3P_OH_AL_ACSR_4/0_Penguin_12_47_0_3_3_3_3

New Line.l(r:p1udt12767-p1udt21647) Units=km Length=0.160702 bus1=p1udt12767.1.2.3 bus2=p1udt21647.1.2.3 switch=n enabled=y phases=3 Linecode=3P_OH_AL_ACSR_4/0_Penguin_12_47_0_3_3_3_3

New Line.l(r:p1udt12432-p1udt13096) Units=km Length=0.197472 bus1=p1udt12432-p1udt13096xx.1.2.3 bus2=p1udt12432-p1udt13096x.1.2.3 switch=n enabled=y phases=3 Linecode=3P_UG_AL_4/0_25_12_47_0_3_3_3_3

New Line.l(r:p1udt13096-p1udt3382) Units=km Length=0.0771836 bus1=p1udt13096-p1udt3382xx.1.2.3 bus2=p1udt13096-p1udt3382x.1.2.3 switch=n enabled=y phases=3 Linecode=3P_UG_AL_4/0_25_12_47_0_3_3_3_3

New Line.l(r:p1udt12431-p1udt3382) Units=km Length=0.199757 bus1=p1udt12431.1.2.3 bus2=p1udt3382.1.2.3 switch=n enabled=y phases=3 Linecode=3P_OH_AL_ACSR_4/0_Penguin_12_47_0_3_3_3_3

New Line.l(r:p1udt12431-p1udt24082) Units=km Length=0.217202 bus1=p1udt24082.1.2.3 bus2=p1udt12431.1.2.3 switch=n enabled=y phases=3 Linecode=3P_OH_AL_ACSR_4/0_Penguin_12_47_0_3_3_3_3

New Line.l(r:p1udt12767-p1udt24082) Units=km Length=0.184865 bus1=p1udt12767.1.2.3 bus2=p1udt24082.1.2.3 switch=n enabled=y phases=3 Linecode=3P_OH_AL_ACSR_4/0_Penguin_12_47_0_3_3_3_3

New Line.l(r:p1udt12111-p1udt12767) Units=km Length=0.156015 bus1=p1udt12111.1.2.3 bus2=p1udt12767.1.2.3 switch=n enabled=y phases=3 Linecode=3P_OH_AL_ACSR_4/0_Penguin_12_47_0_3_3_3_3

New Line.l(r:p1udt12111lv-p1ulv16778) Units=km Length=0.0105388 bus1=p1udt12111lv.1.2.3 bus2=p1ulv16778.1.2.3 switch=n enabled=y phases=3 Linecode=3P_UG_AL_350kcmil_15_0_416_0_3_3_3_3

New Line.l(r:p1udt24376lv-p1ulv59556) Units=km Length=0.0110225 bus1=p1udt24376lv.1.2.3 bus2=p1ulv59556.1.2.3 switch=n enabled=y phases=3 Linecode=3P_UG_AL_750kcmil_25_0_416_0_3_3_3_3

New Line.l(r:p1udt24376-p1umv8) Units=km Length=0.465487 bus1=p1udt24376.1.2.3 bus2=p1umv8.1.2.3 switch=n enabled=y phases=3 Linecode=3P_OH_AL_ACSR_4/0_Penguin_12_47_0_3_3_3_3

New Line.l(r:p1udt17607lv-p1ulv30138) Units=km Length=0.00738237 bus1=p1udt17607lv.1.2.3 bus2=p1ulv30138.1.2.3 switch=n enabled=y phases=3 Linecode=3P_UG_AL_350kcmil_15_0_416_0_3_3_3_3

New Line.l(r:p1udm52708-p1ulv45990) Units=km Length=0.00935081 bus1=p1udm52708.1.2.3 bus2=p1ulv45990.1.2.3 switch=n enabled=y phases=3 Linecode=3P_UG_AL_750kcmil_25_0_416_0_3_3_3_3

New Line.l(r:p1udm52708-p1udt17607lv) Units=km Length=0.0414641 bus1=p1udt17607lv.1.2.3 bus2=p1udm52708.1.2.3 switch=n enabled=y phases=3 Linecode=3P_UG_AL_750kcmil_25_0_416_0_3_3_3_3

New Line.l(r:p1udm43632-p1ulv19984) Units=km Length=0.00553466 bus1=p1udm43632.1.2.3 bus2=p1ulv19984.1.2.3 switch=n enabled=y phases=3 Linecode=3P_UG_AL_350kcmil_15_0_416_0_3_3_3_3

New Line.l(r:p1udm43632-p1udt13686lv) Units=km Length=0.047705700000000004 bus1=p1udt13686lv.1.2.3 bus2=p1udm43632.1.2.3 switch=n enabled=y phases=3 Linecode=3P_UG_AL_350kcmil_15_0_416_0_3_3_3_3

New Line.l(r:p1udm43633-p1ulv53451) Units=km Length=0.00661375 bus1=p1udm43633.1.2.3 bus2=p1ulv53451.1.2.3 switch=n enabled=y phases=3 Linecode=3P_UG_AL_350kcmil_15_0_416_0_3_3_3_3

New Line.l(r:p1udm43633-p1udt13686lv) Units=km Length=0.050204200000000004 bus1=p1udt13686lv.1.2.3 bus2=p1udm43633.1.2.3 switch=n enabled=y phases=3 Linecode=3P_UG_AL_350kcmil_15_0_416_0_3_3_3_3

New Line.l(r:p1udt13686-p1udt17607) Units=km Length=0.0963039 bus1=p1udt13686-p1udt17607xx.1.2.3 bus2=p1udt13686-p1udt17607x.1.2.3 switch=n enabled=y phases=3 Linecode=3P_UG_AL_4/0_25_12_47_0_3_3_3_3

New Line.l(r:p1udt20200lv-p1ulv39033) Units=km Length=0.00473254 bus1=p1udt20200lv.1.2.3 bus2=p1ulv39033.1.2.3 switch=n enabled=y phases=3 Linecode=3P_UG_AL_750kcmil_25_0_416_0_3_3_3_3

New Line.l(r:p1udt22053lv-p1ulv47221) Units=km Length=0.00841429 bus1=p1udt22053lv.1.2.3 bus2=p1ulv47221.1.2.3 switch=n enabled=y phases=3 Linecode=3P_UG_AL_350kcmil_15_0_416_0_3_3_3_3

New Line.l(r:p1udt20200-p1udt22053) Units=km Length=0.140162 bus1=p1udt20200.1.2.3 bus2=p1udt22053.1.2.3 switch=n enabled=y phases=3 Linecode=3P_OH_AL_ACSR_4/0_Penguin_12_47_0_3_3_3_3

New Line.l(r:p1udt17607-p1udt20200) Units=km Length=0.193476 bus1=p1udt17607.1.2.3 bus2=p1udt20200.1.2.3 switch=n enabled=y phases=3 Linecode=3P_OH_AL_ACSR_4/0_Penguin_12_47_0_3_3_3_3

New Line.l(r:p1udt25103lv-p1ulv63943) Units=km Length=0.00638969 bus1=p1udt25103lv.1.2.3 bus2=p1ulv63943.1.2.3 switch=n enabled=y phases=3 Linecode=3P_UG_AL_350kcmil_15_0_416_0_3_3_3_3

New Line.l(r:p1udt17998lv-p1ulv31386) Units=km Length=0.00905364 bus1=p1udt17998lv.1.2.3 bus2=p1ulv31386.1.2.3 switch=n enabled=y phases=3 Linecode=3P_UG_AL_750kcmil_25_0_416_0_3_3_3_3

New Line.l(r:p1udt17998-p1udt25103) Units=km Length=0.293334 bus1=p1udt25103.1.2.3 bus2=p1udt17998.1.2.3 switch=n enabled=y phases=3 Linecode=3P_OH_AL_ACSR_4/0_Penguin_12_47_0_3_3_3_3

New Line.l(r:p1udt17607-p1udt25103) Units=km Length=0.20670500000000003 bus1=p1udt17607-p1udt25103x.1.2.3 bus2=p1udt17607-p1udt25103xx.1.2.3 switch=n enabled=y phases=3 Linecode=3P_UG_AL_4/0_25_12_47_0_3_3_3_3

New Line.l(r:p1udt21647lv-p1ulv45359) Units=km Length=0.014084100000000002 bus1=p1udt21647lv.1.2.3 bus2=p1ulv45359.1.2.3 switch=n enabled=y phases=3 Linecode=3P_UG_AL_750kcmil_25_0_416_0_3_3_3_3

New Line.l(r:p1udt21086lv-p1ulv42761) Units=km Length=0.0189933 bus1=p1udt21086lv.1.2.3 bus2=p1ulv42761.1.2.3 switch=n enabled=y phases=3 Linecode=3P_UG_AL_750kcmil_25_0_416_0_3_3_3_3

New Line.l(r:p1udt12765lv-p1ulv18065) Units=km Length=0.005732830000000001 bus1=p1udt12765lv.1.2.3 bus2=p1ulv18065.1.2.3 switch=n enabled=y phases=3 Linecode=3P_UG_AL_350kcmil_15_0_416_0_3_3_3_3

New Line.l(r:p1udt2801lv-p1ulv2988) Units=km Length=0.00456027 bus1=p1udt2801lv.1.2.3 bus2=p1ulv2988.1.2.3 switch=n enabled=y phases=3 Linecode=3P_UG_AL_350kcmil_15_0_416_0_3_3_3_3

New Line.l(r:p1udt17826lv-p1ulv30790) Units=km Length=0.0122537 bus1=p1udt17826lv.1.2.3 bus2=p1ulv30790.1.2.3 switch=n enabled=y phases=3 Linecode=3P_UG_AL_350kcmil_15_0_416_0_3_3_3_3

New Line.l(r:p1udt15570lv-p1ulv24479) Units=km Length=0.012714000000000001 bus1=p1udt15570lv.1.2.3 bus2=p1ulv24479.1.2.3 switch=n enabled=y phases=3 Linecode=3P_UG_AL_350kcmil_15_0_416_0_3_3_3_3

New Line.l(r:p1udt6822lv-p1ulv8030) Units=km Length=0.014283000000000002 bus1=p1udt6822lv.1.2.3 bus2=p1ulv8030.1.2.3 switch=n enabled=y phases=3 Linecode=3P_UG_AL_350kcmil_15_0_416_0_3_3_3_3

New Line.l(r:p1udt18205lv-p1ulv32046) Units=km Length=0.0102667 bus1=p1udt18205lv.1.2.3 bus2=p1ulv32046.1.2.3 switch=n enabled=y phases=3 Linecode=3P_UG_AL_350kcmil_15_0_416_0_3_3_3_3

New Line.l(r:p1udt12434lv-p1ulv17378) Units=km Length=0.0144722 bus1=p1udt12434lv.1.2.3 bus2=p1ulv17378.1.2.3 switch=n enabled=y phases=3 Linecode=3P_UG_AL_350kcmil_15_0_416_0_3_3_3_3

New Line.l(r:p1udt22446lv-p1ulv49105) Units=km Length=0.010621600000000002 bus1=p1udt22446lv.1.2.3 bus2=p1ulv49105.1.2.3 switch=n enabled=y phases=3 Linecode=3P_UG_AL_350kcmil_15_0_416_0_3_3_3_3

New Line.l(r:p1udt25134lv-p1ulv64154) Units=km Length=0.00706179 bus1=p1udt25134lv.1.2.3 bus2=p1ulv64154.1.2.3 switch=n enabled=y phases=3 Linecode=3P_UG_AL_350kcmil_15_0_416_0_3_3_3_3

New Line.l(r:p1udt22446-p1udt25134) Units=km Length=0.05890320000000001 bus1=p1udt22446.1.2.3 bus2=p1udt25134.1.2.3 switch=n enabled=y phases=3 Linecode=3P_OH_AL_ACSR_4/0_Penguin_12_47_0_3_3_3_3

New Line.l(r:p1udt12434-p1udt22446) Units=km Length=0.07873650000000001 bus1=p1udt12434.1.2.3 bus2=p1udt22446.1.2.3 switch=n enabled=y phases=3 Linecode=3P_OH_AL_ACSR_4/0_Penguin_12_47_0_3_3_3_3

New Line.l(r:p1udt12434-p1udt18205) Units=km Length=0.0197259 bus1=p1udt18205.1.2.3 bus2=p1udt12434.1.2.3 switch=n enabled=y phases=3 Linecode=3P_OH_AL_ACSR_4/0_Penguin_12_47_0_3_3_3_3

New Line.l(r:p1udt18205-p1udt6822) Units=km Length=0.0592039 bus1=p1udt6822.1.2.3 bus2=p1udt18205.1.2.3 switch=n enabled=y phases=3 Linecode=3P_OH_AL_ACSR_4/0_Penguin_12_47_0_3_3_3_3

New Line.l(r:p1udt15570-p1udt6822) Units=km Length=0.058558700000000005 bus1=p1udt15570.1.2.3 bus2=p1udt6822.1.2.3 switch=n enabled=y phases=3 Linecode=3P_OH_AL_ACSR_4/0_Penguin_12_47_0_3_3_3_3

New Line.l(r:p1udt15570-p1udt17826) Units=km Length=0.0381973 bus1=p1udt17826.1.2.3 bus2=p1udt15570.1.2.3 switch=n enabled=y phases=3 Linecode=3P_OH_AL_ACSR_4/0_Penguin_12_47_0_3_3_3_3

New Line.l(r:p1udt22313lv-p1ulv48482) Units=km Length=0.0122608 bus1=p1udt22313lv.1.2.3 bus2=p1ulv48482.1.2.3 switch=n enabled=y phases=3 Linecode=3P_UG_AL_350kcmil_15_0_416_0_3_3_3_3

New Line.l(r:p1udt9756lv-p1ulv12553) Units=km Length=0.00909124 bus1=p1udt9756lv.1.2.3 bus2=p1ulv12553.1.2.3 switch=n enabled=y phases=3 Linecode=3P_UG_AL_350kcmil_15_0_416_0_3_3_3_3

New Line.l(r:p1udm32710-p1ulv13789) Units=km Length=0.00360224 bus1=p1udm32710.1.2.3 bus2=p1ulv13789.1.2.3 switch=n enabled=y phases=3 Linecode=3P_UG_AL_350kcmil_15_0_416_0_3_3_3_3

New Line.l(r:p1udm32710-p1udt9756lv) Units=km Length=0.0574112 bus1=p1udt9756lv.1.2.3 bus2=p1udm32710.1.2.3 switch=n enabled=y phases=3 Linecode=3P_UG_AL_350kcmil_15_0_416_0_3_3_3_3

New Line.l(r:p1udm32711-p1ulv49869) Units=km Length=0.0060632 bus1=p1udm32711.1.2.3 bus2=p1ulv49869.1.2.3 switch=n enabled=y phases=3 Linecode=3P_UG_AL_350kcmil_15_0_416_0_3_3_3_3

New Line.l(r:p1udm32711-p1ulv52863) Units=km Length=0.00768891 bus1=p1udm32711.1.2.3 bus2=p1ulv52863.1.2.3 switch=n enabled=y phases=3 Linecode=3P_UG_AL_350kcmil_15_0_416_0_3_3_3_3

New Line.l(r:p1udm32711-p1udt9756lv) Units=km Length=0.019131000000000002 bus1=p1udt9756lv.1.2.3 bus2=p1udm32711.1.2.3 switch=n enabled=y phases=3 Linecode=3P_UG_AL_750kcmil_25_0_416_0_3_3_3_3

New Line.l(r:p1udt6821-p1udt9756) Units=km Length=0.0382667 bus1=p1udt6821.1.2.3 bus2=p1udt9756.1.2.3 switch=n enabled=y phases=3 Linecode=3P_OH_AL_ACSR_4/0_Penguin_12_47_0_3_3_3_3

New Line.l(r:p1udt22313-p1udt6821) Units=km Length=0.103257 bus1=p1udt22313.1.2.3 bus2=p1udt6821.1.2.3 switch=n enabled=y phases=3 Linecode=3P_OH_AL_ACSR_4/0_Penguin_12_47_0_3_3_3_3

New Line.l(r:p1udt17826-p1udt22313) Units=km Length=0.0190942 bus1=p1udt17826.1.2.3 bus2=p1udt22313.1.2.3 switch=n enabled=y phases=3 Linecode=3P_OH_AL_ACSR_4/0_Penguin_12_47_0_3_3_3_3

New Line.l(r:p1udt17826-p1udt2801) Units=km Length=0.0346838 bus1=p1udt2801.1.2.3 bus2=p1udt17826.1.2.3 switch=n enabled=y phases=3 Linecode=3P_OH_AL_ACSR_4/0_Penguin_12_47_0_3_3_3_3

New Line.l(r:p1udt12765-p1udt2801) Units=km Length=0.0377679 bus1=p1udt12765.1.2.3 bus2=p1udt2801.1.2.3 switch=n enabled=y phases=3 Linecode=3P_OH_AL_ACSR_4/0_Penguin_12_47_0_3_3_3_3

New Line.l(r:p1udt20956lv-p1ulv42171) Units=km Length=0.012191100000000002 bus1=p1udt20956lv.1.2.3 bus2=p1ulv42171.1.2.3 switch=n enabled=y phases=3 Linecode=3P_UG_AL_350kcmil_15_0_416_0_3_3_3_3

New Line.l(r:p1udt20956-p1udt21395) Units=km Length=0.015124600000000002 bus1=p1udt21395.1.2.3 bus2=p1udt20956.1.2.3 switch=n enabled=y phases=3 Linecode=3P_OH_AL_ACSR_4/0_Penguin_12_47_0_3_3_3_3

New Line.l(r:p1udt12765-p1udt21395) Units=km Length=0.0151158 bus1=p1udt12765.1.2.3 bus2=p1udt21395.1.2.3 switch=n enabled=y phases=3 Linecode=3P_OH_AL_ACSR_4/0_Penguin_12_47_0_3_3_3_3

New Line.l(r:p1udt12765-p1udt416) Units=km Length=0.0163361 bus1=p1udt416.1.2.3 bus2=p1udt12765.1.2.3 switch=n enabled=y phases=3 Linecode=3P_OH_AL_ACSR_4/0_Penguin_12_47_0_3_3_3_3

New Line.l(r:p1udt12112-p1udt416) Units=km Length=0.0326591 bus1=p1udt12112.1.2.3 bus2=p1udt416.1.2.3 switch=n enabled=y phases=3 Linecode=3P_OH_AL_ACSR_4/0_Penguin_12_47_0_3_3_3_3

New Line.l(r:p1udt10379lv-p1ulv13611) Units=km Length=0.011921 bus1=p1udt10379lv.1.2.3 bus2=p1ulv13611.1.2.3 switch=n enabled=y phases=3 Linecode=3P_UG_AL_350kcmil_15_0_416_0_3_3_3_3

New Line.l(r:p1udt10379-p1udt12112) Units=km Length=0.0230757 bus1=p1udt12112.1.2.3 bus2=p1udt10379.1.2.3 switch=n enabled=y phases=3 Linecode=3P_OH_AL_ACSR_4/0_Penguin_12_47_0_3_3_3_3

New Line.l(r:p1udt23603lv-p1ulv55346) Units=km Length=0.0155583 bus1=p1udt23603lv.1.2.3 bus2=p1ulv55346.1.2.3 switch=n enabled=y phases=3 Linecode=3P_UG_AL_350kcmil_15_0_416_0_3_3_3_3

New Line.l(r:p1udt23604lv-p1ulv55347) Units=km Length=0.0175589 bus1=p1udt23604lv.1.2.3 bus2=p1ulv55347.1.2.3 switch=n enabled=y phases=3 Linecode=3P_UG_AL_350kcmil_15_0_416_0_3_3_3_3

New Line.l(r:p1udt23603-p1udt23604) Units=km Length=0.01631 bus1=p1udt23603.1.2.3 bus2=p1udt23604.1.2.3 switch=n enabled=y phases=3 Linecode=3P_OH_AL_ACSR_4/0_Penguin_12_47_0_3_3_3_3

New Line.l(r:p1udt12112-p1udt23603) Units=km Length=0.0260744 bus1=p1udt12112.1.2.3 bus2=p1udt23603.1.2.3 switch=n enabled=y phases=3 Linecode=3P_OH_AL_ACSR_4/0_Penguin_12_47_0_3_3_3_3

New Line.l(r:p1udt21646-p1umv20) Units=km Length=0.0642581 bus1=p1udt21646.1.2.3 bus2=p1umv20.1.2.3 switch=n enabled=y phases=3 Linecode=3P_OH_AL_ACSR_4/0_Penguin_12_47_0_3_3_3_3

New Line.l(r:p1udt20527lv-p1ulv40331) Units=km Length=0.0202333 bus1=p1udt20527lv.1.2.3 bus2=p1ulv40331.1.2.3 switch=n enabled=y phases=3 Linecode=3P_UG_AL_350kcmil_15_0_416_0_3_3_3_3

New Line.l(r:p1udt20527-p1udt21646) Units=km Length=0.23658 bus1=p1udt21646.1.2.3 bus2=p1udt20527.1.2.3 switch=n enabled=y phases=3 Linecode=3P_OH_AL_ACSR_4/0_Penguin_12_47_0_3_3_3_3

New Line.l(r:p1udt14275lv-p1ulv21302) Units=km Length=0.00828517 bus1=p1udt14275lv.1.2.3 bus2=p1ulv21302.1.2.3 switch=n enabled=y phases=3 Linecode=3P_UG_AL_350kcmil_15_0_416_0_3_3_3_3

New Line.l(r:p1udt8500lv-p1ulv10511) Units=km Length=0.00931976 bus1=p1udt8500lv.1.2.3 bus2=p1ulv10511.1.2.3 switch=n enabled=y phases=3 Linecode=3P_UG_AL_350kcmil_15_0_416_0_3_3_3_3

New Line.l(r:p1udt11412-p1udt8500) Units=km Length=0.042359 bus1=p1udt11412.1.2.3 bus2=p1udt8500.1.2.3 switch=n enabled=y phases=3 Linecode=3P_OH_AL_ACSR_4/0_Penguin_12_47_0_3_3_3_3

New Line.l(r:p1udt11412-p1udt14275) Units=km Length=0.0314898 bus1=p1udt14275.1.2.3 bus2=p1udt11412.1.2.3 switch=n enabled=y phases=3 Linecode=3P_OH_AL_ACSR_4/0_Penguin_12_47_0_3_3_3_3

New Line.l(r:p1udt14275-p1udt23602) Units=km Length=0.0940755 bus1=p1udt23602.1.2.3 bus2=p1udt14275.1.2.3 switch=n enabled=y phases=3 Linecode=3P_OH_AL_ACSR_4/0_Penguin_12_47_0_3_3_3_3

New Line.l(r:p1udt21646-p1udt23602) Units=km Length=0.137655 bus1=p1udt21646.1.2.3 bus2=p1udt23602.1.2.3 switch=n enabled=y phases=3 Linecode=3P_OH_AL_ACSR_4/0_Penguin_12_47_0_3_3_3_3

New Line.l(r:p1udt21936lv-p1ulv46649) Units=km Length=0.0184478 bus1=p1udt21936lv.1.2.3 bus2=p1ulv46649.1.2.3 switch=n enabled=y phases=3 Linecode=3P_UG_AL_750kcmil_25_0_416_0_3_3_3_3

New Line.l(r:p1udt21647-p1udt21936) Units=km Length=0.133935 bus1=p1udt21647.1.2.3 bus2=p1udt21936.1.2.3 switch=n enabled=y phases=3 Linecode=3P_OH_AL_ACSR_4/0_Penguin_12_47_0_3_3_3_3

New Line.l(r:p1udt24082lv-p1ulv57770) Units=km Length=0.006834010000000001 bus1=p1udt24082lv.1.2.3 bus2=p1ulv57770.1.2.3 switch=n enabled=y phases=3 Linecode=3P_UG_AL_350kcmil_15_0_416_0_3_3_3_3

New Line.l(r:p1udt2222lv-p1ulv2347) Units=km Length=0.00935694 bus1=p1udt2222lv.1.2.3 bus2=p1ulv2347.1.2.3 switch=n enabled=y phases=3 Linecode=3P_UG_AL_750kcmil_25_0_416_0_3_3_3_3

New Line.l(r:p1udt15059lv-p1ulv23184) Units=km Length=0.00638038 bus1=p1udt15059lv.1.2.3 bus2=p1ulv23184.1.2.3 switch=n enabled=y phases=3 Linecode=3P_UG_AL_750kcmil_25_0_416_0_3_3_3_3

New Line.l(r:p1udt15059-p1udt2222) Units=km Length=0.0710091 bus1=p1udt2222.1.2.3 bus2=p1udt15059.1.2.3 switch=n enabled=y phases=3 Linecode=3P_OH_AL_ACSR_4/0_Penguin_12_47_0_3_3_3_3

New Line.l(r:p1udt2222-p1udt24082) Units=km Length=0.130336 bus1=p1udt24082.1.2.3 bus2=p1udt2222.1.2.3 switch=n enabled=y phases=3 Linecode=3P_OH_AL_ACSR_4/0_Penguin_12_47_0_3_3_3_3

New Line.l(r:p1udt12431lv-p1ulv17375) Units=km Length=0.0158429 bus1=p1udt12431lv.1.2.3 bus2=p1ulv17375.1.2.3 switch=n enabled=y phases=3 Linecode=3P_UG_AL_4/0_15_0_416_0_3_3_3_3

New Line.l(r:p1udt3382lv-p1ulv3634) Units=km Length=0.018147 bus1=p1udt3382lv.1.2.3 bus2=p1ulv3634.1.2.3 switch=n enabled=y phases=3 Linecode=3P_UG_AL_350kcmil_15_0_416_0_3_3_3_3

New Line.l(r:p1udt5909lv-p1ulv6791) Units=km Length=0.0112922 bus1=p1udt5909lv.1.2.3 bus2=p1ulv6791.1.2.3 switch=n enabled=y phases=3 Linecode=3P_UG_AL_350kcmil_15_0_416_0_3_3_3_3

New Line.l(r:p1udt15058lv-p1ulv23183) Units=km Length=0.0155574 bus1=p1udt15058lv.1.2.3 bus2=p1ulv23183.1.2.3 switch=n enabled=y phases=3 Linecode=3P_UG_AL_750kcmil_25_0_416_0_3_3_3_3

New Line.l(r:p1udt15058-p1udt5909) Units=km Length=0.0423295 bus1=p1udt5909.1.2.3 bus2=p1udt15058.1.2.3 switch=n enabled=y phases=3 Linecode=3P_OH_AL_ACSR_4/0_Penguin_12_47_0_3_3_3_3

New Line.l(r:p1udt3382-p1udt5909) Units=km Length=0.1144 bus1=p1udt3382.1.2.3 bus2=p1udt5909.1.2.3 switch=n enabled=y phases=3 Linecode=3P_OH_AL_ACSR_4/0_Penguin_12_47_0_3_3_3_3

New Line.l(r:p1udt13096lv-p1ulv18710) Units=km Length=0.0373559 bus1=p1udt13096lv.1.2.3 bus2=p1ulv18710.1.2.3 switch=n enabled=y phases=3 Linecode=3P_UG_AL_350kcmil_15_0_416_0_3_3_3_3

New Line.l(r:p1udt12432lv-p1ulv17376) Units=km Length=0.0298758 bus1=p1udt12432lv.1.2.3 bus2=p1ulv17376.1.2.3 switch=n enabled=y phases=3 Linecode=3P_UG_AL_350kcmil_15_0_416_0_3_3_3_3

New Line.l(r:p1udt21246lv-p1ulv43448) Units=km Length=0.03582210000000001 bus1=p1udt21246lv.1.2.3 bus2=p1ulv43448.1.2.3 switch=n enabled=y phases=3 Linecode=3P_UG_AL_350kcmil_15_0_416_0_3_3_3_3

New Line.l(r:p1udt4875lv-p1ulv5475) Units=km Length=0.0335004 bus1=p1udt4875lv.1.2.3 bus2=p1ulv5475.1.2.3 switch=n enabled=y phases=3 Linecode=3P_UG_AL_350kcmil_15_0_416_0_3_3_3_3

New Line.l(r:p1udt21246-p1udt4875) Units=km Length=0.0972209 bus1=p1udt21246-p1udt4875x.1.2.3 bus2=p1udt21246-p1udt4875xx.1.2.3 switch=n enabled=y phases=3 Linecode=3P_UG_AL_4/0_25_12_47_0_3_3_3_3

New Line.l(r:p1udt12432-p1udt21246) Units=km Length=0.192928 bus1=p1udt12432-p1udt21246x.1.2.3 bus2=p1udt12432-p1udt21246xx.1.2.3 switch=n enabled=y phases=3 Linecode=3P_UG_AL_4/0_25_12_47_0_3_3_3_3

New Line.l(r:p1udm58004-p1ulv40329) Units=km Length=0.0475853 bus1=p1udm58004.1.2.3 bus2=p1ulv40329.1.2.3 switch=n enabled=y phases=3 Linecode=3P_UG_AL_350kcmil_15_0_416_0_3_3_3_3

New Line.l(r:p1udm58004-p1udt20525lv) Units=km Length=0.025293 bus1=p1udt20525lv.1.2.3 bus2=p1udm58004.1.2.3 switch=n enabled=y phases=3 Linecode=3P_UG_AL_350kcmil_15_0_416_0_3_3_3_3

New Line.l(r:p1udm58005-p1ulv42759) Units=km Length=0.0444658 bus1=p1udm58005.1.2.3 bus2=p1ulv42759.1.2.3 switch=n enabled=y phases=3 Linecode=3P_UG_AL_350kcmil_15_0_416_0_3_3_3_3

New Line.l(r:p1udm58006-p1ulv47241) Units=km Length=0.03591 bus1=p1udm58006.1.2.3 bus2=p1ulv47241.1.2.3 switch=n enabled=y phases=3 Linecode=3P_UG_AL_350kcmil_15_0_416_0_3_3_3_3

New Line.l(r:p1udm58005-p1udm58006) Units=km Length=0.0196029 bus1=p1udm58005.1.2.3 bus2=p1udm58006.1.2.3 switch=n enabled=y phases=3 Linecode=3P_UG_AL_350kcmil_15_0_416_0_3_3_3_3

New Line.l(r:p1udm58005-p1udt20525lv) Units=km Length=0.0196029 bus1=p1udt20525lv.1.2.3 bus2=p1udm58005.1.2.3 switch=n enabled=y phases=3 Linecode=3P_UG_AL_350kcmil_15_0_416_0_3_3_3_3

New Line.l(r:p1udt20525-p1udt22056) Units=km Length=0.0196029 bus1=p1udt20525-p1udt22056xx.1.2.3 bus2=p1udt20525-p1udt22056x.1.2.3 switch=n enabled=y phases=3 Linecode=3P_UG_AL_4/0_25_12_47_0_3_3_3_3

New Line.l(r:p1udt12432-p1udt22056) Units=km Length=0.117418 bus1=p1udt12432-p1udt22056x.1.2.3 bus2=p1udt12432-p1udt22056xx.1.2.3 switch=n enabled=y phases=3 Linecode=3P_UG_AL_4/0_25_12_47_0_3_3_3_3

New Line.l(r:p1udm57731-p1ulv39673) Units=km Length=0.0135882 bus1=p1udm57731.1.2.3 bus2=p1ulv39673.1.2.3 switch=n enabled=y phases=3 Linecode=3P_UG_AL_750kcmil_25_0_416_0_3_3_3_3

New Line.l(r:p1udm57731-p1udt20371lv) Units=km Length=0.0323544 bus1=p1udt20371lv.1.2.3 bus2=p1udm57731.1.2.3 switch=n enabled=y phases=3 Linecode=3P_UG_AL_750kcmil_25_0_416_0_3_3_3_3

New Line.l(r:p1udm57732-p1ulv48483) Units=km Length=0.0126173 bus1=p1udm57732.1.2.3 bus2=p1ulv48483.1.2.3 switch=n enabled=y phases=3 Linecode=3P_UG_AL_350kcmil_15_0_416_0_3_3_3_3

New Line.l(r:p1udm57732-p1udt20371lv) Units=km Length=0.0905357 bus1=p1udt20371lv.1.2.3 bus2=p1udm57732.1.2.3 switch=n enabled=y phases=3 Linecode=3P_UG_AL_350kcmil_15_0_416_0_3_3_3_3

New Line.l(r:p1udt25108lv-p1ulv63961) Units=km Length=0.0677247 bus1=p1udt25108lv.1.2.3 bus2=p1ulv63961.1.2.3 switch=n enabled=y phases=3 Linecode=3P_UG_AL_750kcmil_25_0_416_0_3_3_3_3

New Line.l(r:p1udt19168lv-p1ulv35272) Units=km Length=0.010276400000000002 bus1=p1udt19168lv.1.2.3 bus2=p1ulv35272.1.2.3 switch=n enabled=y phases=3 Linecode=3P_UG_AL_750kcmil_25_0_416_0_3_3_3_3

New Line.l(r:p1udt19168-p1udt25108) Units=km Length=0.0437544 bus1=p1udt25108.1.2.3 bus2=p1udt19168.1.2.3 switch=n enabled=y phases=3 Linecode=3P_OH_AL_ACSR_4/0_Penguin_12_47_0_3_3_3_3

New Line.l(r:p1udt20371-p1udt25108) Units=km Length=0.140737 bus1=p1udt20371.1.2.3 bus2=p1udt25108.1.2.3 switch=n enabled=y phases=3 Linecode=3P_OH_AL_ACSR_4/0_Penguin_12_47_0_3_3_3_3

New Line.l(r:p1udt20371-p1udt3382) Units=km Length=0.0936254 bus1=p1udt3382.1.2.3 bus2=p1udt20371.1.2.3 switch=n enabled=y phases=3 Linecode=3P_OH_AL_ACSR_4/0_Penguin_12_47_0_3_3_3_3

New Line.l(r:p1udt25194lv-p1ulv64601) Units=km Length=0.0369992 bus1=p1udt25194lv.1.2.3 bus2=p1ulv64601.1.2.3 switch=n enabled=y phases=3 Linecode=3P_UG_AL_750kcmil_25_0_416_0_3_3_3_3

New Line.l(r:p1udt12767-p1udt25194) Units=km Length=0.0635711 bus1=p1udt12767.1.2.3 bus2=p1udt25194.1.2.3 switch=n enabled=y phases=3 Linecode=3P_OH_AL_ACSR_4/0_Penguin_12_47_0_3_3_3_3

New Line.l(r:p1udt14538-p1udt25103) Units=km Length=0.195762 bus1=p1udt14538-p1udt25103x.1.2.3 bus2=p1udt14538-p1udt25103xx.1.2.3 switch=n enabled=y phases=3 Linecode=3P_OH_AL_ACSR_1033kcmil_Curlew_12.47_1_3_3_3_3

New Line.l(r:p1udt17663-p1udt9756) Units=km Length=0.264432 bus1=p1udt17663-p1udt9756x.1.2.3 bus2=p1udt9756.1.2.3 switch=n enabled=y phases=3 Linecode=3P_OH_AL_ACSR_1033kcmil_Curlew_12.47_1_3_3_3_3

New Line.l(r:p1udt4875-p1udt8498) Units=km Length=0.15125 bus1=p1udt4875-p1udt8498x.1.2.3 bus2=p1udt8498.1.2.3 switch=n enabled=y phases=3 Linecode=3P_OH_AL_ACSR_1033kcmil_Curlew_12.47_1_3_3_3_3

New Line.l(r:p1umv24-p1umv41) Units=km Length=0.593677 bus1=p1umv24-p1umv41x.1.2.3 bus2=p1umv41.1.2.3 switch=n enabled=y phases=3 Linecode=3P_OH_AL_ACSR_1033kcmil_Curlew_12.47_1_3_3_3_3

New Line.l(r:p1udt11100-p1udt21936) Units=km Length=0.130189 bus1=p1udt11100-p1udt21936x.1.2.3 bus2=p1udt11100.1.2.3 switch=n enabled=y phases=3 Linecode=3P_OH_AL_ACSR_1033kcmil_Curlew_12.47_1_3_3_3_3

New Line.padswitch(r:p1udt19878-p1udt25103)p1u_247832 Units=km Length=0.001 bus1=p1udt19878-p1udt25103xxx.2 bus2=p1udt19878-p1udt25103xx.2 switch=y enabled=y phases=1 Linecode=padswitch_1_1_1_1

New Line.padswitch(r:p1udt19878-p1udt25103)p1u_247833 Units=km Length=0.001 bus1=p1udt19878-p1udt25103x.2 bus2=p1udt19878.2 switch=y enabled=y phases=1 Linecode=padswitch_1_2_1_1_1

New Line.padswitch(r:p1udt12432-p1udt13096)p1u_247844 Units=km Length=0.001 bus1=p1udt13096.1.2.3 bus2=p1udt12432-p1udt13096xx.1.2.3 switch=y enabled=y phases=3 Linecode=padswitch_3_3_3_3

New Line.padswitch(r:p1udt12432-p1udt13096)p1u_247845 Units=km Length=0.001 bus1=p1udt12432-p1udt13096x.1.2.3 bus2=p1udt12432.1.2.3 switch=y enabled=y phases=3 Linecode=padswitch_3_3_3_3_3

New Line.padswitch(r:p1udt13096-p1udt3382)p1u_247846 Units=km Length=0.001 bus1=p1udt3382.1.2.3 bus2=p1udt13096-p1udt3382xx.1.2.3 switch=y enabled=y phases=3 Linecode=padswitch_3_3_3_1_3_3

New Line.padswitch(r:p1udt13096-p1udt3382)p1u_247847 Units=km Length=0.001 bus1=p1udt13096-p1udt3382x.1.2.3 bus2=p1udt13096.1.2.3 switch=y enabled=y phases=3 Linecode=padswitch_3_3_3_1_3_1_3

New Line.padswitch(r:p1udt13686-p1udt17607)p1u_247830 Units=km Length=0.001 bus1=p1udt17607.1.2.3 bus2=p1udt13686-p1udt17607xx.1.2.3 switch=y enabled=y phases=3 Linecode=padswitch_3_3_3_1_3_1_3_1

New Line.padswitch(r:p1udt13686-p1udt17607)p1u_247831 Units=km Length=0.001 bus1=p1udt13686-p1udt17607x.1.2.3 bus2=p1udt13686.1.2.3 switch=y enabled=y phases=3 Linecode=padswitch_3_3_3_1_3_1_3_1

New Line.padswitch(r:p1udt17607-p1udt25103)p1u_247834 Units=km Length=0.001 bus1=p1udt17607.1.2.3 bus2=p1udt17607-p1udt25103x.1.2.3 switch=y enabled=y phases=3 Linecode=padswitch_3_3_3_1_3_1_3_1

New Line.padswitch(r:p1udt17607-p1udt25103)p1u_247835 Units=km Length=0.001 bus1=p1udt17607-p1udt25103xx.1.2.3 bus2=p1udt25103.1.2.3 switch=y enabled=y phases=3 Linecode=padswitch_3_3_3_1_3_1_3_1

New Line.padswitch(r:p1udt21246-p1udt4875)p1u_247836 Units=km Length=0.001 bus1=p1udt21246.1.2.3 bus2=p1udt21246-p1udt4875x.1.2.3 switch=y enabled=y phases=3 Linecode=padswitch_3_3_3_1_3_1_3_1

New Line.padswitch(r:p1udt21246-p1udt4875)p1u_247837 Units=km Length=0.001 bus1=p1udt21246-p1udt4875xx.1.2.3 bus2=p1udt4875.1.2.3 switch=y enabled=y phases=3 Linecode=padswitch_3_3_3_1_3_1_3_1

New Line.padswitch(r:p1udt12432-p1udt21246)p1u_247838 Units=km Length=0.001 bus1=p1udt12432.1.2.3 bus2=p1udt12432-p1udt21246x.1.2.3 switch=y enabled=y phases=3 Linecode=padswitch_3_3_3_1_3_1_3_1

New Line.padswitch(r:p1udt12432-p1udt21246)p1u_247839 Units=km Length=0.001 bus1=p1udt12432-p1udt21246xx.1.2.3 bus2=p1udt21246.1.2.3 switch=y enabled=y phases=3 Linecode=padswitch_3_3_3_1_3_1_3_1

New Line.padswitch(r:p1udt20525-p1udt22056)p1u_247840 Units=km Length=0.001 bus1=p1udt22056.1.2.3 bus2=p1udt20525-p1udt22056xx.1.2.3 switch=y enabled=y phases=3 Linecode=padswitch_3_3_3_1_3_1_3_1

New Line.padswitch(r:p1udt20525-p1udt22056)p1u_247841 Units=km Length=0.001 bus1=p1udt20525-p1udt22056x.1.2.3 bus2=p1udt20525.1.2.3 switch=y enabled=y phases=3 Linecode=padswitch_3_3_3_1_3_1_3_1

New Line.padswitch(r:p1udt12432-p1udt22056)p1u_247842 Units=km Length=0.001 bus1=p1udt12432.1.2.3 bus2=p1udt12432-p1udt22056x.1.2.3 switch=y enabled=y phases=3 Linecode=padswitch_3_3_3_1_3_1_3_1

New Line.padswitch(r:p1udt12432-p1udt22056)p1u_247843 Units=km Length=0.001 bus1=p1udt12432-p1udt22056xx.1.2.3 bus2=p1udt22056.1.2.3 switch=y enabled=y phases=3 Linecode=padswitch_3_3_3_1_3_1_3_1

New Line.padswitch(r:p1udt14538-p1udt25103)p1u_265815 Units=km Length=0.001 bus1=p1udt14538-p1udt25103xx.1.2.3 bus2=p1udt25103.1.2.3 switch=y enabled=n phases=3 Linecode=padswitch_3_3_3_3

New Line.elbswitch(r:p1udt4875-p1udt8498)p1u_265901 Units=km Length=0.001 bus1=p1udt4875.1.2.3 bus2=p1udt4875-p1udt8498x.1.2.3 switch=y enabled=n phases=3 Linecode=elbswitch_3_3_3_3

New Line.elbswitch(r:p1udt11100-p1udt21936)p1u_265950 Units=km Length=0.001 bus1=p1udt21936.1.2.3 bus2=p1udt11100-p1udt21936x.1.2.3 switch=y enabled=n phases=3 Linecode=elbswitch_3_3_3_3

New Line.fuse(r:p1udt11753-p1udt6822)p1u_266643 Units=km Length=0.001 bus1=p1udt6822.3 bus2=p1udt11753-p1udt6822x.3 switch=n enabled=y phases=1 Linecode=fuse_1_1_1_1

New Fuse.Fuse_fuse(r:p1udt11753-p1udt6822)p1u_266643 monitoredobj=Line.fuse(r:p1udt11753-p1udt6822)p1u_266643 enabled=y ratedcurrent=100.0

New Line.fuse(r:p1udt4517-p1udt9756)p1u_266944 Units=km Length=0.001 bus1=p1udt9756.1 bus2=p1udt4517-p1udt9756x.1 switch=n enabled=y phases=1 Linecode=fuse_1_6_1_1_1

New Fuse.Fuse_fuse(r:p1udt4517-p1udt9756)p1u_266944 monitoredobj=Line.fuse(r:p1udt4517-p1udt9756)p1u_266944 enabled=y ratedcurrent=100.0

New Line.fuse(r:p1udt12437-p1udt4878)p1u_267202 Units=km Length=0.001 bus1=p1udt12437.2 bus2=p1udt12437-p1udt4878x.2 switch=n enabled=y phases=1 Linecode=fuse_1_1_1_1

New Fuse.Fuse_fuse(r:p1udt12437-p1udt4878)p1u_267202 monitoredobj=Line.fuse(r:p1udt12437-p1udt4878)p1u_267202 enabled=y ratedcurrent=100.0

New Line.fuse(r:p1udt14275-p1udt20672)p1u_267385 Units=km Length=0.001 bus1=p1udt14275.1 bus2=p1udt14275-p1udt20672x.1 switch=n enabled=y phases=1 Linecode=fuse_1_1_1_1

New Fuse.Fuse_fuse(r:p1udt14275-p1udt20672)p1u_267385 monitoredobj=Line.fuse(r:p1udt14275-p1udt20672)p1u_267385 enabled=y ratedcurrent=100.0

New Line.fuse(r:p1udt17998-p1udt8071)p1u_267760 Units=km Length=0.001 bus1=p1udt17998.1 bus2=p1udt17998-p1udt8071x.1 switch=n enabled=y phases=1 Linecode=fuse_1_6_1_4_1_1

New Fuse.Fuse_fuse(r:p1udt17998-p1udt8071)p1u_267760 monitoredobj=Line.fuse(r:p1udt17998-p1udt8071)p1u_267760 enabled=y ratedcurrent=100.0

New Line.fuse(r:p1udt1001-p1udt24376)p1u_268406 Units=km Length=0.001 bus1=p1udt24376.3 bus2=p1udt1001-p1udt24376x.3 switch=n enabled=y phases=1 Linecode=fuse_1_1_1_1

New Fuse.Fuse_fuse(r:p1udt1001-p1udt24376)p1u_268406 monitoredobj=Line.fuse(r:p1udt1001-p1udt24376)p1u_268406 enabled=y ratedcurrent=100.0

New Line.fuse(r:p1udt24376-p1udt3364)p1u_268407 Units=km Length=0.001 bus1=p1udt24376.3 bus2=p1udt24376-p1udt3364x.3 switch=n enabled=y phases=1 Linecode=fuse_1_1_1_1

New Fuse.Fuse_fuse(r:p1udt24376-p1udt3364)p1u_268407 monitoredobj=Line.fuse(r:p1udt24376-p1udt3364)p1u_268407 enabled=y ratedcurrent=100.0

New Line.fuse(r:p1udt19878-p1udt25103)p1u_268490 Units=km Length=0.001 bus1=p1udt25103.2 bus2=p1udt19878-p1udt25103xxx.2 switch=n enabled=y phases=1 Linecode=fuse_1_1_1_1

New Fuse.Fuse_fuse(r:p1udt19878-p1udt25103)p1u_268490 monitoredobj=Line.fuse(r:p1udt19878-p1udt25103)p1u_268490 enabled=y ratedcurrent=100.0

New Line.l(r:p1udt12111-p1umv41)_disconnect Units=km Length=0.001 bus1=p1udt12111_b1_1.1.2.3 bus2=p1udt12111_b2_1.1.2.3 switch=y enabled=y phases=3 Linecode=3P_OH_AL_ACSR_1033kcmil_Curlew_12.47_1_3_3_3_3

New Line.l(r:p1udt12111-p1umv41)_cont Units=km Length=2.021346 bus1=p1udt12111_b2_1.1.2.3 bus2=p1umv41.1.2.3 switch=n enabled=y phases=3 Linecode=3P_OH_AL_ACSR_1033kcmil_Curlew_12.47_1_3_3_3_3
