New Line.l(r:p1udm1491-p1ulv40925) Units=km Length=0.07909280000000002 bus1=p1udm1491.1.2 bus2=p1ulv40925.1.2 switch=n enabled=y phases=2 Linecode=1P_UG_AL_1/0_Brenau_0_416_0_2_2_2_2

New Line.l(r:p1udm1491-p1ulv42757) Units=km Length=0.0882117 bus1=p1udm1491.1.2 bus2=p1ulv42757.1.2 switch=n enabled=y phases=2 Linecode=1P_UG_AL_4/0_Sweetbriar_0_416_0_2_2_2_2

New Line.l(r:p1udm1490-p1ulv27011) Units=km Length=0.0733634 bus1=p1udm1490.1.2 bus2=p1ulv27011.1.2 switch=n enabled=y phases=2 Linecode=1P_UG_AL_1/0_Brenau_0_416_0_2_2_2_2

New Line.l(r:p1udm1490-p1ulv42756) Units=km Length=0.0218791 bus1=p1udm1490.1.2 bus2=p1ulv42756.1.2 switch=n enabled=y phases=2 Linecode=1P_UG_AL_1/0_Brenau_0_416_0_2_2_2_2

New Line.l(r:p1udm1488-p1ulv417) Units=km Length=0.0697692 bus1=p1udm1488.1.2 bus2=p1ulv417.1.2 switch=n enabled=y phases=2 Linecode=1P_UG_AL_4/0_Sweetbriar_0_416_0_2_2_2_2

New Line.l(r:p1udm1488-p1udm1490) Units=km Length=0.0286656 bus1=p1udm1490.1.2 bus2=p1udm1488.1.2 switch=n enabled=y phases=2 Linecode=1P_UG_AL_4/0_Sweetbriar_0_416_0_2_2_2_2

New Line.l(r:p1udm1490-p1udm1491) Units=km Length=0.00955649 bus1=p1udm1491.1.2 bus2=p1udm1490.1.2 switch=n enabled=y phases=2 Linecode=1P_UG_AL_4/0_Sweetbriar_0_416_0_2_2_2_2

New Line.l(r:p1udm1491-p1udt413lv) Units=km Length=0.00954774 bus1=p1udt413lv.1.2 bus2=p1udm1491.1.2 switch=n enabled=y phases=2 Linecode=1P_UG_AL_4/0_Sweetbriar_0_416_0_2_2_2_2

New Line.l(r:p1udm1494-p1ulv47860) Units=km Length=0.0746021 bus1=p1udm1494.1.2 bus2=p1ulv47860.1.2 switch=n enabled=y phases=2 Linecode=1P_UG_AL_1/0_Brenau_0_416_0_2_2_2_2

New Line.l(r:p1udm1489-p1ulv3632) Units=km Length=0.0876484 bus1=p1udm1489.1.2 bus2=p1ulv3632.1.2 switch=n enabled=y phases=2 Linecode=1P_UG_AL_1/0_Brenau_0_416_0_2_2_2_2

New Line.l(r:p1udm1489-p1udm1494) Units=km Length=0.00955649 bus1=p1udm1494.1.2 bus2=p1udm1489.1.2 switch=n enabled=y phases=2 Linecode=1P_UG_AL_1/0_Brenau_0_416_0_2_2_2_2

New Line.l(r:p1udm1494-p1udt413lv) Units=km Length=0.0286656 bus1=p1udt413lv.1.2 bus2=p1udm1494.1.2 switch=n enabled=y phases=2 Linecode=1P_UG_AL_1/0_Brenau_0_416_0_2_2_2_2

New Line.l(r:p1udm3737-p1ulv1038) Units=km Length=0.006516600000000001 bus1=p1udm3737.1.2 bus2=p1ulv1038.1.2 switch=n enabled=y phases=2 Linecode=1P_UG_AL_4/0_Sweetbriar_0_416_0_2_2_2_2

New Line.l(r:p1udm3737-p1udt1018lv) Units=km Length=0.021062300000000003 bus1=p1udt1018lv.1.2 bus2=p1udm3737.1.2 switch=n enabled=y phases=2 Linecode=1P_UG_AL_4/0_Sweetbriar_0_416_0_2_2_2_2

New Line.l(r:p1udm3738-p1ulv62054) Units=km Length=0.0552635 bus1=p1udm3738.1.2 bus2=p1ulv62054.1.2 switch=n enabled=y phases=2 Linecode=1P_UG_AL_1/0_Brenau_0_416_0_2_2_2_2

New Line.l(r:p1udm3738-p1udt1018lv) Units=km Length=0.0290352 bus1=p1udt1018lv.1.2 bus2=p1udm3738.1.2 switch=n enabled=y phases=2 Linecode=1P_UG_AL_1/0_Brenau_0_416_0_2_2_2_2

New Line.l(r:p1udt1019lv-p1ulv1039) Units=km Length=0.006129510000000001 bus1=p1udt1019lv.1.2 bus2=p1ulv1039.1.2 switch=n enabled=y phases=2 Linecode=1P_OH_AL_2/0_Rucina_0_416_0_2_2_2_2

New Line.l(r:p1udt6380lv-p1ulv7412) Units=km Length=0.0125858 bus1=p1udt6380lv.1.2 bus2=p1ulv7412.1.2 switch=n enabled=y phases=2 Linecode=1P_UG_AL_1/0_Brenau_0_416_0_2_2_2_2

New Line.l(r:p1udm23523-p1ulv8026) Units=km Length=0.022395000000000005 bus1=p1udm23523.1.2 bus2=p1ulv8026.1.2 switch=n enabled=y phases=2 Linecode=1P_OH_AL_2/0_Rucina_0_416_0_2_2_2_2

New Line.l(r:p1udm23523-p1udt6818lv) Units=km Length=0.03301 bus1=p1udt6818lv.1.2 bus2=p1udm23523.1.2 switch=n enabled=y phases=2 Linecode=1P_OH_AL_4/0_Zuzara_0_416_0_2_2_2_2

New Line.l(r:p1udm23524-p1ulv50953) Units=km Length=0.0121938 bus1=p1udm23524.1.2 bus2=p1ulv50953.1.2 switch=n enabled=y phases=2 Linecode=1P_OH_AL_2/0_Rucina_0_416_0_2_2_2_2

New Line.l(r:p1udm23524-p1udt6818lv) Units=km Length=0.0165046 bus1=p1udt6818lv.1.2 bus2=p1udm23524.1.2 switch=n enabled=y phases=2 Linecode=1P_OH_AL_2/0_Rucina_0_416_0_2_2_2_2

New Line.l(r:p1udm26321-p1ulv14242) Units=km Length=0.0120584 bus1=p1udm26321.1.2 bus2=p1ulv14242.1.2 switch=n enabled=y phases=2 Linecode=1P_OH_AL_2/0_Rucina_0_416_0_2_2_2_2

New Line.l(r:p1udm26321-p1udt7684lv) Units=km Length=0.0396235 bus1=p1udt7684lv.1.2 bus2=p1udm26321.1.2 switch=n enabled=y phases=2 Linecode=1P_OH_AL_4/0_Zuzara_0_416_0_2_2_2_2

New Line.l(r:p1udm26322-p1ulv41532) Units=km Length=0.008841 bus1=p1udm26322.1.2 bus2=p1ulv41532.1.2 switch=n enabled=y phases=2 Linecode=1P_OH_AL_2/0_Rucina_0_416_0_2_2_2_2

New Line.l(r:p1udm26320-p1ulv9265) Units=km Length=0.011587300000000002 bus1=p1udm26320.1.2 bus2=p1ulv9265.1.2 switch=n enabled=y phases=2 Linecode=1P_OH_AL_2/0_Rucina_0_416_0_2_2_2_2

New Line.l(r:p1udm26320-p1udm26322) Units=km Length=0.0198117 bus1=p1udm26322.1.2 bus2=p1udm26320.1.2 switch=n enabled=y phases=2 Linecode=1P_OH_AL_2/0_Rucina_0_416_0_2_2_2_2

New Line.l(r:p1udm26322-p1udt7684lv) Units=km Length=0.0198211 bus1=p1udt7684lv.1.2 bus2=p1udm26322.1.2 switch=n enabled=y phases=2 Linecode=1P_OH_AL_2/0_Rucina_0_416_0_2_2_2_2

New Line.l(r:p1udm27552-p1ulv9889) Units=km Length=0.00936701 bus1=p1udm27552.1.2 bus2=p1ulv9889.1.2 switch=n enabled=y phases=2 Linecode=1P_UG_AL_4/0_Sweetbriar_0_416_0_2_2_2_2

New Line.l(r:p1udm27552-p1udt8087lv) Units=km Length=0.03565 bus1=p1udt8087lv.1.2 bus2=p1udm27552.1.2 switch=n enabled=y phases=2 Linecode=1P_OH_AL_4/0_Zuzara_0_416_0_2_2_2_2

New Line.l(r:p1udm27553-p1ulv50306) Units=km Length=0.00612785 bus1=p1udm27553.1.2 bus2=p1ulv50306.1.2 switch=n enabled=y phases=2 Linecode=1P_OH_AL_2/0_Rucina_0_416_0_2_2_2_2

New Line.l(r:p1udm27553-p1udt8087lv) Units=km Length=0.0198985 bus1=p1udt8087lv.1.2 bus2=p1udm27553.1.2 switch=n enabled=y phases=2 Linecode=1P_OH_AL_2/0_Rucina_0_416_0_2_2_2_2

New Line.l(r:p1udm34556-p1ulv13608) Units=km Length=0.00687945 bus1=p1udm34556.1.2 bus2=p1ulv13608.1.2 switch=n enabled=y phases=2 Linecode=1P_OH_AL_2/0_Rucina_0_416_0_2_2_2_2

New Line.l(r:p1udm34556-p1udt10376lv) Units=km Length=0.010986 bus1=p1udt10376lv.1.2 bus2=p1udm34556.1.2 switch=n enabled=y phases=2 Linecode=1P_OH_AL_2/0_Rucina_0_416_0_2_2_2_2

New Line.l(r:p1udm34557-p1ulv16776) Units=km Length=0.00998379 bus1=p1udm34557.1.2 bus2=p1ulv16776.1.2 switch=n enabled=y phases=2 Linecode=1P_OH_AL_2/0_Rucina_0_416_0_2_2_2_2

New Line.l(r:p1udm34557-p1udt10376lv) Units=km Length=0.011286100000000002 bus1=p1udt10376lv.1.2 bus2=p1udm34557.1.2 switch=n enabled=y phases=2 Linecode=1P_OH_AL_2/0_Rucina_0_416_0_2_2_2_2

New Line.l(r:p1udt10734lv-p1ulv14241) Units=km Length=0.0704436 bus1=p1udt10734lv.1.2 bus2=p1ulv14241.1.2 switch=n enabled=y phases=2 Linecode=1P_UG_AL_4/0_Sweetbriar_0_416_0_2_2_2_2

New Line.l(r:p1udt11411lv-p1ulv15461) Units=km Length=0.001 bus1=p1udt11411lv.1.2 bus2=p1ulv15461.1.2 switch=n enabled=y phases=2 Linecode=1P_OH_AL_4_Periwinkle_0_416_0_2_2_2_2

New Line.l(r:p1udm42945-p1ulv19374) Units=km Length=0.0186379 bus1=p1udm42945.1.2 bus2=p1ulv19374.1.2 switch=n enabled=y phases=2 Linecode=1P_OH_AL_2/0_Rucina_0_416_0_2_2_2_2

New Line.l(r:p1udm42945-p1udt13420lv) Units=km Length=0.0193013 bus1=p1udt13420lv.1.2 bus2=p1udm42945.1.2 switch=n enabled=y phases=2 Linecode=1P_OH_AL_2/0_Rucina_0_416_0_2_2_2_2

New Line.l(r:p1udm42946-p1ulv50954) Units=km Length=0.0110098 bus1=p1udm42946.1.2 bus2=p1ulv50954.1.2 switch=n enabled=y phases=2 Linecode=1P_OH_AL_2/0_Rucina_0_416_0_2_2_2_2

New Line.l(r:p1udm42946-p1udt13420lv) Units=km Length=0.0386119 bus1=p1udt13420lv.1.2 bus2=p1udm42946.1.2 switch=n enabled=y phases=2 Linecode=1P_OH_AL_4/0_Zuzara_0_416_0_2_2_2_2

New Line.l(r:p1udt15322lv-p1ulv23827) Units=km Length=0.0460647 bus1=p1udt15322lv.1.2 bus2=p1ulv23827.1.2 switch=n enabled=y phases=2 Linecode=1P_UG_AL_4/0_Sweetbriar_0_416_0_2_2_2_2

New Line.l(r:p1udt15807lv-p1ulv39054) Units=km Length=0.039644900000000004 bus1=p1udt15807lv.1.2 bus2=p1ulv39054.1.2 switch=n enabled=y phases=2 Linecode=1P_UG_AL_1/0_Brenau_0_416_0_2_2_2_2

New Line.l(r:p1udm48837-p1ulv25098) Units=km Length=0.0195737 bus1=p1udm48837.1.2 bus2=p1ulv25098.1.2 switch=n enabled=y phases=2 Linecode=1P_UG_AL_1/0_Brenau_0_416_0_2_2_2_2

New Line.l(r:p1udm48837-p1udt15807lv) Units=km Length=0.00921026 bus1=p1udt15807lv.1.2 bus2=p1udm48837.1.2 switch=n enabled=y phases=2 Linecode=1P_UG_AL_1/0_Brenau_0_416_0_2_2_2_2

New Line.l(r:p1udm48838-p1ulv30789) Units=km Length=0.0125863 bus1=p1udm48838.1.2 bus2=p1ulv30789.1.2 switch=n enabled=y phases=2 Linecode=1P_UG_AL_1/0_Brenau_0_416_0_2_2_2_2

New Line.l(r:p1udm48838-p1udt15807lv) Units=km Length=0.0142894 bus1=p1udt15807lv.1.2 bus2=p1udm48838.1.2 switch=n enabled=y phases=2 Linecode=1P_UG_AL_1/0_Brenau_0_416_0_2_2_2_2

New Line.l(r:p1udt16294lv-p1ulv26363) Units=km Length=0.023404 bus1=p1udt16294lv.1.2 bus2=p1ulv26363.1.2 switch=n enabled=y phases=2 Linecode=1P_OH_AL_2/0_Rucina_0_416_0_2_2_2_2

New Line.l(r:p1udt16748lv-p1ulv27663) Units=km Length=0.0416071 bus1=p1udt16748lv.1.2 bus2=p1ulv27663.1.2 switch=n enabled=y phases=2 Linecode=1P_UG_AL_4/0_Sweetbriar_0_416_0_2_2_2_2

New Line.l(r:p1udt17195lv-p1ulv28912) Units=km Length=0.021076 bus1=p1udt17195lv.1.2 bus2=p1ulv28912.1.2 switch=n enabled=y phases=2 Linecode=1P_OH_AL_2/0_Rucina_0_416_0_2_2_2_2

New Line.l(r:p1udt20370lv-p1ulv39671) Units=km Length=0.0282959 bus1=p1udt20370lv.1.2 bus2=p1ulv39671.1.2 switch=n enabled=y phases=2 Linecode=1P_OH_AL_4/0_Zuzara_0_416_0_2_2_2_2

New Line.l(r:p1udt20524lv-p1ulv40328) Units=km Length=0.065523 bus1=p1udt20524lv.1.2 bus2=p1ulv40328.1.2 switch=n enabled=y phases=2 Linecode=1P_UG_AL_1/0_Brenau_0_416_0_2_2_2_2

New Line.l(r:p1udt20671lv-p1ulv40924) Units=km Length=0.0181617 bus1=p1udt20671lv.1.2 bus2=p1ulv40924.1.2 switch=n enabled=y phases=2 Linecode=1P_UG_AL_1/0_Brenau_0_416_0_2_2_2_2

New Line.l(r:p1udt21245lv-p1ulv43447) Units=km Length=0.0599387 bus1=p1udt21245lv.1.2 bus2=p1ulv43447.1.2 switch=n enabled=y phases=2 Linecode=1P_OH_AL_4/0_Zuzara_0_416_0_2_2_2_2

New Line.l(r:p1udt21643lv-p1ulv45354) Units=km Length=0.0352123 bus1=p1udt21643lv.1.2 bus2=p1ulv45354.1.2 switch=n enabled=y phases=2 Linecode=1P_UG_AL_4/0_Sweetbriar_0_416_0_2_2_2_2

New Line.l(r:p1udt21799lv-p1ulv46017) Units=km Length=0.0321535 bus1=p1udt21799lv.1.2 bus2=p1ulv46017.1.2 switch=n enabled=y phases=2 Linecode=1P_UG_AL_4/0_Sweetbriar_0_416_0_2_2_2_2

New Line.l(r:p1udm60618-p1ulv48467) Units=km Length=0.0147584 bus1=p1udm60618.1.2 bus2=p1ulv48467.1.2 switch=n enabled=y phases=2 Linecode=1P_UG_AL_1/0_Brenau_0_416_0_2_2_2_2

New Line.l(r:p1udm60618-p1udt22305lv) Units=km Length=0.0282541 bus1=p1udt22305lv.1.2 bus2=p1udm60618.1.2 switch=n enabled=y phases=2 Linecode=1P_UG_AL_1/0_Brenau_0_416_0_2_2_2_2

New Line.l(r:p1udm60619-p1ulv50292) Units=km Length=0.02589 bus1=p1udm60619.1.2 bus2=p1ulv50292.1.2 switch=n enabled=y phases=2 Linecode=1P_UG_AL_1/0_Brenau_0_416_0_2_2_2_2

New Line.l(r:p1udm60620-p1ulv57154) Units=km Length=0.04285 bus1=p1udm60620.1.2 bus2=p1ulv57154.1.2 switch=n enabled=y phases=2 Linecode=1P_UG_AL_1/0_Brenau_0_416_0_2_2_2_2

New Line.l(r:p1udm60619-p1udm60620) Units=km Length=0.009418030000000003 bus1=p1udm60619.1.2 bus2=p1udm60620.1.2 switch=n enabled=y phases=2 Linecode=1P_UG_AL_1/0_Brenau_0_416_0_2_2_2_2

New Line.l(r:p1udm60619-p1udt22305lv) Units=km Length=0.018844000000000003 bus1=p1udt22305lv.1.2 bus2=p1udm60619.1.2 switch=n enabled=y phases=2 Linecode=1P_UG_AL_1/0_Brenau_0_416_0_2_2_2_2

New Line.l(r:p1udm62002-p1ulv54126) Units=km Length=0.0314899 bus1=p1udm62002.1.2 bus2=p1ulv54126.1.2 switch=n enabled=y phases=2 Linecode=1P_UG_AL_1/0_Brenau_0_416_0_2_2_2_2

New Line.l(r:p1udm62002-p1udt23388lv) Units=km Length=0.00999736 bus1=p1udt23388lv.1.2 bus2=p1udm62002.1.2 switch=n enabled=y phases=2 Linecode=1P_UG_AL_1/0_Brenau_0_416_0_2_2_2_2

New Line.l(r:p1udm62003-p1ulv59570) Units=km Length=0.0509348 bus1=p1udm62003.1.2 bus2=p1ulv59570.1.2 switch=n enabled=y phases=2 Linecode=1P_UG_AL_1/0_Brenau_0_416_0_2_2_2_2

New Line.l(r:p1udm62003-p1udt23388lv) Units=km Length=0.0100035 bus1=p1udt23388lv.1.2 bus2=p1udm62003.1.2 switch=n enabled=y phases=2 Linecode=1P_UG_AL_1/0_Brenau_0_416_0_2_2_2_2

New Line.l(r:p1udt23391lv-p1ulv54129) Units=km Length=0.00191133 bus1=p1udt23391lv.1.2 bus2=p1ulv54129.1.2 switch=n enabled=y phases=2 Linecode=1P_OH_AL_4_Periwinkle_0_416_0_2_2_2_2

New Line.l(r:p1udt23601lv-p1ulv55343) Units=km Length=0.00883005 bus1=p1udt23601lv.1.2 bus2=p1ulv55343.1.2 switch=n enabled=y phases=2 Linecode=1P_OH_AL_2/0_Rucina_0_416_0_2_2_2_2

New Line.l(r:p1udt24483lv-p1ulv60183) Units=km Length=0.00844038 bus1=p1udt24483lv.1.2 bus2=p1ulv60183.1.2 switch=n enabled=y phases=2 Linecode=1P_UG_AL_1/0_Brenau_0_416_0_2_2_2_2

New Line.l(r:p1udt24590lv-p1ulv60783) Units=km Length=0.00956831 bus1=p1udt24590lv.1.2 bus2=p1ulv60783.1.2 switch=n enabled=y phases=2 Linecode=1P_OH_AL_2/0_Rucina_0_416_0_2_2_2_2

New Line.l(r:p1udt24796lv-p1ulv62053) Units=km Length=0.00853201 bus1=p1udt24796lv.1.2 bus2=p1ulv62053.1.2 switch=n enabled=y phases=2 Linecode=1P_UG_AL_4/0_Sweetbriar_0_416_0_2_2_2_2

New Line.l(r:p1udt25003lv-p1ulv63335) Units=km Length=0.034489 bus1=p1udt25003lv.1.2 bus2=p1ulv63335.1.2 switch=n enabled=y phases=2 Linecode=1P_OH_AL_4/0_Zuzara_0_416_0_2_2_2_2

New Line.l(r:p1udt25286lv-p1ulv65234) Units=km Length=0.0162862 bus1=p1udt25286lv.1.2 bus2=p1ulv65234.1.2 switch=n enabled=y phases=2 Linecode=1P_UG_AL_2/0_Converse_0_416_0_2_2_2_2

New Line.l(r:p1udt25287lv-p1ulv65235) Units=km Length=0.033466 bus1=p1udt25287lv.1.2 bus2=p1ulv65235.1.2 switch=n enabled=y phases=2 Linecode=1P_UG_AL_1/0_Brenau_0_416_0_2_2_2_2

New Line.l(r:p1udt20370-p1udt23601) Units=km Length=0.095302 bus1=p1udt23601.3 bus2=p1udt20370.3 switch=n enabled=y phases=1 Linecode=1P_OH_AL_ACSR_#2_Sparrow_12_47_0_1_1_1_1

New Line.l(r:p1udt23601-p1udt24701) Units=km Length=0.0758029 bus1=p1udt23601-p1udt24701x.3 bus2=p1udt23601.3 switch=n enabled=y phases=1 Linecode=1P_OH_AL_ACSR_#2_Sparrow_12_47_0_1_1_1_1

New Line.l(r:p1udt10376-p1udt6380) Units=km Length=0.224896 bus1=p1udt10376-p1udt6380x.2 bus2=p1udt10376.2 switch=n enabled=y phases=1 Linecode=1P_OH_AL_ACSR_#2_Sparrow_12_47_0_1_1_1_1

New Line.l(r:p1udt11411-p1udt11752) Units=km Length=0.170071 bus1=p1udt11411-p1udt11752x.3 bus2=p1udt11411.3 switch=n enabled=y phases=1 Linecode=1P_OH_AL_ACSR_#2_Sparrow_12_47_0_1_1_1_1

New Line.l(r:p1udt15806-p1udt6818) Units=km Length=0.126161 bus1=p1udt15806-p1udt6818x.2 bus2=p1udt6818.2 switch=n enabled=y phases=1 Linecode=1P_OH_AL_ACSR_#2_Sparrow_12_47_0_1_1_1_1

New Line.l(r:p1udt16748-p1udt17193) Units=km Length=0.258436 bus1=p1udt16748-p1udt17193x.3 bus2=p1udt16748.3 switch=n enabled=y phases=1 Linecode=1P_OH_AL_ACSR_#2_Sparrow_12_47_0_1_1_1_1

New Line.l(r:p1udt15322-p1udt8087) Units=km Length=0.0893364 bus1=p1udt15322-p1udt8087x.2 bus2=p1udt8087.2 switch=n enabled=y phases=1 Linecode=1P_OH_AL_ACSR_#2_Sparrow_12_47_0_1_1_1_1

New Line.l(r:p1udt24796-p1udt7684) Units=km Length=0.155589 bus1=p1udt24796-p1udt7684x.1 bus2=p1udt7684.1 switch=n enabled=y phases=1 Linecode=1P_OH_AL_ACSR_#2_Sparrow_12_47_0_1_1_1_1

New Line.l(r:p1udt15806-p1udt24483) Units=km Length=0.0970378 bus1=p1udt15806-p1udt24483xx.1.2.3 bus2=p1udt15806-p1udt24483x.1.2.3 switch=n enabled=y phases=3 Linecode=3P_UG_AL_4/0_25_12_47_0_3_3_3_3

New Line.l(r:p1udt24483-p1udt25287) Units=km Length=0.0865792 bus1=p1udt24483-p1udt25287xx.1.2.3 bus2=p1udt24483-p1udt25287x.1.2.3 switch=n enabled=y phases=3 Linecode=3P_UG_AL_4/0_25_12_47_0_3_3_3_3

New Line.l(r:p1udt25287-p1uhs11_1247) Units=km Length=0.78734 bus1=p1udt25287-p1uhs11_1247x.1.2.3 bus2=p1udt25287.1.2.3 switch=n enabled=y phases=3 Linecode=3P_OH_AL_ACSR_336kcmil_Merlin_12_47_0_3_3_3_3

New Line.l(r:p1udt25287-p1udt5394) Units=km Length=0.457912 bus1=p1udt25287.1.2.3 bus2=p1udt5394.1.2.3 switch=n enabled=y phases=3 Linecode=3P_OH_AL_ACSR_4/0_Penguin_12_47_0_3_3_3_3

New Line.l(r:p1udt17195-p1udt4390) Units=km Length=0.12723 bus1=p1udt17195.1.2.3 bus2=p1udt4390.1.2.3 switch=n enabled=y phases=3 Linecode=3P_OH_AL_ACSR_4/0_Penguin_12_47_0_3_3_3_3

New Line.l(r:p1udt1019-p1udt11752) Units=km Length=0.0854887 bus1=p1udt11752.1.2.3 bus2=p1udt1019.1.2.3 switch=n enabled=y phases=3 Linecode=3P_OH_AL_ACSR_4/0_Penguin_12_47_0_3_3_3_3

New Line.l(r:p1udt11752-p1udt6819) Units=km Length=0.0579709 bus1=p1udt6819.1.2.3 bus2=p1udt11752.1.2.3 switch=n enabled=y phases=3 Linecode=3P_OH_AL_ACSR_4/0_Penguin_12_47_0_3_3_3_3

New Line.l(r:p1udt17195-p1udt6819) Units=km Length=0.235624 bus1=p1udt17195.1.2.3 bus2=p1udt6819.1.2.3 switch=n enabled=y phases=3 Linecode=3P_OH_AL_ACSR_4/0_Penguin_12_47_0_3_3_3_3

New Line.l(r:p1udt17195-p1udt24590) Units=km Length=0.0676097 bus1=p1udt24590.1.2.3 bus2=p1udt17195.1.2.3 switch=n enabled=y phases=3 Linecode=3P_OH_AL_ACSR_4/0_Penguin_12_47_0_3_3_3_3

New Line.l(r:p1udt19156-p1udt25109) Units=km Length=0.34358900000000003 bus1=p1udt25109.1.2.3 bus2=p1udt19156.1.2.3 switch=n enabled=y phases=3 Linecode=3P_OH_AL_ACSR_4/0_Penguin_12_47_0_3_3_3_3

New Line.l(r:p1udt24590-p1udt25109) Units=km Length=0.04614650000000001 bus1=p1udt24590.1.2.3 bus2=p1udt25109.1.2.3 switch=n enabled=y phases=3 Linecode=3P_OH_AL_ACSR_4/0_Penguin_12_47_0_3_3_3_3

New Line.l(r:p1udt16294-p1udt24590) Units=km Length=0.174317 bus1=p1udt16294.1.2.3 bus2=p1udt24590.1.2.3 switch=n enabled=y phases=3 Linecode=3P_OH_AL_ACSR_4/0_Penguin_12_47_0_3_3_3_3

New Line.l(r:p1udt16294-p1udt25003) Units=km Length=0.236555 bus1=p1udt25003.1.2.3 bus2=p1udt16294.1.2.3 switch=n enabled=y phases=3 Linecode=3P_OH_AL_ACSR_4/0_Penguin_12_47_0_3_3_3_3

New Line.l(r:p1udt25003-p1udt6380) Units=km Length=0.39907300000000007 bus1=p1udt6380.1.2.3 bus2=p1udt25003.1.2.3 switch=n enabled=y phases=3 Linecode=3P_OH_AL_ACSR_4/0_Penguin_12_47_0_3_3_3_3

New Line.l(r:p1udt25287-p1udt6380) Units=km Length=0.249676 bus1=p1udt25287-p1udt6380x.1.2.3 bus2=p1udt25287-p1udt6380xx.1.2.3 switch=n enabled=y phases=3 Linecode=3P_UG_AL_4/0_25_12_47_0_3_3_3_3

New Line.l(r:p1udt11084-p1udt17405) Units=km Length=0.336486 bus1=p1udt11084.1.2.3 bus2=p1udt17405.1.2.3 switch=n enabled=y phases=3 Linecode=3P_OH_AL_ACSR_4/0_Penguin_12_47_0_3_3_3_3

New Line.l(r:p1udt11084-p1udt17403) Units=km Length=0.177037 bus1=p1udt17403.1.2.3 bus2=p1udt11084.1.2.3 switch=n enabled=y phases=3 Linecode=3P_OH_AL_ACSR_4/0_Penguin_12_47_0_3_3_3_3

New Line.l(r:p1udt17403-p1udt8856) Units=km Length=0.192229 bus1=p1udt8856.1.2.3 bus2=p1udt17403.1.2.3 switch=n enabled=y phases=3 Linecode=3P_OH_AL_ACSR_4/0_Penguin_12_47_0_3_3_3_3

New Line.l(r:p1udt21387-p1udt8856) Units=km Length=0.47994100000000006 bus1=p1udt21387.1.2.3 bus2=p1udt8856.1.2.3 switch=n enabled=y phases=3 Linecode=3P_OH_AL_ACSR_4/0_Penguin_12_47_0_3_3_3_3

New Line.l(r:p1udt17193-p1udt21387) Units=km Length=0.31514300000000006 bus1=p1udt17193.1.2.3 bus2=p1udt21387.1.2.3 switch=n enabled=y phases=3 Linecode=3P_OH_AL_ACSR_4/0_Penguin_12_47_0_3_3_3_3

New Line.l(r:p1udt17193-p1udt24382) Units=km Length=0.558991 bus1=p1udt24382.1.2.3 bus2=p1udt17193.1.2.3 switch=n enabled=y phases=3 Linecode=3P_OH_AL_ACSR_4/0_Penguin_12_47_0_3_3_3_3

New Line.l(r:p1udt24382-p1udt5907) Units=km Length=0.165092 bus1=p1udt5907.1.2.3 bus2=p1udt24382.1.2.3 switch=n enabled=y phases=3 Linecode=3P_OH_AL_ACSR_4/0_Penguin_12_47_0_3_3_3_3

New Line.l(r:p1udt1018-p1udt5907) Units=km Length=0.11871600000000002 bus1=p1udt1018-p1udt5907x.1.2.3 bus2=p1udt1018-p1udt5907xx.1.2.3 switch=n enabled=y phases=3 Linecode=3P_UG_AL_4/0_25_12_47_0_3_3_3_3

New Line.l(r:p1udt1018-p1udt12763) Units=km Length=0.282078 bus1=p1udt1018-p1udt12763xx.1.2.3 bus2=p1udt1018-p1udt12763x.1.2.3 switch=n enabled=y phases=3 Linecode=3P_UG_AL_4/0_25_12_47_0_3_3_3_3

New Line.l(r:p1udt12763-p1udt15806) Units=km Length=0.12393700000000002 bus1=p1udt12763-p1udt15806xx.1.2.3 bus2=p1udt12763-p1udt15806x.1.2.3 switch=n enabled=y phases=3 Linecode=3P_UG_AL_4/0_25_12_47_0_3_3_3_3

New Line.l(r:p1udt5394lv-p1ulv6127) Units=km Length=0.041385 bus1=p1udt5394lv.1.2.3 bus2=p1ulv6127.1.2.3 switch=n enabled=y phases=3 Linecode=3P_UG_AL_350kcmil_15_0_416_0_3_3_3_3

New Line.l(r:p1udt2218lv-p1ulv2343) Units=km Length=0.00872551 bus1=p1udt2218lv.1.2.3 bus2=p1ulv2343.1.2.3 switch=n enabled=y phases=3 Linecode=3P_UG_AL_750kcmil_25_0_416_0_3_3_3_3

New Line.l(r:p1udt14544lv-p1ulv21906) Units=km Length=0.0098976 bus1=p1udt14544lv.1.2.3 bus2=p1ulv21906.1.2.3 switch=n enabled=y phases=3 Linecode=3P_UG_AL_750kcmil_25_0_416_0_3_3_3_3

New Line.l(r:p1udt24701lv-p1ulv61431) Units=km Length=0.057656 bus1=p1udt24701lv.1.2.3 bus2=p1ulv61431.1.2.3 switch=n enabled=y phases=3 Linecode=3P_UG_AL_350kcmil_15_0_416_0_3_3_3_3

New Line.l(r:p1udt14544-p1udt24701) Units=km Length=0.130108 bus1=p1udt14544.1.2.3 bus2=p1udt24701.1.2.3 switch=n enabled=y phases=3 Linecode=3P_OH_AL_ACSR_4/0_Penguin_12_47_0_3_3_3_3

New Line.l(r:p1udt14544-p1udt2218) Units=km Length=0.0674892 bus1=p1udt2218.1.2.3 bus2=p1udt14544.1.2.3 switch=n enabled=y phases=3 Linecode=3P_OH_AL_ACSR_4/0_Penguin_12_47_0_3_3_3_3

New Line.l(r:p1udt2218-p1udt5394) Units=km Length=0.172974 bus1=p1udt5394.1.2.3 bus2=p1udt2218.1.2.3 switch=n enabled=y phases=3 Linecode=3P_OH_AL_ACSR_4/0_Penguin_12_47_0_3_3_3_3

New Line.l(r:p1udt16972lv-p1ulv28296) Units=km Length=0.027484 bus1=p1udt16972lv.1.2.3 bus2=p1ulv28296.1.2.3 switch=n enabled=y phases=3 Linecode=3P_UG_AL_750kcmil_25_0_416_0_3_3_3_3

New Line.l(r:p1udt4876lv-p1ulv5476) Units=km Length=0.0653124 bus1=p1udt4876lv.1.2.3 bus2=p1ulv5476.1.2.3 switch=n enabled=y phases=3 Linecode=3P_UG_AL_350kcmil_15_0_416_0_3_3_3_3

New Line.l(r:p1udt19714lv-p1ulv37172) Units=km Length=0.0147579 bus1=p1udt19714lv.1.2.3 bus2=p1ulv37172.1.2.3 switch=n enabled=y phases=3 Linecode=3P_UG_AL_350kcmil_15_0_416_0_3_3_3_3

New Line.l(r:p1udt19714-p1udt4876) Units=km Length=0.001 bus1=p1udt4876.1.2.3 bus2=p1udt19714.1.2.3 switch=n enabled=y phases=3 Linecode=3P_OH_AL_ACSR_4/0_Penguin_12_47_0_3_3_3_3

New Line.l(r:p1udt16972-p1udt4876) Units=km Length=0.0746896 bus1=p1udt16972.1.2.3 bus2=p1udt4876.1.2.3 switch=n enabled=y phases=3 Linecode=3P_OH_AL_ACSR_4/0_Penguin_12_47_0_3_3_3_3

New Line.l(r:p1udt16972-p1udt5394) Units=km Length=0.14221 bus1=p1udt5394.1.2.3 bus2=p1udt16972.1.2.3 switch=n enabled=y phases=3 Linecode=3P_OH_AL_ACSR_4/0_Penguin_12_47_0_3_3_3_3

New Line.l(r:p1udt18604lv-p1ulv33377) Units=km Length=0.00717352 bus1=p1udt18604lv.1.2.3 bus2=p1ulv33377.1.2.3 switch=n enabled=y phases=3 Linecode=3P_UG_AL_350kcmil_15_0_416_0_3_3_3_3

New Line.l(r:p1udt13420-p1udt18604) Units=km Length=0.0333137 bus1=p1udt13420.1.2.3 bus2=p1udt18604.1.2.3 switch=n enabled=y phases=3 Linecode=3P_OH_AL_ACSR_4/0_Penguin_12_47_0_3_3_3_3

New Line.l(r:p1udt13420-p1udt25003) Units=km Length=0.107196 bus1=p1udt25003.1.2.3 bus2=p1udt13420.1.2.3 switch=n enabled=y phases=3 Linecode=3P_OH_AL_ACSR_4/0_Penguin_12_47_0_3_3_3_3

New Line.l(r:p1udt4390lv-p1ulv4854) Units=km Length=0.00412866 bus1=p1udt4390lv.1.2.3 bus2=p1ulv4854.1.2.3 switch=n enabled=y phases=3 Linecode=3P_UG_AL_350kcmil_15_0_416_0_3_3_3_3

New Line.l(r:p1udt3884lv-p1ulv4238) Units=km Length=0.00593098 bus1=p1udt3884lv.1.2.3 bus2=p1ulv4238.1.2.3 switch=n enabled=y phases=3 Linecode=3P_UG_AL_350kcmil_15_0_416_0_3_3_3_3

New Line.l(r:p1udt9652lv-p1ulv12377) Units=km Length=0.00453617 bus1=p1udt9652lv.1.2.3 bus2=p1ulv12377.1.2.3 switch=n enabled=y phases=3 Linecode=3P_UG_AL_750kcmil_25_0_416_0_3_3_3_3

New Line.l(r:p1udt14539lv-p1ulv21897) Units=km Length=0.00504145 bus1=p1udt14539lv.1.2.3 bus2=p1ulv21897.1.2.3 switch=n enabled=y phases=3 Linecode=3P_UG_AL_750kcmil_25_0_416_0_3_3_3_3

New Line.l(r:p1udt14539lv-p1ulv30139) Units=km Length=0.0109746 bus1=p1udt14539lv.1.2.3 bus2=p1ulv30139.1.2.3 switch=n enabled=y phases=3 Linecode=3P_UG_AL_350kcmil_15_0_416_0_3_3_3_3

New Line.l(r:p1udt14539-p1udt9652) Units=km Length=0.317846 bus1=p1udt9652.1.2.3 bus2=p1udt14539.1.2.3 switch=n enabled=y phases=3 Linecode=3P_OH_AL_ACSR_4/0_Penguin_12_47_0_3_3_3_3

New Line.l(r:p1udt3884-p1udt9652) Units=km Length=0.329032 bus1=p1udt3884.1.2.3 bus2=p1udt9652.1.2.3 switch=n enabled=y phases=3 Linecode=3P_OH_AL_ACSR_4/0_Penguin_12_47_0_3_3_3_3

New Line.l(r:p1udt21515lv-p1ulv44744) Units=km Length=0.00228254 bus1=p1udt21515lv.1.2.3 bus2=p1ulv44744.1.2.3 switch=n enabled=y phases=3 Linecode=3P_UG_AL_350kcmil_15_0_416_0_3_3_3_3

New Line.l(r:p1udt21515-p1udt3884) Units=km Length=0.0732699 bus1=p1udt3884.1.2.3 bus2=p1udt21515.1.2.3 switch=n enabled=y phases=3 Linecode=3P_OH_AL_ACSR_4/0_Penguin_12_47_0_3_3_3_3

New Line.l(r:p1udt3884-p1udt4390) Units=km Length=0.10683 bus1=p1udt4390.1.2.3 bus2=p1udt3884.1.2.3 switch=n enabled=y phases=3 Linecode=3P_OH_AL_ACSR_4/0_Penguin_12_47_0_3_3_3_3

New Line.l(r:p1udt22799lv-p1ulv50934) Units=km Length=0.00730431 bus1=p1udt22799lv.1.2.3 bus2=p1ulv50934.1.2.3 switch=n enabled=y phases=3 Linecode=3P_UG_AL_350kcmil_15_0_416_0_3_3_3_3

New Line.l(r:p1udt22929lv-p1ulv51542) Units=km Length=0.00471534 bus1=p1udt22929lv.1.2.3 bus2=p1ulv51542.1.2.3 switch=n enabled=y phases=3 Linecode=3P_UG_AL_350kcmil_15_0_416_0_3_3_3_3

New Line.l(r:p1udt9243lv-p1ulv11721) Units=km Length=0.00188939 bus1=p1udt9243lv.1.2.3 bus2=p1ulv11721.1.2.3 switch=n enabled=y phases=3 Linecode=3P_UG_AL_350kcmil_15_0_416_0_3_3_3_3

New Line.l(r:p1udt4858lv-p1ulv5454) Units=km Length=0.0142681 bus1=p1udt4858lv.1.2.3 bus2=p1ulv5454.1.2.3 switch=n enabled=y phases=3 Linecode=3P_UG_AL_750kcmil_25_0_416_0_3_3_3_3

New Line.l(r:p1udt4858-p1udt9243) Units=km Length=0.128283 bus1=p1udt9243.1.2.3 bus2=p1udt4858.1.2.3 switch=n enabled=y phases=3 Linecode=3P_OH_AL_ACSR_4/0_Penguin_12_47_0_3_3_3_3

New Line.l(r:p1udt19711lv-p1ulv37156) Units=km Length=0.00825884 bus1=p1udt19711lv.1.2.3 bus2=p1ulv37156.1.2.3 switch=n enabled=y phases=3 Linecode=3P_UG_AL_350kcmil_15_0_416_0_3_3_3_3

New Line.l(r:p1udt14263lv-p1ulv21283) Units=km Length=0.00672775 bus1=p1udt14263lv.1.2.3 bus2=p1ulv21283.1.2.3 switch=n enabled=y phases=3 Linecode=3P_UG_AL_350kcmil_15_0_416_0_3_3_3_3

New Line.l(r:p1udt14263-p1udt19711) Units=km Length=0.0954973 bus1=p1udt19711.1.2.3 bus2=p1udt14263.1.2.3 switch=n enabled=y phases=3 Linecode=3P_OH_AL_ACSR_4/0_Penguin_12_47_0_3_3_3_3

New Line.l(r:p1udt19711-p1udt9243) Units=km Length=0.25055 bus1=p1udt9243.1.2.3 bus2=p1udt19711.1.2.3 switch=n enabled=y phases=3 Linecode=3P_OH_AL_ACSR_4/0_Penguin_12_47_0_3_3_3_3

New Line.l(r:p1udt22436lv-p1ulv49087) Units=km Length=0.008711210000000002 bus1=p1udt22436lv.1.2.3 bus2=p1ulv49087.1.2.3 switch=n enabled=y phases=3 Linecode=3P_UG_AL_350kcmil_15_0_416_0_3_3_3_3

New Line.l(r:p1udt22436-p1udt9243) Units=km Length=0.211308 bus1=p1udt9243.1.2.3 bus2=p1udt22436.1.2.3 switch=n enabled=y phases=3 Linecode=3P_OH_AL_ACSR_4/0_Penguin_12_47_0_3_3_3_3

New Line.l(r:p1udt22929-p1udt9243) Units=km Length=0.351085 bus1=p1udt22929.1.2.3 bus2=p1udt9243.1.2.3 switch=n enabled=y phases=3 Linecode=3P_OH_AL_ACSR_4/0_Penguin_12_47_0_3_3_3_3

New Line.l(r:p1udt22799-p1udt22929) Units=km Length=0.166387 bus1=p1udt22799.1.2.3 bus2=p1udt22929.1.2.3 switch=n enabled=y phases=3 Linecode=3P_OH_AL_ACSR_4/0_Penguin_12_47_0_3_3_3_3

New Line.l(r:p1udt22799-p1udt4390) Units=km Length=0.0929048 bus1=p1udt4390.1.2.3 bus2=p1udt22799.1.2.3 switch=n enabled=y phases=3 Linecode=3P_OH_AL_ACSR_4/0_Penguin_12_47_0_3_3_3_3

New Line.l(r:p1udt6819lv-p1ulv8027) Units=km Length=0.0320993 bus1=p1udt6819lv.1.2.3 bus2=p1ulv8027.1.2.3 switch=n enabled=y phases=3 Linecode=3P_UG_AL_350kcmil_15_0_416_0_3_3_3_3

New Line.l(r:p1udm38478-p1ulv16100) Units=km Length=0.00670824 bus1=p1udm38478.1.2.3 bus2=p1ulv16100.1.2.3 switch=n enabled=y phases=3 Linecode=3P_UG_AL_350kcmil_15_0_416_0_3_3_3_3

New Line.l(r:p1udm38478-p1udt11752lv) Units=km Length=0.0780026 bus1=p1udt11752lv.1.2.3 bus2=p1udm38478.1.2.3 switch=n enabled=y phases=3 Linecode=3P_UG_AL_350kcmil_15_0_416_0_3_3_3_3

New Line.l(r:p1udm38479-p1ulv16777) Units=km Length=0.0363201 bus1=p1udm38479.1.2.3 bus2=p1ulv16777.1.2.3 switch=n enabled=y phases=3 Linecode=3P_UG_AL_750kcmil_25_0_416_0_3_3_3_3

New Line.l(r:p1udm38479-p1udt11752lv) Units=km Length=0.019325200000000004 bus1=p1udt11752lv.1.2.3 bus2=p1udm38479.1.2.3 switch=n enabled=y phases=3 Linecode=3P_UG_AL_750kcmil_25_0_416_0_3_3_3_3

New Line.l(r:p1udt14274lv-p1ulv21300) Units=km Length=0.00979823 bus1=p1udt14274lv.1.2.3 bus2=p1ulv21300.1.2.3 switch=n enabled=y phases=3 Linecode=3P_UG_AL_750kcmil_25_0_416_0_3_3_3_3

New Line.l(r:p1udt23274lv-p1ulv53454) Units=km Length=0.00252288 bus1=p1udt23274lv.1.2.3 bus2=p1ulv53454.1.2.3 switch=n enabled=y phases=3 Linecode=3P_UG_AL_750kcmil_25_0_416_0_3_3_3_3

New Line.l(r:p1udt14274-p1udt23274) Units=km Length=0.131056 bus1=p1udt14274.1.2.3 bus2=p1udt23274.1.2.3 switch=n enabled=y phases=3 Linecode=3P_OH_AL_ACSR_4/0_Penguin_12_47_0_3_3_3_3

New Line.l(r:p1udt1019-p1udt14274) Units=km Length=0.282715 bus1=p1udt1019.1.2.3 bus2=p1udt14274.1.2.3 switch=n enabled=y phases=3 Linecode=3P_OH_AL_ACSR_4/0_Penguin_12_47_0_3_3_3_3

New Line.l(r:p1udt16749lv-p1ulv27664) Units=km Length=0.00804001 bus1=p1udt16749lv.1.2.3 bus2=p1ulv27664.1.2.3 switch=n enabled=y phases=3 Linecode=3P_UG_AL_750kcmil_25_0_416_0_3_3_3_3

New Line.l(r:p1udt16749-p1udt23391) Units=km Length=0.0679037 bus1=p1udt23391.1.2.3 bus2=p1udt16749.1.2.3 switch=n enabled=y phases=3 Linecode=3P_OH_AL_ACSR_4/0_Penguin_12_47_0_3_3_3_3

New Line.l(r:p1udt18005lv-p1ulv31401) Units=km Length=0.0235926 bus1=p1udt18005lv.1.2.3 bus2=p1ulv31401.1.2.3 switch=n enabled=y phases=3 Linecode=3P_UG_AL_750kcmil_25_0_416_0_3_3_3_3

New Line.l(r:p1udt18005-p1udt23391) Units=km Length=0.145166 bus1=p1udt23391.1.2.3 bus2=p1udt18005.1.2.3 switch=n enabled=y phases=3 Linecode=3P_OH_AL_ACSR_4/0_Penguin_12_47_0_3_3_3_3

New Line.l(r:p1udt1019-p1udt23391) Units=km Length=0.07393640000000001 bus1=p1udt1019.1.2.3 bus2=p1udt23391.1.2.3 switch=n enabled=y phases=3 Linecode=3P_OH_AL_ACSR_4/0_Penguin_12_47_0_3_3_3_3

New Line.l(r:p1udt25109lv-p1ulv63962) Units=km Length=0.0140327 bus1=p1udt25109lv.1.2.3 bus2=p1ulv63962.1.2.3 switch=n enabled=y phases=3 Linecode=3P_UG_AL_4/0_15_0_416_0_3_3_3_3

New Line.l(r:p1udt19156lv-p1ulv35250) Units=km Length=0.00411127 bus1=p1udt19156lv.1.2.3 bus2=p1ulv35250.1.2.3 switch=n enabled=y phases=3 Linecode=3P_UG_AL_350kcmil_15_0_416_0_3_3_3_3

New Line.l(r:p1udt19156-p1umv25) Units=km Length=0.256189 bus1=p1udt19156.1.2.3 bus2=p1umv25.1.2.3 switch=n enabled=y phases=3 Linecode=3P_OH_AL_ACSR_4/0_Penguin_12_47_0_3_3_3_3

New Line.l(r:p1udt15806lv-p1ulv25097) Units=km Length=0.0211575 bus1=p1udt15806lv.1.2.3 bus2=p1ulv25097.1.2.3 switch=n enabled=y phases=3 Linecode=3P_UG_AL_350kcmil_15_0_416_0_3_3_3_3

New Line.l(r:p1udt12763lv-p1ulv18062) Units=km Length=0.0162884 bus1=p1udt12763lv.1.2.3 bus2=p1ulv18062.1.2.3 switch=n enabled=y phases=3 Linecode=3P_UG_AL_350kcmil_15_0_416_0_3_3_3_3

New Line.l(r:p1udt5907lv-p1ulv6789) Units=km Length=0.0127582 bus1=p1udt5907lv.1.2.3 bus2=p1ulv6789.1.2.3 switch=n enabled=y phases=3 Linecode=3P_UG_AL_350kcmil_15_0_416_0_3_3_3_3

New Line.l(r:p1udt24382lv-p1ulv59571) Units=km Length=0.010216 bus1=p1udt24382lv.1.2.3 bus2=p1ulv59571.1.2.3 switch=n enabled=y phases=3 Linecode=3P_UG_AL_750kcmil_25_0_416_0_3_3_3_3

New Line.l(r:p1udt17193lv-p1ulv28910) Units=km Length=0.0205032 bus1=p1udt17193lv.1.2.3 bus2=p1ulv28910.1.2.3 switch=n enabled=y phases=3 Linecode=3P_UG_AL_750kcmil_25_0_416_0_3_3_3_3

New Line.l(r:p1udt21387lv-p1ulv44073) Units=km Length=0.0033156700000000006 bus1=p1udt21387lv.1.2.3 bus2=p1ulv44073.1.2.3 switch=n enabled=y phases=3 Linecode=3P_UG_AL_350kcmil_15_0_416_0_3_3_3_3

New Line.l(r:p1udt8856lv-p1ulv11091) Units=km Length=0.007295480000000001 bus1=p1udt8856lv.1.2.3 bus2=p1ulv11091.1.2.3 switch=n enabled=y phases=3 Linecode=3P_UG_AL_350kcmil_15_0_416_0_3_3_3_3

New Line.l(r:p1udt17403lv-p1ulv29517) Units=km Length=0.00971815 bus1=p1udt17403lv.1.2.3 bus2=p1ulv29517.1.2.3 switch=n enabled=y phases=3 Linecode=3P_UG_AL_350kcmil_15_0_416_0_3_3_3_3

New Line.l(r:p1udm36584-p1ulv14852) Units=km Length=0.00294905 bus1=p1udm36584.1.2.3 bus2=p1ulv14852.1.2.3 switch=n enabled=y phases=3 Linecode=3P_UG_AL_350kcmil_15_0_416_0_3_3_3_3

New Line.l(r:p1udm36584-p1udt11084lv) Units=km Length=0.0385677 bus1=p1udt11084lv.1.2.3 bus2=p1udm36584.1.2.3 switch=n enabled=y phases=3 Linecode=3P_UG_AL_350kcmil_15_0_416_0_3_3_3_3

New Line.l(r:p1udm36585-p1ulv25073) Units=km Length=0.00576532 bus1=p1udm36585.1.2.3 bus2=p1ulv25073.1.2.3 switch=n enabled=y phases=3 Linecode=3P_UG_AL_350kcmil_15_0_416_0_3_3_3_3

New Line.l(r:p1udm36585-p1udt11084lv) Units=km Length=0.0382011 bus1=p1udt11084lv.1.2.3 bus2=p1udm36585.1.2.3 switch=n enabled=y phases=3 Linecode=3P_UG_AL_350kcmil_15_0_416_0_3_3_3_3

New Line.l(r:p1udt6366lv-p1ulv7396) Units=km Length=0.00366661 bus1=p1udt6366lv.1.2.3 bus2=p1ulv7396.1.2.3 switch=n enabled=y phases=3 Linecode=3P_UG_AL_750kcmil_25_0_416_0_3_3_3_3

New Line.l(r:p1udt11084-p1udt6366) Units=km Length=0.357553 bus1=p1udt11084.1.2.3 bus2=p1udt6366.1.2.3 switch=n enabled=y phases=3 Linecode=3P_OH_AL_ACSR_4/0_Penguin_12_47_0_3_3_3_3

New Line.l(r:p1udt17404lv-p1ulv29518) Units=km Length=0.014203000000000002 bus1=p1udt17404lv.1.2.3 bus2=p1ulv29518.1.2.3 switch=n enabled=y phases=3 Linecode=3P_UG_AL_350kcmil_15_0_416_0_3_3_3_3

New Line.l(r:p1udt11084-p1udt17404) Units=km Length=0.307181 bus1=p1udt11084.1.2.3 bus2=p1udt17404.1.2.3 switch=n enabled=y phases=3 Linecode=3P_OH_AL_ACSR_4/0_Penguin_12_47_0_3_3_3_3

New Line.l(r:p1udt17405lv-p1ulv29519) Units=km Length=0.013039800000000002 bus1=p1udt17405lv.1.2.3 bus2=p1ulv29519.1.2.3 switch=n enabled=y phases=3 Linecode=3P_UG_AL_750kcmil_25_0_416_0_3_3_3_3

New Line.l(r:p1udt14538lv-p1ulv21893) Units=km Length=0.00957102 bus1=p1udt14538lv.1.2.3 bus2=p1ulv21893.1.2.3 switch=n enabled=y phases=3 Linecode=3P_UG_AL_350kcmil_15_0_416_0_3_3_3_3

New Line.l(r:p1udt21234lv-p1ulv43426) Units=km Length=0.00994899 bus1=p1udt21234lv.1.2.3 bus2=p1ulv43426.1.2.3 switch=n enabled=y phases=3 Linecode=3P_UG_AL_350kcmil_15_0_416_0_3_3_3_3

New Line.l(r:p1udt17400lv-p1ulv29513) Units=km Length=0.00596755 bus1=p1udt17400lv.1.2.3 bus2=p1ulv29513.1.2.3 switch=n enabled=y phases=3 Linecode=3P_UG_AL_750kcmil_25_0_416_0_3_3_3_3

New Line.l(r:p1udt17400-p1udt21234) Units=km Length=0.116063 bus1=p1udt21234.1.2.3 bus2=p1udt17400.1.2.3 switch=n enabled=y phases=3 Linecode=3P_OH_AL_ACSR_4/0_Penguin_12_47_0_3_3_3_3

New Line.l(r:p1udt14538-p1udt21234) Units=km Length=0.0900411 bus1=p1udt14538-p1udt21234x.1.2.3 bus2=p1udt14538-p1udt21234xx.1.2.3 switch=n enabled=y phases=3 Linecode=3P_UG_AL_4/0_25_12_47_0_3_3_3_3

New Line.l(r:p1udt14538-p1umv7) Units=km Length=0.159096 bus1=p1umv7.1.2.3 bus2=p1udt14538.1.2.3 switch=n enabled=y phases=3 Linecode=3P_OH_AL_ACSR_4/0_Penguin_12_47_0_3_3_3_3

New Line.l(r:p1udt17405-p1umv7) Units=km Length=0.400077 bus1=p1udt17405.1.2.3 bus2=p1umv7.1.2.3 switch=n enabled=y phases=3 Linecode=3P_OH_AL_ACSR_4/0_Penguin_12_47_0_3_3_3_3

New Line.l(r:p1udt14262lv-p1ulv21282) Units=km Length=0.0101767 bus1=p1udt14262lv.1.2.3 bus2=p1ulv21282.1.2.3 switch=n enabled=y phases=3 Linecode=3P_UG_AL_750kcmil_25_0_416_0_3_3_3_3

New Line.l(r:p1udt14262-p1udt17403) Units=km Length=0.0956851 bus1=p1udt17403.1.2.3 bus2=p1udt14262.1.2.3 switch=n enabled=y phases=3 Linecode=3P_OH_AL_ACSR_4/0_Penguin_12_47_0_3_3_3_3

New Line.l(r:p1udt12748lv-p1ulv18040) Units=km Length=0.00492118 bus1=p1udt12748lv.1.2.3 bus2=p1ulv18040.1.2.3 switch=n enabled=y phases=3 Linecode=3P_UG_AL_350kcmil_15_0_416_0_3_3_3_3

New Line.l(r:p1udt25283lv-p1ulv65219) Units=km Length=0.00603441 bus1=p1udt25283lv.1.2.3 bus2=p1ulv65219.1.2.3 switch=n enabled=y phases=3 Linecode=3P_UG_AL_350kcmil_15_0_416_0_3_3_3_3

New Line.l(r:p1udt24279lv-p1ulv58953) Units=km Length=0.0109068 bus1=p1udt24279lv.1.2.3 bus2=p1ulv58953.1.2.3 switch=n enabled=y phases=3 Linecode=3P_UG_AL_350kcmil_15_0_416_0_3_3_3_3

New Line.l(r:p1udt24279-p1udt25283) Units=km Length=0.176712 bus1=p1udt24279-p1udt25283xx.1.2.3 bus2=p1udt24279-p1udt25283x.1.2.3 switch=n enabled=y phases=3 Linecode=3P_UG_AL_4/0_25_12_47_0_3_3_3_3

New Line.l(r:p1udt12748-p1udt25283) Units=km Length=0.145812 bus1=p1udt12748-p1udt25283x.1.2.3 bus2=p1udt12748-p1udt25283xx.1.2.3 switch=n enabled=y phases=3 Linecode=3P_UG_AL_4/0_25_12_47_0_3_3_3_3

New Line.l(r:p1udt12748-p1udt21387) Units=km Length=0.446457 bus1=p1udt21387.1.2.3 bus2=p1udt12748.1.2.3 switch=n enabled=y phases=3 Linecode=3P_OH_AL_ACSR_4/0_Penguin_12_47_0_3_3_3_3

New Line.l(r:p1udt17194lv-p1ulv28911) Units=km Length=0.0243299 bus1=p1udt17194lv.1.2.3 bus2=p1ulv28911.1.2.3 switch=n enabled=y phases=3 Linecode=3P_UG_AL_350kcmil_15_0_416_0_3_3_3_3

New Line.l(r:p1udt17194-p1udt24382) Units=km Length=0.062008100000000003 bus1=p1udt24382.1.2.3 bus2=p1udt17194.1.2.3 switch=n enabled=y phases=3 Linecode=3P_OH_AL_ACSR_4/0_Penguin_12_47_0_3_3_3_3

New Line.l(r:p1udt19536lv-p1ulv36538) Units=km Length=0.0157295 bus1=p1udt19536lv.1.2.3 bus2=p1ulv36538.1.2.3 switch=n enabled=y phases=3 Linecode=3P_UG_AL_350kcmil_15_0_416_0_3_3_3_3

New Line.l(r:p1udt21084lv-p1ulv42758) Units=km Length=0.0216242 bus1=p1udt21084lv.1.2.3 bus2=p1ulv42758.1.2.3 switch=n enabled=y phases=3 Linecode=3P_UG_AL_750kcmil_25_0_416_0_3_3_3_3

New Line.l(r:p1udt15807-p1udt21084) Units=km Length=0.187235 bus1=p1udt15807.1.2.3 bus2=p1udt15807_b1_1.1.2.3 switch=n enabled=y phases=3 Linecode=3P_OH_AL_ACSR_4/0_Penguin_12_47_0_3_3_3_3

New Line.l(r:p1udt23389lv-p1ulv54127) Units=km Length=0.00635324 bus1=p1udt23389lv.1.2.3 bus2=p1ulv54127.1.2.3 switch=n enabled=y phases=3 Linecode=3P_UG_AL_350kcmil_15_0_416_0_3_3_3_3

New Line.l(r:p1udt23036lv-p1ulv52187) Units=km Length=0.00229584 bus1=p1udt23036lv.1.2.3 bus2=p1ulv52187.1.2.3 switch=n enabled=y phases=3 Linecode=3P_UG_AL_750kcmil_25_0_416_0_3_3_3_3

New Line.l(r:p1udt22305-p1udt23036) Units=km Length=0.09293270000000001 bus1=p1udt22305.1.2.3 bus2=p1udt22305_b1_1.1.2.3 switch=n enabled=y phases=3 Linecode=3P_OH_AL_ACSR_4/0_Penguin_12_47_0_3_3_3_3

New Line.l(r:p1udt21245-p1udt22305) Units=km Length=0.447848 bus1=p1udt21245.1.2.3 bus2=p1udt22305.1.2.3 switch=n enabled=y phases=3 Linecode=3P_OH_AL_ACSR_4/0_Penguin_12_47_0_3_3_3_3

New Line.l(r:p1udt21245-p1udt23389) Units=km Length=0.0576993 bus1=p1udt23389.1.2.3 bus2=p1udt21245.1.2.3 switch=n enabled=y phases=3 Linecode=3P_OH_AL_ACSR_4/0_Penguin_12_47_0_3_3_3_3

New Line.l(r:p1udt15807-p1udt23389) Units=km Length=0.21751100000000004 bus1=p1udt15807.1.2.3 bus2=p1udt23389.1.2.3 switch=n enabled=y phases=3 Linecode=3P_OH_AL_ACSR_4/0_Penguin_12_47_0_3_3_3_3

New Line.l(r:p1udt15807-p1udt21799) Units=km Length=0.021435 bus1=p1udt15807-p1udt21799xx.1.2.3 bus2=p1udt15807-p1udt21799x.1.2.3 switch=n enabled=y phases=3 Linecode=3P_UG_AL_4/0_25_12_47_0_3_3_3_3

New Line.l(r:p1udt20524-p1udt21799) Units=km Length=0.0630744 bus1=p1udt20524-p1udt21799x.1.2.3 bus2=p1udt20524-p1udt21799xx.1.2.3 switch=n enabled=y phases=3 Linecode=3P_UG_AL_4/0_25_12_47_0_3_3_3_3

New Line.l(r:p1udt19536-p1udt20524) Units=km Length=0.0280734 bus1=p1udt19536-p1udt20524x.1.2.3 bus2=p1udt19536-p1udt20524xx.1.2.3 switch=n enabled=y phases=3 Linecode=3P_UG_AL_4/0_25_12_47_0_3_3_3_3

New Line.l(r:p1udt1018-p1udt19536) Units=km Length=0.157543 bus1=p1udt1018-p1udt19536x.1.2.3 bus2=p1udt1018-p1udt19536xx.1.2.3 switch=n enabled=y phases=3 Linecode=3P_UG_AL_4/0_25_12_47_0_3_3_3_3

New Line.l(r:p1udt17192lv-p1ulv28909) Units=km Length=0.0136395 bus1=p1udt17192lv.1.2.3 bus2=p1ulv28909.1.2.3 switch=n enabled=y phases=3 Linecode=3P_UG_AL_350kcmil_15_0_416_0_3_3_3_3

New Line.l(r:p1udt16293lv-p1ulv26362) Units=km Length=0.006046690000000001 bus1=p1udt16293lv.1.2.3 bus2=p1ulv26362.1.2.3 switch=n enabled=y phases=3 Linecode=3P_UG_AL_350kcmil_15_0_416_0_3_3_3_3

New Line.l(r:p1udt16293-p1udt23388) Units=km Length=0.167902 bus1=p1udt16293-p1udt23388xx.1.2.3 bus2=p1udt16293-p1udt23388x.1.2.3 switch=n enabled=y phases=3 Linecode=3P_UG_AL_4/0_25_12_47_0_3_3_3_3

New Line.l(r:p1udt17192-p1udt23388) Units=km Length=0.0376954 bus1=p1udt17192-p1udt23388x.1.2.3 bus2=p1udt17192-p1udt23388xx.1.2.3 switch=n enabled=y phases=3 Linecode=3P_UG_AL_4/0_25_12_47_0_3_3_3_3

New Line.l(r:p1udt17192-p1udt24796) Units=km Length=0.111719 bus1=p1udt17192-p1udt24796xx.1.2.3 bus2=p1udt17192-p1udt24796x.1.2.3 switch=n enabled=y phases=3 Linecode=3P_UG_AL_4/0_25_12_47_0_3_3_3_3

New Line.l(r:p1udt15322-p1udt24796) Units=km Length=0.0686422 bus1=p1udt15322-p1udt24796x.1.2.3 bus2=p1udt15322-p1udt24796xx.1.2.3 switch=n enabled=y phases=3 Linecode=3P_UG_AL_4/0_25_12_47_0_3_3_3_3

New Line.l(r:p1udt12763-p1udt15322) Units=km Length=0.0493927 bus1=p1udt12763-p1udt15322x.1.2.3 bus2=p1udt12763-p1udt15322xx.1.2.3 switch=n enabled=y phases=3 Linecode=3P_UG_AL_4/0_25_12_47_0_3_3_3_3

New Line.l(r:p1udt15804lv-p1ulv25095) Units=km Length=0.0339388 bus1=p1udt15804lv.1.2.3 bus2=p1ulv25095.1.2.3 switch=n enabled=y phases=3 Linecode=3P_UG_AL_350kcmil_15_0_416_0_3_3_3_3

New Line.l(r:p1udt23499lv-p1ulv54764) Units=km Length=0.0279629 bus1=p1udt23499lv.1.2.3 bus2=p1ulv54764.1.2.3 switch=n enabled=y phases=3 Linecode=3P_UG_AL_350kcmil_15_0_416_0_3_3_3_3

New Line.l(r:p1udt23392lv-p1ulv54130) Units=km Length=0.0375434 bus1=p1udt23392lv.1.2.3 bus2=p1ulv54130.1.2.3 switch=n enabled=y phases=3 Linecode=3P_UG_AL_350kcmil_15_0_416_0_3_3_3_3

New Line.l(r:p1udt23392-p1udt25286) Units=km Length=0.123898 bus1=p1udt23392-p1udt25286xx.1.2.3 bus2=p1udt23392-p1udt25286x.1.2.3 switch=n enabled=y phases=3 Linecode=3P_UG_AL_4/0_25_12_47_0_3_3_3_3

New Line.l(r:p1udt20671-p1udt25286) Units=km Length=0.019113000000000005 bus1=p1udt20671-p1udt25286x.1.2.3 bus2=p1udt20671-p1udt25286xx.1.2.3 switch=n enabled=y phases=3 Linecode=3P_UG_AL_4/0_25_12_47_0_3_3_3_3

New Line.l(r:p1udt20671-p1udt23499) Units=km Length=0.00954774 bus1=p1udt20671-p1udt23499xx.1.2.3 bus2=p1udt20671-p1udt23499x.1.2.3 switch=n enabled=y phases=3 Linecode=3P_UG_AL_4/0_25_12_47_0_3_3_3_3

New Line.l(r:p1udt23499-p1udt413) Units=km Length=0.0286656 bus1=p1udt23499-p1udt413xx.1.2.3 bus2=p1udt23499-p1udt413x.1.2.3 switch=n enabled=y phases=3 Linecode=3P_UG_AL_4/0_25_12_47_0_3_3_3_3

New Line.l(r:p1udt21643-p1udt413) Units=km Length=0.019113000000000005 bus1=p1udt21643-p1udt413x.1.2.3 bus2=p1udt21643-p1udt413xx.1.2.3 switch=n enabled=y phases=3 Linecode=3P_UG_AL_4/0_25_12_47_0_3_3_3_3

New Line.l(r:p1udt10734-p1udt21643) Units=km Length=0.223078 bus1=p1udt10734-p1udt21643x.1.2.3 bus2=p1udt10734-p1udt21643xx.1.2.3 switch=n enabled=y phases=3 Linecode=3P_UG_AL_4/0_25_12_47_0_3_3_3_3

New Line.l(r:p1udt10734-p1udt15804) Units=km Length=0.029492 bus1=p1udt10734-p1udt15804xx.1.2.3 bus2=p1udt10734-p1udt15804x.1.2.3 switch=n enabled=y phases=3 Linecode=3P_UG_AL_4/0_25_12_47_0_3_3_3_3

New Line.l(r:p1udt15804-p1udt15806) Units=km Length=0.181641 bus1=p1udt15804-p1udt15806xx.1.2.3 bus2=p1udt15804-p1udt15806x.1.2.3 switch=n enabled=y phases=3 Linecode=3P_UG_AL_4/0_25_12_47_0_3_3_3_3

New Line.l(r:p1udt18005-p1udt18985) Units=km Length=0.227614 bus1=p1udt18005-p1udt18985x.1.2.3 bus2=p1udt18985.1.2.3 switch=n enabled=y phases=3 Linecode=3P_OH_AL_ACSR_1033kcmil_Curlew_12.47_1_3_3_3_3

New Line.l(r:p1udt17192-p1udt19535) Units=km Length=0.214112 bus1=p1udt17192-p1udt19535x.1.2.3 bus2=p1udt17192.1.2.3 switch=n enabled=y phases=3 Linecode=3P_OH_AL_ACSR_1033kcmil_Curlew_12.47_1_3_3_3_3

New Line.l(r:p1udt19355-p1udt25287) Units=km Length=0.133494 bus1=p1udt19355-p1udt25287x.1.2.3 bus2=p1udt19355-p1udt25287xx.1.2.3 switch=n enabled=y phases=3 Linecode=3P_OH_AL_ACSR_1033kcmil_Curlew_12.47_1_3_3_3_3

New Line.padswitch(r:p1udt15806-p1udt24483)p1u_247966 Units=km Length=0.001 bus1=p1udt24483.1.2.3 bus2=p1udt15806-p1udt24483xx.1.2.3 switch=y enabled=y phases=3 Linecode=padswitch_3_3_3_3

New Line.padswitch(r:p1udt15806-p1udt24483)p1u_247967 Units=km Length=0.001 bus1=p1udt15806-p1udt24483x.1.2.3 bus2=p1udt15806.1.2.3 switch=y enabled=y phases=3 Linecode=padswitch_3_3_3_3_3

New Line.padswitch(r:p1udt24483-p1udt25287)p1u_247968 Units=km Length=0.001 bus1=p1udt25287.1.2.3 bus2=p1udt24483-p1udt25287xx.1.2.3 switch=y enabled=y phases=3 Linecode=padswitch_3_3_3_1_3_3

New Line.padswitch(r:p1udt24483-p1udt25287)p1u_247969 Units=km Length=0.001 bus1=p1udt24483-p1udt25287x.1.2.3 bus2=p1udt24483.1.2.3 switch=y enabled=y phases=3 Linecode=padswitch_3_3_3_1_3_1_3

New Line.padswitch(r:p1udt25287-p1udt6380)p1u_247918 Units=km Length=0.001 bus1=p1udt25287.1.2.3 bus2=p1udt25287-p1udt6380x.1.2.3 switch=y enabled=y phases=3 Linecode=padswitch_3_3_3_1_3_1_3_1

New Line.padswitch(r:p1udt25287-p1udt6380)p1u_247919 Units=km Length=0.001 bus1=p1udt25287-p1udt6380xx.1.2.3 bus2=p1udt6380.1.2.3 switch=y enabled=y phases=3 Linecode=padswitch_3_3_3_3

New Line.padswitch(r:p1udt1018-p1udt5907)p1u_247926 Units=km Length=0.001 bus1=p1udt1018.1.2.3 bus2=p1udt1018-p1udt5907x.1.2.3 switch=y enabled=y phases=3 Linecode=padswitch_3_3_3_1_3_1_3_1

New Line.padswitch(r:p1udt1018-p1udt5907)p1u_247927 Units=km Length=0.001 bus1=p1udt1018-p1udt5907xx.1.2.3 bus2=p1udt5907.1.2.3 switch=y enabled=y phases=3 Linecode=padswitch_3_3_3_3

New Line.padswitch(r:p1udt1018-p1udt12763)p1u_247936 Units=km Length=0.001 bus1=p1udt12763.1.2.3 bus2=p1udt1018-p1udt12763xx.1.2.3 switch=y enabled=y phases=3 Linecode=padswitch_3_3_3_1_3_1_3_1

New Line.padswitch(r:p1udt1018-p1udt12763)p1u_247937 Units=km Length=0.001 bus1=p1udt1018-p1udt12763x.1.2.3 bus2=p1udt1018.1.2.3 switch=y enabled=y phases=3 Linecode=padswitch_3_3_3_1_3_1_3_1

New Line.padswitch(r:p1udt12763-p1udt15806)p1u_247948 Units=km Length=0.001 bus1=p1udt15806.1.2.3 bus2=p1udt12763-p1udt15806xx.1.2.3 switch=y enabled=y phases=3 Linecode=padswitch_3_3_3_1_3_1_3_1

New Line.padswitch(r:p1udt12763-p1udt15806)p1u_247949 Units=km Length=0.001 bus1=p1udt12763-p1udt15806x.1.2.3 bus2=p1udt12763.1.2.3 switch=y enabled=y phases=3 Linecode=padswitch_3_3_3_1_3_1_3_1

New Line.padswitch(r:p1udt14538-p1udt21234)p1u_247920 Units=km Length=0.001 bus1=p1udt14538.1.2.3 bus2=p1udt14538-p1udt21234x.1.2.3 switch=y enabled=y phases=3 Linecode=padswitch_3_3_3_3

New Line.padswitch(r:p1udt14538-p1udt21234)p1u_247921 Units=km Length=0.001 bus1=p1udt14538-p1udt21234xx.1.2.3 bus2=p1udt21234.1.2.3 switch=y enabled=y phases=3 Linecode=padswitch_3_3_3_3

New Line.padswitch(r:p1udt24279-p1udt25283)p1u_247922 Units=km Length=0.001 bus1=p1udt25283.1.2.3 bus2=p1udt24279-p1udt25283xx.1.2.3 switch=y enabled=y phases=3 Linecode=padswitch_3_3_3_1_3_1_3_1

New Line.padswitch(r:p1udt24279-p1udt25283)p1u_247923 Units=km Length=0.001 bus1=p1udt24279-p1udt25283x.1.2.3 bus2=p1udt24279.1.2.3 switch=y enabled=y phases=3 Linecode=padswitch_3_3_3_1_3_1_3_1

New Line.padswitch(r:p1udt12748-p1udt25283)p1u_247924 Units=km Length=0.001 bus1=p1udt12748.1.2.3 bus2=p1udt12748-p1udt25283x.1.2.3 switch=y enabled=y phases=3 Linecode=padswitch_3_3_3_3

New Line.padswitch(r:p1udt12748-p1udt25283)p1u_247925 Units=km Length=0.001 bus1=p1udt12748-p1udt25283xx.1.2.3 bus2=p1udt25283.1.2.3 switch=y enabled=y phases=3 Linecode=padswitch_3_3_3_1_3_1_3_1

New Line.padswitch(r:p1udt15807-p1udt21799)p1u_247928 Units=km Length=0.001 bus1=p1udt21799.1.2.3 bus2=p1udt15807-p1udt21799xx.1.2.3 switch=y enabled=y phases=3 Linecode=padswitch_3_3_3_3

New Line.padswitch(r:p1udt15807-p1udt21799)p1u_247929 Units=km Length=0.001 bus1=p1udt15807-p1udt21799x.1.2.3 bus2=p1udt15807.1.2.3 switch=y enabled=y phases=3 Linecode=padswitch_3_3_3_1_3_1_3_1

New Line.padswitch(r:p1udt20524-p1udt21799)p1u_247930 Units=km Length=0.001 bus1=p1udt20524.1.2.3 bus2=p1udt20524-p1udt21799x.1.2.3 switch=y enabled=y phases=3 Linecode=padswitch_3_3_3_1_3_1_3_1

New Line.padswitch(r:p1udt20524-p1udt21799)p1u_247931 Units=km Length=0.001 bus1=p1udt20524-p1udt21799xx.1.2.3 bus2=p1udt21799.1.2.3 switch=y enabled=y phases=3 Linecode=padswitch_3_3_3_3

New Line.padswitch(r:p1udt19536-p1udt20524)p1u_247932 Units=km Length=0.001 bus1=p1udt19536.1.2.3 bus2=p1udt19536-p1udt20524x.1.2.3 switch=y enabled=y phases=3 Linecode=padswitch_3_3_3_1_3_1_3_1

New Line.padswitch(r:p1udt19536-p1udt20524)p1u_247933 Units=km Length=0.001 bus1=p1udt19536-p1udt20524xx.1.2.3 bus2=p1udt20524.1.2.3 switch=y enabled=y phases=3 Linecode=padswitch_3_3_3_3

New Line.padswitch(r:p1udt1018-p1udt19536)p1u_247934 Units=km Length=0.001 bus1=p1udt1018.1.2.3 bus2=p1udt1018-p1udt19536x.1.2.3 switch=y enabled=y phases=3 Linecode=padswitch_3_3_3_1_3_1_3_1

New Line.padswitch(r:p1udt1018-p1udt19536)p1u_247935 Units=km Length=0.001 bus1=p1udt1018-p1udt19536xx.1.2.3 bus2=p1udt19536.1.2.3 switch=y enabled=y phases=3 Linecode=padswitch_3_3_3_1_3_1_3_1

New Line.padswitch(r:p1udt16293-p1udt23388)p1u_247938 Units=km Length=0.001 bus1=p1udt23388.1.2.3 bus2=p1udt16293-p1udt23388xx.1.2.3 switch=y enabled=y phases=3 Linecode=padswitch_3_3_3_1_3_1_3_1

New Line.padswitch(r:p1udt16293-p1udt23388)p1u_247939 Units=km Length=0.001 bus1=p1udt16293-p1udt23388x.1.2.3 bus2=p1udt16293.1.2.3 switch=y enabled=y phases=3 Linecode=padswitch_3_3_3_1_3_1_3_1

New Line.padswitch(r:p1udt17192-p1udt23388)p1u_247940 Units=km Length=0.001 bus1=p1udt17192.1.2.3 bus2=p1udt17192-p1udt23388x.1.2.3 switch=y enabled=y phases=3 Linecode=padswitch_3_3_3_1_3_1_3_1

New Line.padswitch(r:p1udt17192-p1udt23388)p1u_247941 Units=km Length=0.001 bus1=p1udt17192-p1udt23388xx.1.2.3 bus2=p1udt23388.1.2.3 switch=y enabled=y phases=3 Linecode=padswitch_3_3_3_1_3_1_3_1

New Line.padswitch(r:p1udt17192-p1udt24796)p1u_247942 Units=km Length=0.001 bus1=p1udt24796.1.2.3 bus2=p1udt17192-p1udt24796xx.1.2.3 switch=y enabled=y phases=3 Linecode=padswitch_3_3_3_1_3_1_3_1

New Line.padswitch(r:p1udt17192-p1udt24796)p1u_247943 Units=km Length=0.001 bus1=p1udt17192-p1udt24796x.1.2.3 bus2=p1udt17192.1.2.3 switch=y enabled=y phases=3 Linecode=padswitch_3_3_3_1_3_1_3_1

New Line.padswitch(r:p1udt15322-p1udt24796)p1u_247944 Units=km Length=0.001 bus1=p1udt15322.1.2.3 bus2=p1udt15322-p1udt24796x.1.2.3 switch=y enabled=y phases=3 Linecode=padswitch_3_3_3_1_3_3

New Line.padswitch(r:p1udt15322-p1udt24796)p1u_247945 Units=km Length=0.001 bus1=p1udt15322-p1udt24796xx.1.2.3 bus2=p1udt24796.1.2.3 switch=y enabled=y phases=3 Linecode=padswitch_3_3_3_1_3_1_3_1

New Line.padswitch(r:p1udt12763-p1udt15322)p1u_247946 Units=km Length=0.001 bus1=p1udt12763.1.2.3 bus2=p1udt12763-p1udt15322x.1.2.3 switch=y enabled=y phases=3 Linecode=padswitch_3_3_3_1_3_1_3_1

New Line.padswitch(r:p1udt12763-p1udt15322)p1u_247947 Units=km Length=0.001 bus1=p1udt12763-p1udt15322xx.1.2.3 bus2=p1udt15322.1.2.3 switch=y enabled=y phases=3 Linecode=padswitch_3_3_3_1_3_3

New Line.padswitch(r:p1udt23392-p1udt25286)p1u_247950 Units=km Length=0.001 bus1=p1udt25286.1.2.3 bus2=p1udt23392-p1udt25286xx.1.2.3 switch=y enabled=y phases=3 Linecode=padswitch_3_3_3_1_3_1_3_1

New Line.padswitch(r:p1udt23392-p1udt25286)p1u_247951 Units=km Length=0.001 bus1=p1udt23392-p1udt25286x.1.2.3 bus2=p1udt23392.1.2.3 switch=y enabled=y phases=3 Linecode=padswitch_3_3_3_1_3_1_3_1

New Line.padswitch(r:p1udt20671-p1udt25286)p1u_247952 Units=km Length=0.001 bus1=p1udt20671.1.2.3 bus2=p1udt20671-p1udt25286x.1.2.3 switch=y enabled=y phases=3 Linecode=padswitch_3_3_3_1_3_1_3_1

New Line.padswitch(r:p1udt20671-p1udt25286)p1u_247953 Units=km Length=0.001 bus1=p1udt20671-p1udt25286xx.1.2.3 bus2=p1udt25286.1.2.3 switch=y enabled=y phases=3 Linecode=padswitch_3_3_3_1_3_1_3_1

New Line.padswitch(r:p1udt20671-p1udt23499)p1u_247954 Units=km Length=0.001 bus1=p1udt23499.1.2.3 bus2=p1udt20671-p1udt23499xx.1.2.3 switch=y enabled=y phases=3 Linecode=padswitch_3_3_3_1_3_1_3_1

New Line.padswitch(r:p1udt20671-p1udt23499)p1u_247955 Units=km Length=0.001 bus1=p1udt20671-p1udt23499x.1.2.3 bus2=p1udt20671.1.2.3 switch=y enabled=y phases=3 Linecode=padswitch_3_3_3_1_3_1_3_1

New Line.padswitch(r:p1udt23499-p1udt413)p1u_247956 Units=km Length=0.001 bus1=p1udt413.1.2.3 bus2=p1udt23499-p1udt413xx.1.2.3 switch=y enabled=y phases=3 Linecode=padswitch_3_3_3_1_3_1_3_1

New Line.padswitch(r:p1udt23499-p1udt413)p1u_247957 Units=km Length=0.001 bus1=p1udt23499-p1udt413x.1.2.3 bus2=p1udt23499.1.2.3 switch=y enabled=y phases=3 Linecode=padswitch_3_3_3_1_3_1_3_1

New Line.padswitch(r:p1udt21643-p1udt413)p1u_247958 Units=km Length=0.001 bus1=p1udt21643.1.2.3 bus2=p1udt21643-p1udt413x.1.2.3 switch=y enabled=y phases=3 Linecode=padswitch_3_3_3_1_3_1_3_1

New Line.padswitch(r:p1udt21643-p1udt413)p1u_247959 Units=km Length=0.001 bus1=p1udt21643-p1udt413xx.1.2.3 bus2=p1udt413.1.2.3 switch=y enabled=y phases=3 Linecode=padswitch_3_3_3_1_3_1_3_1

New Line.padswitch(r:p1udt10734-p1udt21643)p1u_247960 Units=km Length=0.001 bus1=p1udt10734.1.2.3 bus2=p1udt10734-p1udt21643x.1.2.3 switch=y enabled=y phases=3 Linecode=padswitch_3_3_3_1_3_1_3_1

New Line.padswitch(r:p1udt10734-p1udt21643)p1u_247961 Units=km Length=0.001 bus1=p1udt10734-p1udt21643xx.1.2.3 bus2=p1udt21643.1.2.3 switch=y enabled=y phases=3 Linecode=padswitch_3_3_3_1_3_1_3_1

New Line.padswitch(r:p1udt10734-p1udt15804)p1u_247962 Units=km Length=0.001 bus1=p1udt15804.1.2.3 bus2=p1udt10734-p1udt15804xx.1.2.3 switch=y enabled=y phases=3 Linecode=padswitch_3_3_3_1_3_1_3_1

New Line.padswitch(r:p1udt10734-p1udt15804)p1u_247963 Units=km Length=0.001 bus1=p1udt10734-p1udt15804x.1.2.3 bus2=p1udt10734.1.2.3 switch=y enabled=y phases=3 Linecode=padswitch_3_3_3_1_3_1_3_1

New Line.padswitch(r:p1udt15804-p1udt15806)p1u_247964 Units=km Length=0.001 bus1=p1udt15806.1.2.3 bus2=p1udt15804-p1udt15806xx.1.2.3 switch=y enabled=y phases=3 Linecode=padswitch_3_3_3_1_3_1_3_1

New Line.padswitch(r:p1udt15804-p1udt15806)p1u_247965 Units=km Length=0.001 bus1=p1udt15804-p1udt15806x.1.2.3 bus2=p1udt15804.1.2.3 switch=y enabled=y phases=3 Linecode=padswitch_3_3_3_1_3_1_3_1

New Line.padswitch(r:p1udt14538-p1udt25103)p1u_265814 Units=km Length=0.001 bus1=p1udt14538.1.2.3 bus2=p1udt14538-p1udt25103x.1.2.3 switch=y enabled=n phases=3 Linecode=padswitch_3_3_3_1_3_1_3_1

New Line.elbswitch(r:p1udt23036-p1udt400)p1u_265827 Units=km Length=0.001 bus1=p1udt23036.1.2.3 bus2=p1udt23036-p1udt400x.1.2.3 switch=y enabled=n phases=3 Linecode=elbswitch_3_3_3_3

New Line.elbswitch(r:p1udt18005-p1udt18985)p1u_265883 Units=km Length=0.001 bus1=p1udt18005.1.2.3 bus2=p1udt18005-p1udt18985x.1.2.3 switch=y enabled=n phases=3 Linecode=elbswitch_3_3_3_3

New Line.padswitch(r:p1udt19355-p1udt25287)p1u_265966 Units=km Length=0.001 bus1=p1udt19355-p1udt25287xx.1.2.3 bus2=p1udt25287.1.2.3 switch=y enabled=n phases=3 Linecode=padswitch_3_3_3_1_3_1_3

New Line.fuse(r:p1udt10376-p1udt6380)p1u_266605 Units=km Length=0.001 bus1=p1udt6380.2 bus2=p1udt10376-p1udt6380x.2 switch=n enabled=y phases=1 Linecode=fuse_1_1_1_1

New Fuse.Fuse_fuse(r:p1udt10376-p1udt6380)p1u_266605 monitoredobj=Line.fuse(r:p1udt10376-p1udt6380)p1u_266605 enabled=y ratedcurrent=100.0

New Line.fuse(r:p1udt11411-p1udt11752)p1u_267127 Units=km Length=0.001 bus1=p1udt11752.3 bus2=p1udt11411-p1udt11752x.3 switch=n enabled=y phases=1 Linecode=fuse_1_1_1_1

New Fuse.Fuse_fuse(r:p1udt11411-p1udt11752)p1u_267127 monitoredobj=Line.fuse(r:p1udt11411-p1udt11752)p1u_267127 enabled=y ratedcurrent=100.0

New Line.fuse(r:p1udt15322-p1udt8087)p1u_267481 Units=km Length=0.001 bus1=p1udt15322.2 bus2=p1udt15322-p1udt8087x.2 switch=n enabled=y phases=1 Linecode=fuse_1_6_1_1_1

New Fuse.Fuse_fuse(r:p1udt15322-p1udt8087)p1u_267481 monitoredobj=Line.fuse(r:p1udt15322-p1udt8087)p1u_267481 enabled=y ratedcurrent=100.0

New Line.fuse(r:p1udt15806-p1udt6818)p1u_267535 Units=km Length=0.001 bus1=p1udt15806.2 bus2=p1udt15806-p1udt6818x.2 switch=n enabled=y phases=1 Linecode=fuse_1_6_1_4_1_1

New Fuse.Fuse_fuse(r:p1udt15806-p1udt6818)p1u_267535 monitoredobj=Line.fuse(r:p1udt15806-p1udt6818)p1u_267535 enabled=y ratedcurrent=100.0

New Line.fuse(r:p1udt16748-p1udt17193)p1u_267678 Units=km Length=0.001 bus1=p1udt17193.3 bus2=p1udt16748-p1udt17193x.3 switch=n enabled=y phases=1 Linecode=fuse_1_1_1_1

New Fuse.Fuse_fuse(r:p1udt16748-p1udt17193)p1u_267678 monitoredobj=Line.fuse(r:p1udt16748-p1udt17193)p1u_267678 enabled=y ratedcurrent=100.0

New Line.fuse(r:p1udt23601-p1udt24701)p1u_268447 Units=km Length=0.001 bus1=p1udt24701.3 bus2=p1udt23601-p1udt24701x.3 switch=n enabled=y phases=1 Linecode=fuse_1_6_1_1_1

New Fuse.Fuse_fuse(r:p1udt23601-p1udt24701)p1u_268447 monitoredobj=Line.fuse(r:p1udt23601-p1udt24701)p1u_268447 enabled=y ratedcurrent=100.0

New Line.fuse(r:p1udt24796-p1udt7684)p1u_268457 Units=km Length=0.001 bus1=p1udt24796.1 bus2=p1udt24796-p1udt7684x.1 switch=n enabled=y phases=1 Linecode=fuse_1_6_1_4_1_1

New Fuse.Fuse_fuse(r:p1udt24796-p1udt7684)p1u_268457 monitoredobj=Line.fuse(r:p1udt24796-p1udt7684)p1u_268457 enabled=y ratedcurrent=100.0

New Line.l(r:p1udt15807-p1udt21084)_disconnect Units=km Length=0.001 bus1=p1udt15807_b1_1.1.2.3 bus2=p1udt15807_b2_1.1.2.3 switch=y enabled=y phases=3 Linecode=3P_OH_AL_ACSR_4/0_Penguin_12_47_0_3_3_3_3

New Line.l(r:p1udt15807-p1udt21084)_cont Units=km Length=1.694115 bus1=p1udt15807_b2_1.1.2.3 bus2=p1udt21084.1.2.3 switch=n enabled=y phases=3 Linecode=3P_OH_AL_ACSR_4/0_Penguin_12_47_0_3_3_3_3

New Line.l(r:p1udt22305-p1udt23036)_disconnect Units=km Length=0.001 bus1=p1udt22305_b1_1.1.2.3 bus2=p1udt22305_b2_1.1.2.3 switch=y enabled=y phases=3 Linecode=3P_OH_AL_ACSR_4/0_Penguin_12_47_0_3_3_3_3

New Line.l(r:p1udt22305-p1udt23036)_cont Units=km Length=0.8453943 bus1=p1udt22305_b2_1.1.2.3 bus2=p1udt23036.1.2.3 switch=n enabled=y phases=3 Linecode=3P_OH_AL_ACSR_4/0_Penguin_12_47_0_3_3_3_3
