New Capacitor.p1uc80 Bus1=p1udt6659 phases=3 Kv=12.47 conn=Wye Kvar=300.0

New CapControl.p1uc80 Capacitor=p1uc80 Element=Line.l(r:p1udt10634-p1udt6659) Terminal=1 delay=100.0 Type=voltage Vmin=120.5 Vmax=125.0 Ptratio=59.99631547328862 Ctratio=100.0
