New Capacitor.p1uc79 Bus1=p1udt18429 phases=3 Kv=12.47 conn=Wye Kvar=450.0

New CapControl.p1uc79 Capacitor=p1uc79 Element=Line.padswitch(r:p1udt18429-p1udt577)p1u_249459 Terminal=1 delay=100.0 Type=voltage Vmin=120.5 Vmax=125.0 Ptratio=59.99631547328862 Ctratio=100.0

New Capacitor.p1uc84 Bus1=p1udt21277 phases=3 Kv=12.47 conn=Wye Kvar=300.0

New CapControl.p1uc84 Capacitor=p1uc84 Element=Line.padswitch(r:p1udt14330-p1udt21277)p1u_249555 Terminal=1 delay=100.0 Type=voltage Vmin=120.5 Vmax=125.0 Ptratio=59.99631547328862 Ctratio=100.0
