New Capacitor.p1uc92 Bus1=p1udt19045 phases=3 Kv=12.47 conn=Wye Kvar=300.0

New CapControl.p1uc92 Capacitor=p1uc92 Element=Line.padswitch(r:p1udt19045-p1udt19596)p1u_251076 Terminal=1 delay=100.0 Type=voltage Vmin=120.5 Vmax=125.0 Ptratio=59.99631547328862 Ctratio=100.0
