New Line.l(r:p1udt8187-p1uhs13_1247) Units=km Length=0.08607680000000001 bus1=p1udt8187-p1uhs13_1247x.1.2.3 bus2=p1udt8187-p1uhs13_1247x_b1_1.1.2.3 switch=n enabled=y phases=3 Linecode=3P_OH_AL_ACSR_4/0_Penguin_12_47_0_3_3_3_3

New Line.l(r:p1udt8187lv-p1ulv10037) Units=km Length=0.0104921 bus1=p1udt8187lv.1.2.3 bus2=p1ulv10037.1.2.3 switch=n enabled=y phases=3 Linecode=3P_UG_AL_4/0_15_0_416_0_3_3_3_3

New Line.l(r:p1udt8187lv-p1ulv19561) Units=km Length=0.012564300000000002 bus1=p1udt8187lv.1.2.3 bus2=p1ulv19561.1.2.3 switch=n enabled=y phases=3 Linecode=3P_UG_AL_4/0_15_0_416_0_3_3_3_3

New Line.l(r:p1udt8988lv-p1ulv48655) Units=km Length=0.0119254 bus1=p1udt8988lv.1.2.3 bus2=p1ulv48655.1.2.3 switch=n enabled=y phases=3 Linecode=3P_UG_AL_4/0_15_0_416_0_3_3_3_3

New Line.l(r:p1udt8988lv-p1ulv58523) Units=km Length=0.0108373 bus1=p1udt8988lv.1.2.3 bus2=p1ulv58523.1.2.3 switch=n enabled=y phases=3 Linecode=3P_UG_AL_4/0_15_0_416_0_3_3_3_3

New Line.l(r:p1udm30367-p1ulv11293) Units=km Length=0.010453000000000002 bus1=p1udm30367.1.2.3 bus2=p1ulv11293.1.2.3 switch=n enabled=y phases=3 Linecode=3P_UG_AL_4/0_15_0_416_0_3_3_3_3

New Line.l(r:p1udm30367-p1ulv49863) Units=km Length=0.0129065 bus1=p1udm30367.1.2.3 bus2=p1ulv49863.1.2.3 switch=n enabled=y phases=3 Linecode=3P_UG_AL_4/0_15_0_416_0_3_3_3_3

New Line.l(r:p1udm30367-p1udt8988lv) Units=km Length=0.0181856 bus1=p1udt8988lv.1.2.3 bus2=p1udm30367.1.2.3 switch=n enabled=y phases=3 Linecode=3P_UG_AL_4/0_15_0_416_0_3_3_3_3

New Line.l(r:p1udm30368-p1ulv11294) Units=km Length=0.0100262 bus1=p1udm30368.1.2.3 bus2=p1ulv11294.1.2.3 switch=n enabled=y phases=3 Linecode=3P_UG_AL_4/0_15_0_416_0_3_3_3_3

New Line.l(r:p1udm30368-p1ulv13781) Units=km Length=0.0105043 bus1=p1udm30368.1.2.3 bus2=p1ulv13781.1.2.3 switch=n enabled=y phases=3 Linecode=3P_UG_AL_4/0_15_0_416_0_3_3_3_3

New Line.l(r:p1udm30368-p1udt8988lv) Units=km Length=0.0181823 bus1=p1udt8988lv.1.2.3 bus2=p1udm30368.1.2.3 switch=n enabled=y phases=3 Linecode=3P_UG_AL_4/0_15_0_416_0_3_3_3_3

New Line.l(r:p1udt10476lv-p1ulv13782) Units=km Length=0.0105584 bus1=p1udt10476lv.1.2.3 bus2=p1ulv13782.1.2.3 switch=n enabled=y phases=3 Linecode=3P_UG_AL_4/0_15_0_416_0_3_3_3_3

New Line.l(r:p1udt10476lv-p1ulv25902) Units=km Length=0.012483800000000001 bus1=p1udt10476lv.1.2.3 bus2=p1ulv25902.1.2.3 switch=n enabled=y phases=3 Linecode=3P_UG_AL_4/0_15_0_416_0_3_3_3_3

New Line.l(r:p1udt10476lv-p1ulv38579) Units=km Length=0.0123879 bus1=p1udt10476lv.1.2.3 bus2=p1ulv38579.1.2.3 switch=n enabled=y phases=3 Linecode=3P_UG_AL_4/0_15_0_416_0_3_3_3_3

New Line.l(r:p1udt7787lv-p1ulv18897) Units=km Length=0.013102300000000002 bus1=p1udt7787lv.1.2.3 bus2=p1ulv18897.1.2.3 switch=n enabled=y phases=3 Linecode=3P_UG_AL_4/0_15_0_416_0_3_3_3_3

New Line.l(r:p1udm26663-p1ulv9429) Units=km Length=0.0105377 bus1=p1udm26663.1.2.3 bus2=p1ulv9429.1.2.3 switch=n enabled=y phases=3 Linecode=3P_UG_AL_4/0_15_0_416_0_3_3_3_3

New Line.l(r:p1udm26663-p1ulv34799) Units=km Length=0.0114579 bus1=p1udm26663.1.2.3 bus2=p1ulv34799.1.2.3 switch=n enabled=y phases=3 Linecode=3P_UG_AL_4/0_15_0_416_0_3_3_3_3

New Line.l(r:p1udm26663-p1udt7787lv) Units=km Length=0.00472086 bus1=p1udt7787lv.1.2.3 bus2=p1udm26663.1.2.3 switch=n enabled=y phases=3 Linecode=3P_UG_AL_4/0_15_0_416_0_3_3_3_3

New Line.l(r:p1udm26666-p1ulv62879) Units=km Length=0.012269300000000002 bus1=p1udm26666.1.2.3 bus2=p1ulv62879.1.2.3 switch=n enabled=y phases=3 Linecode=3P_UG_AL_4/0_15_0_416_0_3_3_3_3

New Line.l(r:p1udm26666-p1udt7787lv) Units=km Length=0.00603056 bus1=p1udt7787lv.1.2.3 bus2=p1udm26666.1.2.3 switch=n enabled=y phases=3 Linecode=3P_UG_AL_4/0_15_0_416_0_3_3_3_3

New Line.l(r:p1udt6023lv-p1ulv57927) Units=km Length=0.0121724 bus1=p1udt6023lv.1.2.3 bus2=p1ulv57927.1.2.3 switch=n enabled=y phases=3 Linecode=3P_UG_AL_4/0_15_0_416_0_3_3_3_3

New Line.l(r:p1udm20885-p1ulv6946) Units=km Length=0.012735800000000002 bus1=p1udm20885.1.2.3 bus2=p1ulv6946.1.2.3 switch=n enabled=y phases=3 Linecode=3P_UG_AL_4/0_15_0_416_0_3_3_3_3

New Line.l(r:p1udm20885-p1udt6023lv) Units=km Length=0.012963600000000002 bus1=p1udt6023lv.1.2.3 bus2=p1udm20885.1.2.3 switch=n enabled=y phases=3 Linecode=3P_UG_AL_4/0_15_0_416_0_3_3_3_3

New Line.l(r:p1udm20888-p1ulv64768) Units=km Length=0.0125015 bus1=p1udm20888.1.2.3 bus2=p1ulv64768.1.2.3 switch=n enabled=y phases=3 Linecode=3P_UG_AL_4/0_15_0_416_0_3_3_3_3

New Line.l(r:p1udm20886-p1ulv32868) Units=km Length=0.0130065 bus1=p1udm20886.1.2.3 bus2=p1ulv32868.1.2.3 switch=n enabled=y phases=3 Linecode=3P_UG_AL_4/0_15_0_416_0_3_3_3_3

New Line.l(r:p1udm20886-p1udm20888) Units=km Length=0.0130176 bus1=p1udm20888.1.2.3 bus2=p1udm20886.1.2.3 switch=n enabled=y phases=3 Linecode=3P_UG_AL_4/0_15_0_416_0_3_3_3_3

New Line.l(r:p1udm20888-p1udt6023lv) Units=km Length=0.0129538 bus1=p1udt6023lv.1.2.3 bus2=p1udm20888.1.2.3 switch=n enabled=y phases=3 Linecode=3P_UG_AL_4/0_15_0_416_0_3_3_3_3

New Line.l(r:p1udm46517-p1ulv44255) Units=km Length=0.0126912 bus1=p1udm46517.1.2.3 bus2=p1ulv44255.1.2.3 switch=n enabled=y phases=3 Linecode=3P_UG_AL_350kcmil_15_0_416_0_3_3_3_3

New Line.l(r:p1udm46516-p1ulv22692) Units=km Length=0.01053 bus1=p1udm46516.1.2.3 bus2=p1ulv22692.1.2.3 switch=n enabled=y phases=3 Linecode=3P_UG_AL_350kcmil_15_0_416_0_3_3_3_3

New Line.l(r:p1udm46516-p1udm46517) Units=km Length=0.0165939 bus1=p1udm46517.1.2.3 bus2=p1udm46516.1.2.3 switch=n enabled=y phases=3 Linecode=3P_UG_AL_350kcmil_15_0_416_0_3_3_3_3

New Line.l(r:p1udm46517-p1udt14852lv) Units=km Length=0.00695639 bus1=p1udt14852lv.1.2.3 bus2=p1udm46517.1.2.3 switch=n enabled=y phases=3 Linecode=3P_UG_AL_350kcmil_15_0_416_0_3_3_3_3

New Line.l(r:p1udm46518-p1ulv60949) Units=km Length=0.012233 bus1=p1udm46518.1.2.3 bus2=p1ulv60949.1.2.3 switch=n enabled=y phases=3 Linecode=3P_UG_AL_350kcmil_15_0_416_0_3_3_3_3

New Line.l(r:p1udm46518-p1udt14852lv) Units=km Length=0.006948470000000001 bus1=p1udt14852lv.1.2.3 bus2=p1udm46518.1.2.3 switch=n enabled=y phases=3 Linecode=3P_UG_AL_350kcmil_15_0_416_0_3_3_3_3

New Line.l(r:p1udt11181lv-p1ulv20818) Units=km Length=0.0122467 bus1=p1udt11181lv.1.2.3 bus2=p1ulv20818.1.2.3 switch=n enabled=y phases=3 Linecode=3P_UG_AL_350kcmil_15_0_416_0_3_3_3_3

New Line.l(r:p1udm36858-p1ulv53016) Units=km Length=0.0125226 bus1=p1udm36858.1.2.3 bus2=p1ulv53016.1.2.3 switch=n enabled=y phases=3 Linecode=3P_UG_AL_350kcmil_15_0_416_0_3_3_3_3

New Line.l(r:p1udm36857-p1ulv25903) Units=km Length=0.0124326 bus1=p1udm36857.1.2.3 bus2=p1ulv25903.1.2.3 switch=n enabled=y phases=3 Linecode=3P_UG_AL_350kcmil_15_0_416_0_3_3_3_3

New Line.l(r:p1udm36857-p1udm36858) Units=km Length=0.00894707 bus1=p1udm36858.1.2.3 bus2=p1udm36857.1.2.3 switch=n enabled=y phases=3 Linecode=3P_UG_AL_350kcmil_15_0_416_0_3_3_3_3

New Line.l(r:p1udm36858-p1udt11181lv) Units=km Length=0.0179039 bus1=p1udt11181lv.1.2.3 bus2=p1udm36858.1.2.3 switch=n enabled=y phases=3 Linecode=3P_UG_AL_350kcmil_15_0_416_0_3_3_3_3

New Line.l(r:p1udm36859-p1ulv57345) Units=km Length=0.0137449 bus1=p1udm36859.1.2.3 bus2=p1ulv57345.1.2.3 switch=n enabled=y phases=3 Linecode=3P_UG_AL_350kcmil_15_0_416_0_3_3_3_3

New Line.l(r:p1udm36854-p1ulv15028) Units=km Length=0.012503700000000001 bus1=p1udm36854.1.2.3 bus2=p1ulv15028.1.2.3 switch=n enabled=y phases=3 Linecode=3P_UG_AL_350kcmil_15_0_416_0_3_3_3_3

New Line.l(r:p1udm36854-p1udm36859) Units=km Length=0.007200560000000001 bus1=p1udm36859.1.2.3 bus2=p1udm36854.1.2.3 switch=n enabled=y phases=3 Linecode=3P_UG_AL_350kcmil_15_0_416_0_3_3_3_3

New Line.l(r:p1udm36855-p1ulv16282) Units=km Length=0.00881138 bus1=p1udm36855.1.2.3 bus2=p1ulv16282.1.2.3 switch=n enabled=y phases=3 Linecode=3P_UG_AL_350kcmil_15_0_416_0_3_3_3_3

New Line.l(r:p1udm36855-p1udm36859) Units=km Length=0.0190083 bus1=p1udm36859.1.2.3 bus2=p1udm36855.1.2.3 switch=n enabled=y phases=3 Linecode=3P_UG_AL_350kcmil_15_0_416_0_3_3_3_3

New Line.l(r:p1udm36859-p1udt11181lv) Units=km Length=0.0097162 bus1=p1udt11181lv.1.2.3 bus2=p1udm36859.1.2.3 switch=n enabled=y phases=3 Linecode=3P_UG_AL_350kcmil_15_0_416_0_3_3_3_3

New Line.l(r:p1udt2956lv-p1ulv3160) Units=km Length=0.011300300000000001 bus1=p1udt2956lv.1.2.3 bus2=p1ulv3160.1.2.3 switch=n enabled=y phases=3 Linecode=3P_UG_AL_350kcmil_15_0_416_0_3_3_3_3

New Line.l(r:p1udm10512-p1ulv3794) Units=km Length=0.0112062 bus1=p1udm10512.1.2.3 bus2=p1ulv3794.1.2.3 switch=n enabled=y phases=3 Linecode=3P_UG_AL_350kcmil_15_0_416_0_3_3_3_3

New Line.l(r:p1udm10512-p1ulv15027) Units=km Length=0.00978719 bus1=p1udm10512.1.2.3 bus2=p1ulv15027.1.2.3 switch=n enabled=y phases=3 Linecode=3P_UG_AL_350kcmil_15_0_416_0_3_3_3_3

New Line.l(r:p1udm10516-p1ulv37939) Units=km Length=0.009708890000000001 bus1=p1udm10516.1.2.3 bus2=p1ulv37939.1.2.3 switch=n enabled=y phases=3 Linecode=3P_UG_AL_350kcmil_15_0_416_0_3_3_3_3

New Line.l(r:p1udm10512-p1udm10516) Units=km Length=0.00949798 bus1=p1udm10512.1.2.3 bus2=p1udm10516.1.2.3 switch=n enabled=y phases=3 Linecode=3P_UG_AL_350kcmil_15_0_416_0_3_3_3_3

New Line.l(r:p1udm10512-p1udt2956lv) Units=km Length=0.00948945 bus1=p1udt2956lv.1.2.3 bus2=p1udm10512.1.2.3 switch=n enabled=y phases=3 Linecode=3P_UG_AL_350kcmil_15_0_416_0_3_3_3_3

New Line.l(r:p1udm10514-p1ulv16947) Units=km Length=0.0111361 bus1=p1udm10514.1.2.3 bus2=p1ulv16947.1.2.3 switch=n enabled=y phases=3 Linecode=3P_UG_AL_350kcmil_15_0_416_0_3_3_3_3

New Line.l(r:p1udm10514-p1ulv22693) Units=km Length=0.0119052 bus1=p1udm10514.1.2.3 bus2=p1ulv22693.1.2.3 switch=n enabled=y phases=3 Linecode=3P_UG_AL_350kcmil_15_0_416_0_3_3_3_3

New Line.l(r:p1udm10514-p1udt2956lv) Units=km Length=0.00948945 bus1=p1udt2956lv.1.2.3 bus2=p1udm10514.1.2.3 switch=n enabled=y phases=3 Linecode=3P_UG_AL_350kcmil_15_0_416_0_3_3_3_3

New Line.l(r:p1udt14606lv-p1ulv22072) Units=km Length=0.0101352 bus1=p1udt14606lv.1.2.3 bus2=p1ulv22072.1.2.3 switch=n enabled=y phases=3 Linecode=3P_UG_AL_350kcmil_15_0_416_0_3_3_3_3

New Line.l(r:p1udt14606lv-p1ulv33531) Units=km Length=0.0117084 bus1=p1udt14606lv.1.2.3 bus2=p1ulv33531.1.2.3 switch=n enabled=y phases=3 Linecode=3P_UG_AL_350kcmil_15_0_416_0_3_3_3_3

New Line.l(r:p1udt7385lv-p1ulv22690) Units=km Length=0.0107198 bus1=p1udt7385lv.1.2.3 bus2=p1ulv22690.1.2.3 switch=n enabled=y phases=3 Linecode=3P_UG_AL_350kcmil_15_0_416_0_3_3_3_3

New Line.l(r:p1udm25309-p1ulv8811) Units=km Length=0.010399500000000002 bus1=p1udm25309.1.2.3 bus2=p1ulv8811.1.2.3 switch=n enabled=y phases=3 Linecode=3P_UG_AL_350kcmil_15_0_416_0_3_3_3_3

New Line.l(r:p1udm25309-p1ulv12542) Units=km Length=0.0112367 bus1=p1udm25309.1.2.3 bus2=p1ulv12542.1.2.3 switch=n enabled=y phases=3 Linecode=3P_UG_AL_350kcmil_15_0_416_0_3_3_3_3

New Line.l(r:p1udm25309-p1udt7385lv) Units=km Length=0.00949798 bus1=p1udt7385lv.1.2.3 bus2=p1udm25309.1.2.3 switch=n enabled=y phases=3 Linecode=3P_UG_AL_350kcmil_15_0_416_0_3_3_3_3

New Line.l(r:p1udm25313-p1ulv52385) Units=km Length=0.0106635 bus1=p1udm25313.1.2.3 bus2=p1ulv52385.1.2.3 switch=n enabled=y phases=3 Linecode=3P_UG_AL_350kcmil_15_0_416_0_3_3_3_3

New Line.l(r:p1udm25313-p1ulv64767) Units=km Length=0.010805400000000001 bus1=p1udm25313.1.2.3 bus2=p1ulv64767.1.2.3 switch=n enabled=y phases=3 Linecode=3P_UG_AL_350kcmil_15_0_416_0_3_3_3_3

New Line.l(r:p1udm25312-p1ulv37938) Units=km Length=0.00876877 bus1=p1udm25312.1.2.3 bus2=p1ulv37938.1.2.3 switch=n enabled=y phases=3 Linecode=3P_UG_AL_350kcmil_15_0_416_0_3_3_3_3

New Line.l(r:p1udm25312-p1udm25313) Units=km Length=0.00948945 bus1=p1udm25313.1.2.3 bus2=p1udm25312.1.2.3 switch=n enabled=y phases=3 Linecode=3P_UG_AL_350kcmil_15_0_416_0_3_3_3_3

New Line.l(r:p1udm25313-p1udt7385lv) Units=km Length=0.00948945 bus1=p1udt7385lv.1.2.3 bus2=p1udm25313.1.2.3 switch=n enabled=y phases=3 Linecode=3P_UG_AL_350kcmil_15_0_416_0_3_3_3_3

New Line.l(r:p1udt14606-p1udt7385) Units=km Length=0.0284769 bus1=p1udt14606-p1udt7385x.1.2.3 bus2=p1udt14606-p1udt7385xx.1.2.3 switch=n enabled=y phases=3 Linecode=3P_UG_AL_4/0_25_12_47_0_3_3_3_3

New Line.l(r:p1udt14606-p1udt2956) Units=km Length=0.0284717 bus1=p1udt14606-p1udt2956xx.1.2.3 bus2=p1udt14606-p1udt2956x.1.2.3 switch=n enabled=y phases=3 Linecode=3P_UG_AL_4/0_25_12_47_0_3_3_3_3

New Line.l(r:p1udt11181-p1udt2956) Units=km Length=0.0572013 bus1=p1udt11181-p1udt2956x.1.2.3 bus2=p1udt11181-p1udt2956xx.1.2.3 switch=n enabled=y phases=3 Linecode=3P_UG_AL_4/0_25_12_47_0_3_3_3_3

New Line.l(r:p1udt21132lv-p1ulv42952) Units=km Length=0.0117818 bus1=p1udt21132lv.1.2.3 bus2=p1ulv42952.1.2.3 switch=n enabled=y phases=3 Linecode=3P_UG_AL_350kcmil_15_0_416_0_3_3_3_3

New Line.l(r:p1udm58943-p1ulv46191) Units=km Length=0.011914 bus1=p1udm58943.1.2.3 bus2=p1ulv46191.1.2.3 switch=n enabled=y phases=3 Linecode=3P_UG_AL_350kcmil_15_0_416_0_3_3_3_3

New Line.l(r:p1udm58943-p1udt21132lv) Units=km Length=0.00787493 bus1=p1udt21132lv.1.2.3 bus2=p1udm58943.1.2.3 switch=n enabled=y phases=3 Linecode=3P_UG_AL_350kcmil_15_0_416_0_3_3_3_3

New Line.l(r:p1udm17559-p1ulv8174) Units=km Length=0.00907005 bus1=p1udm17559.1.2.3 bus2=p1ulv8174.1.2.3 switch=n enabled=y phases=3 Linecode=3P_UG_AL_350kcmil_15_0_416_0_3_3_3_3

New Line.l(r:p1udm17558-p1ulv5658) Units=km Length=0.010112500000000002 bus1=p1udm17558.1.2.3 bus2=p1ulv5658.1.2.3 switch=n enabled=y phases=3 Linecode=3P_UG_AL_350kcmil_15_0_416_0_3_3_3_3

New Line.l(r:p1udm17558-p1udm17559) Units=km Length=0.0248967 bus1=p1udm17559.1.2.3 bus2=p1udm17558.1.2.3 switch=n enabled=y phases=3 Linecode=3P_UG_AL_350kcmil_15_0_416_0_3_3_3_3

New Line.l(r:p1udm17559-p1udt5020lv) Units=km Length=0.00732069 bus1=p1udt5020lv.1.2.3 bus2=p1udm17559.1.2.3 switch=n enabled=y phases=3 Linecode=3P_UG_AL_350kcmil_15_0_416_0_3_3_3_3

New Line.l(r:p1udm17560-p1ulv13783) Units=km Length=0.0137407 bus1=p1udm17560.1.2.3 bus2=p1ulv13783.1.2.3 switch=n enabled=y phases=3 Linecode=3P_UG_AL_350kcmil_15_0_416_0_3_3_3_3

New Line.l(r:p1udm17560-p1ulv50476) Units=km Length=0.0175097 bus1=p1udm17560.1.2.3 bus2=p1ulv50476.1.2.3 switch=n enabled=y phases=3 Linecode=3P_UG_AL_350kcmil_15_0_416_0_3_3_3_3

New Line.l(r:p1udm17560-p1udt5020lv) Units=km Length=0.00638001 bus1=p1udt5020lv.1.2.3 bus2=p1udm17560.1.2.3 switch=n enabled=y phases=3 Linecode=3P_UG_AL_350kcmil_15_0_416_0_3_3_3_3

New Line.l(r:p1udt2359lv-p1ulv57346) Units=km Length=0.0117376 bus1=p1udt2359lv.1.2.3 bus2=p1ulv57346.1.2.3 switch=n enabled=y phases=3 Linecode=3P_UG_AL_350kcmil_15_0_416_0_3_3_3_3

New Line.l(r:p1udm8538-p1ulv2497) Units=km Length=0.0119561 bus1=p1udm8538.1.2.3 bus2=p1ulv2497.1.2.3 switch=n enabled=y phases=3 Linecode=3P_UG_AL_350kcmil_15_0_416_0_3_3_3_3

New Line.l(r:p1udm8538-p1ulv35436) Units=km Length=0.0110648 bus1=p1udm8538.1.2.3 bus2=p1ulv35436.1.2.3 switch=n enabled=y phases=3 Linecode=3P_UG_AL_350kcmil_15_0_416_0_3_3_3_3

New Line.l(r:p1udm8539-p1ulv16283) Units=km Length=0.011276 bus1=p1udm8539.1.2.3 bus2=p1ulv16283.1.2.3 switch=n enabled=y phases=3 Linecode=3P_UG_AL_350kcmil_15_0_416_0_3_3_3_3

New Line.l(r:p1udm8538-p1udm8539) Units=km Length=0.00997309 bus1=p1udm8538.1.2.3 bus2=p1udm8539.1.2.3 switch=n enabled=y phases=3 Linecode=3P_UG_AL_350kcmil_15_0_416_0_3_3_3_3

New Line.l(r:p1udm8538-p1udt2359lv) Units=km Length=0.00996803 bus1=p1udt2359lv.1.2.3 bus2=p1udm8538.1.2.3 switch=n enabled=y phases=3 Linecode=3P_UG_AL_350kcmil_15_0_416_0_3_3_3_3

New Line.l(r:p1udm8540-p1ulv24643) Units=km Length=0.0179724 bus1=p1udm8540.1.2.3 bus2=p1ulv24643.1.2.3 switch=n enabled=y phases=3 Linecode=3P_UG_AL_350kcmil_15_0_416_0_3_3_3_3

New Line.l(r:p1udm8540-p1ulv28463) Units=km Length=0.0255495 bus1=p1udm8540.1.2.3 bus2=p1ulv28463.1.2.3 switch=n enabled=y phases=3 Linecode=3P_UG_AL_350kcmil_15_0_416_0_3_3_3_3

New Line.l(r:p1udm8540-p1udt2359lv) Units=km Length=0.0130689 bus1=p1udt2359lv.1.2.3 bus2=p1udm8540.1.2.3 switch=n enabled=y phases=3 Linecode=3P_UG_AL_350kcmil_15_0_416_0_3_3_3_3

New Line.l(r:p1udt9356lv-p1ulv11909) Units=km Length=0.0589911 bus1=p1udt9356lv.1.2.3 bus2=p1ulv11909.1.2.3 switch=n enabled=y phases=3 Linecode=3P_UG_AL_350kcmil_15_0_416_0_3_3_3_3

New Line.l(r:p1udt9356lv-p1ulv25270) Units=km Length=0.0153371 bus1=p1udt9356lv.1.2.3 bus2=p1ulv25270.1.2.3 switch=n enabled=y phases=3 Linecode=3P_UG_AL_350kcmil_15_0_416_0_3_3_3_3

New Line.l(r:p1udt9356lv-p1ulv41090) Units=km Length=0.0232061 bus1=p1udt9356lv.1.2.3 bus2=p1ulv41090.1.2.3 switch=n enabled=y phases=3 Linecode=3P_UG_AL_350kcmil_15_0_416_0_3_3_3_3

New Line.l(r:p1udt9356lv-p1ulv59729) Units=km Length=0.0206719 bus1=p1udt9356lv.1.2.3 bus2=p1ulv59729.1.2.3 switch=n enabled=y phases=3 Linecode=3P_UG_AL_350kcmil_15_0_416_0_3_3_3_3

New Line.l(r:p1udt2359-p1udt9356) Units=km Length=0.0197153 bus1=p1udt2359-p1udt9356x.1.2.3 bus2=p1udt2359-p1udt9356xx.1.2.3 switch=n enabled=y phases=3 Linecode=3P_UG_AL_4/0_25_12_47_0_3_3_3_3

New Line.l(r:p1udt2359-p1udt5020) Units=km Length=0.07128810000000001 bus1=p1udt2359-p1udt5020xx.1.2.3 bus2=p1udt2359-p1udt5020x.1.2.3 switch=n enabled=y phases=3 Linecode=3P_UG_AL_4/0_25_12_47_0_3_3_3_3

New Line.l(r:p1udt8188lv-p1ulv28462) Units=km Length=0.0115917 bus1=p1udt8188lv.1.2.3 bus2=p1ulv28462.1.2.3 switch=n enabled=y phases=3 Linecode=3P_UG_AL_350kcmil_15_0_416_0_3_3_3_3

New Line.l(r:p1udm27890-p1ulv10039) Units=km Length=0.0119826 bus1=p1udm27890.1.2.3 bus2=p1ulv10039.1.2.3 switch=n enabled=y phases=3 Linecode=3P_UG_AL_350kcmil_15_0_416_0_3_3_3_3

New Line.l(r:p1udm27890-p1ulv56703) Units=km Length=0.0117383 bus1=p1udm27890.1.2.3 bus2=p1ulv56703.1.2.3 switch=n enabled=y phases=3 Linecode=3P_UG_AL_350kcmil_15_0_416_0_3_3_3_3

New Line.l(r:p1udm27893-p1ulv30950) Units=km Length=0.0108872 bus1=p1udm27893.1.2.3 bus2=p1ulv30950.1.2.3 switch=n enabled=y phases=3 Linecode=3P_UG_AL_350kcmil_15_0_416_0_3_3_3_3

New Line.l(r:p1udm27890-p1udm27893) Units=km Length=0.00921988 bus1=p1udm27890.1.2.3 bus2=p1udm27893.1.2.3 switch=n enabled=y phases=3 Linecode=3P_UG_AL_350kcmil_15_0_416_0_3_3_3_3

New Line.l(r:p1udm27890-p1udt8188lv) Units=km Length=0.00921988 bus1=p1udt8188lv.1.2.3 bus2=p1udm27890.1.2.3 switch=n enabled=y phases=3 Linecode=3P_UG_AL_350kcmil_15_0_416_0_3_3_3_3

New Line.l(r:p1udm27891-p1ulv21472) Units=km Length=0.0130177 bus1=p1udm27891.1.2.3 bus2=p1ulv21472.1.2.3 switch=n enabled=y phases=3 Linecode=3P_UG_AL_350kcmil_15_0_416_0_3_3_3_3

New Line.l(r:p1udm27891-p1ulv37333) Units=km Length=0.0106861 bus1=p1udm27891.1.2.3 bus2=p1ulv37333.1.2.3 switch=n enabled=y phases=3 Linecode=3P_UG_AL_350kcmil_15_0_416_0_3_3_3_3

New Line.l(r:p1udm27891-p1udt8188lv) Units=km Length=0.0184366 bus1=p1udt8188lv.1.2.3 bus2=p1udm27891.1.2.3 switch=n enabled=y phases=3 Linecode=3P_UG_AL_350kcmil_15_0_416_0_3_3_3_3

New Line.l(r:p1udt5020-p1udt8188) Units=km Length=0.054646600000000004 bus1=p1udt5020-p1udt8188x.1.2.3 bus2=p1udt5020-p1udt8188xx.1.2.3 switch=n enabled=y phases=3 Linecode=3P_UG_AL_4/0_25_12_47_0_3_3_3_3

New Line.l(r:p1udt21132-p1udt5020) Units=km Length=0.0378651 bus1=p1udt21132-p1udt5020x.1.2.3 bus2=p1udt21132-p1udt5020xx.1.2.3 switch=n enabled=y phases=3 Linecode=3P_UG_AL_4/0_25_12_47_0_3_3_3_3

New Line.l(r:p1udt11181-p1udt21132) Units=km Length=0.036143 bus1=p1udt11181-p1udt21132x.1.2.3 bus2=p1udt11181-p1udt21132xx.1.2.3 switch=n enabled=y phases=3 Linecode=3P_UG_AL_4/0_25_12_47_0_3_3_3_3

New Line.l(r:p1udt11181-p1udt14852) Units=km Length=0.0517014 bus1=p1udt11181-p1udt14852xx.1.2.3 bus2=p1udt11181-p1udt14852x.1.2.3 switch=n enabled=y phases=3 Linecode=3P_UG_AL_4/0_25_12_47_0_3_3_3_3

New Line.l(r:p1udt14852-p1udt6023) Units=km Length=0.04296210000000001 bus1=p1udt6023.1.2.3 bus2=p1udt14852.1.2.3 switch=n enabled=y phases=3 Linecode=3P_OH_AL_ACSR_4/0_Penguin_12_47_0_3_3_3_3

New Line.l(r:p1udt6023-p1udt7787) Units=km Length=0.051037 bus1=p1udt7787.1.2.3 bus2=p1udt6023.1.2.3 switch=n enabled=y phases=3 Linecode=3P_OH_AL_ACSR_4/0_Penguin_12_47_0_3_3_3_3

New Line.l(r:p1udt10476-p1udt7787) Units=km Length=0.030971000000000002 bus1=p1udt10476.1.2.3 bus2=p1udt7787.1.2.3 switch=n enabled=y phases=3 Linecode=3P_OH_AL_ACSR_4/0_Penguin_12_47_0_3_3_3_3

New Line.l(r:p1udt10476-p1udt8988) Units=km Length=0.0363626 bus1=p1udt8988.1.2.3 bus2=p1udt10476.1.2.3 switch=n enabled=y phases=3 Linecode=3P_OH_AL_ACSR_4/0_Penguin_12_47_0_3_3_3_3

New Line.l(r:p1udt21834lv-p1ulv46190) Units=km Length=0.0133622 bus1=p1udt21834lv.1.2.3 bus2=p1ulv46190.1.2.3 switch=n enabled=y phases=3 Linecode=3P_UG_AL_4/0_15_0_416_0_3_3_3_3

New Line.l(r:p1udt21834-p1udt8988) Units=km Length=0.001 bus1=p1udt8988.1.2.3 bus2=p1udt21834.1.2.3 switch=n enabled=y phases=3 Linecode=3P_OH_AL_ACSR_4/0_Penguin_12_47_0_3_3_3_3

New Line.l(r:p1udt8187-p1udt8988) Units=km Length=0.0519071 bus1=p1udt8187.1.2.3 bus2=p1udt8988.1.2.3 switch=n enabled=y phases=3 Linecode=3P_OH_AL_ACSR_4/0_Penguin_12_47_0_3_3_3_3

New Line.l(r:p1udt20574lv-p1ulv51725) Units=km Length=0.00960651 bus1=p1udt20574lv.1.2.3 bus2=p1ulv51725.1.2.3 switch=n enabled=y phases=3 Linecode=3P_UG_AL_350kcmil_15_0_416_0_3_3_3_3

New Line.l(r:p1udm58086-p1ulv40495) Units=km Length=0.0113939 bus1=p1udm58086.1.2.3 bus2=p1ulv40495.1.2.3 switch=n enabled=y phases=3 Linecode=3P_UG_AL_350kcmil_15_0_416_0_3_3_3_3

New Line.l(r:p1udm58086-p1udt20574lv) Units=km Length=0.00768547 bus1=p1udt20574lv.1.2.3 bus2=p1udm58086.1.2.3 switch=n enabled=y phases=3 Linecode=3P_UG_AL_350kcmil_15_0_416_0_3_3_3_3

New Line.l(r:p1udm58088-p1ulv54269) Units=km Length=0.0113847 bus1=p1udm58088.1.2.3 bus2=p1ulv54269.1.2.3 switch=n enabled=y phases=3 Linecode=3P_UG_AL_350kcmil_15_0_416_0_3_3_3_3

New Line.l(r:p1udm58088-p1udt20574lv) Units=km Length=0.0076718 bus1=p1udt20574lv.1.2.3 bus2=p1udm58088.1.2.3 switch=n enabled=y phases=3 Linecode=3P_UG_AL_350kcmil_15_0_416_0_3_3_3_3

New Line.l(r:p1udt6932lv-p1ulv8171) Units=km Length=0.0115676 bus1=p1udt6932lv.1.2.3 bus2=p1ulv8171.1.2.3 switch=n enabled=y phases=3 Linecode=3P_UG_AL_350kcmil_15_0_416_0_3_3_3_3

New Line.l(r:p1udt6932lv-p1ulv36094) Units=km Length=0.0107905 bus1=p1udt6932lv.1.2.3 bus2=p1ulv36094.1.2.3 switch=n enabled=y phases=3 Linecode=3P_UG_AL_350kcmil_15_0_416_0_3_3_3_3

New Line.l(r:p1udm23884-p1ulv11907) Units=km Length=0.0112451 bus1=p1udm23884.1.2.3 bus2=p1ulv11907.1.2.3 switch=n enabled=y phases=3 Linecode=3P_UG_AL_350kcmil_15_0_416_0_3_3_3_3

New Line.l(r:p1udm23884-p1ulv60359) Units=km Length=0.0101416 bus1=p1udm23884.1.2.3 bus2=p1ulv60359.1.2.3 switch=n enabled=y phases=3 Linecode=3P_UG_AL_350kcmil_15_0_416_0_3_3_3_3

New Line.l(r:p1udm23884-p1udt6932lv) Units=km Length=0.0192771 bus1=p1udt6932lv.1.2.3 bus2=p1udm23884.1.2.3 switch=n enabled=y phases=3 Linecode=3P_UG_AL_350kcmil_15_0_416_0_3_3_3_3

New Line.l(r:p1udm23885-p1ulv12541) Units=km Length=0.0110246 bus1=p1udm23885.1.2.3 bus2=p1ulv12541.1.2.3 switch=n enabled=y phases=3 Linecode=3P_UG_AL_350kcmil_15_0_416_0_3_3_3_3

New Line.l(r:p1udm23886-p1ulv15638) Units=km Length=0.00904498 bus1=p1udm23886.1.2.3 bus2=p1ulv15638.1.2.3 switch=n enabled=y phases=3 Linecode=3P_UG_AL_350kcmil_15_0_416_0_3_3_3_3

New Line.l(r:p1udm23885-p1udm23886) Units=km Length=0.0096454 bus1=p1udm23885.1.2.3 bus2=p1udm23886.1.2.3 switch=n enabled=y phases=3 Linecode=3P_UG_AL_350kcmil_15_0_416_0_3_3_3_3

New Line.l(r:p1udm23885-p1udt6932lv) Units=km Length=0.00963687 bus1=p1udt6932lv.1.2.3 bus2=p1udm23885.1.2.3 switch=n enabled=y phases=3 Linecode=3P_UG_AL_350kcmil_15_0_416_0_3_3_3_3

New Line.l(r:p1udm36850-p1ulv15026) Units=km Length=0.0120482 bus1=p1udm36850.1.2.3 bus2=p1ulv15026.1.2.3 switch=n enabled=y phases=3 Linecode=3P_UG_AL_350kcmil_15_0_416_0_3_3_3_3

New Line.l(r:p1udm36850-p1ulv28465) Units=km Length=0.00984994 bus1=p1udm36850.1.2.3 bus2=p1ulv28465.1.2.3 switch=n enabled=y phases=3 Linecode=3P_UG_AL_350kcmil_15_0_416_0_3_3_3_3

New Line.l(r:p1udm36850-p1udt11180lv) Units=km Length=0.00963687 bus1=p1udt11180lv.1.2.3 bus2=p1udm36850.1.2.3 switch=n enabled=y phases=3 Linecode=3P_UG_AL_350kcmil_15_0_416_0_3_3_3_3

New Line.l(r:p1udm36852-p1ulv31587) Units=km Length=0.011717 bus1=p1udm36852.1.2.3 bus2=p1ulv31587.1.2.3 switch=n enabled=y phases=3 Linecode=3P_UG_AL_350kcmil_15_0_416_0_3_3_3_3

New Line.l(r:p1udm36852-p1ulv64145) Units=km Length=0.0105061 bus1=p1udm36852.1.2.3 bus2=p1ulv64145.1.2.3 switch=n enabled=y phases=3 Linecode=3P_UG_AL_350kcmil_15_0_416_0_3_3_3_3

New Line.l(r:p1udm36852-p1udt11180lv) Units=km Length=0.0096454 bus1=p1udt11180lv.1.2.3 bus2=p1udm36852.1.2.3 switch=n enabled=y phases=3 Linecode=3P_UG_AL_350kcmil_15_0_416_0_3_3_3_3

New Line.l(r:p1udt1792lv-p1ulv30954) Units=km Length=0.0115161 bus1=p1udt1792lv.1.2.3 bus2=p1ulv30954.1.2.3 switch=n enabled=y phases=3 Linecode=3P_UG_AL_350kcmil_15_0_416_0_3_3_3_3

New Line.l(r:p1udm6513-p1ulv1878) Units=km Length=0.0113873 bus1=p1udm6513.1.2.3 bus2=p1ulv1878.1.2.3 switch=n enabled=y phases=3 Linecode=3P_UG_AL_350kcmil_15_0_416_0_3_3_3_3

New Line.l(r:p1udm6513-p1udt1792lv) Units=km Length=0.00963687 bus1=p1udt1792lv.1.2.3 bus2=p1udm6513.1.2.3 switch=n enabled=y phases=3 Linecode=3P_UG_AL_350kcmil_15_0_416_0_3_3_3_3

New Line.l(r:p1udm6514-p1ulv16946) Units=km Length=0.011621 bus1=p1udm6514.1.2.3 bus2=p1ulv16946.1.2.3 switch=n enabled=y phases=3 Linecode=3P_UG_AL_350kcmil_15_0_416_0_3_3_3_3

New Line.l(r:p1udm6514-p1ulv23357) Units=km Length=0.00949874 bus1=p1udm6514.1.2.3 bus2=p1ulv23357.1.2.3 switch=n enabled=y phases=3 Linecode=3P_UG_AL_350kcmil_15_0_416_0_3_3_3_3

New Line.l(r:p1udm6514-p1udt1792lv) Units=km Length=0.00964019 bus1=p1udt1792lv.1.2.3 bus2=p1udm6514.1.2.3 switch=n enabled=y phases=3 Linecode=3P_UG_AL_350kcmil_15_0_416_0_3_3_3_3

New Line.l(r:p1udt11180-p1udt1792) Units=km Length=0.0289191 bus1=p1udt11180-p1udt1792x.1.2.3 bus2=p1udt11180-p1udt1792xx.1.2.3 switch=n enabled=y phases=3 Linecode=3P_UG_AL_4/0_25_12_47_0_3_3_3_3

New Line.l(r:p1udt11180-p1udt6932) Units=km Length=0.0385679 bus1=p1udt11180-p1udt6932xx.1.2.3 bus2=p1udt11180-p1udt6932x.1.2.3 switch=n enabled=y phases=3 Linecode=3P_UG_AL_4/0_25_12_47_0_3_3_3_3

New Line.l(r:p1udt20574-p1udt6932) Units=km Length=0.0366046 bus1=p1udt20574-p1udt6932x.1.2.3 bus2=p1udt20574-p1udt6932xx.1.2.3 switch=n enabled=y phases=3 Linecode=3P_UG_AL_4/0_25_12_47_0_3_3_3_3

New Line.l(r:p1udt6933lv-p1ulv60944) Units=km Length=0.0104178 bus1=p1udt6933lv.1.2.3 bus2=p1ulv60944.1.2.3 switch=n enabled=y phases=3 Linecode=3P_UG_AL_350kcmil_15_0_416_0_3_3_3_3

New Line.l(r:p1udm23889-p1ulv8172) Units=km Length=0.00957307 bus1=p1udm23889.1.2.3 bus2=p1ulv8172.1.2.3 switch=n enabled=y phases=3 Linecode=3P_UG_AL_350kcmil_15_0_416_0_3_3_3_3

New Line.l(r:p1udm23889-p1ulv15023) Units=km Length=0.0101295 bus1=p1udm23889.1.2.3 bus2=p1ulv15023.1.2.3 switch=n enabled=y phases=3 Linecode=3P_UG_AL_350kcmil_15_0_416_0_3_3_3_3

New Line.l(r:p1udm23889-p1udt6933lv) Units=km Length=0.0189874 bus1=p1udt6933lv.1.2.3 bus2=p1udm23889.1.2.3 switch=n enabled=y phases=3 Linecode=3P_UG_AL_350kcmil_15_0_416_0_3_3_3_3

New Line.l(r:p1udm23891-p1ulv54916) Units=km Length=0.0105016 bus1=p1udm23891.1.2.3 bus2=p1ulv54916.1.2.3 switch=n enabled=y phases=3 Linecode=3P_UG_AL_350kcmil_15_0_416_0_3_3_3_3

New Line.l(r:p1udm23891-p1udt6933lv) Units=km Length=0.0203475 bus1=p1udt6933lv.1.2.3 bus2=p1udm23891.1.2.3 switch=n enabled=y phases=3 Linecode=3P_UG_AL_350kcmil_15_0_416_0_3_3_3_3

New Line.l(r:p1udt13181lv-p1ulv18892) Units=km Length=0.0114929 bus1=p1udt13181lv.1.2.3 bus2=p1ulv18892.1.2.3 switch=n enabled=y phases=3 Linecode=3P_UG_AL_350kcmil_15_0_416_0_3_3_3_3

New Line.l(r:p1udt13181lv-p1ulv45532) Units=km Length=0.0113577 bus1=p1udt13181lv.1.2.3 bus2=p1ulv45532.1.2.3 switch=n enabled=y phases=3 Linecode=3P_UG_AL_350kcmil_15_0_416_0_3_3_3_3

New Line.l(r:p1udt10473lv-p1ulv18221) Units=km Length=0.0118974 bus1=p1udt10473lv.1.2.3 bus2=p1ulv18221.1.2.3 switch=n enabled=y phases=3 Linecode=3P_UG_AL_350kcmil_15_0_416_0_3_3_3_3

New Line.l(r:p1udt10473lv-p1ulv51101) Units=km Length=0.0112201 bus1=p1udt10473lv.1.2.3 bus2=p1ulv51101.1.2.3 switch=n enabled=y phases=3 Linecode=3P_UG_AL_350kcmil_15_0_416_0_3_3_3_3

New Line.l(r:p1udm34857-p1ulv18220) Units=km Length=0.0101895 bus1=p1udm34857.1.2.3 bus2=p1ulv18220.1.2.3 switch=n enabled=y phases=3 Linecode=3P_UG_AL_350kcmil_15_0_416_0_3_3_3_3

New Line.l(r:p1udm34857-p1udt10473lv) Units=km Length=0.0184366 bus1=p1udt10473lv.1.2.3 bus2=p1udm34857.1.2.3 switch=n enabled=y phases=3 Linecode=3P_UG_AL_350kcmil_15_0_416_0_3_3_3_3

New Line.l(r:p1udm34859-p1ulv28461) Units=km Length=0.0111607 bus1=p1udm34859.1.2.3 bus2=p1ulv28461.1.2.3 switch=n enabled=y phases=3 Linecode=3P_UG_AL_350kcmil_15_0_416_0_3_3_3_3

New Line.l(r:p1udm34856-p1ulv13777) Units=km Length=0.0114397 bus1=p1udm34856.1.2.3 bus2=p1ulv13777.1.2.3 switch=n enabled=y phases=3 Linecode=3P_UG_AL_350kcmil_15_0_416_0_3_3_3_3

New Line.l(r:p1udm34856-p1udm34859) Units=km Length=0.00921988 bus1=p1udm34859.1.2.3 bus2=p1udm34856.1.2.3 switch=n enabled=y phases=3 Linecode=3P_UG_AL_350kcmil_15_0_416_0_3_3_3_3

New Line.l(r:p1udm34859-p1udt10473lv) Units=km Length=0.00921988 bus1=p1udt10473lv.1.2.3 bus2=p1udm34859.1.2.3 switch=n enabled=y phases=3 Linecode=3P_UG_AL_350kcmil_15_0_416_0_3_3_3_3

New Line.l(r:p1udt10473-p1udt13181) Units=km Length=0.0265222 bus1=p1udt10473-p1udt13181xx.1.2.3 bus2=p1udt10473-p1udt13181x.1.2.3 switch=n enabled=y phases=3 Linecode=3P_UG_AL_4/0_25_12_47_0_3_3_3_3

New Line.l(r:p1udt13181-p1udt6933) Units=km Length=0.0916232 bus1=p1udt13181-p1udt6933xx.1.2.3 bus2=p1udt13181-p1udt6933x.1.2.3 switch=n enabled=y phases=3 Linecode=3P_UG_AL_4/0_25_12_47_0_3_3_3_3

New Line.l(r:p1udt20574-p1udt6933) Units=km Length=0.146968 bus1=p1udt20574-p1udt6933x.1.2.3 bus2=p1udt20574-p1udt6933xx.1.2.3 switch=n enabled=y phases=3 Linecode=3P_UG_AL_4/0_25_12_47_0_3_3_3_3

New Line.l(r:p1udt20574-p1udt8187) Units=km Length=0.114195 bus1=p1udt8187.1.2.3 bus2=p1udt20574.1.2.3 switch=n enabled=y phases=3 Linecode=3P_OH_AL_ACSR_4/0_Penguin_12_47_0_3_3_3_3

New Line.l(r:p1udt22583lv-p1ulv49859) Units=km Length=0.0605853 bus1=p1udt22583lv.1.2.3 bus2=p1ulv49859.1.2.3 switch=n enabled=y phases=3 Linecode=3P_UG_AL_350kcmil_15_0_416_0_3_3_3_3

New Line.l(r:p1udt22583-p1udt8187) Units=km Length=0.11494600000000002 bus1=p1udt8187.1.2.3 bus2=p1udt22583.1.2.3 switch=n enabled=y phases=3 Linecode=3P_OH_AL_ACSR_4/0_Penguin_12_47_0_3_3_3_3

New Line.l(r:p1udt10473-p1udt8188) Units=km Length=0.0460962 bus1=p1udt10473-p1udt8188xx.1.2.3 bus2=p1udt10473-p1udt8188x.1.2.3 switch=n enabled=y phases=3 Linecode=3P_OH_AL_ACSR_1033kcmil_Curlew_12.47_1_3_3_3_3

New Line.padswitch(r:p1udt14606-p1udt7385)p1u_250932 Units=km Length=0.001 bus1=p1udt14606.1.2.3 bus2=p1udt14606-p1udt7385x.1.2.3 switch=y enabled=y phases=3 Linecode=padswitch_3_3_3_3

New Line.padswitch(r:p1udt14606-p1udt7385)p1u_250933 Units=km Length=0.001 bus1=p1udt14606-p1udt7385xx.1.2.3 bus2=p1udt7385.1.2.3 switch=y enabled=y phases=3 Linecode=padswitch_3_3_3_3_3

New Line.padswitch(r:p1udt14606-p1udt2956)p1u_250934 Units=km Length=0.001 bus1=p1udt2956.1.2.3 bus2=p1udt14606-p1udt2956xx.1.2.3 switch=y enabled=y phases=3 Linecode=padswitch_3_3_3_1_3_3

New Line.padswitch(r:p1udt14606-p1udt2956)p1u_250935 Units=km Length=0.001 bus1=p1udt14606-p1udt2956x.1.2.3 bus2=p1udt14606.1.2.3 switch=y enabled=y phases=3 Linecode=padswitch_3_3_3_1_3_1_3

New Line.padswitch(r:p1udt11181-p1udt2956)p1u_250936 Units=km Length=0.001 bus1=p1udt11181.1.2.3 bus2=p1udt11181-p1udt2956x.1.2.3 switch=y enabled=y phases=3 Linecode=padswitch_3_3_3_1_3_1_3_1

New Line.padswitch(r:p1udt11181-p1udt2956)p1u_250937 Units=km Length=0.001 bus1=p1udt11181-p1udt2956xx.1.2.3 bus2=p1udt2956.1.2.3 switch=y enabled=y phases=3 Linecode=padswitch_3_3_3_1_3_1_3_1

New Line.padswitch(r:p1udt2359-p1udt9356)p1u_250938 Units=km Length=0.001 bus1=p1udt2359.1.2.3 bus2=p1udt2359-p1udt9356x.1.2.3 switch=y enabled=y phases=3 Linecode=padswitch_3_3_3_1_3_1_3_1

New Line.padswitch(r:p1udt2359-p1udt9356)p1u_250939 Units=km Length=0.001 bus1=p1udt2359-p1udt9356xx.1.2.3 bus2=p1udt9356.1.2.3 switch=y enabled=y phases=3 Linecode=padswitch_3_3_3_1_3_1_3_1

New Line.padswitch(r:p1udt2359-p1udt5020)p1u_250940 Units=km Length=0.001 bus1=p1udt5020.1.2.3 bus2=p1udt2359-p1udt5020xx.1.2.3 switch=y enabled=y phases=3 Linecode=padswitch_3_3_3_1_3_1_3_1

New Line.padswitch(r:p1udt2359-p1udt5020)p1u_250941 Units=km Length=0.001 bus1=p1udt2359-p1udt5020x.1.2.3 bus2=p1udt2359.1.2.3 switch=y enabled=y phases=3 Linecode=padswitch_3_3_3_1_3_1_3_1

New Line.padswitch(r:p1udt5020-p1udt8188)p1u_250942 Units=km Length=0.001 bus1=p1udt5020.1.2.3 bus2=p1udt5020-p1udt8188x.1.2.3 switch=y enabled=y phases=3 Linecode=padswitch_3_3_3_1_3_1_3_1

New Line.padswitch(r:p1udt5020-p1udt8188)p1u_250943 Units=km Length=0.001 bus1=p1udt5020-p1udt8188xx.1.2.3 bus2=p1udt8188.1.2.3 switch=y enabled=y phases=3 Linecode=padswitch_3_3_3_1_3_1_3_1

New Line.padswitch(r:p1udt21132-p1udt5020)p1u_250944 Units=km Length=0.001 bus1=p1udt21132.1.2.3 bus2=p1udt21132-p1udt5020x.1.2.3 switch=y enabled=y phases=3 Linecode=padswitch_3_3_3_1_3_1_3_1

New Line.padswitch(r:p1udt21132-p1udt5020)p1u_250945 Units=km Length=0.001 bus1=p1udt21132-p1udt5020xx.1.2.3 bus2=p1udt5020.1.2.3 switch=y enabled=y phases=3 Linecode=padswitch_3_3_3_1_3_1_3_1

New Line.padswitch(r:p1udt11181-p1udt21132)p1u_250946 Units=km Length=0.001 bus1=p1udt11181.1.2.3 bus2=p1udt11181-p1udt21132x.1.2.3 switch=y enabled=y phases=3 Linecode=padswitch_3_3_3_1_3_1_3_1

New Line.padswitch(r:p1udt11181-p1udt21132)p1u_250947 Units=km Length=0.001 bus1=p1udt11181-p1udt21132xx.1.2.3 bus2=p1udt21132.1.2.3 switch=y enabled=y phases=3 Linecode=padswitch_3_3_3_1_3_1_3_1

New Line.padswitch(r:p1udt11181-p1udt14852)p1u_250948 Units=km Length=0.001 bus1=p1udt14852.1.2.3 bus2=p1udt11181-p1udt14852xx.1.2.3 switch=y enabled=y phases=3 Linecode=padswitch_3_3_3_1_3_1_3_1

New Line.padswitch(r:p1udt11181-p1udt14852)p1u_250949 Units=km Length=0.001 bus1=p1udt11181-p1udt14852x.1.2.3 bus2=p1udt11181.1.2.3 switch=y enabled=y phases=3 Linecode=padswitch_3_3_3_1_3_1_3_1

New Line.padswitch(r:p1udt11180-p1udt1792)p1u_250950 Units=km Length=0.001 bus1=p1udt11180.1.2.3 bus2=p1udt11180-p1udt1792x.1.2.3 switch=y enabled=y phases=3 Linecode=padswitch_3_3_3_1_3_1_3_1

New Line.padswitch(r:p1udt11180-p1udt1792)p1u_250951 Units=km Length=0.001 bus1=p1udt11180-p1udt1792xx.1.2.3 bus2=p1udt1792.1.2.3 switch=y enabled=y phases=3 Linecode=padswitch_3_3_3_1_3_1_3_1

New Line.padswitch(r:p1udt11180-p1udt6932)p1u_250952 Units=km Length=0.001 bus1=p1udt6932.1.2.3 bus2=p1udt11180-p1udt6932xx.1.2.3 switch=y enabled=y phases=3 Linecode=padswitch_3_3_3_1_3_1_3_1

New Line.padswitch(r:p1udt11180-p1udt6932)p1u_250953 Units=km Length=0.001 bus1=p1udt11180-p1udt6932x.1.2.3 bus2=p1udt11180.1.2.3 switch=y enabled=y phases=3 Linecode=padswitch_3_3_3_1_3_1_3_1

New Line.padswitch(r:p1udt20574-p1udt6932)p1u_250954 Units=km Length=0.001 bus1=p1udt20574.1.2.3 bus2=p1udt20574-p1udt6932x.1.2.3 switch=y enabled=y phases=3 Linecode=padswitch_3_3_3_3

New Line.padswitch(r:p1udt20574-p1udt6932)p1u_250955 Units=km Length=0.001 bus1=p1udt20574-p1udt6932xx.1.2.3 bus2=p1udt6932.1.2.3 switch=y enabled=y phases=3 Linecode=padswitch_3_3_3_1_3_1_3_1

New Line.padswitch(r:p1udt10473-p1udt13181)p1u_250956 Units=km Length=0.001 bus1=p1udt13181.1.2.3 bus2=p1udt10473-p1udt13181xx.1.2.3 switch=y enabled=y phases=3 Linecode=padswitch_3_3_3_1_3_1_3_1

New Line.padswitch(r:p1udt10473-p1udt13181)p1u_250957 Units=km Length=0.001 bus1=p1udt10473-p1udt13181x.1.2.3 bus2=p1udt10473.1.2.3 switch=y enabled=y phases=3 Linecode=padswitch_3_3_3_1_3_1_3_1

New Line.padswitch(r:p1udt13181-p1udt6933)p1u_250958 Units=km Length=0.001 bus1=p1udt6933.1.2.3 bus2=p1udt13181-p1udt6933xx.1.2.3 switch=y enabled=y phases=3 Linecode=padswitch_3_3_3_1_3_1_3_1

New Line.padswitch(r:p1udt13181-p1udt6933)p1u_250959 Units=km Length=0.001 bus1=p1udt13181-p1udt6933x.1.2.3 bus2=p1udt13181.1.2.3 switch=y enabled=y phases=3 Linecode=padswitch_3_3_3_1_3_1_3_1

New Line.padswitch(r:p1udt20574-p1udt6933)p1u_250960 Units=km Length=0.001 bus1=p1udt20574.1.2.3 bus2=p1udt20574-p1udt6933x.1.2.3 switch=y enabled=y phases=3 Linecode=padswitch_3_3_3_3

New Line.padswitch(r:p1udt20574-p1udt6933)p1u_250961 Units=km Length=0.001 bus1=p1udt20574-p1udt6933xx.1.2.3 bus2=p1udt6933.1.2.3 switch=y enabled=y phases=3 Linecode=padswitch_3_3_3_1_3_1_3_1

New Line.padswitch(r:p1udt10473-p1udt8188)p1u_265885 Units=km Length=0.001 bus1=p1udt8188.1.2.3 bus2=p1udt10473-p1udt8188xx.1.2.3 switch=y enabled=n phases=3 Linecode=padswitch_3_3_3_1_3_1_3_1

New Line.padswitch(r:p1udt10473-p1udt8188)p1u_265886 Units=km Length=0.001 bus1=p1udt10473-p1udt8188x.1.2.3 bus2=p1udt10473.1.2.3 switch=y enabled=n phases=3 Linecode=padswitch_3_3_3_1_3_1_3_1

New Line.l(r:p1udt8187-p1uhs13_1247)_disconnect Units=km Length=0.001 bus1=p1udt8187-p1uhs13_1247x_b1_1.1.2.3 bus2=p1udt8187-p1uhs13_1247x_b2_1.1.2.3 switch=y enabled=y phases=3 Linecode=3P_OH_AL_ACSR_4/0_Penguin_12_47_0_3_3_3_3

New Line.l(r:p1udt8187-p1uhs13_1247)_cont Units=km Length=0.7836912000000001 bus1=p1udt8187-p1uhs13_1247x_b2_1.1.2.3 bus2=p1udt8187.1.2.3 switch=n enabled=y phases=3 Linecode=3P_OH_AL_ACSR_4/0_Penguin_12_47_0_3_3_3_3
