New Capacitor.p1uc95 Bus1=p1udt24658 phases=3 Kv=12.47 conn=Wye Kvar=300.0

New CapControl.p1uc95 Capacitor=p1uc95 Element=Line.l(r:p1udt24658-p1udt9470) Terminal=1 delay=100.0 Type=voltage Vmin=120.5 Vmax=125.0 Ptratio=59.99631547328862 Ctratio=100.0

New Capacitor.p1uc98 Bus1=p1udt6151 phases=3 Kv=12.47 conn=Wye Kvar=300.0

New CapControl.p1uc98 Capacitor=p1uc98 Element=Line.l(r:p1udt20139-p1udt6151) Terminal=1 delay=100.0 Type=voltage Vmin=120.5 Vmax=125.0 Ptratio=59.99631547328862 Ctratio=100.0
