New Load.load_p1ulv2037 conn=wye bus1=p1ulv2037.1.2.3 kV=0.48 Vminpu=0.8 Vmaxpu=1.2 model=1 kW=20.2102 kvar=4.103856143145354 Phases=3

New Load.load_p1ulv5171 conn=wye bus1=p1ulv5171.1.2 kV=0.2080002494301389 Vminpu=0.8 Vmaxpu=1.2 model=1 kW=16.4702 kvar=3.3357890888418114 Phases=2

New Load.load_p1ulv7088 conn=wye bus1=p1ulv7088.1.2.3 kV=0.48 Vminpu=0.8 Vmaxpu=1.2 model=1 kW=33.1103 kvar=6.723333171190072 Phases=3

New Load.load_p1ulv10827 conn=wye bus1=p1ulv10827.1.2 kV=0.2080002494301389 Vminpu=0.8 Vmaxpu=1.2 model=1 kW=6.19006 kvar=1.2601805070609642 Phases=2

New Load.load_p1ulv39995 conn=wye bus1=p1ulv39995.1.2.3 kV=0.48 Vminpu=0.8 Vmaxpu=1.2 model=1 kW=30.270300000000002 kvar=6.146646574989501 Phases=3

New Load.load_p1ulv50002 conn=wye bus1=p1ulv50002.1.2 kV=0.2080002494301389 Vminpu=0.8 Vmaxpu=1.2 model=1 kW=14.4901 kvar=2.9423402984527858 Phases=2

New Load.load_p1ulv56262 conn=wye bus1=p1ulv56262.1.2.3 kV=0.48 Vminpu=0.8 Vmaxpu=1.2 model=1 kW=34.9603 kvar=7.098991693362979 Phases=3
