New Capacitor.p1uc101 Bus1=p1udt23162 phases=3 Kv=12.47 conn=Wye Kvar=600.0

New CapControl.p1uc101 Capacitor=p1uc101 Element=Line.l(r:p1udt23162-p1udt6369) Terminal=1 delay=100.0 Type=voltage Vmin=120.5 Vmax=125.0 Ptratio=59.99631547328862 Ctratio=100.0

New Capacitor.p1uc104 Bus1=p1udt18393 phases=3 Kv=12.47 conn=Wye Kvar=450.0

New CapControl.p1uc104 Capacitor=p1uc104 Element=Line.l(r:p1udt18393-p1udt22308) Terminal=1 delay=100.0 Type=voltage Vmin=120.5 Vmax=125.0 Ptratio=59.99631547328862 Ctratio=100.0
