Clear

New Circuit.substation_p1uhs17_69 bus1=p1uhs17_69 pu=1.0 basekV=69.0 R1=1e-05 X1=1e-05 R0=1e-05 X0=1e-05

Redirect Transformers.dss
Redirect p1uhs17_1247--p1udt19976/Transformers.dss
Redirect p1uhs17_1247--p1udt21587/Transformers.dss
Redirect p1uhs17_1247--p1udt1947/Transformers.dss
Redirect Regulators.dss
Redirect p1uhs17_1247--p1udt19976/Loads.dss
Redirect p1uhs17_1247--p1udt21587/Loads.dss
Redirect p1uhs17_1247--p1udt1947/Loads.dss
Redirect LineCodes.dss
Redirect p1uhs17_1247--p1udt19976/LineCodes.dss
Redirect p1uhs17_1247--p1udt21587/LineCodes.dss
Redirect p1uhs17_1247--p1udt1947/LineCodes.dss
Redirect Lines.dss
Redirect p1uhs17_1247--p1udt19976/Lines.dss
Redirect p1uhs17_1247--p1udt21587/Lines.dss
Redirect p1uhs17_1247--p1udt1947/Lines.dss
Redirect p1uhs17_1247--p1udt19976/Capacitors.dss
Redirect p1uhs17_1247--p1udt21587/Capacitors.dss
Redirect p1uhs17_1247--p1udt1947/Capacitors.dss

Set Voltagebases=[0.2080002494301389, 0.48, 7.199560000000001, 12.47, 69.0]

Calcvoltagebases

Buscoords Buscoords.dss

Solve
