Clear

New Circuit.substation_p1uhs18_69 bus1=p1uhs18_69 pu=1.0 basekV=69.0 R1=1e-05 X1=1e-05 R0=1e-05 X0=1e-05

Redirect Transformers.dss
Redirect p1uhs18_1247--p1udt20846/Transformers.dss
Redirect p1uhs18_1247--p1udt6910/Transformers.dss
Redirect p1uhs18_1247--p1udt15617/Transformers.dss
Redirect Regulators.dss
Redirect p1uhs18_1247--p1udt20846/Loads.dss
Redirect p1uhs18_1247--p1udt6910/Loads.dss
Redirect p1uhs18_1247--p1udt15617/Loads.dss
Redirect LineCodes.dss
Redirect p1uhs18_1247--p1udt20846/LineCodes.dss
Redirect p1uhs18_1247--p1udt6910/LineCodes.dss
Redirect p1uhs18_1247--p1udt15617/LineCodes.dss
Redirect Lines.dss
Redirect p1uhs18_1247--p1udt20846/Lines.dss
Redirect p1uhs18_1247--p1udt6910/Lines.dss
Redirect p1uhs18_1247--p1udt15617/Lines.dss
Redirect p1uhs18_1247--p1udt20846/Capacitors.dss
Redirect p1uhs18_1247--p1udt6910/Capacitors.dss
Redirect p1uhs18_1247--p1udt15617/Capacitors.dss

Set Voltagebases=[0.2080002494301389, 0.48, 7.199560000000001, 12.47, 69.0]

Calcvoltagebases

Buscoords Buscoords.dss

Solve
