New Capacitor.p1uc120 Bus1=p1udt13179 phases=3 Kv=12.47 conn=Wye Kvar=300.0

New CapControl.p1uc120 Capacitor=p1uc120 Element=Line.padswitch(r:p1udt13179-p1udt16796)p1u_257273 Terminal=1 delay=100.0 Type=voltage Vmin=120.5 Vmax=125.0 Ptratio=59.99631547328862 Ctratio=100.0
