New Capacitor.p1uc116 Bus1=p1udt21676 phases=3 Kv=12.47 conn=Wye Kvar=450.0

New CapControl.p1uc116 Capacitor=p1uc116 Element=Line.padswitch(r:p1udt21676-p1udt2302)p1u_255817 Terminal=1 delay=100.0 Type=voltage Vmin=120.5 Vmax=125.0 Ptratio=59.99631547328862 Ctratio=100.0

New Capacitor.p1uc117 Bus1=p1udt2303 phases=3 Kv=12.47 conn=Wye Kvar=300.0

New CapControl.p1uc117 Capacitor=p1uc117 Element=Line.l(r:p1udt15598-p1udt2303) Terminal=1 delay=100.0 Type=voltage Vmin=120.5 Vmax=125.0 Ptratio=59.99631547328862 Ctratio=100.0
