Clear

New Circuit.substation_p1uhs1_69 bus1=p1uhs1_69 pu=1.0 basekV=69.0 R1=1e-05 X1=1e-05 R0=1e-05 X0=1e-05

Redirect p1uhs1_1247--p1udt10929/Transformers.dss
Redirect p1uhs1_1247--p1udt138/Transformers.dss
Redirect Transformers.dss
Redirect p1uhs1_1247--p1udt14149/Transformers.dss
Redirect Regulators.dss
Redirect p1uhs1_1247--p1udt10929/Loads.dss
Redirect p1uhs1_1247--p1udt138/Loads.dss
Redirect p1uhs1_1247--p1udt14149/Loads.dss
Redirect p1uhs1_1247--p1udt10929/LineCodes.dss
Redirect p1uhs1_1247--p1udt138/LineCodes.dss
Redirect LineCodes.dss
Redirect p1uhs1_1247--p1udt14149/LineCodes.dss
Redirect p1uhs1_1247--p1udt10929/Lines.dss
Redirect p1uhs1_1247--p1udt138/Lines.dss
Redirect Lines.dss
Redirect p1uhs1_1247--p1udt14149/Lines.dss
Redirect p1uhs1_1247--p1udt138/Capacitors.dss
Redirect p1uhs1_1247--p1udt14149/Capacitors.dss

Set Voltagebases=[0.2080002494301389, 0.48, 7.199560000000001, 12.47, 69.0]

Calcvoltagebases

Buscoords Buscoords.dss

Solve
