New Capacitor.p1uc7 Bus1=p1udt10331 phases=3 Kv=12.47 conn=Wye Kvar=450.0

New CapControl.p1uc7 Capacitor=p1uc7 Element=Line.padswitch(r:p1udt10331-p1udt19146)p1u_235650 Terminal=1 delay=100.0 Type=voltage Vmin=120.5 Vmax=125.0 Ptratio=59.99631547328862 Ctratio=100.0
