New Capacitor.p1uc127 Bus1=p1udt17933 phases=3 Kv=12.47 conn=Wye Kvar=300.0

New CapControl.p1uc127 Capacitor=p1uc127 Element=Line.padswitch(r:p1udt11284-p1udt17933)p1u_261008 Terminal=1 delay=100.0 Type=voltage Vmin=120.5 Vmax=125.0 Ptratio=59.99631547328862 Ctratio=100.0
