New Capacitor.p1uc124 Bus1=p1udt21178 phases=3 Kv=12.47 conn=Wye Kvar=450.0

New CapControl.p1uc124 Capacitor=p1uc124 Element=Line.padswitch(r:p1udt15468-p1udt21178)p1u_261389 Terminal=1 delay=100.0 Type=voltage Vmin=120.5 Vmax=125.0 Ptratio=59.99631547328862 Ctratio=100.0

New Capacitor.p1uc128 Bus1=p1udt1373 phases=3 Kv=12.47 conn=Wye Kvar=300.0

New CapControl.p1uc128 Capacitor=p1uc128 Element=Line.padswitch(r:p1udt1373-p1udt1986)p1u_261519 Terminal=1 delay=100.0 Type=voltage Vmin=120.5 Vmax=125.0 Ptratio=59.99631547328862 Ctratio=100.0
