New Capacitor.p1uc126 Bus1=p1udt6240 phases=3 Kv=12.47 conn=Wye Kvar=450.0

New CapControl.p1uc126 Capacitor=p1uc126 Element=Line.padswitch(r:p1udt2049-p1udt6240)p1u_260237 Terminal=1 delay=100.0 Type=voltage Vmin=120.5 Vmax=125.0 Ptratio=59.99631547328862 Ctratio=100.0
