New Capacitor.p1uc134 Bus1=p1udt1389 phases=3 Kv=12.47 conn=Wye Kvar=300.0

New CapControl.p1uc134 Capacitor=p1uc134 Element=Line.padswitch(r:p1udt1389-p1udt16668)p1u_262370 Terminal=1 delay=100.0 Type=voltage Vmin=120.5 Vmax=125.0 Ptratio=59.99631547328862 Ctratio=100.0
