Clear

New Circuit.substation_p1uhs22_69 bus1=p1uhs22_69 pu=1.0 basekV=69.0 R1=1e-05 X1=1e-05 R0=1e-05 X0=1e-05

Redirect Transformers.dss
Redirect p1uhs22_1247--p1udt24311/Transformers.dss
Redirect p1uhs22_1247--p1udt20099/Transformers.dss
Redirect p1uhs22_1247--p1udt24624/Transformers.dss
Redirect p1uhs22_1247--p1udt6863/Transformers.dss
Redirect Regulators.dss
Redirect p1uhs22_1247--p1udt6863/Loads.dss
Redirect p1uhs22_1247--p1udt24311/Loads.dss
Redirect p1uhs22_1247--p1udt20099/Loads.dss
Redirect p1uhs22_1247--p1udt24624/Loads.dss
Redirect LineCodes.dss
Redirect p1uhs22_1247--p1udt24311/LineCodes.dss
Redirect p1uhs22_1247--p1udt20099/LineCodes.dss
Redirect p1uhs22_1247--p1udt24624/LineCodes.dss
Redirect p1uhs22_1247--p1udt6863/LineCodes.dss
Redirect Lines.dss
Redirect p1uhs22_1247--p1udt24311/Lines.dss
Redirect p1uhs22_1247--p1udt20099/Lines.dss
Redirect p1uhs22_1247--p1udt24624/Lines.dss
Redirect p1uhs22_1247--p1udt6863/Lines.dss
Redirect p1uhs22_1247--p1udt6863/Capacitors.dss
Redirect p1uhs22_1247--p1udt24311/Capacitors.dss
Redirect p1uhs22_1247--p1udt20099/Capacitors.dss

Set Voltagebases=[0.2080002494301389, 0.48, 7.199560000000001, 12.47, 69.0]

Calcvoltagebases

Buscoords Buscoords.dss

Solve
