New Capacitor.p1uc138 Bus1=p1udt15351 phases=3 Kv=12.47 conn=Wye Kvar=300.0

New CapControl.p1uc138 Capacitor=p1uc138 Element=Line.padswitch(r:p1udt15351-p1udt16316)p1u_264820 Terminal=1 delay=100.0 Type=voltage Vmin=120.5 Vmax=125.0 Ptratio=59.99631547328862 Ctratio=100.0
