New Capacitor.p1uc140 Bus1=p1udt24503 phases=3 Kv=12.47 conn=Wye Kvar=450.0

New CapControl.p1uc140 Capacitor=p1uc140 Element=Line.padswitch(r:p1udt24503-p1udt8920)p1u_263684 Terminal=1 delay=100.0 Type=voltage Vmin=120.5 Vmax=125.0 Ptratio=59.99631547328862 Ctratio=100.0
