New Line.l(r:p1udm1327-p1ulv4795) Units=km Length=0.0294433 bus1=p1udm1327.1.2 bus2=p1ulv4795.1.2 switch=n enabled=y phases=2 Linecode=1P_UG_AL_1/0_Brenau_0_416_0_2_2_2_2

New Line.l(r:p1udm1326-p1ulv373) Units=km Length=0.0187818 bus1=p1udm1326.1.2 bus2=p1ulv373.1.2 switch=n enabled=y phases=2 Linecode=1P_UG_AL_1/0_Brenau_0_416_0_2_2_2_2

New Line.l(r:p1udm1326-p1udm1327) Units=km Length=0.0098553 bus1=p1udm1327.1.2 bus2=p1udm1326.1.2 switch=n enabled=y phases=2 Linecode=1P_UG_AL_1/0_Brenau_0_416_0_2_2_2_2

New Line.l(r:p1udm1327-p1udt370lv) Units=km Length=0.009864130000000002 bus1=p1udt370lv.1.2 bus2=p1udm1327.1.2 switch=n enabled=y phases=2 Linecode=1P_UG_AL_1/0_Brenau_0_416_0_2_2_2_2

New Line.l(r:p1udm1328-p1ulv22445) Units=km Length=0.0198773 bus1=p1udm1328.1.2 bus2=p1ulv22445.1.2 switch=n enabled=y phases=2 Linecode=1P_UG_AL_1/0_Brenau_0_416_0_2_2_2_2

New Line.l(r:p1udm1328-p1udt370lv) Units=km Length=0.0273438 bus1=p1udt370lv.1.2 bus2=p1udm1328.1.2 switch=n enabled=y phases=2 Linecode=1P_UG_AL_1/0_Brenau_0_416_0_2_2_2_2

New Line.l(r:p1udm5845-p1ulv1660) Units=km Length=0.0196404 bus1=p1udm5845.1.2 bus2=p1ulv1660.1.2 switch=n enabled=y phases=2 Linecode=1P_UG_AL_1/0_Brenau_0_416_0_2_2_2_2

New Line.l(r:p1udm5845-p1udt1595lv) Units=km Length=0.0189343 bus1=p1udt1595lv.1.2 bus2=p1udm5845.1.2 switch=n enabled=y phases=2 Linecode=1P_UG_AL_1/0_Brenau_0_416_0_2_2_2_2

New Line.l(r:p1udm5846-p1ulv37095) Units=km Length=0.0285156 bus1=p1udm5846.1.2 bus2=p1ulv37095.1.2 switch=n enabled=y phases=2 Linecode=1P_UG_AL_1/0_Brenau_0_416_0_2_2_2_2

New Line.l(r:p1udm5846-p1ulv38983) Units=km Length=0.0163802 bus1=p1udm5846.1.2 bus2=p1ulv38983.1.2 switch=n enabled=y phases=2 Linecode=1P_UG_AL_1/0_Brenau_0_416_0_2_2_2_2

New Line.l(r:p1udm5846-p1udt1595lv) Units=km Length=0.00946713 bus1=p1udt1595lv.1.2 bus2=p1udm5846.1.2 switch=n enabled=y phases=2 Linecode=1P_UG_AL_1/0_Brenau_0_416_0_2_2_2_2

New Line.l(r:p1udt1597lv-p1ulv1662) Units=km Length=0.0266058 bus1=p1udt1597lv.1.2 bus2=p1ulv1662.1.2 switch=n enabled=y phases=2 Linecode=1P_UG_AL_1/0_Brenau_0_416_0_2_2_2_2

New Line.l(r:p1udm5854-p1ulv17325) Units=km Length=0.0467544 bus1=p1udm5854.1.2 bus2=p1ulv17325.1.2 switch=n enabled=y phases=2 Linecode=1P_UG_AL_4/0_Sweetbriar_0_416_0_2_2_2_2

New Line.l(r:p1udm5854-p1udt1597lv) Units=km Length=0.0199388 bus1=p1udt1597lv.1.2 bus2=p1udm5854.1.2 switch=n enabled=y phases=2 Linecode=1P_UG_AL_4/0_Sweetbriar_0_416_0_2_2_2_2

New Line.l(r:p1udm5855-p1ulv37099) Units=km Length=0.0262953 bus1=p1udm5855.1.2 bus2=p1ulv37099.1.2 switch=n enabled=y phases=2 Linecode=1P_UG_AL_1/0_Brenau_0_416_0_2_2_2_2

New Line.l(r:p1udm5855-p1udt1597lv) Units=km Length=0.0299065 bus1=p1udt1597lv.1.2 bus2=p1udm5855.1.2 switch=n enabled=y phases=2 Linecode=1P_UG_AL_1/0_Brenau_0_416_0_2_2_2_2

New Line.l(r:p1udt1598lv-p1ulv1663) Units=km Length=0.0168912 bus1=p1udt1598lv.1.2 bus2=p1ulv1663.1.2 switch=n enabled=y phases=2 Linecode=1P_UG_AL_4/0_Sweetbriar_0_416_0_2_2_2_2

New Line.l(r:p1udm7851-p1ulv2284) Units=km Length=0.0281725 bus1=p1udm7851.1.2 bus2=p1ulv2284.1.2 switch=n enabled=y phases=2 Linecode=1P_UG_AL_1/0_Brenau_0_416_0_2_2_2_2

New Line.l(r:p1udm7851-p1udt2165lv) Units=km Length=0.0190419 bus1=p1udt2165lv.1.2 bus2=p1udm7851.1.2 switch=n enabled=y phases=2 Linecode=1P_UG_AL_1/0_Brenau_0_416_0_2_2_2_2

New Line.l(r:p1udm7852-p1ulv12923) Units=km Length=0.0196213 bus1=p1udm7852.1.2 bus2=p1ulv12923.1.2 switch=n enabled=y phases=2 Linecode=1P_UG_AL_1/0_Brenau_0_416_0_2_2_2_2

New Line.l(r:p1udm7852-p1udt2165lv) Units=km Length=0.00951654 bus1=p1udt2165lv.1.2 bus2=p1udm7852.1.2 switch=n enabled=y phases=2 Linecode=1P_UG_AL_1/0_Brenau_0_416_0_2_2_2_2

New Line.l(r:p1udm11757-p1ulv3568) Units=km Length=0.0219207 bus1=p1udm11757.1.2 bus2=p1ulv3568.1.2 switch=n enabled=y phases=2 Linecode=1P_UG_AL_4/0_Sweetbriar_0_416_0_2_2_2_2

New Line.l(r:p1udm11758-p1ulv32616) Units=km Length=0.015038400000000002 bus1=p1udm11758.1.2 bus2=p1ulv32616.1.2 switch=n enabled=y phases=2 Linecode=1P_UG_AL_1/0_Brenau_0_416_0_2_2_2_2

New Line.l(r:p1udm11757-p1udm11758) Units=km Length=0.026288100000000002 bus1=p1udm11757.1.2 bus2=p1udm11758.1.2 switch=n enabled=y phases=2 Linecode=1P_UG_AL_1/0_Brenau_0_416_0_2_2_2_2

New Line.l(r:p1udm11757-p1udt3324lv) Units=km Length=0.006769530000000001 bus1=p1udt3324lv.1.2 bus2=p1udm11757.1.2 switch=n enabled=y phases=2 Linecode=1P_UG_AL_4/0_Sweetbriar_0_416_0_2_2_2_2

New Line.l(r:p1udm11759-p1ulv52804) Units=km Length=0.0323966 bus1=p1udm11759.1.2 bus2=p1ulv52804.1.2 switch=n enabled=y phases=2 Linecode=1P_UG_AL_1/0_Brenau_0_416_0_2_2_2_2

New Line.l(r:p1udm11759-p1udt3324lv) Units=km Length=0.00932443 bus1=p1udt3324lv.1.2 bus2=p1udm11759.1.2 switch=n enabled=y phases=2 Linecode=1P_UG_AL_1/0_Brenau_0_416_0_2_2_2_2

New Line.l(r:p1udt3326lv-p1ulv3570) Units=km Length=0.027603700000000002 bus1=p1udt3326lv.1.2 bus2=p1ulv3570.1.2 switch=n enabled=y phases=2 Linecode=1P_UG_AL_1/0_Brenau_0_416_0_2_2_2_2

New Line.l(r:p1udm18731-p1ulv6093) Units=km Length=0.0197478 bus1=p1udm18731.1.2 bus2=p1ulv6093.1.2 switch=n enabled=y phases=2 Linecode=1P_UG_AL_1/0_Brenau_0_416_0_2_2_2_2

New Line.l(r:p1udm18730-p1ulv6092) Units=km Length=0.037478 bus1=p1udm18730.1.2 bus2=p1ulv6092.1.2 switch=n enabled=y phases=2 Linecode=1P_UG_AL_1/0_Brenau_0_416_0_2_2_2_2

New Line.l(r:p1udm18730-p1udm18731) Units=km Length=0.019705900000000002 bus1=p1udm18731.1.2 bus2=p1udm18730.1.2 switch=n enabled=y phases=2 Linecode=1P_UG_AL_1/0_Brenau_0_416_0_2_2_2_2

New Line.l(r:p1udm18731-p1udt5367lv) Units=km Length=0.0098553 bus1=p1udt5367lv.1.2 bus2=p1udm18731.1.2 switch=n enabled=y phases=2 Linecode=1P_UG_AL_1/0_Brenau_0_416_0_2_2_2_2

New Line.l(r:p1udm18733-p1ulv55902) Units=km Length=0.057177500000000006 bus1=p1udm18733.1.2 bus2=p1ulv55902.1.2 switch=n enabled=y phases=2 Linecode=1P_UG_AL_1/0_Brenau_0_416_0_2_2_2_2

New Line.l(r:p1udm18732-p1ulv23141) Units=km Length=0.0195909 bus1=p1udm18732.1.2 bus2=p1ulv23141.1.2 switch=n enabled=y phases=2 Linecode=1P_UG_AL_1/0_Brenau_0_416_0_2_2_2_2

New Line.l(r:p1udm18732-p1udm18733) Units=km Length=0.0197194 bus1=p1udm18733.1.2 bus2=p1udm18732.1.2 switch=n enabled=y phases=2 Linecode=1P_UG_AL_1/0_Brenau_0_416_0_2_2_2_2

New Line.l(r:p1udm18733-p1udt5367lv) Units=km Length=0.0098553 bus1=p1udt5367lv.1.2 bus2=p1udm18733.1.2 switch=n enabled=y phases=2 Linecode=1P_UG_AL_1/0_Brenau_0_416_0_2_2_2_2

New Line.l(r:p1udm24772-p1ulv8585) Units=km Length=0.0229884 bus1=p1udm24772.1.2 bus2=p1ulv8585.1.2 switch=n enabled=y phases=2 Linecode=1P_UG_AL_1/0_Brenau_0_416_0_2_2_2_2

New Line.l(r:p1udm24772-p1udt7221lv) Units=km Length=0.009393490000000003 bus1=p1udt7221lv.1.2 bus2=p1udm24772.1.2 switch=n enabled=y phases=2 Linecode=1P_UG_AL_1/0_Brenau_0_416_0_2_2_2_2

New Line.l(r:p1udm24773-p1ulv11665) Units=km Length=0.0224062 bus1=p1udm24773.1.2 bus2=p1ulv11665.1.2 switch=n enabled=y phases=2 Linecode=1P_UG_AL_4/0_Sweetbriar_0_416_0_2_2_2_2

New Line.l(r:p1udm24773-p1udt7221lv) Units=km Length=0.0768662 bus1=p1udt7221lv.1.2 bus2=p1udm24773.1.2 switch=n enabled=y phases=2 Linecode=1P_UG_AL_4/0_Sweetbriar_0_416_0_2_2_2_2

New Line.l(r:p1udt7637lv-p1ulv9196) Units=km Length=0.0917943 bus1=p1udt7637lv.1.2 bus2=p1ulv9196.1.2 switch=n enabled=y phases=2 Linecode=1P_UG_AL_1/0_Brenau_0_416_0_2_2_2_2

New Line.l(r:p1udt10332lv-p1ulv34574) Units=km Length=0.0251954 bus1=p1udt10332lv.1.2 bus2=p1ulv34574.1.2 switch=n enabled=y phases=2 Linecode=1P_UG_AL_1/0_Brenau_0_416_0_2_2_2_2

New Line.l(r:p1udm34408-p1ulv13550) Units=km Length=0.0244967 bus1=p1udm34408.1.2 bus2=p1ulv13550.1.2 switch=n enabled=y phases=2 Linecode=1P_UG_AL_1/0_Brenau_0_416_0_2_2_2_2

New Line.l(r:p1udm34408-p1udt10332lv) Units=km Length=0.00982765 bus1=p1udt10332lv.1.2 bus2=p1udm34408.1.2 switch=n enabled=y phases=2 Linecode=1P_UG_AL_1/0_Brenau_0_416_0_2_2_2_2

New Line.l(r:p1udm38366-p1ulv16023) Units=km Length=0.0209532 bus1=p1udm38366.1.2 bus2=p1ulv16023.1.2 switch=n enabled=y phases=2 Linecode=1P_UG_AL_1/0_Brenau_0_416_0_2_2_2_2

New Line.l(r:p1udm38366-p1udt11714lv) Units=km Length=0.00949826 bus1=p1udt11714lv.1.2 bus2=p1udm38366.1.2 switch=n enabled=y phases=2 Linecode=1P_UG_AL_1/0_Brenau_0_416_0_2_2_2_2

New Line.l(r:p1udm38367-p1ulv20575) Units=km Length=0.0172296 bus1=p1udm38367.1.2 bus2=p1ulv20575.1.2 switch=n enabled=y phases=2 Linecode=1P_UG_AL_1/0_Brenau_0_416_0_2_2_2_2

New Line.l(r:p1udm38367-p1udt11714lv) Units=km Length=0.00948945 bus1=p1udt11714lv.1.2 bus2=p1udm38367.1.2 switch=n enabled=y phases=2 Linecode=1P_UG_AL_1/0_Brenau_0_416_0_2_2_2_2

New Line.l(r:p1udt12065lv-p1ulv16700) Units=km Length=0.0192204 bus1=p1udt12065lv.1.2 bus2=p1ulv16700.1.2 switch=n enabled=y phases=2 Linecode=1P_UG_AL_1/0_Brenau_0_416_0_2_2_2_2

New Line.l(r:p1udm39373-p1ulv39604) Units=km Length=0.025631600000000004 bus1=p1udm39373.1.2 bus2=p1ulv39604.1.2 switch=n enabled=y phases=2 Linecode=1P_UG_AL_1/0_Brenau_0_416_0_2_2_2_2

New Line.l(r:p1udm39373-p1udt12065lv) Units=km Length=0.0282631 bus1=p1udt12065lv.1.2 bus2=p1udm39373.1.2 switch=n enabled=y phases=2 Linecode=1P_UG_AL_1/0_Brenau_0_416_0_2_2_2_2

New Line.l(r:p1udm39374-p1ulv49607) Units=km Length=0.0232566 bus1=p1udm39374.1.2 bus2=p1ulv49607.1.2 switch=n enabled=y phases=2 Linecode=1P_UG_AL_1/0_Brenau_0_416_0_2_2_2_2

New Line.l(r:p1udm39374-p1udt12065lv) Units=km Length=0.0190371 bus1=p1udt12065lv.1.2 bus2=p1udm39374.1.2 switch=n enabled=y phases=2 Linecode=1P_UG_AL_1/0_Brenau_0_416_0_2_2_2_2

New Line.l(r:p1udt12067lv-p1ulv16702) Units=km Length=0.0201541 bus1=p1udt12067lv.1.2 bus2=p1ulv16702.1.2 switch=n enabled=y phases=2 Linecode=1P_UG_AL_1/0_Brenau_0_416_0_2_2_2_2

New Line.l(r:p1udt12067lv-p1ulv40860) Units=km Length=0.0306424 bus1=p1udt12067lv.1.2 bus2=p1ulv40860.1.2 switch=n enabled=y phases=2 Linecode=1P_UG_AL_1/0_Brenau_0_416_0_2_2_2_2

New Line.l(r:p1udt12067lv-p1ulv65166) Units=km Length=0.0166695 bus1=p1udt12067lv.1.2 bus2=p1ulv65166.1.2 switch=n enabled=y phases=2 Linecode=1P_UG_AL_1/0_Brenau_0_416_0_2_2_2_2

New Line.l(r:p1udt12068lv-p1ulv16703) Units=km Length=0.0196612 bus1=p1udt12068lv.1.2 bus2=p1ulv16703.1.2 switch=n enabled=y phases=2 Linecode=1P_UG_AL_4/0_Sweetbriar_0_416_0_2_2_2_2

New Line.l(r:p1udm39381-p1ulv51488) Units=km Length=0.0401842 bus1=p1udm39381.1.2 bus2=p1ulv51488.1.2 switch=n enabled=y phases=2 Linecode=1P_UG_AL_1/0_Brenau_0_416_0_2_2_2_2

New Line.l(r:p1udm39380-p1ulv16704) Units=km Length=0.0192416 bus1=p1udm39380.1.2 bus2=p1ulv16704.1.2 switch=n enabled=y phases=2 Linecode=1P_UG_AL_1/0_Brenau_0_416_0_2_2_2_2

New Line.l(r:p1udm39380-p1udm39381) Units=km Length=0.00996707 bus1=p1udm39381.1.2 bus2=p1udm39380.1.2 switch=n enabled=y phases=2 Linecode=1P_UG_AL_1/0_Brenau_0_416_0_2_2_2_2

New Line.l(r:p1udm39381-p1udt12069lv) Units=km Length=0.00997177 bus1=p1udt12069lv.1.2 bus2=p1udm39381.1.2 switch=n enabled=y phases=2 Linecode=1P_UG_AL_1/0_Brenau_0_416_0_2_2_2_2

New Line.l(r:p1udm39383-p1ulv60121) Units=km Length=0.026227400000000005 bus1=p1udm39383.1.2 bus2=p1ulv60121.1.2 switch=n enabled=y phases=2 Linecode=1P_UG_AL_1/0_Brenau_0_416_0_2_2_2_2

New Line.l(r:p1udm39382-p1ulv56504) Units=km Length=0.0194599 bus1=p1udm39382.1.2 bus2=p1ulv56504.1.2 switch=n enabled=y phases=2 Linecode=1P_UG_AL_1/0_Brenau_0_416_0_2_2_2_2

New Line.l(r:p1udm39382-p1udm39383) Units=km Length=0.0299018 bus1=p1udm39383.1.2 bus2=p1udm39382.1.2 switch=n enabled=y phases=2 Linecode=1P_UG_AL_1/0_Brenau_0_416_0_2_2_2_2

New Line.l(r:p1udm39383-p1udt12069lv) Units=km Length=0.00997177 bus1=p1udt12069lv.1.2 bus2=p1udm39383.1.2 switch=n enabled=y phases=2 Linecode=1P_UG_AL_1/0_Brenau_0_416_0_2_2_2_2

New Line.l(r:p1udt12403lv-p1ulv37709) Units=km Length=0.0205486 bus1=p1udt12403lv.1.2 bus2=p1ulv37709.1.2 switch=n enabled=y phases=2 Linecode=1P_UG_AL_1/0_Brenau_0_416_0_2_2_2_2

New Line.l(r:p1udt12403lv-p1ulv44674) Units=km Length=0.0191701 bus1=p1udt12403lv.1.2 bus2=p1ulv44674.1.2 switch=n enabled=y phases=2 Linecode=1P_UG_AL_2/0_Converse_0_416_0_2_2_2_2

New Line.l(r:p1udm40304-p1ulv17326) Units=km Length=0.0186112 bus1=p1udm40304.1.2 bus2=p1ulv17326.1.2 switch=n enabled=y phases=2 Linecode=1P_UG_AL_1/0_Brenau_0_416_0_2_2_2_2

New Line.l(r:p1udm40304-p1udt12403lv) Units=km Length=0.0299018 bus1=p1udt12403lv.1.2 bus2=p1udm40304.1.2 switch=n enabled=y phases=2 Linecode=1P_UG_AL_1/0_Brenau_0_416_0_2_2_2_2

New Line.l(r:p1udm40305-p1ulv37708) Units=km Length=0.0218956 bus1=p1udm40305.1.2 bus2=p1ulv37708.1.2 switch=n enabled=y phases=2 Linecode=1P_UG_AL_1/0_Brenau_0_416_0_2_2_2_2

New Line.l(r:p1udm40305-p1udt12403lv) Units=km Length=0.0299065 bus1=p1udt12403lv.1.2 bus2=p1udm40305.1.2 switch=n enabled=y phases=2 Linecode=1P_UG_AL_1/0_Brenau_0_416_0_2_2_2_2

New Line.l(r:p1udt12404lv-p1ulv17327) Units=km Length=0.0660904 bus1=p1udt12404lv.1.2 bus2=p1ulv17327.1.2 switch=n enabled=y phases=2 Linecode=1P_OH_AL_4/0_Zuzara_0_416_0_2_2_2_2

New Line.l(r:p1udt12404lv-p1ulv29462) Units=km Length=0.043096600000000006 bus1=p1udt12404lv.1.2 bus2=p1ulv29462.1.2 switch=n enabled=y phases=2 Linecode=1P_OH_AL_4/0_Zuzara_0_416_0_2_2_2_2

New Line.l(r:p1udm42044-p1ulv18637) Units=km Length=0.03723340000000001 bus1=p1udm42044.1.2 bus2=p1ulv18637.1.2 switch=n enabled=y phases=2 Linecode=1P_UG_AL_1/0_Brenau_0_416_0_2_2_2_2

New Line.l(r:p1udm42044-p1udt13057lv) Units=km Length=0.0361996 bus1=p1udt13057lv.1.2 bus2=p1udm42044.1.2 switch=n enabled=y phases=2 Linecode=1P_UG_AL_1/0_Brenau_0_416_0_2_2_2_2

New Line.l(r:p1udm42046-p1ulv58889) Units=km Length=0.021620200000000003 bus1=p1udm42046.1.2 bus2=p1ulv58889.1.2 switch=n enabled=y phases=2 Linecode=1P_UG_AL_1/0_Brenau_0_416_0_2_2_2_2

New Line.l(r:p1udm42045-p1ulv45933) Units=km Length=0.0197506 bus1=p1udm42045.1.2 bus2=p1ulv45933.1.2 switch=n enabled=y phases=2 Linecode=1P_UG_AL_1/0_Brenau_0_416_0_2_2_2_2

New Line.l(r:p1udm42045-p1udm42046) Units=km Length=0.027139500000000004 bus1=p1udm42046.1.2 bus2=p1udm42045.1.2 switch=n enabled=y phases=2 Linecode=1P_UG_AL_1/0_Brenau_0_416_0_2_2_2_2

New Line.l(r:p1udm42046-p1udt13057lv) Units=km Length=0.009046510000000002 bus1=p1udt13057lv.1.2 bus2=p1udm42046.1.2 switch=n enabled=y phases=2 Linecode=1P_UG_AL_4/0_Sweetbriar_0_416_0_2_2_2_2

New Line.l(r:p1udt13401lv-p1ulv19328) Units=km Length=0.0450729 bus1=p1udt13401lv.1.2 bus2=p1ulv19328.1.2 switch=n enabled=y phases=2 Linecode=1P_UG_AL_1/0_Brenau_0_416_0_2_2_2_2

New Line.l(r:p1udm42907-p1ulv46576) Units=km Length=0.016397 bus1=p1udm42907.1.2 bus2=p1ulv46576.1.2 switch=n enabled=y phases=2 Linecode=1P_UG_AL_4/0_Sweetbriar_0_416_0_2_2_2_2

New Line.l(r:p1udm42907-p1udt13401lv) Units=km Length=0.0154682 bus1=p1udt13401lv.1.2 bus2=p1udm42907.1.2 switch=n enabled=y phases=2 Linecode=1P_UG_AL_4/0_Sweetbriar_0_416_0_2_2_2_2

New Line.l(r:p1udt13981lv-p1ulv20603) Units=km Length=0.0187421 bus1=p1udt13981lv.1.2 bus2=p1ulv20603.1.2 switch=n enabled=y phases=2 Linecode=1P_UG_AL_1/0_Brenau_0_416_0_2_2_2_2

New Line.l(r:p1udt14523lv-p1ulv38340) Units=km Length=0.0177816 bus1=p1udt14523lv.1.2 bus2=p1ulv38340.1.2 switch=n enabled=y phases=2 Linecode=1P_UG_AL_1/0_Brenau_0_416_0_2_2_2_2

New Line.l(r:p1udm45703-p1ulv21848) Units=km Length=0.0159088 bus1=p1udm45703.1.2 bus2=p1ulv21848.1.2 switch=n enabled=y phases=2 Linecode=1P_UG_AL_1/0_Brenau_0_416_0_2_2_2_2

New Line.l(r:p1udm45703-p1udt14523lv) Units=km Length=0.0388274 bus1=p1udt14523lv.1.2 bus2=p1udm45703.1.2 switch=n enabled=y phases=2 Linecode=1P_UG_AL_1/0_Brenau_0_416_0_2_2_2_2

New Line.l(r:p1udt14524lv-p1ulv21849) Units=km Length=0.0152188 bus1=p1udt14524lv.1.2 bus2=p1ulv21849.1.2 switch=n enabled=y phases=2 Linecode=1P_OH_AL_2/0_Rucina_0_416_0_2_2_2_2

New Line.l(r:p1udt15294lv-p1ulv23743) Units=km Length=0.00739625 bus1=p1udt15294lv.1.2 bus2=p1ulv23743.1.2 switch=n enabled=y phases=2 Linecode=1P_OH_AL_2/0_Rucina_0_416_0_2_2_2_2

New Line.l(r:p1udm48230-p1ulv24403) Units=km Length=0.0245505 bus1=p1udm48230.1.2 bus2=p1ulv24403.1.2 switch=n enabled=y phases=2 Linecode=1P_UG_AL_1/0_Brenau_0_416_0_2_2_2_2

New Line.l(r:p1udm48230-p1udt15542lv) Units=km Length=0.0241498 bus1=p1udt15542lv.1.2 bus2=p1udm48230.1.2 switch=n enabled=y phases=2 Linecode=1P_UG_AL_1/0_Brenau_0_416_0_2_2_2_2

New Line.l(r:p1udm48231-p1ulv29458) Units=km Length=0.022057900000000002 bus1=p1udm48231.1.2 bus2=p1ulv29458.1.2 switch=n enabled=y phases=2 Linecode=1P_UG_AL_4/0_Sweetbriar_0_416_0_2_2_2_2

New Line.l(r:p1udm48232-p1ulv31980) Units=km Length=0.0198488 bus1=p1udm48232.1.2 bus2=p1ulv31980.1.2 switch=n enabled=y phases=2 Linecode=1P_UG_AL_1/0_Brenau_0_416_0_2_2_2_2

New Line.l(r:p1udm48231-p1udm48232) Units=km Length=0.04102600000000001 bus1=p1udm48231.1.2 bus2=p1udm48232.1.2 switch=n enabled=y phases=2 Linecode=1P_UG_AL_1/0_Brenau_0_416_0_2_2_2_2

New Line.l(r:p1udm48231-p1udt15542lv) Units=km Length=0.007378690000000001 bus1=p1udt15542lv.1.2 bus2=p1udm48231.1.2 switch=n enabled=y phases=2 Linecode=1P_UG_AL_4/0_Sweetbriar_0_416_0_2_2_2_2

New Line.l(r:p1udm48233-p1ulv24404) Units=km Length=0.0116225 bus1=p1udm48233.1.2 bus2=p1ulv24404.1.2 switch=n enabled=y phases=2 Linecode=1P_OH_AL_2/0_Rucina_0_416_0_2_2_2_2

New Line.l(r:p1udm48233-p1udt15543lv) Units=km Length=0.05702410000000001 bus1=p1udt15543lv.1.2 bus2=p1udm48233.1.2 switch=n enabled=y phases=2 Linecode=1P_OH_AL_4/0_Zuzara_0_416_0_2_2_2_2

New Line.l(r:p1udm48234-p1ulv48412) Units=km Length=0.0122698 bus1=p1udm48234.1.2 bus2=p1ulv48412.1.2 switch=n enabled=y phases=2 Linecode=1P_OH_AL_2/0_Rucina_0_416_0_2_2_2_2

New Line.l(r:p1udm48234-p1udt15543lv) Units=km Length=0.013847800000000002 bus1=p1udt15543lv.1.2 bus2=p1udm48234.1.2 switch=n enabled=y phases=2 Linecode=1P_OH_AL_2/0_Rucina_0_416_0_2_2_2_2

New Line.l(r:p1udt15544lv-p1ulv24405) Units=km Length=0.010495 bus1=p1udt15544lv.1.2 bus2=p1ulv24405.1.2 switch=n enabled=y phases=2 Linecode=1P_OH_AL_2/0_Rucina_0_416_0_2_2_2_2

New Line.l(r:p1udm48766-p1ulv25033) Units=km Length=0.0177372 bus1=p1udm48766.1.2 bus2=p1ulv25033.1.2 switch=n enabled=y phases=2 Linecode=1P_UG_AL_4/0_Sweetbriar_0_416_0_2_2_2_2

New Line.l(r:p1udm48768-p1ulv40862) Units=km Length=0.0186995 bus1=p1udm48768.1.2 bus2=p1ulv40862.1.2 switch=n enabled=y phases=2 Linecode=1P_UG_AL_1/0_Brenau_0_416_0_2_2_2_2

New Line.l(r:p1udm48766-p1udm48768) Units=km Length=0.0299018 bus1=p1udm48766.1.2 bus2=p1udm48768.1.2 switch=n enabled=y phases=2 Linecode=1P_UG_AL_1/0_Brenau_0_416_0_2_2_2_2

New Line.l(r:p1udm48766-p1udt15775lv) Units=km Length=0.00997177 bus1=p1udt15775lv.1.2 bus2=p1udm48766.1.2 switch=n enabled=y phases=2 Linecode=1P_UG_AL_4/0_Sweetbriar_0_416_0_2_2_2_2

New Line.l(r:p1udm48767-p1ulv37710) Units=km Length=0.0182184 bus1=p1udm48767.1.2 bus2=p1ulv37710.1.2 switch=n enabled=y phases=2 Linecode=1P_UG_AL_1/0_Brenau_0_416_0_2_2_2_2

New Line.l(r:p1udm48767-p1udt15775lv) Units=km Length=0.0299065 bus1=p1udt15775lv.1.2 bus2=p1udm48767.1.2 switch=n enabled=y phases=2 Linecode=1P_UG_AL_1/0_Brenau_0_416_0_2_2_2_2

New Line.l(r:p1udm50392-p1ulv32615) Units=km Length=0.0182047 bus1=p1udm50392.1.2 bus2=p1ulv32615.1.2 switch=n enabled=y phases=2 Linecode=1P_UG_AL_1/0_Brenau_0_416_0_2_2_2_2

New Line.l(r:p1udm50392-p1udt16504lv) Units=km Length=0.00992665 bus1=p1udt16504lv.1.2 bus2=p1udm50392.1.2 switch=n enabled=y phases=2 Linecode=1P_UG_AL_1/0_Brenau_0_416_0_2_2_2_2

New Line.l(r:p1udm50393-p1ulv57691) Units=km Length=0.0192667 bus1=p1udm50393.1.2 bus2=p1ulv57691.1.2 switch=n enabled=y phases=2 Linecode=1P_UG_AL_4/0_Sweetbriar_0_416_0_2_2_2_2

New Line.l(r:p1udm50391-p1ulv26941) Units=km Length=0.0216745 bus1=p1udm50391.1.2 bus2=p1ulv26941.1.2 switch=n enabled=y phases=2 Linecode=1P_UG_AL_1/0_Brenau_0_416_0_2_2_2_2

New Line.l(r:p1udm50391-p1udm50393) Units=km Length=0.00991789 bus1=p1udm50393.1.2 bus2=p1udm50391.1.2 switch=n enabled=y phases=2 Linecode=1P_UG_AL_1/0_Brenau_0_416_0_2_2_2_2

New Line.l(r:p1udm50393-p1udt16504lv) Units=km Length=0.00992665 bus1=p1udt16504lv.1.2 bus2=p1udm50393.1.2 switch=n enabled=y phases=2 Linecode=1P_UG_AL_4/0_Sweetbriar_0_416_0_2_2_2_2

New Line.l(r:p1udm50873-p1ulv27605) Units=km Length=0.0199452 bus1=p1udm50873.1.2 bus2=p1ulv27605.1.2 switch=n enabled=y phases=2 Linecode=1P_UG_AL_1/0_Brenau_0_416_0_2_2_2_2

New Line.l(r:p1udm50873-p1ulv51496) Units=km Length=0.0528195 bus1=p1udm50873.1.2 bus2=p1ulv51496.1.2 switch=n enabled=y phases=2 Linecode=1P_UG_AL_1/0_Brenau_0_416_0_2_2_2_2

New Line.l(r:p1udm50873-p1udt16733lv) Units=km Length=0.0098553 bus1=p1udt16733lv.1.2 bus2=p1udm50873.1.2 switch=n enabled=y phases=2 Linecode=1P_UG_AL_1/0_Brenau_0_416_0_2_2_2_2

New Line.l(r:p1udm50874-p1ulv35224) Units=km Length=0.0195304 bus1=p1udm50874.1.2 bus2=p1ulv35224.1.2 switch=n enabled=y phases=2 Linecode=1P_UG_AL_1/0_Brenau_0_416_0_2_2_2_2

New Line.l(r:p1udm50874-p1udt16733lv) Units=km Length=0.0098553 bus1=p1udt16733lv.1.2 bus2=p1udm50874.1.2 switch=n enabled=y phases=2 Linecode=1P_UG_AL_1/0_Brenau_0_416_0_2_2_2_2

New Line.l(r:p1udt18179lv-p1ulv31979) Units=km Length=0.017822900000000003 bus1=p1udt18179lv.1.2 bus2=p1ulv31979.1.2 switch=n enabled=y phases=2 Linecode=1P_UG_AL_1/0_Brenau_0_416_0_2_2_2_2

New Line.l(r:p1udt19333lv-p1ulv35852) Units=km Length=0.0199258 bus1=p1udt19333lv.1.2 bus2=p1ulv35852.1.2 switch=n enabled=y phases=2 Linecode=1P_UG_AL_1/0_Brenau_0_416_0_2_2_2_2

New Line.l(r:p1udt19334lv-p1ulv35853) Units=km Length=0.013795700000000001 bus1=p1udt19334lv.1.2 bus2=p1ulv35853.1.2 switch=n enabled=y phases=2 Linecode=1P_OH_AL_2/0_Rucina_0_416_0_2_2_2_2

New Line.l(r:p1udt20658lv-p1ulv40861) Units=km Length=0.0327476 bus1=p1udt20658lv.1.2 bus2=p1ulv40861.1.2 switch=n enabled=y phases=2 Linecode=1P_UG_AL_1/0_Brenau_0_416_0_2_2_2_2

New Line.l(r:p1udt21374lv-p1ulv44027) Units=km Length=0.0232614 bus1=p1udt21374lv.1.2 bus2=p1ulv44027.1.2 switch=n enabled=y phases=2 Linecode=1P_UG_AL_4/0_Sweetbriar_0_416_0_2_2_2_2

New Line.l(r:p1udt21779lv-p1ulv45944) Units=km Length=0.0193239 bus1=p1udt21779lv.1.2 bus2=p1ulv45944.1.2 switch=n enabled=y phases=2 Linecode=1P_UG_AL_2/0_Converse_0_416_0_2_2_2_2

New Line.l(r:p1udt22297lv-p1ulv48417) Units=km Length=0.0114113 bus1=p1udt22297lv.1.2 bus2=p1ulv48417.1.2 switch=n enabled=y phases=2 Linecode=1P_OH_AL_2/0_Rucina_0_416_0_2_2_2_2

New Line.l(r:p1udt22536lv-p1ulv49614) Units=km Length=0.0116848 bus1=p1udt22536lv.1.2 bus2=p1ulv49614.1.2 switch=n enabled=y phases=2 Linecode=1P_OH_AL_2/0_Rucina_0_416_0_2_2_2_2

New Line.l(r:p1udt22792lv-p1ulv50890) Units=km Length=0.0148828 bus1=p1udt22792lv.1.2 bus2=p1ulv50890.1.2 switch=n enabled=y phases=2 Linecode=1P_OH_AL_2/0_Rucina_0_416_0_2_2_2_2

New Line.l(r:p1udt23151lv-p1ulv52810) Units=km Length=0.004793540000000001 bus1=p1udt23151lv.1.2 bus2=p1ulv52810.1.2 switch=n enabled=y phases=2 Linecode=1P_OH_AL_2/0_Rucina_0_416_0_2_2_2_2

New Line.l(r:p1udt23722lv-p1ulv55879) Units=km Length=0.0270724 bus1=p1udt23722lv.1.2 bus2=p1ulv55879.1.2 switch=n enabled=y phases=2 Linecode=1P_UG_AL_1/0_Brenau_0_416_0_2_2_2_2

New Line.l(r:p1udt24063lv-p1ulv57690) Units=km Length=0.0238238 bus1=p1udt24063lv.1.2 bus2=p1ulv57690.1.2 switch=n enabled=y phases=2 Linecode=1P_UG_AL_4/0_Sweetbriar_0_416_0_2_2_2_2

New Line.l(r:p1udt24271lv-p1ulv58890) Units=km Length=0.0253348 bus1=p1udt24271lv.1.2 bus2=p1ulv58890.1.2 switch=n enabled=y phases=2 Linecode=1P_UG_AL_1/0_Brenau_0_416_0_2_2_2_2

New Line.l(r:p1udt24272lv-p1ulv58891) Units=km Length=0.0256737 bus1=p1udt24272lv.1.2 bus2=p1ulv58891.1.2 switch=n enabled=y phases=2 Linecode=1P_UG_AL_1/0_Brenau_0_416_0_2_2_2_2

New Line.l(r:p1udt24899lv-p1ulv62648) Units=km Length=0.00431237 bus1=p1udt24899lv.1.2 bus2=p1ulv62648.1.2 switch=n enabled=y phases=2 Linecode=1P_OH_AL_2/0_Rucina_0_416_0_2_2_2_2

New Line.l(r:p1udt23151-p1udt24899) Units=km Length=0.0503551 bus1=p1udt23151.2 bus2=p1udt24899.2 switch=n enabled=y phases=1 Linecode=1P_OH_AL_ACSR_#2_Sparrow_12_47_0_1_1_1_1

New Line.l(r:p1udt23151-p1udt3826) Units=km Length=0.01893 bus1=p1udt23151-p1udt3826x.2 bus2=p1udt23151.2 switch=n enabled=y phases=1 Linecode=1P_OH_AL_ACSR_#2_Sparrow_12_47_0_1_1_1_1

New Line.l(r:p1udt2165-p1udt3324) Units=km Length=0.0376817 bus1=p1udt2165-p1udt3324x.3 bus2=p1udt2165-p1udt3324xx.3 switch=n enabled=y phases=1 Linecode=1P_UG_AL_#2_15_12_47_0_1_1_1_1

New Line.l(r:p1udt19333-p1udt2165) Units=km Length=0.00952535 bus1=p1udt19333-p1udt2165x.3 bus2=p1udt19333-p1udt2165xx.3 switch=n enabled=y phases=1 Linecode=1P_UG_AL_#2_15_12_47_0_1_1_1_1

New Line.l(r:p1udt12065-p1udt19333) Units=km Length=0.04759560000000001 bus1=p1udt12065-p1udt19333x.3 bus2=p1udt12065-p1udt19333xx.3 switch=n enabled=y phases=1 Linecode=1P_UG_AL_#2_15_12_47_0_1_1_1_1

New Line.l(r:p1udt12065-p1udt15542) Units=km Length=0.0672989 bus1=p1udt12065-p1udt15542xx.3 bus2=p1udt12065-p1udt15542x.3 switch=n enabled=y phases=1 Linecode=1P_UG_AL_#2_15_12_47_0_1_1_1_1

New Line.l(r:p1udt15542-p1udt7221) Units=km Length=0.0711133 bus1=p1udt15542-p1udt7221xx.3 bus2=p1udt15542-p1udt7221x.3 switch=n enabled=y phases=1 Linecode=1P_UG_AL_#2_15_12_47_0_1_1_1_1

New Line.l(r:p1udt11714-p1udt7221) Units=km Length=0.0850254 bus1=p1udt11714-p1udt7221x.3 bus2=p1udt11714-p1udt7221xx.3 switch=n enabled=y phases=1 Linecode=1P_UG_AL_#2_15_12_47_0_1_1_1_1

New Line.l(r:p1udt23722-p1udt24271) Units=km Length=0.0196505 bus1=p1udt23722-p1udt24271xx.3 bus2=p1udt23722-p1udt24271x.3 switch=n enabled=y phases=1 Linecode=1P_UG_AL_#2_15_12_47_0_1_1_1_1

New Line.l(r:p1udt24271-p1udt24272) Units=km Length=0.029478200000000003 bus1=p1udt24271-p1udt24272xx.3 bus2=p1udt24271-p1udt24272x.3 switch=n enabled=y phases=1 Linecode=1P_UG_AL_#2_15_12_47_0_1_1_1_1

New Line.l(r:p1udt10332-p1udt24272) Units=km Length=0.0294869 bus1=p1udt10332-p1udt24272x.3 bus2=p1udt10332-p1udt24272xx.3 switch=n enabled=y phases=1 Linecode=1P_UG_AL_#2_15_12_47_0_1_1_1_1

New Line.l(r:p1udt10332-p1udt11714) Units=km Length=0.0966016 bus1=p1udt10332-p1udt11714xx.3 bus2=p1udt10332-p1udt11714x.3 switch=n enabled=y phases=1 Linecode=1P_UG_AL_#2_15_12_47_0_1_1_1_1

New Line.l(r:p1udt11714-p1udt14523) Units=km Length=0.105271 bus1=p1udt11714-p1udt14523xx.3 bus2=p1udt11714-p1udt14523x.3 switch=n enabled=y phases=1 Linecode=1P_UG_AL_#2_15_12_47_0_1_1_1_1

New Line.l(r:p1udt1598-p1udt7637) Units=km Length=0.0199388 bus1=p1udt1598-p1udt7637xx.1 bus2=p1udt1598-p1udt7637x.1 switch=n enabled=y phases=1 Linecode=1P_UG_AL_#2_15_12_47_0_1_1_1_1

New Line.l(r:p1udt12067-p1udt7637) Units=km Length=0.00997177 bus1=p1udt12067-p1udt7637x.1 bus2=p1udt12067-p1udt7637xx.1 switch=n enabled=y phases=1 Linecode=1P_UG_AL_#2_15_12_47_0_1_1_1_1

New Line.l(r:p1udt12067-p1udt12068) Units=km Length=0.0199347 bus1=p1udt12067-p1udt12068xx.1 bus2=p1udt12067-p1udt12068x.1 switch=n enabled=y phases=1 Linecode=1P_UG_AL_#2_15_12_47_0_1_1_1_1

New Line.l(r:p1udt12068-p1udt21374) Units=km Length=0.00997177 bus1=p1udt12068-p1udt21374xx.1 bus2=p1udt12068-p1udt21374x.1 switch=n enabled=y phases=1 Linecode=1P_UG_AL_#2_15_12_47_0_1_1_1_1

New Line.l(r:p1udt1597-p1udt21374) Units=km Length=0.0199388 bus1=p1udt1597-p1udt21374x.1 bus2=p1udt1597-p1udt21374xx.1 switch=n enabled=y phases=1 Linecode=1P_UG_AL_#2_15_12_47_0_1_1_1_1

New Line.l(r:p1udt15775-p1udt1597) Units=km Length=0.0299065 bus1=p1udt15775-p1udt1597x.1 bus2=p1udt15775-p1udt1597xx.1 switch=n enabled=y phases=1 Linecode=1P_UG_AL_#2_15_12_47_0_1_1_1_1

New Line.l(r:p1udt12403-p1udt15775) Units=km Length=0.0598171 bus1=p1udt12403-p1udt15775x.1 bus2=p1udt12403-p1udt15775xx.1 switch=n enabled=y phases=1 Linecode=1P_UG_AL_#2_15_12_47_0_1_1_1_1

New Line.l(r:p1udt12403-p1udt20658) Units=km Length=0.0598171 bus1=p1udt12403-p1udt20658xx.1 bus2=p1udt12403-p1udt20658x.1 switch=n enabled=y phases=1 Linecode=1P_UG_AL_#2_15_12_47_0_1_1_1_1

New Line.l(r:p1udt12069-p1udt20658) Units=km Length=0.0398735 bus1=p1udt12069-p1udt20658x.1 bus2=p1udt12069-p1udt20658xx.1 switch=n enabled=y phases=1 Linecode=1P_UG_AL_#2_15_12_47_0_1_1_1_1

New Line.l(r:p1udt12069-p1udt14523) Units=km Length=0.109567 bus1=p1udt12069-p1udt14523xx.1 bus2=p1udt12069-p1udt14523x.1 switch=n enabled=y phases=1 Linecode=1P_UG_AL_#2_15_12_47_0_1_1_1_1

New Line.l(r:p1udt11072-p1udt13981) Units=km Length=0.0295612 bus1=p1udt11072-p1udt13981xx.3 bus2=p1udt11072-p1udt13981xxx.3 switch=n enabled=y phases=1 Linecode=1P_UG_AL_#2_15_12_47_0_1_1_1_1

New Line.l(r:p1udt20189-p1udt2737) Units=km Length=0.0415554 bus1=p1udt20189.1.2.3 bus2=p1udt2737.1.2.3 switch=n enabled=y phases=3 Linecode=3P_OH_AL_ACSR_4/0_Penguin_12_47_0_3_3_3_3

New Line.l(r:p1udt14523-p1udt20189) Units=km Length=0.09613070000000001 bus1=p1udt20189.1.2.3 bus2=p1udt14523.1.2.3 switch=n enabled=y phases=3 Linecode=3P_OH_AL_ACSR_4/0_Penguin_12_47_0_3_3_3_3

New Line.l(r:p1udt20189-p1udt22792) Units=km Length=0.0793757 bus1=p1udt22792.1.2.3 bus2=p1udt20189.1.2.3 switch=n enabled=y phases=3 Linecode=3P_OH_AL_ACSR_4/0_Penguin_12_47_0_3_3_3_3

New Line.l(r:p1udt22792-p1udt23266) Units=km Length=0.0697266 bus1=p1udt23266.1.2.3 bus2=p1udt22792.1.2.3 switch=n enabled=y phases=3 Linecode=3P_OH_AL_ACSR_4/0_Penguin_12_47_0_3_3_3_3

New Line.l(r:p1udt14241-p1udt23266) Units=km Length=0.0289732 bus1=p1udt14241.1.2.3 bus2=p1udt23266.1.2.3 switch=n enabled=y phases=3 Linecode=3P_OH_AL_ACSR_4/0_Penguin_12_47_0_3_3_3_3

New Line.l(r:p1udt14241-p1udt24898) Units=km Length=0.0484867 bus1=p1udt24898.1.2.3 bus2=p1udt14241.1.2.3 switch=n enabled=y phases=3 Linecode=3P_OH_AL_ACSR_4/0_Penguin_12_47_0_3_3_3_3

New Line.l(r:p1udt24898-p1udt2741) Units=km Length=0.0494618 bus1=p1udt2741.1.2.3 bus2=p1udt24898.1.2.3 switch=n enabled=y phases=3 Linecode=3P_OH_AL_ACSR_4/0_Penguin_12_47_0_3_3_3_3

New Line.l(r:p1udt12404-p1udt2741) Units=km Length=0.0174539 bus1=p1udt12404.1.2.3 bus2=p1udt2741.1.2.3 switch=n enabled=y phases=3 Linecode=3P_OH_AL_ACSR_4/0_Penguin_12_47_0_3_3_3_3

New Line.l(r:p1udt12404-p1udt5349) Units=km Length=0.0174585 bus1=p1udt5349.1.2.3 bus2=p1udt12404.1.2.3 switch=n enabled=y phases=3 Linecode=3P_OH_AL_ACSR_4/0_Penguin_12_47_0_3_3_3_3

New Line.l(r:p1udt22536-p1udt5349) Units=km Length=0.0349035 bus1=p1udt22536.1.2.3 bus2=p1udt5349.1.2.3 switch=n enabled=y phases=3 Linecode=3P_OH_AL_ACSR_4/0_Penguin_12_47_0_3_3_3_3

New Line.l(r:p1udt18580-p1udt22536) Units=km Length=0.0575055 bus1=p1udt18580.1.2.3 bus2=p1udt22536.1.2.3 switch=n enabled=y phases=3 Linecode=3P_OH_AL_ACSR_4/0_Penguin_12_47_0_3_3_3_3

New Line.l(r:p1udt18580-p1uhs2_1247) Units=km Length=0.001 bus1=p1udt18580-p1uhs2_1247x.1.2.3 bus2=p1udt18580.1.2.3 switch=n enabled=y phases=3 Linecode=3P_OH_AL_ACSR_4/0_Penguin_12_47_0_3_3_3_3

New Line.l(r:p1udt18580lv-p1ulv33306) Units=km Length=0.0095965 bus1=p1udt18580lv.1.2.3 bus2=p1ulv33306.1.2.3 switch=n enabled=y phases=3 Linecode=3P_UG_AL_350kcmil_15_0_416_0_3_3_3_3

New Line.l(r:p1udt20947lv-p1ulv42115) Units=km Length=0.00915634 bus1=p1udt20947lv.1.2.3 bus2=p1ulv42115.1.2.3 switch=n enabled=y phases=3 Linecode=3P_UG_AL_350kcmil_15_0_416_0_3_3_3_3

New Line.l(r:p1udm13489-p1ulv4165) Units=km Length=0.011442 bus1=p1udm13489.1.2.3 bus2=p1ulv4165.1.2.3 switch=n enabled=y phases=3 Linecode=3P_UG_AL_350kcmil_15_0_416_0_3_3_3_3

New Line.l(r:p1udm13491-p1ulv9828) Units=km Length=0.0134322 bus1=p1udm13491.1.2.3 bus2=p1ulv9828.1.2.3 switch=n enabled=y phases=3 Linecode=3P_UG_AL_350kcmil_15_0_416_0_3_3_3_3

New Line.l(r:p1udm13489-p1udm13491) Units=km Length=0.0314005 bus1=p1udm13489.1.2.3 bus2=p1udm13491.1.2.3 switch=n enabled=y phases=3 Linecode=3P_UG_AL_350kcmil_15_0_416_0_3_3_3_3

New Line.l(r:p1udm13489-p1udt3826lv) Units=km Length=0.0535848 bus1=p1udt3826lv.1.2.3 bus2=p1udm13489.1.2.3 switch=n enabled=y phases=3 Linecode=3P_UG_AL_350kcmil_15_0_416_0_3_3_3_3

New Line.l(r:p1udm13493-p1ulv45285) Units=km Length=0.00949539 bus1=p1udm13493.1.2.3 bus2=p1ulv45285.1.2.3 switch=n enabled=y phases=3 Linecode=3P_UG_AL_350kcmil_15_0_416_0_3_3_3_3

New Line.l(r:p1udm13492-p1ulv12329) Units=km Length=0.010100200000000002 bus1=p1udm13492.1.2.3 bus2=p1ulv12329.1.2.3 switch=n enabled=y phases=3 Linecode=3P_UG_AL_350kcmil_15_0_416_0_3_3_3_3

New Line.l(r:p1udm13490-p1ulv7349) Units=km Length=0.00877957 bus1=p1udm13490.1.2.3 bus2=p1ulv7349.1.2.3 switch=n enabled=y phases=3 Linecode=3P_UG_AL_350kcmil_15_0_416_0_3_3_3_3

New Line.l(r:p1udm13490-p1udm13492) Units=km Length=0.0170503 bus1=p1udm13492.1.2.3 bus2=p1udm13490.1.2.3 switch=n enabled=y phases=3 Linecode=3P_UG_AL_350kcmil_15_0_416_0_3_3_3_3

New Line.l(r:p1udm13492-p1udm13493) Units=km Length=0.0170456 bus1=p1udm13493.1.2.3 bus2=p1udm13492.1.2.3 switch=n enabled=y phases=3 Linecode=3P_UG_AL_350kcmil_15_0_416_0_3_3_3_3

New Line.l(r:p1udm13493-p1udt3826lv) Units=km Length=0.0170413 bus1=p1udt3826lv.1.2.3 bus2=p1udm13493.1.2.3 switch=n enabled=y phases=3 Linecode=3P_UG_AL_750kcmil_25_0_416_0_3_3_3_3

New Line.l(r:p1udt20947-p1udt3826) Units=km Length=0.10322000000000002 bus1=p1udt20947.1.2.3 bus2=p1udt3826.1.2.3 switch=n enabled=y phases=3 Linecode=3P_OH_AL_ACSR_4/0_Penguin_12_47_0_3_3_3_3

New Line.l(r:p1udt20354lv-p1ulv39609) Units=km Length=0.0065981600000000005 bus1=p1udt20354lv.1.2.3 bus2=p1ulv39609.1.2.3 switch=n enabled=y phases=3 Linecode=3P_UG_AL_350kcmil_15_0_416_0_3_3_3_3

New Line.l(r:p1udt4818lv-p1ulv5400) Units=km Length=0.0103674 bus1=p1udt4818lv.1.2.3 bus2=p1ulv5400.1.2.3 switch=n enabled=y phases=3 Linecode=3P_UG_AL_350kcmil_15_0_416_0_3_3_3_3

New Line.l(r:p1udt4818lv-p1ulv9197) Units=km Length=0.016471 bus1=p1udt4818lv.1.2.3 bus2=p1ulv9197.1.2.3 switch=n enabled=y phases=3 Linecode=3P_UG_AL_350kcmil_15_0_416_0_3_3_3_3

New Line.l(r:p1udt20354-p1udt4818) Units=km Length=0.0366397 bus1=p1udt20354.1.2.3 bus2=p1udt4818.1.2.3 switch=n enabled=y phases=3 Linecode=3P_OH_AL_ACSR_4/0_Penguin_12_47_0_3_3_3_3

New Line.l(r:p1udt20354-p1udt22297) Units=km Length=0.0319641 bus1=p1udt22297.1.2.3 bus2=p1udt20354.1.2.3 switch=n enabled=y phases=3 Linecode=3P_OH_AL_ACSR_4/0_Penguin_12_47_0_3_3_3_3

New Line.l(r:p1udt20947-p1udt22297) Units=km Length=0.0799922 bus1=p1udt20947.1.2.3 bus2=p1udt22297.1.2.3 switch=n enabled=y phases=3 Linecode=3P_OH_AL_ACSR_4/0_Penguin_12_47_0_3_3_3_3

New Line.l(r:p1udt18580-p1udt20947) Units=km Length=0.0768364 bus1=p1udt18580.1.2.3 bus2=p1udt20947.1.2.3 switch=n enabled=y phases=3 Linecode=3P_OH_AL_ACSR_4/0_Penguin_12_47_0_3_3_3_3

New Line.l(r:p1udt5349lv-p1ulv6072) Units=km Length=0.00994065 bus1=p1udt5349lv.1.2.3 bus2=p1ulv6072.1.2.3 switch=n enabled=y phases=3 Linecode=3P_UG_AL_350kcmil_15_0_416_0_3_3_3_3

New Line.l(r:p1udm18669-p1ulv55881) Units=km Length=0.00700179 bus1=p1udm18669.1.2.3 bus2=p1ulv55881.1.2.3 switch=n enabled=y phases=3 Linecode=3P_UG_AL_350kcmil_15_0_416_0_3_3_3_3

New Line.l(r:p1udm18669-p1udt5349lv) Units=km Length=0.0174585 bus1=p1udt5349lv.1.2.3 bus2=p1udm18669.1.2.3 switch=n enabled=y phases=3 Linecode=3P_UG_AL_350kcmil_15_0_416_0_3_3_3_3

New Line.l(r:p1udt2741lv-p1ulv2919) Units=km Length=0.0130677 bus1=p1udt2741lv.1.2.3 bus2=p1ulv2919.1.2.3 switch=n enabled=y phases=3 Linecode=3P_UG_AL_350kcmil_15_0_416_0_3_3_3_3

New Line.l(r:p1udt2741lv-p1ulv8591) Units=km Length=0.0167569 bus1=p1udt2741lv.1.2.3 bus2=p1ulv8591.1.2.3 switch=n enabled=y phases=3 Linecode=3P_UG_AL_350kcmil_15_0_416_0_3_3_3_3

New Line.l(r:p1udt14758lv-p1ulv22446) Units=km Length=0.009636330000000002 bus1=p1udt14758lv.1.2.3 bus2=p1ulv22446.1.2.3 switch=n enabled=y phases=3 Linecode=3P_UG_AL_350kcmil_15_0_416_0_3_3_3_3

New Line.l(r:p1udt11054lv-p1ulv14799) Units=km Length=0.006707730000000001 bus1=p1udt11054lv.1.2.3 bus2=p1ulv14799.1.2.3 switch=n enabled=y phases=3 Linecode=3P_UG_AL_350kcmil_15_0_416_0_3_3_3_3

New Line.l(r:p1udt24695lv-p1ulv61366) Units=km Length=0.00833022 bus1=p1udt24695lv.1.2.3 bus2=p1ulv61366.1.2.3 switch=n enabled=y phases=3 Linecode=3P_UG_AL_350kcmil_15_0_416_0_3_3_3_3

New Line.l(r:p1udt11054-p1udt24695) Units=km Length=0.04586230000000001 bus1=p1udt11054.1.2.3 bus2=p1udt24695.1.2.3 switch=n enabled=y phases=3 Linecode=3P_OH_AL_ACSR_4/0_Penguin_12_47_0_3_3_3_3

New Line.l(r:p1udt11054-p1udt14758) Units=km Length=0.0453979 bus1=p1udt14758.1.2.3 bus2=p1udt11054.1.2.3 switch=n enabled=y phases=3 Linecode=3P_OH_AL_ACSR_4/0_Penguin_12_47_0_3_3_3_3

New Line.l(r:p1udt14758-p1udt2741) Units=km Length=0.0637504 bus1=p1udt2741.1.2.3 bus2=p1udt14758.1.2.3 switch=n enabled=y phases=3 Linecode=3P_OH_AL_ACSR_4/0_Penguin_12_47_0_3_3_3_3

New Line.l(r:p1udt24898lv-p1ulv62647) Units=km Length=0.00871622 bus1=p1udt24898lv.1.2.3 bus2=p1ulv62647.1.2.3 switch=n enabled=y phases=3 Linecode=3P_UG_AL_350kcmil_15_0_416_0_3_3_3_3

New Line.l(r:p1udt14241lv-p1ulv21229) Units=km Length=0.0134766 bus1=p1udt14241lv.1.2.3 bus2=p1ulv21229.1.2.3 switch=n enabled=y phases=3 Linecode=3P_UG_AL_4/0_15_0_416_0_3_3_3_3

New Line.l(r:p1udt23266lv-p1ulv53407) Units=km Length=0.00579311 bus1=p1udt23266lv.1.2.3 bus2=p1ulv53407.1.2.3 switch=n enabled=y phases=3 Linecode=3P_UG_AL_350kcmil_15_0_416_0_3_3_3_3

New Line.l(r:p1udt20189lv-p1ulv38987) Units=km Length=0.00525164 bus1=p1udt20189lv.1.2.3 bus2=p1ulv38987.1.2.3 switch=n enabled=y phases=3 Linecode=3P_UG_AL_350kcmil_15_0_416_0_3_3_3_3

New Line.l(r:p1udt2737lv-p1ulv2914) Units=km Length=0.0142729 bus1=p1udt2737lv.1.2.3 bus2=p1ulv2914.1.2.3 switch=n enabled=y phases=3 Linecode=3P_UG_AL_350kcmil_15_0_416_0_3_3_3_3

New Line.l(r:p1udm9782-p1ulv25030) Units=km Length=0.0136942 bus1=p1udm9782.1.2.3 bus2=p1ulv25030.1.2.3 switch=n enabled=y phases=3 Linecode=3P_UG_AL_350kcmil_15_0_416_0_3_3_3_3

New Line.l(r:p1udm9782-p1udt2737lv) Units=km Length=0.0124222 bus1=p1udt2737lv.1.2.3 bus2=p1udm9782.1.2.3 switch=n enabled=y phases=3 Linecode=3P_UG_AL_350kcmil_15_0_416_0_3_3_3_3

New Line.l(r:p1udt13058lv-p1ulv18638) Units=km Length=0.0128966 bus1=p1udt13058lv.1.2.3 bus2=p1ulv18638.1.2.3 switch=n enabled=y phases=3 Linecode=3P_UG_AL_350kcmil_15_0_416_0_3_3_3_3

New Line.l(r:p1udt16268lv-p1ulv26290) Units=km Length=0.00868295 bus1=p1udt16268lv.1.2.3 bus2=p1ulv26290.1.2.3 switch=n enabled=y phases=3 Linecode=3P_UG_AL_350kcmil_15_0_416_0_3_3_3_3

New Line.l(r:p1udt16268lv-p1ulv61361) Units=km Length=0.00777214 bus1=p1udt16268lv.1.2.3 bus2=p1ulv61361.1.2.3 switch=n enabled=y phases=3 Linecode=3P_UG_AL_350kcmil_15_0_416_0_3_3_3_3

New Line.l(r:p1udt9619lv-p1ulv12325) Units=km Length=0.0106954 bus1=p1udt9619lv.1.2.3 bus2=p1ulv12325.1.2.3 switch=n enabled=y phases=3 Linecode=3P_UG_AL_350kcmil_15_0_416_0_3_3_3_3

New Line.l(r:p1udt9619lv-p1ulv24406) Units=km Length=0.00635083 bus1=p1udt9619lv.1.2.3 bus2=p1ulv24406.1.2.3 switch=n enabled=y phases=3 Linecode=3P_UG_AL_350kcmil_15_0_416_0_3_3_3_3

New Line.l(r:p1udt16268-p1udt9619) Units=km Length=0.0898555 bus1=p1udt16268.1.2.3 bus2=p1udt9619.1.2.3 switch=n enabled=y phases=3 Linecode=3P_OH_AL_ACSR_4/0_Penguin_12_47_0_3_3_3_3

New Line.l(r:p1udt15543-p1udt16268) Units=km Length=0.0654385 bus1=p1udt15543.1.2.3 bus2=p1udt16268.1.2.3 switch=n enabled=y phases=3 Linecode=3P_OH_AL_ACSR_4/0_Penguin_12_47_0_3_3_3_3

New Line.l(r:p1udt15294-p1udt15543) Units=km Length=0.0361355 bus1=p1udt15294.1.2.3 bus2=p1udt15543.1.2.3 switch=n enabled=y phases=3 Linecode=3P_OH_AL_ACSR_4/0_Penguin_12_47_0_3_3_3_3

New Line.l(r:p1udt22921lv-p1ulv51489) Units=km Length=0.013490200000000003 bus1=p1udt22921lv.1.2.3 bus2=p1ulv51489.1.2.3 switch=n enabled=y phases=3 Linecode=3P_UG_AL_350kcmil_15_0_416_0_3_3_3_3

New Line.l(r:p1udt17986lv-p1ulv31339) Units=km Length=0.00878206 bus1=p1udt17986lv.1.2.3 bus2=p1ulv31339.1.2.3 switch=n enabled=y phases=3 Linecode=3P_UG_AL_350kcmil_15_0_416_0_3_3_3_3

New Line.l(r:p1udt17986-p1udt19334) Units=km Length=0.0185271 bus1=p1udt19334.1.2.3 bus2=p1udt17986.1.2.3 switch=n enabled=y phases=3 Linecode=3P_OH_AL_ACSR_4/0_Penguin_12_47_0_3_3_3_3

New Line.l(r:p1udt19334-p1udt22921) Units=km Length=0.0185346 bus1=p1udt22921.1.2.3 bus2=p1udt19334.1.2.3 switch=n enabled=y phases=3 Linecode=3P_OH_AL_ACSR_4/0_Penguin_12_47_0_3_3_3_3

New Line.l(r:p1udt15294-p1udt22921) Units=km Length=0.061686200000000004 bus1=p1udt15294.1.2.3 bus2=p1udt22921.1.2.3 switch=n enabled=y phases=3 Linecode=3P_OH_AL_ACSR_4/0_Penguin_12_47_0_3_3_3_3

New Line.l(r:p1udt13058-p1udt15294) Units=km Length=0.07461460000000002 bus1=p1udt13058.1.2.3 bus2=p1udt15294.1.2.3 switch=n enabled=y phases=3 Linecode=3P_OH_AL_ACSR_4/0_Penguin_12_47_0_3_3_3_3

New Line.l(r:p1udt13058-p1udt2737) Units=km Length=0.0508646 bus1=p1udt2737.1.2.3 bus2=p1udt13058.1.2.3 switch=n enabled=y phases=3 Linecode=3P_OH_AL_ACSR_4/0_Penguin_12_47_0_3_3_3_3

New Line.l(r:p1udt20504lv-p1ulv40243) Units=km Length=0.012499000000000001 bus1=p1udt20504lv.1.2.3 bus2=p1ulv40243.1.2.3 switch=n enabled=y phases=3 Linecode=3P_UG_AL_350kcmil_15_0_416_0_3_3_3_3

New Line.l(r:p1udt10333lv-p1ulv13551) Units=km Length=0.0107355 bus1=p1udt10333lv.1.2.3 bus2=p1ulv13551.1.2.3 switch=n enabled=y phases=3 Linecode=3P_UG_AL_350kcmil_15_0_416_0_3_3_3_3

New Line.l(r:p1udt19512lv-p1ulv36480) Units=km Length=0.00951648 bus1=p1udt19512lv.1.2.3 bus2=p1ulv36480.1.2.3 switch=n enabled=y phases=3 Linecode=3P_UG_AL_350kcmil_15_0_416_0_3_3_3_3

New Line.l(r:p1udt24367lv-p1ulv59510) Units=km Length=0.0289552 bus1=p1udt24367lv.1.2.3 bus2=p1ulv59510.1.2.3 switch=n enabled=y phases=3 Linecode=3P_UG_AL_350kcmil_15_0_416_0_3_3_3_3

New Line.l(r:p1udm36492-p1ulv14795) Units=km Length=0.00737462 bus1=p1udm36492.1.2.3 bus2=p1ulv14795.1.2.3 switch=n enabled=y phases=3 Linecode=3P_UG_AL_350kcmil_15_0_416_0_3_3_3_3

New Line.l(r:p1udm36492-p1udt11051lv) Units=km Length=0.00948314 bus1=p1udt11051lv.1.2.3 bus2=p1udm36492.1.2.3 switch=n enabled=y phases=3 Linecode=3P_UG_AL_350kcmil_15_0_416_0_3_3_3_3

New Line.l(r:p1udm36493-p1ulv39605) Units=km Length=0.009943450000000001 bus1=p1udm36493.1.2.3 bus2=p1ulv39605.1.2.3 switch=n enabled=y phases=3 Linecode=3P_UG_AL_350kcmil_15_0_416_0_3_3_3_3

New Line.l(r:p1udm36493-p1udt11051lv) Units=km Length=0.0100319 bus1=p1udt11051lv.1.2.3 bus2=p1udm36493.1.2.3 switch=n enabled=y phases=3 Linecode=3P_UG_AL_350kcmil_15_0_416_0_3_3_3_3

New Line.l(r:p1udt11051-p1udt15544) Units=km Length=0.0529694 bus1=p1udt15544.1.2.3 bus2=p1udt11051.1.2.3 switch=n enabled=y phases=3 Linecode=3P_OH_AL_ACSR_4/0_Penguin_12_47_0_3_3_3_3

New Line.l(r:p1udt15544-p1udt24367) Units=km Length=0.0501243 bus1=p1udt24367.1.2.3 bus2=p1udt15544.1.2.3 switch=n enabled=y phases=3 Linecode=3P_OH_AL_ACSR_4/0_Penguin_12_47_0_3_3_3_3

New Line.l(r:p1udt19512-p1udt24367) Units=km Length=0.0414046 bus1=p1udt19512.1.2.3 bus2=p1udt24367.1.2.3 switch=n enabled=y phases=3 Linecode=3P_OH_AL_ACSR_4/0_Penguin_12_47_0_3_3_3_3

New Line.l(r:p1udt10333-p1udt19512) Units=km Length=0.0724071 bus1=p1udt10333.1.2.3 bus2=p1udt19512.1.2.3 switch=n enabled=y phases=3 Linecode=3P_OH_AL_ACSR_4/0_Penguin_12_47_0_3_3_3_3

New Line.l(r:p1udt10333-p1udt14524) Units=km Length=0.0183257 bus1=p1udt14524.1.2.3 bus2=p1udt10333.1.2.3 switch=n enabled=y phases=3 Linecode=3P_OH_AL_ACSR_4/0_Penguin_12_47_0_3_3_3_3

New Line.l(r:p1udt14524-p1udt20504) Units=km Length=0.0366466 bus1=p1udt20504.1.2.3 bus2=p1udt14524.1.2.3 switch=n enabled=y phases=3 Linecode=3P_OH_AL_ACSR_4/0_Penguin_12_47_0_3_3_3_3

New Line.l(r:p1udt20504-p1udt2737) Units=km Length=0.0732891 bus1=p1udt2737.1.2.3 bus2=p1udt20504.1.2.3 switch=n enabled=y phases=3 Linecode=3P_OH_AL_ACSR_4/0_Penguin_12_47_0_3_3_3_3

New Line.l(r:p1udt11072lv-p1ulv14826) Units=km Length=0.020301 bus1=p1udt11072lv.1.2.3 bus2=p1ulv14826.1.2.3 switch=n enabled=y phases=3 Linecode=3P_UG_AL_350kcmil_15_0_416_0_3_3_3_3

New Line.l(r:p1udt11072-p1udt16733) Units=km Length=0.03943 bus1=p1udt11072-p1udt16733xx.1.2.3 bus2=p1udt11072-p1udt16733x.1.2.3 switch=n enabled=y phases=3 Linecode=3P_UG_AL_4/0_25_12_47_0_3_3_3_3

New Line.l(r:p1udt16733-p1udt5367) Units=km Length=0.0098553 bus1=p1udt16733-p1udt5367xx.1.2.3 bus2=p1udt16733-p1udt5367x.1.2.3 switch=n enabled=y phases=3 Linecode=3P_UG_AL_4/0_25_12_47_0_3_3_3_3

New Line.l(r:p1udt21779-p1udt5367) Units=km Length=0.0394165 bus1=p1udt21779-p1udt5367x.1.2.3 bus2=p1udt21779-p1udt5367xx.1.2.3 switch=n enabled=y phases=3 Linecode=3P_UG_AL_4/0_25_12_47_0_3_3_3_3

New Line.l(r:p1udt21779-p1udt370) Units=km Length=0.06899590000000001 bus1=p1udt21779-p1udt370xx.1.2.3 bus2=p1udt21779-p1udt370x.1.2.3 switch=n enabled=y phases=3 Linecode=3P_UG_AL_4/0_25_12_47_0_3_3_3_3

New Line.l(r:p1udt3326-p1udt370) Units=km Length=0.019705900000000002 bus1=p1udt3326-p1udt370x.1.2.3 bus2=p1udt3326-p1udt370xx.1.2.3 switch=n enabled=y phases=3 Linecode=3P_UG_AL_4/0_25_12_47_0_3_3_3_3

New Line.l(r:p1udt24063-p1udt3326) Units=km Length=0.0229258 bus1=p1udt24063-p1udt3326x.1.2.3 bus2=p1udt24063-p1udt3326xx.1.2.3 switch=n enabled=y phases=3 Linecode=3P_UG_AL_4/0_25_12_47_0_3_3_3_3

New Line.l(r:p1udt13401-p1udt24063) Units=km Length=0.09592630000000002 bus1=p1udt13401-p1udt24063x.1.2.3 bus2=p1udt13401-p1udt24063xx.1.2.3 switch=n enabled=y phases=3 Linecode=3P_UG_AL_4/0_25_12_47_0_3_3_3_3

New Line.l(r:p1udt13401-p1udt18179) Units=km Length=0.121163 bus1=p1udt13401-p1udt18179xx.1.2.3 bus2=p1udt13401-p1udt18179x.1.2.3 switch=n enabled=y phases=3 Linecode=3P_UG_AL_4/0_25_12_47_0_3_3_3_3

New Line.l(r:p1udt23489lv-p1ulv54696) Units=km Length=0.0266939 bus1=p1udt23489lv.1.2.3 bus2=p1ulv54696.1.2.3 switch=n enabled=y phases=3 Linecode=3P_UG_AL_350kcmil_15_0_416_0_3_3_3_3

New Line.l(r:p1udt17794lv-p1ulv30705) Units=km Length=0.0171484 bus1=p1udt17794lv.1.2.3 bus2=p1ulv30705.1.2.3 switch=n enabled=y phases=3 Linecode=3P_UG_AL_350kcmil_15_0_416_0_3_3_3_3

New Line.l(r:p1udt13669lv-p1ulv19929) Units=km Length=0.0176267 bus1=p1udt13669lv.1.2.3 bus2=p1ulv19929.1.2.3 switch=n enabled=y phases=3 Linecode=3P_UG_AL_350kcmil_15_0_416_0_3_3_3_3

New Line.l(r:p1udt13057-p1udt13669) Units=km Length=0.009046510000000002 bus1=p1udt13057-p1udt13669x.1.2.3 bus2=p1udt13057-p1udt13669xx.1.2.3 switch=n enabled=y phases=3 Linecode=3P_UG_AL_4/0_25_12_47_0_3_3_3_3

New Line.l(r:p1udt13057-p1udt1595) Units=km Length=0.0736388 bus1=p1udt13057-p1udt1595xx.1.2.3 bus2=p1udt13057-p1udt1595x.1.2.3 switch=n enabled=y phases=3 Linecode=3P_UG_AL_4/0_25_12_47_0_3_3_3_3

New Line.l(r:p1udt1595-p1udt17794) Units=km Length=0.0378685 bus1=p1udt1595-p1udt17794xx.1.2.3 bus2=p1udt1595-p1udt17794x.1.2.3 switch=n enabled=y phases=3 Linecode=3P_UG_AL_4/0_25_12_47_0_3_3_3_3

New Line.l(r:p1udt17794-p1udt23489) Units=km Length=0.0189391 bus1=p1udt17794-p1udt23489xx.1.2.3 bus2=p1udt17794-p1udt23489x.1.2.3 switch=n enabled=y phases=3 Linecode=3P_UG_AL_4/0_25_12_47_0_3_3_3_3

New Line.l(r:p1udt18179-p1udt23489) Units=km Length=0.126723 bus1=p1udt18179-p1udt23489x.1.2.3 bus2=p1udt18179-p1udt23489xx.1.2.3 switch=n enabled=y phases=3 Linecode=3P_UG_AL_4/0_25_12_47_0_3_3_3_3

New Line.l(r:p1udt16504-p1udt18179) Units=km Length=0.0496197 bus1=p1udt16504-p1udt18179x.1.2.3 bus2=p1udt16504-p1udt18179xx.1.2.3 switch=n enabled=y phases=3 Linecode=3P_UG_AL_4/0_25_12_47_0_3_3_3_3

New Line.l(r:p1udt14523-p1udt16504) Units=km Length=0.0397066 bus1=p1udt14523-p1udt16504x.1.2.3 bus2=p1udt14523-p1udt16504xx.1.2.3 switch=n enabled=y phases=3 Linecode=3P_UG_AL_4/0_25_12_47_0_3_3_3_3

New Line.l(r:p1udt20801lv-p1ulv41479) Units=km Length=0.010379600000000001 bus1=p1udt20801lv.1.2.3 bus2=p1ulv41479.1.2.3 switch=n enabled=y phases=3 Linecode=3P_UG_AL_350kcmil_15_0_416_0_3_3_3_3

New Line.l(r:p1udt20189-p1udt20801) Units=km Length=0.0569527 bus1=p1udt20189.1.2.3 bus2=p1udt20801.1.2.3 switch=n enabled=y phases=3 Linecode=3P_OH_AL_ACSR_4/0_Penguin_12_47_0_3_3_3_3

New Line.l(r:p1udt24065lv-p1ulv57695) Units=km Length=0.0151276 bus1=p1udt24065lv.1.2.3 bus2=p1ulv57695.1.2.3 switch=n enabled=y phases=3 Linecode=3P_UG_AL_350kcmil_15_0_416_0_3_3_3_3

New Line.l(r:p1udt18580-p1udt24065) Units=km Length=0.061191 bus1=p1udt18580.1.2.3 bus2=p1udt24065.1.2.3 switch=n enabled=y phases=3 Linecode=3P_OH_AL_ACSR_4/0_Penguin_12_47_0_3_3_3_3

New Line.l(r:p1udt11051-p1udt9619) Units=km Length=0.063947 bus1=p1udt11051-p1udt9619x.1.2.3 bus2=p1udt9619.1.2.3 switch=n enabled=y phases=3 Linecode=3P_OH_AL_ACSR_1033kcmil_Curlew_12.47_1_3_3_3_3

New Line.padswitch(r:p1udt2165-p1udt3324)p1u_236666 Units=km Length=0.001 bus1=p1udt2165.3 bus2=p1udt2165-p1udt3324x.3 switch=y enabled=y phases=1 Linecode=padswitch_1_1_1_1

New Line.padswitch(r:p1udt2165-p1udt3324)p1u_236667 Units=km Length=0.001 bus1=p1udt2165-p1udt3324xx.3 bus2=p1udt3324.3 switch=y enabled=y phases=1 Linecode=padswitch_1_1_1_1

New Line.padswitch(r:p1udt19333-p1udt2165)p1u_236668 Units=km Length=0.001 bus1=p1udt19333.3 bus2=p1udt19333-p1udt2165x.3 switch=y enabled=y phases=1 Linecode=padswitch_1_2_1_1_1

New Line.padswitch(r:p1udt19333-p1udt2165)p1u_236669 Units=km Length=0.001 bus1=p1udt19333-p1udt2165xx.3 bus2=p1udt2165.3 switch=y enabled=y phases=1 Linecode=padswitch_1_1_1_1

New Line.padswitch(r:p1udt12065-p1udt19333)p1u_236670 Units=km Length=0.001 bus1=p1udt12065.3 bus2=p1udt12065-p1udt19333x.3 switch=y enabled=y phases=1 Linecode=padswitch_1_2_1_0_1_1

New Line.padswitch(r:p1udt12065-p1udt19333)p1u_236671 Units=km Length=0.001 bus1=p1udt12065-p1udt19333xx.3 bus2=p1udt19333.3 switch=y enabled=y phases=1 Linecode=padswitch_1_2_1_0_1_0_1

New Line.padswitch(r:p1udt12065-p1udt15542)p1u_236672 Units=km Length=0.001 bus1=p1udt15542.3 bus2=p1udt12065-p1udt15542xx.3 switch=y enabled=y phases=1 Linecode=padswitch_1_2_1_0_1_0_1

New Line.padswitch(r:p1udt12065-p1udt15542)p1u_236673 Units=km Length=0.001 bus1=p1udt12065-p1udt15542x.3 bus2=p1udt12065.3 switch=y enabled=y phases=1 Linecode=padswitch_1_2_1_0_1_0_1

New Line.padswitch(r:p1udt15542-p1udt7221)p1u_236674 Units=km Length=0.001 bus1=p1udt7221.3 bus2=p1udt15542-p1udt7221xx.3 switch=y enabled=y phases=1 Linecode=padswitch_1_2_1_0_1_0_1

New Line.padswitch(r:p1udt15542-p1udt7221)p1u_236675 Units=km Length=0.001 bus1=p1udt15542-p1udt7221x.3 bus2=p1udt15542.3 switch=y enabled=y phases=1 Linecode=padswitch_1_2_1_0_1_0_1

New Line.padswitch(r:p1udt11714-p1udt7221)p1u_236676 Units=km Length=0.001 bus1=p1udt11714.3 bus2=p1udt11714-p1udt7221x.3 switch=y enabled=y phases=1 Linecode=padswitch_1_2_1_0_1_0_1

New Line.padswitch(r:p1udt11714-p1udt7221)p1u_236677 Units=km Length=0.001 bus1=p1udt11714-p1udt7221xx.3 bus2=p1udt7221.3 switch=y enabled=y phases=1 Linecode=padswitch_1_2_1_0_1_0_1

New Line.padswitch(r:p1udt23722-p1udt24271)p1u_236678 Units=km Length=0.001 bus1=p1udt24271.3 bus2=p1udt23722-p1udt24271xx.3 switch=y enabled=y phases=1 Linecode=padswitch_1_1_1_1

New Line.padswitch(r:p1udt23722-p1udt24271)p1u_236679 Units=km Length=0.001 bus1=p1udt23722-p1udt24271x.3 bus2=p1udt23722.3 switch=y enabled=y phases=1 Linecode=padswitch_1_1_1_1

New Line.padswitch(r:p1udt24271-p1udt24272)p1u_236680 Units=km Length=0.001 bus1=p1udt24272.3 bus2=p1udt24271-p1udt24272xx.3 switch=y enabled=y phases=1 Linecode=padswitch_1_2_1_0_1_0_1

New Line.padswitch(r:p1udt24271-p1udt24272)p1u_236681 Units=km Length=0.001 bus1=p1udt24271-p1udt24272x.3 bus2=p1udt24271.3 switch=y enabled=y phases=1 Linecode=padswitch_1_1_1_1

New Line.padswitch(r:p1udt10332-p1udt24272)p1u_236682 Units=km Length=0.001 bus1=p1udt10332.3 bus2=p1udt10332-p1udt24272x.3 switch=y enabled=y phases=1 Linecode=padswitch_1_2_1_0_1_0_1

New Line.padswitch(r:p1udt10332-p1udt24272)p1u_236683 Units=km Length=0.001 bus1=p1udt10332-p1udt24272xx.3 bus2=p1udt24272.3 switch=y enabled=y phases=1 Linecode=padswitch_1_2_1_0_1_0_1

New Line.padswitch(r:p1udt10332-p1udt11714)p1u_236684 Units=km Length=0.001 bus1=p1udt11714.3 bus2=p1udt10332-p1udt11714xx.3 switch=y enabled=y phases=1 Linecode=padswitch_1_2_1_0_1_0_1

New Line.padswitch(r:p1udt10332-p1udt11714)p1u_236685 Units=km Length=0.001 bus1=p1udt10332-p1udt11714x.3 bus2=p1udt10332.3 switch=y enabled=y phases=1 Linecode=padswitch_1_2_1_0_1_0_1

New Line.padswitch(r:p1udt11714-p1udt14523)p1u_236686 Units=km Length=0.001 bus1=p1udt11714-p1udt14523xxx.3 bus2=p1udt11714-p1udt14523xx.3 switch=y enabled=y phases=1 Linecode=padswitch_1_2_1_0_1_0_1

New Line.padswitch(r:p1udt11714-p1udt14523)p1u_236687 Units=km Length=0.001 bus1=p1udt11714-p1udt14523x.3 bus2=p1udt11714.3 switch=y enabled=y phases=1 Linecode=padswitch_1_2_1_0_1_0_1

New Line.padswitch(r:p1udt1598-p1udt7637)p1u_236688 Units=km Length=0.001 bus1=p1udt7637.1 bus2=p1udt1598-p1udt7637xx.1 switch=y enabled=y phases=1 Linecode=padswitch_1_2_1_0_1_0_1_0

New Line.padswitch(r:p1udt1598-p1udt7637)p1u_236689 Units=km Length=0.001 bus1=p1udt1598-p1udt7637x.1 bus2=p1udt1598.1 switch=y enabled=y phases=1 Linecode=padswitch_1_2_1_0_1_0_1_0

New Line.padswitch(r:p1udt12067-p1udt7637)p1u_236690 Units=km Length=0.001 bus1=p1udt12067.1 bus2=p1udt12067-p1udt7637x.1 switch=y enabled=y phases=1 Linecode=padswitch_1_1_1_1

New Line.padswitch(r:p1udt12067-p1udt7637)p1u_236691 Units=km Length=0.001 bus1=p1udt12067-p1udt7637xx.1 bus2=p1udt7637.1 switch=y enabled=y phases=1 Linecode=padswitch_1_2_1_0_1_0_1_0

New Line.padswitch(r:p1udt12067-p1udt12068)p1u_236692 Units=km Length=0.001 bus1=p1udt12068.1 bus2=p1udt12067-p1udt12068xx.1 switch=y enabled=y phases=1 Linecode=padswitch_1_1_1_1

New Line.padswitch(r:p1udt12067-p1udt12068)p1u_236693 Units=km Length=0.001 bus1=p1udt12067-p1udt12068x.1 bus2=p1udt12067.1 switch=y enabled=y phases=1 Linecode=padswitch_1_2_1_0_1_0_1_0

New Line.padswitch(r:p1udt12068-p1udt21374)p1u_236694 Units=km Length=0.001 bus1=p1udt21374.1 bus2=p1udt12068-p1udt21374xx.1 switch=y enabled=y phases=1 Linecode=padswitch_1_2_1_0_1_0_1

New Line.padswitch(r:p1udt12068-p1udt21374)p1u_236695 Units=km Length=0.001 bus1=p1udt12068-p1udt21374x.1 bus2=p1udt12068.1 switch=y enabled=y phases=1 Linecode=padswitch_1_1_1_1

New Line.padswitch(r:p1udt1597-p1udt21374)p1u_236696 Units=km Length=0.001 bus1=p1udt1597.1 bus2=p1udt1597-p1udt21374x.1 switch=y enabled=y phases=1 Linecode=padswitch_1_2_1_0_1_0_1

New Line.padswitch(r:p1udt1597-p1udt21374)p1u_236697 Units=km Length=0.001 bus1=p1udt1597-p1udt21374xx.1 bus2=p1udt21374.1 switch=y enabled=y phases=1 Linecode=padswitch_1_2_1_0_1_0_1

New Line.padswitch(r:p1udt15775-p1udt1597)p1u_236698 Units=km Length=0.001 bus1=p1udt15775.1 bus2=p1udt15775-p1udt1597x.1 switch=y enabled=y phases=1 Linecode=padswitch_1_2_1_0_1_0_1

New Line.padswitch(r:p1udt15775-p1udt1597)p1u_236699 Units=km Length=0.001 bus1=p1udt15775-p1udt1597xx.1 bus2=p1udt1597.1 switch=y enabled=y phases=1 Linecode=padswitch_1_2_1_0_1_0_1

New Line.padswitch(r:p1udt12403-p1udt15775)p1u_236700 Units=km Length=0.001 bus1=p1udt12403.1 bus2=p1udt12403-p1udt15775x.1 switch=y enabled=y phases=1 Linecode=padswitch_1_2_1_0_1_0_1

New Line.padswitch(r:p1udt12403-p1udt15775)p1u_236701 Units=km Length=0.001 bus1=p1udt12403-p1udt15775xx.1 bus2=p1udt15775.1 switch=y enabled=y phases=1 Linecode=padswitch_1_2_1_0_1_0_1

New Line.padswitch(r:p1udt12403-p1udt20658)p1u_236702 Units=km Length=0.001 bus1=p1udt20658.1 bus2=p1udt12403-p1udt20658xx.1 switch=y enabled=y phases=1 Linecode=padswitch_1_2_1_0_1_0_1

New Line.padswitch(r:p1udt12403-p1udt20658)p1u_236703 Units=km Length=0.001 bus1=p1udt12403-p1udt20658x.1 bus2=p1udt12403.1 switch=y enabled=y phases=1 Linecode=padswitch_1_2_1_0_1_0_1

New Line.padswitch(r:p1udt12069-p1udt20658)p1u_236704 Units=km Length=0.001 bus1=p1udt12069.1 bus2=p1udt12069-p1udt20658x.1 switch=y enabled=y phases=1 Linecode=padswitch_1_1_1_1

New Line.padswitch(r:p1udt12069-p1udt20658)p1u_236705 Units=km Length=0.001 bus1=p1udt12069-p1udt20658xx.1 bus2=p1udt20658.1 switch=y enabled=y phases=1 Linecode=padswitch_1_2_1_0_1_0_1

New Line.padswitch(r:p1udt12069-p1udt14523)p1u_236706 Units=km Length=0.001 bus1=p1udt12069-p1udt14523xxx.1 bus2=p1udt12069-p1udt14523xx.1 switch=y enabled=y phases=1 Linecode=padswitch_1_2_1_0_1_0_1

New Line.padswitch(r:p1udt12069-p1udt14523)p1u_236707 Units=km Length=0.001 bus1=p1udt12069-p1udt14523x.1 bus2=p1udt12069.1 switch=y enabled=y phases=1 Linecode=padswitch_1_1_1_1

New Line.padswitch(r:p1udt11072-p1udt13981)p1u_236708 Units=km Length=0.001 bus1=p1udt11072-p1udt13981x.3 bus2=p1udt11072-p1udt13981xx.3 switch=y enabled=y phases=1 Linecode=padswitch_1_2_1_0_1_0_1

New Line.padswitch(r:p1udt11072-p1udt13981)p1u_236709 Units=km Length=0.001 bus1=p1udt11072-p1udt13981xxx.3 bus2=p1udt13981.3 switch=y enabled=y phases=1 Linecode=padswitch_1_1_1_1

New Line.padswitch(r:p1udt11072-p1udt16733)p1u_236710 Units=km Length=0.001 bus1=p1udt16733.1.2.3 bus2=p1udt11072-p1udt16733xx.1.2.3 switch=y enabled=y phases=3 Linecode=padswitch_3_3_3_3

New Line.padswitch(r:p1udt11072-p1udt16733)p1u_236711 Units=km Length=0.001 bus1=p1udt11072-p1udt16733x.1.2.3 bus2=p1udt11072.1.2.3 switch=y enabled=y phases=3 Linecode=padswitch_3_3_3_3_3

New Line.padswitch(r:p1udt16733-p1udt5367)p1u_236712 Units=km Length=0.001 bus1=p1udt5367.1.2.3 bus2=p1udt16733-p1udt5367xx.1.2.3 switch=y enabled=y phases=3 Linecode=padswitch_3_3_3_1_3_3

New Line.padswitch(r:p1udt16733-p1udt5367)p1u_236713 Units=km Length=0.001 bus1=p1udt16733-p1udt5367x.1.2.3 bus2=p1udt16733.1.2.3 switch=y enabled=y phases=3 Linecode=padswitch_3_3_3_1_3_1_3

New Line.padswitch(r:p1udt21779-p1udt5367)p1u_236714 Units=km Length=0.001 bus1=p1udt21779.1.2.3 bus2=p1udt21779-p1udt5367x.1.2.3 switch=y enabled=y phases=3 Linecode=padswitch_3_3_3_1_3_1_3_1

New Line.padswitch(r:p1udt21779-p1udt5367)p1u_236715 Units=km Length=0.001 bus1=p1udt21779-p1udt5367xx.1.2.3 bus2=p1udt5367.1.2.3 switch=y enabled=y phases=3 Linecode=padswitch_3_3_3_1_3_1_3_1

New Line.padswitch(r:p1udt21779-p1udt370)p1u_236716 Units=km Length=0.001 bus1=p1udt370.1.2.3 bus2=p1udt21779-p1udt370xx.1.2.3 switch=y enabled=y phases=3 Linecode=padswitch_3_3_3_1_3_1_3_1

New Line.padswitch(r:p1udt21779-p1udt370)p1u_236717 Units=km Length=0.001 bus1=p1udt21779-p1udt370x.1.2.3 bus2=p1udt21779.1.2.3 switch=y enabled=y phases=3 Linecode=padswitch_3_3_3_1_3_1_3_1

New Line.padswitch(r:p1udt3326-p1udt370)p1u_236718 Units=km Length=0.001 bus1=p1udt3326.1.2.3 bus2=p1udt3326-p1udt370x.1.2.3 switch=y enabled=y phases=3 Linecode=padswitch_3_3_3_1_3_1_3_1

New Line.padswitch(r:p1udt3326-p1udt370)p1u_236719 Units=km Length=0.001 bus1=p1udt3326-p1udt370xx.1.2.3 bus2=p1udt370.1.2.3 switch=y enabled=y phases=3 Linecode=padswitch_3_3_3_1_3_1_3_1

New Line.padswitch(r:p1udt24063-p1udt3326)p1u_236720 Units=km Length=0.001 bus1=p1udt24063.1.2.3 bus2=p1udt24063-p1udt3326x.1.2.3 switch=y enabled=y phases=3 Linecode=padswitch_3_3_3_1_3_1_3_1

New Line.padswitch(r:p1udt24063-p1udt3326)p1u_236721 Units=km Length=0.001 bus1=p1udt24063-p1udt3326xx.1.2.3 bus2=p1udt3326.1.2.3 switch=y enabled=y phases=3 Linecode=padswitch_3_3_3_1_3_1_3_1

New Line.padswitch(r:p1udt13401-p1udt24063)p1u_236722 Units=km Length=0.001 bus1=p1udt13401.1.2.3 bus2=p1udt13401-p1udt24063x.1.2.3 switch=y enabled=y phases=3 Linecode=padswitch_3_3_3_1_3_1_3_1

New Line.padswitch(r:p1udt13401-p1udt24063)p1u_236723 Units=km Length=0.001 bus1=p1udt13401-p1udt24063xx.1.2.3 bus2=p1udt24063.1.2.3 switch=y enabled=y phases=3 Linecode=padswitch_3_3_3_1_3_1_3_1

New Line.padswitch(r:p1udt13401-p1udt18179)p1u_236724 Units=km Length=0.001 bus1=p1udt18179.1.2.3 bus2=p1udt13401-p1udt18179xx.1.2.3 switch=y enabled=y phases=3 Linecode=padswitch_3_3_3_1_3_1_3_1

New Line.padswitch(r:p1udt13401-p1udt18179)p1u_236725 Units=km Length=0.001 bus1=p1udt13401-p1udt18179x.1.2.3 bus2=p1udt13401.1.2.3 switch=y enabled=y phases=3 Linecode=padswitch_3_3_3_1_3_1_3_1

New Line.padswitch(r:p1udt13057-p1udt13669)p1u_236726 Units=km Length=0.001 bus1=p1udt13057.1.2.3 bus2=p1udt13057-p1udt13669x.1.2.3 switch=y enabled=y phases=3 Linecode=padswitch_3_3_3_1_3_1_3_1

New Line.padswitch(r:p1udt13057-p1udt13669)p1u_236727 Units=km Length=0.001 bus1=p1udt13057-p1udt13669xx.1.2.3 bus2=p1udt13669.1.2.3 switch=y enabled=y phases=3 Linecode=padswitch_3_3_3_1_3_1_3_1

New Line.padswitch(r:p1udt13057-p1udt1595)p1u_236728 Units=km Length=0.001 bus1=p1udt1595.1.2.3 bus2=p1udt13057-p1udt1595xx.1.2.3 switch=y enabled=y phases=3 Linecode=padswitch_3_3_3_1_3_1_3_1

New Line.padswitch(r:p1udt13057-p1udt1595)p1u_236729 Units=km Length=0.001 bus1=p1udt13057-p1udt1595x.1.2.3 bus2=p1udt13057.1.2.3 switch=y enabled=y phases=3 Linecode=padswitch_3_3_3_1_3_1_3_1

New Line.padswitch(r:p1udt1595-p1udt17794)p1u_236730 Units=km Length=0.001 bus1=p1udt17794.1.2.3 bus2=p1udt1595-p1udt17794xx.1.2.3 switch=y enabled=y phases=3 Linecode=padswitch_3_3_3_1_3_1_3_1

New Line.padswitch(r:p1udt1595-p1udt17794)p1u_236731 Units=km Length=0.001 bus1=p1udt1595-p1udt17794x.1.2.3 bus2=p1udt1595.1.2.3 switch=y enabled=y phases=3 Linecode=padswitch_3_3_3_1_3_1_3_1

New Line.padswitch(r:p1udt17794-p1udt23489)p1u_236732 Units=km Length=0.001 bus1=p1udt23489.1.2.3 bus2=p1udt17794-p1udt23489xx.1.2.3 switch=y enabled=y phases=3 Linecode=padswitch_3_3_3_1_3_1_3_1

New Line.padswitch(r:p1udt17794-p1udt23489)p1u_236733 Units=km Length=0.001 bus1=p1udt17794-p1udt23489x.1.2.3 bus2=p1udt17794.1.2.3 switch=y enabled=y phases=3 Linecode=padswitch_3_3_3_1_3_1_3_1

New Line.padswitch(r:p1udt18179-p1udt23489)p1u_236734 Units=km Length=0.001 bus1=p1udt18179.1.2.3 bus2=p1udt18179-p1udt23489x.1.2.3 switch=y enabled=y phases=3 Linecode=padswitch_3_3_3_1_3_1_3_1

New Line.padswitch(r:p1udt18179-p1udt23489)p1u_236735 Units=km Length=0.001 bus1=p1udt18179-p1udt23489xx.1.2.3 bus2=p1udt23489.1.2.3 switch=y enabled=y phases=3 Linecode=padswitch_3_3_3_1_3_1_3_1

New Line.padswitch(r:p1udt16504-p1udt18179)p1u_236736 Units=km Length=0.001 bus1=p1udt16504.1.2.3 bus2=p1udt16504-p1udt18179x.1.2.3 switch=y enabled=y phases=3 Linecode=padswitch_3_3_3_1_3_1_3_1

New Line.padswitch(r:p1udt16504-p1udt18179)p1u_236737 Units=km Length=0.001 bus1=p1udt16504-p1udt18179xx.1.2.3 bus2=p1udt18179.1.2.3 switch=y enabled=y phases=3 Linecode=padswitch_3_3_3_1_3_1_3_1

New Line.padswitch(r:p1udt14523-p1udt16504)p1u_236738 Units=km Length=0.001 bus1=p1udt14523.1.2.3 bus2=p1udt14523-p1udt16504x.1.2.3 switch=y enabled=y phases=3 Linecode=padswitch_3_3_3_3

New Line.padswitch(r:p1udt14523-p1udt16504)p1u_236739 Units=km Length=0.001 bus1=p1udt14523-p1udt16504xx.1.2.3 bus2=p1udt16504.1.2.3 switch=y enabled=y phases=3 Linecode=padswitch_3_3_3_1_3_1_3_1

New Line.elbswitch(r:p1udt22792-p1udt9621)p1u_265842 Units=km Length=0.001 bus1=p1udt22792.1.2.3 bus2=p1udt22792-p1udt9621x.1.2.3 switch=y enabled=n phases=3 Linecode=elbswitch_3_3_3_3

New Line.elbswitch(r:p1udt11051-p1udt9619)p1u_265876 Units=km Length=0.001 bus1=p1udt11051.1.2.3 bus2=p1udt11051-p1udt9619x.1.2.3 switch=y enabled=n phases=3 Linecode=elbswitch_3_3_3_3

New Line.fuse(r:p1udt23151-p1udt3826)p1u_266378 Units=km Length=0.001 bus1=p1udt3826.2 bus2=p1udt23151-p1udt3826x.2 switch=n enabled=y phases=1 Linecode=fuse_1_1_1_1

New Fuse.Fuse_fuse(r:p1udt23151-p1udt3826)p1u_266378 monitoredobj=Line.fuse(r:p1udt23151-p1udt3826)p1u_266378 enabled=y ratedcurrent=100.0

New Line.fuse(r:p1udt11072-p1udt13981)p1u_267062 Units=km Length=0.001 bus1=p1udt11072.3 bus2=p1udt11072-p1udt13981x.3 switch=n enabled=y phases=1 Linecode=fuse_1_6_1_1_1

New Fuse.Fuse_fuse(r:p1udt11072-p1udt13981)p1u_267062 monitoredobj=Line.fuse(r:p1udt11072-p1udt13981)p1u_267062 enabled=y ratedcurrent=100.0

New Line.fuse(r:p1udt11714-p1udt14523)p1u_267413 Units=km Length=0.001 bus1=p1udt14523.3 bus2=p1udt11714-p1udt14523xxx.3 switch=n enabled=y phases=1 Linecode=fuse_1_1_1_1

New Fuse.Fuse_fuse(r:p1udt11714-p1udt14523)p1u_267413 monitoredobj=Line.fuse(r:p1udt11714-p1udt14523)p1u_267413 enabled=y ratedcurrent=100.0

New Line.fuse(r:p1udt12069-p1udt14523)p1u_267414 Units=km Length=0.001 bus1=p1udt14523.1 bus2=p1udt12069-p1udt14523xxx.1 switch=n enabled=y phases=1 Linecode=fuse_1_1_1_1

New Fuse.Fuse_fuse(r:p1udt12069-p1udt14523)p1u_267414 monitoredobj=Line.fuse(r:p1udt12069-p1udt14523)p1u_267414 enabled=y ratedcurrent=100.0
