New Capacitor.p1uc13 Bus1=p1umv45 phases=3 Kv=12.47 conn=Wye Kvar=300.0

New CapControl.p1uc13 Capacitor=p1uc13 Element=Line.l(r:p1udt17589-p1umv45) Terminal=1 delay=100.0 Type=voltage Vmin=120.5 Vmax=125.0 Ptratio=59.99631547328862 Ctratio=100.0
