New Capacitor.p1uc18 Bus1=p1umv9 phases=3 Kv=12.47 conn=Wye Kvar=300.0

New CapControl.p1uc18 Capacitor=p1uc18 Element=Line.l(r:p1udt9174-p1umv9) Terminal=1 delay=100.0 Type=voltage Vmin=120.5 Vmax=125.0 Ptratio=59.99631547328862 Ctratio=100.0
