New Line.l(r:p1udt899lv-p1ulv915) Units=km Length=0.0183601 bus1=p1udt899lv.1.2 bus2=p1ulv915.1.2 switch=n enabled=y phases=2 Linecode=1P_UG_AL_2/0_Converse_0_416_0_2_2_2_2

New Line.l(r:p1udt5803lv-p1ulv6647) Units=km Length=0.0135164 bus1=p1udt5803lv.1.2 bus2=p1ulv6647.1.2 switch=n enabled=y phases=2 Linecode=1P_OH_AL_2/0_Rucina_0_416_0_2_2_2_2

New Line.l(r:p1udt9174lv-p1ulv11605) Units=km Length=0.0092092 bus1=p1udt9174lv.1.2 bus2=p1ulv11605.1.2 switch=n enabled=y phases=2 Linecode=1P_OH_AL_2/0_Rucina_0_416_0_2_2_2_2

New Line.l(r:p1udt10680lv-p1ulv14115) Units=km Length=0.06050790000000001 bus1=p1udt10680lv.1.2 bus2=p1ulv14115.1.2 switch=n enabled=y phases=2 Linecode=1P_OH_AL_4/0_Zuzara_0_416_0_2_2_2_2

New Line.l(r:p1udt22032lv-p1ulv47113) Units=km Length=0.05682340000000001 bus1=p1udt22032lv.1.2 bus2=p1ulv47113.1.2 switch=n enabled=y phases=2 Linecode=1P_OH_AL_4/0_Zuzara_0_416_0_2_2_2_2

New Line.l(r:p1udt22032-p1udt9174) Units=km Length=0.327234 bus1=p1udt22032.1.2.3 bus2=p1udt9174.1.2.3 switch=n enabled=y phases=3 Linecode=3P_OH_AL_ACSR_4/0_Penguin_12_47_0_3_3_3_3

New Line.l(r:p1udt10680-p1udt22032) Units=km Length=0.180394 bus1=p1udt10680.1.2.3 bus2=p1udt22032.1.2.3 switch=n enabled=y phases=3 Linecode=3P_OH_AL_ACSR_4/0_Penguin_12_47_0_3_3_3_3

New Line.l(r:p1udt10680-p1udt5803) Units=km Length=0.153923 bus1=p1udt5803.1.2.3 bus2=p1udt10680.1.2.3 switch=n enabled=y phases=3 Linecode=3P_OH_AL_ACSR_4/0_Penguin_12_47_0_3_3_3_3

New Line.l(r:p1udt14994-p1udt5803) Units=km Length=0.612455 bus1=p1udt14994.1.2.3 bus2=p1udt5803.1.2.3 switch=n enabled=y phases=3 Linecode=3P_OH_AL_ACSR_4/0_Penguin_12_47_0_3_3_3_3

New Line.l(r:p1udt10681-p1udt14994) Units=km Length=0.125977 bus1=p1udt10681.1.2.3 bus2=p1udt14994.1.2.3 switch=n enabled=y phases=3 Linecode=3P_OH_AL_ACSR_4/0_Penguin_12_47_0_3_3_3_3

New Line.l(r:p1udt10681-p1udt19320) Units=km Length=0.0859872 bus1=p1udt19320.1.2.3 bus2=p1udt10681.1.2.3 switch=n enabled=y phases=3 Linecode=3P_OH_AL_ACSR_4/0_Penguin_12_47_0_3_3_3_3

New Line.l(r:p1udt14733-p1udt19320) Units=km Length=0.153604 bus1=p1udt14733.1.2.3 bus2=p1udt19320.1.2.3 switch=n enabled=y phases=3 Linecode=3P_OH_AL_ACSR_4/0_Penguin_12_47_0_3_3_3_3

New Line.l(r:p1udt10298-p1udt14733) Units=km Length=0.0270397 bus1=p1udt10298.1.2.3 bus2=p1udt14733.1.2.3 switch=n enabled=y phases=3 Linecode=3P_OH_AL_ACSR_4/0_Penguin_12_47_0_3_3_3_3

New Line.l(r:p1udt10298-p1udt899) Units=km Length=0.201041 bus1=p1udt899.1.2.3 bus2=p1udt10298.1.2.3 switch=n enabled=y phases=3 Linecode=3P_OH_AL_ACSR_4/0_Penguin_12_47_0_3_3_3_3

New Line.l(r:p1udt899-p1uhs2_1247) Units=km Length=0.24952500000000002 bus1=p1udt899-p1uhs2_1247x.1.2.3 bus2=p1udt899-p1uhs2_1247x_b1_1.1.2.3 switch=n enabled=y phases=3 Linecode=3P_OH_AL_ACSR_4/0_Penguin_12_47_0_3_3_3_3

New Line.l(r:p1udt10298lv-p1ulv13490) Units=km Length=0.0167278 bus1=p1udt10298lv.1.2.3 bus2=p1ulv13490.1.2.3 switch=n enabled=y phases=3 Linecode=3P_UG_AL_350kcmil_15_0_416_0_3_3_3_3

New Line.l(r:p1udt14733lv-p1ulv22379) Units=km Length=0.010323 bus1=p1udt14733lv.1.2.3 bus2=p1ulv22379.1.2.3 switch=n enabled=y phases=3 Linecode=3P_UG_AL_350kcmil_15_0_416_0_3_3_3_3

New Line.l(r:p1udt17373lv-p1ulv29392) Units=km Length=0.00797564 bus1=p1udt17373lv.1.2.3 bus2=p1ulv29392.1.2.3 switch=n enabled=y phases=3 Linecode=3P_UG_AL_750kcmil_25_0_416_0_3_3_3_3

New Line.l(r:p1udt14733-p1udt17373) Units=km Length=0.221912 bus1=p1udt14733.1.2.3 bus2=p1udt17373.1.2.3 switch=n enabled=y phases=3 Linecode=3P_OH_AL_ACSR_4/0_Penguin_12_47_0_3_3_3_3

New Line.l(r:p1udt19320lv-p1ulv35797) Units=km Length=0.00312194 bus1=p1udt19320lv.1.2.3 bus2=p1ulv35797.1.2.3 switch=n enabled=y phases=3 Linecode=3P_UG_AL_350kcmil_15_0_416_0_3_3_3_3

New Line.l(r:p1udt10681lv-p1ulv14116) Units=km Length=0.0176536 bus1=p1udt10681lv.1.2.3 bus2=p1ulv14116.1.2.3 switch=n enabled=y phases=3 Linecode=3P_UG_AL_350kcmil_15_0_416_0_3_3_3_3

New Line.l(r:p1udt14994lv-p1ulv23048) Units=km Length=0.0075669 bus1=p1udt14994lv.1.2.3 bus2=p1ulv23048.1.2.3 switch=n enabled=y phases=3 Linecode=3P_UG_AL_350kcmil_15_0_416_0_3_3_3_3

New Line.l(r:p1udt9174-p1umv9) Units=km Length=0.119287 bus1=p1udt9174.1.2.3 bus2=p1umv9.1.2.3 switch=n enabled=y phases=3 Linecode=3P_OH_AL_ACSR_4/0_Penguin_12_47_0_3_3_3_3

New Line.l(r:p1udt15754lv-p1ulv24966) Units=km Length=0.00954015 bus1=p1udt15754lv.1.2.3 bus2=p1ulv24966.1.2.3 switch=n enabled=y phases=3 Linecode=3P_UG_AL_350kcmil_15_0_416_0_3_3_3_3

New Line.l(r:p1udt15754-p1udt19320) Units=km Length=0.197812 bus1=p1udt19320.1.2.3 bus2=p1udt15754.1.2.3 switch=n enabled=y phases=3 Linecode=3P_OH_AL_ACSR_4/0_Penguin_12_47_0_3_3_3_3

New Line.l(r:p1udt22033lv-p1ulv47117) Units=km Length=0.00981041 bus1=p1udt22033lv.1.2.3 bus2=p1ulv47117.1.2.3 switch=n enabled=y phases=3 Linecode=3P_UG_AL_350kcmil_15_0_416_0_3_3_3_3

New Line.l(r:p1udt19320-p1udt22033) Units=km Length=0.15835 bus1=p1udt19320.1.2.3 bus2=p1udt22033.1.2.3 switch=n enabled=y phases=3 Linecode=3P_OH_AL_ACSR_4/0_Penguin_12_47_0_3_3_3_3

New Line.l(r:p1udt5805-p1udt899) Units=km Length=0.0303649 bus1=p1udt5805-p1udt899xx.1.2.3 bus2=p1udt5805-p1udt899x.1.2.3 switch=n enabled=y phases=3 Linecode=3P_OH_AL_ACSR_1033kcmil_Curlew_12.47_1_3_3_3_3

New Line.padswitch(r:p1udt5805-p1udt899)p1u_265793 Units=km Length=0.001 bus1=p1udt899.1.2.3 bus2=p1udt5805-p1udt899xx.1.2.3 switch=y enabled=n phases=3 Linecode=padswitch_3_3_3_3

New Line.padswitch(r:p1udt5805-p1udt899)p1u_265794 Units=km Length=0.001 bus1=p1udt5805-p1udt899x.1.2.3 bus2=p1udt5805.1.2.3 switch=y enabled=n phases=3 Linecode=padswitch_3_3_3_3_3

New Line.l(r:p1udt899-p1uhs2_1247)_disconnect Units=km Length=0.001 bus1=p1udt899-p1uhs2_1247x_b1_1.1.2.3 bus2=p1udt899-p1uhs2_1247x_b2_1.1.2.3 switch=y enabled=y phases=3 Linecode=3P_OH_AL_ACSR_4/0_Penguin_12_47_0_3_3_3_3

New Line.l(r:p1udt899-p1uhs2_1247)_cont Units=km Length=2.254725 bus1=p1udt899-p1uhs2_1247x_b2_1.1.2.3 bus2=p1udt899.1.2.3 switch=n enabled=y phases=3 Linecode=3P_OH_AL_ACSR_4/0_Penguin_12_47_0_3_3_3_3
