New Load.load_p1ulv915 conn=wye bus1=p1ulv915.1.2 kV=0.2080002494301389 Vminpu=0.8 Vmaxpu=1.2 model=1 kW=9.42009 kvar=1.9078962877140453 Phases=2

New Load.load_p1umv9 conn=wye bus1=p1umv9.1.2.3 kV=12.47 Vminpu=0.8 Vmaxpu=1.2 model=1 kW=1700.22 kvar=558.8352893072066 Phases=3

New Load.load_p1ulv6647 conn=wye bus1=p1ulv6647.1.2 kV=0.2080002494301389 Vminpu=0.8 Vmaxpu=1.2 model=1 kW=3.14003 kvar=1.0298477362987708 Phases=2

New Load.load_p1ulv11605 conn=wye bus1=p1ulv11605.1.2 kV=0.2080002494301389 Vminpu=0.8 Vmaxpu=1.2 model=1 kW=2.64003 kvar=0.8696081240468659 Phases=2

New Load.load_p1ulv13490 conn=wye bus1=p1ulv13490.1.2.3 kV=0.48 Vminpu=0.8 Vmaxpu=1.2 model=1 kW=26.860299999999995 kvar=5.454216542227545 Phases=3

New Load.load_p1ulv14115 conn=wye bus1=p1ulv14115.1.2 kV=0.2080002494301389 Vminpu=0.8 Vmaxpu=1.2 model=1 kW=2.61003 kvar=0.8597263258394949 Phases=2

New Load.load_p1ulv14116 conn=wye bus1=p1ulv14116.1.2.3 kV=0.48 Vminpu=0.8 Vmaxpu=1.2 model=1 kW=37.9204 kvar=7.7000656347056955 Phases=3

New Load.load_p1ulv22379 conn=wye bus1=p1ulv22379.1.2.3 kV=0.48 Vminpu=0.8 Vmaxpu=1.2 model=1 kW=54.8405 kvar=11.135838478499112 Phases=3

New Load.load_p1ulv23048 conn=wye bus1=p1ulv23048.1.2.3 kV=0.48 Vminpu=0.8 Vmaxpu=1.2 model=1 kW=45.6505 kvar=9.269729387272614 Phases=3

New Load.load_p1ulv24966 conn=wye bus1=p1ulv24966.1.2.3 kV=0.48 Vminpu=0.8 Vmaxpu=1.2 model=1 kW=33.5603 kvar=6.814709568475373 Phases=3

New Load.load_p1ulv29392 conn=wye bus1=p1ulv29392.1.2.3 kV=0.48 Vminpu=0.8 Vmaxpu=1.2 model=1 kW=217.502 kvar=44.16566480521721 Phases=3

New Load.load_p1ulv35797 conn=wye bus1=p1ulv35797.1.2.3 kV=0.48 Vminpu=0.8 Vmaxpu=1.2 model=1 kW=36.7104 kvar=7.454364655338552 Phases=3

New Load.load_p1ulv47113 conn=wye bus1=p1ulv47113.1.2 kV=0.2080002494301389 Vminpu=0.8 Vmaxpu=1.2 model=1 kW=0.5300050000000001 kvar=0.17003091506196852 Phases=2

New Load.load_p1ulv47117 conn=wye bus1=p1ulv47117.1.2.3 kV=0.48 Vminpu=0.8 Vmaxpu=1.2 model=1 kW=69.71070000000002 kvar=14.155361373858886 Phases=3
