Clear

New Circuit.substation_p1uhs3_69 bus1=p1uhs3_69 pu=1.0 basekV=69.0 R1=1e-05 X1=1e-05 R0=1e-05 X0=1e-05

Redirect Transformers.dss
Redirect p1uhs3_1247--p1udt13260/Transformers.dss
Redirect p1uhs3_1247--p1udt6119/Transformers.dss
Redirect Regulators.dss
Redirect p1uhs3_1247--p1udt13260/Loads.dss
Redirect p1uhs3_1247--p1udt6119/Loads.dss
Redirect LineCodes.dss
Redirect p1uhs3_1247--p1udt13260/LineCodes.dss
Redirect p1uhs3_1247--p1udt6119/LineCodes.dss
Redirect Lines.dss
Redirect p1uhs3_1247--p1udt13260/Lines.dss
Redirect p1uhs3_1247--p1udt6119/Lines.dss
Redirect p1uhs3_1247--p1udt13260/Capacitors.dss

Set Voltagebases=[0.2080002494301389, 0.48, 7.199560000000001, 12.47, 69.0]

Calcvoltagebases

Buscoords Buscoords.dss

Solve
