New Line.l(r:p1udt6119-p1uhs3_1247) Units=km Length=0.0197803 bus1=p1udt6119-p1uhs3_1247x.1.2.3 bus2=p1udt6119.1.2.3 switch=n enabled=y phases=3 Linecode=3P_UG_AL_4/0_25_12_47_0_3_3_3_3

New Line.l(r:p1udt6119lv-p1ulv55663) Units=km Length=0.0582883 bus1=p1udt6119lv.1.2.3 bus2=p1ulv55663.1.2.3 switch=n enabled=y phases=3 Linecode=3P_UG_AL_350kcmil_15_0_416_0_3_3_3_3

New Line.l(r:p1udm21208-p1ulv7060) Units=km Length=0.0162116 bus1=p1udm21208.1.2.3 bus2=p1ulv7060.1.2.3 switch=n enabled=y phases=3 Linecode=3P_UG_AL_350kcmil_15_0_416_0_3_3_3_3

New Line.l(r:p1udm21208-p1udt6119lv) Units=km Length=0.00989013 bus1=p1udt6119lv.1.2.3 bus2=p1udm21208.1.2.3 switch=n enabled=y phases=3 Linecode=3P_UG_AL_350kcmil_15_0_416_0_3_3_3_3

New Line.l(r:p1udt8689lv-p1ulv10805) Units=km Length=0.019434 bus1=p1udt8689lv.1.2.3 bus2=p1ulv10805.1.2.3 switch=n enabled=y phases=3 Linecode=3P_UG_AL_350kcmil_15_0_416_0_3_3_3_3

New Line.l(r:p1udt6119-p1udt8689) Units=km Length=0.001 bus1=p1udt6119-p1udt8689x.1.2.3 bus2=p1udt6119-p1udt8689xx.1.2.3 switch=n enabled=y phases=3 Linecode=3P_UG_AL_4/0_25_12_47_0_3_3_3_3

New Line.l(r:p1udt20889lv-p1ulv41843) Units=km Length=0.0173661 bus1=p1udt20889lv.1.2.3 bus2=p1ulv41843.1.2.3 switch=n enabled=y phases=3 Linecode=3P_UG_AL_350kcmil_15_0_416_0_3_3_3_3

New Line.l(r:p1udt22979lv-p1ulv51853) Units=km Length=0.016626600000000002 bus1=p1udt22979lv.1.2.3 bus2=p1ulv51853.1.2.3 switch=n enabled=y phases=3 Linecode=3P_UG_AL_350kcmil_15_0_416_0_3_3_3_3

New Line.l(r:p1udt19967lv-p1ulv38074) Units=km Length=0.020508 bus1=p1udt19967lv.1.2.3 bus2=p1ulv38074.1.2.3 switch=n enabled=y phases=3 Linecode=3P_UG_AL_350kcmil_15_0_416_0_3_3_3_3

New Line.l(r:p1udm35106-p1ulv13935) Units=km Length=0.0228943 bus1=p1udm35106.1.2.3 bus2=p1ulv13935.1.2.3 switch=n enabled=y phases=3 Linecode=3P_UG_AL_350kcmil_15_0_416_0_3_3_3_3

New Line.l(r:p1udm35106-p1udt10574lv) Units=km Length=0.0387979 bus1=p1udt10574lv.1.2.3 bus2=p1udm35106.1.2.3 switch=n enabled=y phases=3 Linecode=3P_UG_AL_350kcmil_15_0_416_0_3_3_3_3

New Line.l(r:p1udm35107-p1ulv25395) Units=km Length=0.0212782 bus1=p1udm35107.1.2.3 bus2=p1ulv25395.1.2.3 switch=n enabled=y phases=3 Linecode=3P_UG_AL_350kcmil_15_0_416_0_3_3_3_3

New Line.l(r:p1udm35108-p1ulv63633) Units=km Length=0.0177878 bus1=p1udm35108.1.2.3 bus2=p1ulv63633.1.2.3 switch=n enabled=y phases=3 Linecode=3P_UG_AL_350kcmil_15_0_416_0_3_3_3_3

New Line.l(r:p1udm35107-p1udm35108) Units=km Length=0.00989013 bus1=p1udm35107.1.2.3 bus2=p1udm35108.1.2.3 switch=n enabled=y phases=3 Linecode=3P_UG_AL_350kcmil_15_0_416_0_3_3_3_3

New Line.l(r:p1udm35107-p1udt10574lv) Units=km Length=0.00917041 bus1=p1udt10574lv.1.2.3 bus2=p1udm35107.1.2.3 switch=n enabled=y phases=3 Linecode=3P_UG_AL_350kcmil_15_0_416_0_3_3_3_3

New Line.l(r:p1udt16171lv-p1ulv26035) Units=km Length=0.0199637 bus1=p1udt16171lv.1.2.3 bus2=p1ulv26035.1.2.3 switch=n enabled=y phases=3 Linecode=3P_UG_AL_350kcmil_15_0_416_0_3_3_3_3

New Line.l(r:p1udt23673lv-p1ulv55662) Units=km Length=0.0227127 bus1=p1udt23673lv.1.2.3 bus2=p1ulv55662.1.2.3 switch=n enabled=y phases=3 Linecode=3P_UG_AL_350kcmil_15_0_416_0_3_3_3_3

New Line.l(r:p1udt11920lv-p1ulv16417) Units=km Length=0.012059000000000002 bus1=p1udt11920lv.1.2.3 bus2=p1ulv16417.1.2.3 switch=n enabled=y phases=3 Linecode=3P_UG_AL_350kcmil_15_0_416_0_3_3_3_3

New Line.l(r:p1udt10572lv-p1ulv58059) Units=km Length=0.0515486 bus1=p1udt10572lv.1.2.3 bus2=p1ulv58059.1.2.3 switch=n enabled=y phases=3 Linecode=3P_UG_AL_350kcmil_15_0_416_0_3_3_3_3

New Line.l(r:p1udm35102-p1ulv13933) Units=km Length=0.0263617 bus1=p1udm35102.1.2.3 bus2=p1ulv13933.1.2.3 switch=n enabled=y phases=3 Linecode=3P_UG_AL_350kcmil_15_0_416_0_3_3_3_3

New Line.l(r:p1udm35102-p1udt10572lv) Units=km Length=0.0250969 bus1=p1udt10572lv.1.2.3 bus2=p1udm35102.1.2.3 switch=n enabled=y phases=3 Linecode=3P_UG_AL_350kcmil_15_0_416_0_3_3_3_3

New Line.l(r:p1udm35104-p1ulv64893) Units=km Length=0.057401200000000006 bus1=p1udm35104.1.2.3 bus2=p1ulv64893.1.2.3 switch=n enabled=y phases=3 Linecode=3P_UG_AL_350kcmil_15_0_416_0_3_3_3_3

New Line.l(r:p1udm35104-p1udt10572lv) Units=km Length=0.00933515 bus1=p1udt10572lv.1.2.3 bus2=p1udm35104.1.2.3 switch=n enabled=y phases=3 Linecode=3P_UG_AL_350kcmil_15_0_416_0_3_3_3_3

New Line.l(r:p1udt10572-p1udt11920) Units=km Length=0.007610320000000001 bus1=p1udt10572-p1udt11920xx.1.2.3 bus2=p1udt10572-p1udt11920x.1.2.3 switch=n enabled=y phases=3 Linecode=3P_UG_AL_4/0_25_12_47_0_3_3_3_3

New Line.l(r:p1udt11920-p1udt23673) Units=km Length=0.056969000000000006 bus1=p1udt11920-p1udt23673xx.1.2.3 bus2=p1udt11920-p1udt23673x.1.2.3 switch=n enabled=y phases=3 Linecode=3P_UG_AL_4/0_25_12_47_0_3_3_3_3

New Line.l(r:p1udt16171-p1udt23673) Units=km Length=0.0691063 bus1=p1udt16171-p1udt23673x.1.2.3 bus2=p1udt16171-p1udt23673xx.1.2.3 switch=n enabled=y phases=3 Linecode=3P_UG_AL_4/0_25_12_47_0_3_3_3_3

New Line.l(r:p1udt10574-p1udt16171) Units=km Length=0.0190455 bus1=p1udt10574-p1udt16171x.1.2.3 bus2=p1udt10574-p1udt16171xx.1.2.3 switch=n enabled=y phases=3 Linecode=3P_UG_AL_4/0_25_12_47_0_3_3_3_3

New Line.l(r:p1udt10574-p1udt19967) Units=km Length=0.0289507 bus1=p1udt10574-p1udt19967xx.1.2.3 bus2=p1udt10574-p1udt19967x.1.2.3 switch=n enabled=y phases=3 Linecode=3P_UG_AL_4/0_25_12_47_0_3_3_3_3

New Line.l(r:p1udt19967-p1udt22979) Units=km Length=0.0197803 bus1=p1udt19967-p1udt22979xx.1.2.3 bus2=p1udt19967-p1udt22979x.1.2.3 switch=n enabled=y phases=3 Linecode=3P_UG_AL_4/0_25_12_47_0_3_3_3_3

New Line.l(r:p1udt20889-p1udt22979) Units=km Length=0.049437100000000005 bus1=p1udt20889-p1udt22979x.1.2.3 bus2=p1udt20889-p1udt22979xx.1.2.3 switch=n enabled=y phases=3 Linecode=3P_UG_AL_4/0_25_12_47_0_3_3_3_3

New Line.l(r:p1udt20889-p1udt6119) Units=km Length=0.0494418 bus1=p1udt20889-p1udt6119xx.1.2.3 bus2=p1udt20889-p1udt6119x.1.2.3 switch=n enabled=y phases=3 Linecode=3P_UG_AL_4/0_25_12_47_0_3_3_3_3

New Line.padswitch(r:p1udt6119-p1udt8689)p1u_237062 Units=km Length=0.001 bus1=p1udt6119.1.2.3 bus2=p1udt6119-p1udt8689x.1.2.3 switch=y enabled=y phases=3 Linecode=padswitch_3_3_3_3

New Line.padswitch(r:p1udt6119-p1udt8689)p1u_237063 Units=km Length=0.001 bus1=p1udt6119-p1udt8689xx.1.2.3 bus2=p1udt8689.1.2.3 switch=y enabled=y phases=3 Linecode=padswitch_3_3_3_3_3

New Line.padswitch(r:p1udt10572-p1udt11920)p1u_237064 Units=km Length=0.001 bus1=p1udt11920.1.2.3 bus2=p1udt10572-p1udt11920xx.1.2.3 switch=y enabled=y phases=3 Linecode=padswitch_3_3_3_1_3_3

New Line.padswitch(r:p1udt10572-p1udt11920)p1u_237065 Units=km Length=0.001 bus1=p1udt10572-p1udt11920x.1.2.3 bus2=p1udt10572.1.2.3 switch=y enabled=y phases=3 Linecode=padswitch_3_3_3_1_3_1_3

New Line.padswitch(r:p1udt11920-p1udt23673)p1u_237066 Units=km Length=0.001 bus1=p1udt23673.1.2.3 bus2=p1udt11920-p1udt23673xx.1.2.3 switch=y enabled=y phases=3 Linecode=padswitch_3_3_3_1_3_1_3_1

New Line.padswitch(r:p1udt11920-p1udt23673)p1u_237067 Units=km Length=0.001 bus1=p1udt11920-p1udt23673x.1.2.3 bus2=p1udt11920.1.2.3 switch=y enabled=y phases=3 Linecode=padswitch_3_3_3_1_3_1_3_1

New Line.padswitch(r:p1udt16171-p1udt23673)p1u_237068 Units=km Length=0.001 bus1=p1udt16171.1.2.3 bus2=p1udt16171-p1udt23673x.1.2.3 switch=y enabled=y phases=3 Linecode=padswitch_3_3_3_1_3_1_3_1

New Line.padswitch(r:p1udt16171-p1udt23673)p1u_237069 Units=km Length=0.001 bus1=p1udt16171-p1udt23673xx.1.2.3 bus2=p1udt23673.1.2.3 switch=y enabled=y phases=3 Linecode=padswitch_3_3_3_1_3_1_3_1

New Line.padswitch(r:p1udt10574-p1udt16171)p1u_237070 Units=km Length=0.001 bus1=p1udt10574.1.2.3 bus2=p1udt10574-p1udt16171x.1.2.3 switch=y enabled=y phases=3 Linecode=padswitch_3_3_3_1_3_1_3_1

New Line.padswitch(r:p1udt10574-p1udt16171)p1u_237071 Units=km Length=0.001 bus1=p1udt10574-p1udt16171xx.1.2.3 bus2=p1udt16171.1.2.3 switch=y enabled=y phases=3 Linecode=padswitch_3_3_3_1_3_1_3_1

New Line.padswitch(r:p1udt10574-p1udt19967)p1u_237072 Units=km Length=0.001 bus1=p1udt19967.1.2.3 bus2=p1udt10574-p1udt19967xx.1.2.3 switch=y enabled=y phases=3 Linecode=padswitch_3_3_3_1_3_1_3_1

New Line.padswitch(r:p1udt10574-p1udt19967)p1u_237073 Units=km Length=0.001 bus1=p1udt10574-p1udt19967x.1.2.3 bus2=p1udt10574.1.2.3 switch=y enabled=y phases=3 Linecode=padswitch_3_3_3_1_3_1_3_1

New Line.padswitch(r:p1udt19967-p1udt22979)p1u_237074 Units=km Length=0.001 bus1=p1udt22979.1.2.3 bus2=p1udt19967-p1udt22979xx.1.2.3 switch=y enabled=y phases=3 Linecode=padswitch_3_3_3_1_3_1_3_1

New Line.padswitch(r:p1udt19967-p1udt22979)p1u_237075 Units=km Length=0.001 bus1=p1udt19967-p1udt22979x.1.2.3 bus2=p1udt19967.1.2.3 switch=y enabled=y phases=3 Linecode=padswitch_3_3_3_1_3_1_3_1

New Line.padswitch(r:p1udt20889-p1udt22979)p1u_237076 Units=km Length=0.001 bus1=p1udt20889.1.2.3 bus2=p1udt20889-p1udt22979x.1.2.3 switch=y enabled=y phases=3 Linecode=padswitch_3_3_3_1_3_1_3_1

New Line.padswitch(r:p1udt20889-p1udt22979)p1u_237077 Units=km Length=0.001 bus1=p1udt20889-p1udt22979xx.1.2.3 bus2=p1udt22979.1.2.3 switch=y enabled=y phases=3 Linecode=padswitch_3_3_3_1_3_1_3_1

New Line.padswitch(r:p1udt20889-p1udt6119)p1u_237078 Units=km Length=0.001 bus1=p1udt6119.1.2.3 bus2=p1udt20889-p1udt6119xx.1.2.3 switch=y enabled=y phases=3 Linecode=padswitch_3_3_3_1_3_1_3_1

New Line.padswitch(r:p1udt20889-p1udt6119)p1u_237079 Units=km Length=0.001 bus1=p1udt20889-p1udt6119x.1.2.3 bus2=p1udt20889.1.2.3 switch=y enabled=y phases=3 Linecode=padswitch_3_3_3_1_3_1_3_1
