New Load.load_p1ulv7060 conn=wye bus1=p1ulv7060.1.2.3 kV=0.48 Vminpu=0.8 Vmaxpu=1.2 model=1 kW=7.11007 kvar=1.440036789286196 Phases=3

New Load.load_p1ulv10805 conn=wye bus1=p1ulv10805.1.2.3 kV=0.48 Vminpu=0.8 Vmaxpu=1.2 model=1 kW=6.71007 kvar=1.3590228589431084 Phases=3

New Load.load_p1ulv13933 conn=wye bus1=p1ulv13933.1.2.3 kV=0.48 Vminpu=0.8 Vmaxpu=1.2 model=1 kW=8.14008 kvar=1.6486496852679053 Phases=3

New Load.load_p1ulv13935 conn=wye bus1=p1ulv13935.1.2.3 kV=0.48 Vminpu=0.8 Vmaxpu=1.2 model=1 kW=5.04005 kvar=1.0207856490641993 Phases=3

New Load.load_p1ulv16417 conn=wye bus1=p1ulv16417.1.2.3 kV=0.48 Vminpu=0.8 Vmaxpu=1.2 model=1 kW=8.130079999999998 kvar=1.6508831556473054 Phases=3

New Load.load_p1ulv25395 conn=wye bus1=p1ulv25395.1.2.3 kV=0.48 Vminpu=0.8 Vmaxpu=1.2 model=1 kW=9.03009 kvar=1.8289077056295346 Phases=3

New Load.load_p1ulv26035 conn=wye bus1=p1ulv26035.1.2.3 kV=0.48 Vminpu=0.8 Vmaxpu=1.2 model=1 kW=7.44007 kvar=1.5107706492232365 Phases=3

New Load.load_p1ulv38074 conn=wye bus1=p1ulv38074.1.2.3 kV=0.48 Vminpu=0.8 Vmaxpu=1.2 model=1 kW=10.0601 kvar=2.0375206016112446 Phases=3

New Load.load_p1ulv41843 conn=wye bus1=p1ulv41843.1.2.3 kV=0.48 Vminpu=0.8 Vmaxpu=1.2 model=1 kW=8.87009 kvar=1.8011485951030748 Phases=3

New Load.load_p1ulv51853 conn=wye bus1=p1ulv51853.1.2.3 kV=0.48 Vminpu=0.8 Vmaxpu=1.2 model=1 kW=7.65008 kvar=1.5494076205976233 Phases=3

New Load.load_p1ulv55662 conn=wye bus1=p1ulv55662.1.2.3 kV=0.48 Vminpu=0.8 Vmaxpu=1.2 model=1 kW=8.230079999999997 kvar=1.6711890217107057 Phases=3

New Load.load_p1ulv55663 conn=wye bus1=p1ulv55663.1.2.3 kV=0.48 Vminpu=0.8 Vmaxpu=1.2 model=1 kW=4.960049999999999 kvar=1.0097734632697801 Phases=3

New Load.load_p1ulv58059 conn=wye bus1=p1ulv58059.1.2.3 kV=0.48 Vminpu=0.8 Vmaxpu=1.2 model=1 kW=8.80009 kvar=1.7915338265512972 Phases=3

New Load.load_p1ulv63633 conn=wye bus1=p1ulv63633.1.2.3 kV=0.48 Vminpu=0.8 Vmaxpu=1.2 model=1 kW=6.78007 kvar=1.3802955141806106 Phases=3

New Load.load_p1ulv64893 conn=wye bus1=p1ulv64893.1.2.3 kV=0.48 Vminpu=0.8 Vmaxpu=1.2 model=1 kW=4.75005 kvar=0.9595566203841601 Phases=3
