New Capacitor.p1uc23 Bus1=p1udt5549 phases=3 Kv=12.47 conn=Wye Kvar=450.0

New CapControl.p1uc23 Capacitor=p1uc23 Element=Line.l(r:p1udt17668-p1udt5549) Terminal=1 delay=100.0 Type=voltage Vmin=120.5 Vmax=125.0 Ptratio=59.99631547328862 Ctratio=100.0
