New Capacitor.p1uc22 Bus1=p1udt6388 phases=3 Kv=12.47 conn=Wye Kvar=600.0

New CapControl.p1uc22 Capacitor=p1uc22 Element=Line.l(r:p1udt6386-p1udt6388) Terminal=1 delay=100.0 Type=voltage Vmin=120.5 Vmax=125.0 Ptratio=59.99631547328862 Ctratio=100.0

New Capacitor.p1uc24 Bus1=p1umv5 phases=3 Kv=12.47 conn=Wye Kvar=600.0

New CapControl.p1uc24 Capacitor=p1uc24 Element=Line.l(r:p1udt21937-p1umv5) Terminal=1 delay=100.0 Type=voltage Vmin=120.5 Vmax=125.0 Ptratio=59.99631547328862 Ctratio=100.0
