Clear

New Circuit.substation_p1uhs5_69 bus1=p1uhs5_69 pu=1.0 basekV=69.0 R1=1e-05 X1=1e-05 R0=1e-05 X0=1e-05

Redirect p1uhs5_1247--p1udt13240/Transformers.dss
Redirect Transformers.dss
Redirect p1uhs5_1247--p1udt19613/Transformers.dss
Redirect p1uhs5_1247--p1udt21449/Transformers.dss
Redirect Regulators.dss
Redirect p1uhs5_1247--p1udt13240/Loads.dss
Redirect p1uhs5_1247--p1udt19613/Loads.dss
Redirect p1uhs5_1247--p1udt21449/Loads.dss
Redirect p1uhs5_1247--p1udt13240/LineCodes.dss
Redirect LineCodes.dss
Redirect p1uhs5_1247--p1udt19613/LineCodes.dss
Redirect p1uhs5_1247--p1udt21449/LineCodes.dss
Redirect p1uhs5_1247--p1udt13240/Lines.dss
Redirect Lines.dss
Redirect p1uhs5_1247--p1udt19613/Lines.dss
Redirect p1uhs5_1247--p1udt21449/Lines.dss
Redirect p1uhs5_1247--p1udt13240/Capacitors.dss
Redirect p1uhs5_1247--p1udt19613/Capacitors.dss
Redirect p1uhs5_1247--p1udt21449/Capacitors.dss

Set Voltagebases=[0.2080002494301389, 0.48, 7.199560000000001, 12.47, 69.0]

Calcvoltagebases

Buscoords Buscoords.dss

Solve
