New Capacitor.p1uc27 Bus1=p1umv6 phases=3 Kv=12.47 conn=Wye Kvar=450.0

New CapControl.p1uc27 Capacitor=p1uc27 Element=Line.l(r:p1udt7453-p1umv6) Terminal=1 delay=100.0 Type=voltage Vmin=120.5 Vmax=125.0 Ptratio=59.99631547328862 Ctratio=100.0
