New Capacitor.p1uc29 Bus1=p1udt19793 phases=3 Kv=12.47 conn=Wye Kvar=300.0

New CapControl.p1uc29 Capacitor=p1uc29 Element=Line.padswitch(r:p1udt19793-p1udt9453)p1u_240503 Terminal=1 delay=100.0 Type=voltage Vmin=120.5 Vmax=125.0 Ptratio=59.99631547328862 Ctratio=100.0
