New Capacitor.p1uc32 Bus1=p1udt3340 phases=3 Kv=12.47 conn=Wye Kvar=450.0

New CapControl.p1uc32 Capacitor=p1uc32 Element=Line.padswitch(r:p1udt2775-p1udt3340)p1u_242122 Terminal=1 delay=100.0 Type=voltage Vmin=120.5 Vmax=125.0 Ptratio=59.99631547328862 Ctratio=100.0
