Clear

New Circuit.substation_p1uhs7_69 bus1=p1uhs7_69 pu=1.0 basekV=69.0 R1=1e-05 X1=1e-05 R0=1e-05 X0=1e-05

Redirect Transformers.dss
Redirect p1uhs7_1247--p1udt1702/Transformers.dss
Redirect p1uhs7_1247--p1udt14301/Transformers.dss
Redirect Regulators.dss
Redirect p1uhs7_1247--p1udt1702/Loads.dss
Redirect p1uhs7_1247--p1udt14301/Loads.dss
Redirect LineCodes.dss
Redirect p1uhs7_1247--p1udt1702/LineCodes.dss
Redirect p1uhs7_1247--p1udt14301/LineCodes.dss
Redirect Lines.dss
Redirect p1uhs7_1247--p1udt1702/Lines.dss
Redirect p1uhs7_1247--p1udt14301/Lines.dss
Redirect p1uhs7_1247--p1udt1702/Capacitors.dss
Redirect p1uhs7_1247--p1udt14301/Capacitors.dss

Set Voltagebases=[0.2080002494301389, 0.48, 7.199560000000001, 12.47, 69.0]

Calcvoltagebases

Buscoords Buscoords.dss

Solve
