New Capacitor.p1uc35 Bus1=p1udt12210 phases=3 Kv=12.47 conn=Wye Kvar=450.0

New CapControl.p1uc35 Capacitor=p1uc35 Element=Line.l(r:p1udt12210-p1udt22954) Terminal=1 delay=100.0 Type=voltage Vmin=120.5 Vmax=125.0 Ptratio=59.99631547328862 Ctratio=100.0
