Clear

New Circuit.substation_p1uhs8_69 bus1=p1uhs8_69 pu=1.0 basekV=69.0 R1=1e-05 X1=1e-05 R0=1e-05 X0=1e-05

Redirect p1uhs8_1247--p1udt4671/Transformers.dss
Redirect p1uhs8_1247--p1udt22258/Transformers.dss
Redirect p1uhs8_1247--p1udt2544/Transformers.dss
Redirect Transformers.dss
Redirect Regulators.dss
Redirect p1uhs8_1247--p1udt4671/Loads.dss
Redirect p1uhs8_1247--p1udt22258/Loads.dss
Redirect p1uhs8_1247--p1udt2544/Loads.dss
Redirect p1uhs8_1247--p1udt4671/LineCodes.dss
Redirect p1uhs8_1247--p1udt22258/LineCodes.dss
Redirect p1uhs8_1247--p1udt2544/LineCodes.dss
Redirect LineCodes.dss
Redirect p1uhs8_1247--p1udt4671/Lines.dss
Redirect p1uhs8_1247--p1udt22258/Lines.dss
Redirect p1uhs8_1247--p1udt2544/Lines.dss
Redirect Lines.dss
Redirect p1uhs8_1247--p1udt22258/Capacitors.dss
Redirect p1uhs8_1247--p1udt4671/Capacitors.dss
Redirect p1uhs8_1247--p1udt2544/Capacitors.dss

Set Voltagebases=[0.2080002494301389, 0.48, 7.199560000000001, 12.47, 69.0]

Calcvoltagebases

Buscoords Buscoords.dss

Solve
