New Capacitor.p1uc39 Bus1=p1udt1978 phases=3 Kv=12.47 conn=Wye Kvar=450.0

New CapControl.p1uc39 Capacitor=p1uc39 Element=Line.l(r:p1udt1978-p1udt24554) Terminal=1 delay=100.0 Type=voltage Vmin=120.5 Vmax=125.0 Ptratio=59.99631547328862 Ctratio=100.0

New Capacitor.p1uc42 Bus1=p1udt18717 phases=3 Kv=12.47 conn=Wye Kvar=450.0

New CapControl.p1uc42 Capacitor=p1uc42 Element=Line.l(r:p1udt17523-p1udt18717) Terminal=1 delay=100.0 Type=voltage Vmin=120.5 Vmax=125.0 Ptratio=59.99631547328862 Ctratio=100.0
