New Capacitor.p1uc40 Bus1=p1udt23153 phases=3 Kv=12.47 conn=Wye Kvar=450.0

New CapControl.p1uc40 Capacitor=p1uc40 Element=Line.l(r:p1udt23153-p1udt4821) Terminal=1 delay=100.0 Type=voltage Vmin=120.5 Vmax=125.0 Ptratio=59.99631547328862 Ctratio=100.0
