New Capacitor.p1uc38 Bus1=p1udt2874 phases=3 Kv=12.47 conn=Wye Kvar=450.0

New CapControl.p1uc38 Capacitor=p1uc38 Element=Line.l(r:p1udt13151-p1udt2874) Terminal=1 delay=100.0 Type=voltage Vmin=120.5 Vmax=125.0 Ptratio=59.99631547328862 Ctratio=100.0

New Capacitor.p1uc41 Bus1=p1umv52 phases=3 Kv=12.47 conn=Wye Kvar=450.0

New CapControl.p1uc41 Capacitor=p1uc41 Element=Line.l(r:p1udt5974-p1umv52) Terminal=1 delay=100.0 Type=voltage Vmin=120.5 Vmax=125.0 Ptratio=59.99631547328862 Ctratio=100.0
