New RegControl.sb12_p1uhs9_1247_reg_642 transformer=sb12_p1uhs9_1247_trans_642 winding=2 ptratio=60.0 band=1.9919999999999998 vreg = 123.60000000000001

New RegControl.sb12_p1uhs9_1247_reg_688 transformer=sb12_p1uhs9_1247_trans_688 winding=2 ptratio=60.0 band=1.9919999999999998 vreg = 123.60000000000001

New RegControl.sb12_p1uhs9_1247_reg_641 transformer=sb12_p1uhs9_1247_trans_641 winding=2 ptratio=60.0 band=1.9919999999999998 vreg = 123.60000000000001
