New Capacitor.p1uc51 Bus1=p1udt13205 phases=3 Kv=12.47 conn=Wye Kvar=300.0

New CapControl.p1uc51 Capacitor=p1uc51 Element=Line.padswitch(r:p1udt13205-p1udt5583)p1u_245660 Terminal=1 delay=100.0 Type=voltage Vmin=120.5 Vmax=125.0 Ptratio=59.99631547328862 Ctratio=100.0
