New Line.l(r:p1udt648lv-p1ulv657) Units=km Length=0.0160712 bus1=p1udt648lv.1.2 bus2=p1ulv657.1.2 switch=n enabled=y phases=2 Linecode=1P_OH_AL_2/0_Rucina_0_416_0_2_2_2_2

New Line.l(r:p1udt648lv-p1ulv12601) Units=km Length=0.0164772 bus1=p1udt648lv.1.2 bus2=p1ulv12601.1.2 switch=n enabled=y phases=2 Linecode=1P_OH_AL_2/0_Rucina_0_416_0_2_2_2_2

New Line.l(r:p1udm2393-p1ulv60407) Units=km Length=0.0135567 bus1=p1udm2393.1.2 bus2=p1ulv60407.1.2 switch=n enabled=y phases=2 Linecode=1P_OH_AL_2/0_Rucina_0_416_0_2_2_2_2

New Line.l(r:p1udm2393-p1udt648lv) Units=km Length=0.0162531 bus1=p1udt648lv.1.2 bus2=p1udm2393.1.2 switch=n enabled=y phases=2 Linecode=1P_OH_AL_2/0_Rucina_0_416_0_2_2_2_2

New Line.l(r:p1udt1219lv-p1ulv34233) Units=km Length=0.0192737 bus1=p1udt1219lv.1.2 bus2=p1ulv34233.1.2 switch=n enabled=y phases=2 Linecode=1P_UG_AL_1/0_Brenau_0_416_0_2_2_2_2

New Line.l(r:p1udm4494-p1ulv20221) Units=km Length=0.0182043 bus1=p1udm4494.1.2 bus2=p1ulv20221.1.2 switch=n enabled=y phases=2 Linecode=1P_UG_AL_1/0_Brenau_0_416_0_2_2_2_2

New Line.l(r:p1udm4494-p1udt1219lv) Units=km Length=0.0146339 bus1=p1udt1219lv.1.2 bus2=p1udm4494.1.2 switch=n enabled=y phases=2 Linecode=1P_UG_AL_1/0_Brenau_0_416_0_2_2_2_2

New Line.l(r:p1udm4495-p1ulv29104) Units=km Length=0.016176 bus1=p1udm4495.1.2 bus2=p1ulv29104.1.2 switch=n enabled=y phases=2 Linecode=1P_UG_AL_1/0_Brenau_0_416_0_2_2_2_2

New Line.l(r:p1udm4497-p1ulv54959) Units=km Length=0.014366800000000002 bus1=p1udm4497.1.2 bus2=p1ulv54959.1.2 switch=n enabled=y phases=2 Linecode=1P_UG_AL_1/0_Brenau_0_416_0_2_2_2_2

New Line.l(r:p1udm4493-p1ulv1253) Units=km Length=0.0126992 bus1=p1udm4493.1.2 bus2=p1ulv1253.1.2 switch=n enabled=y phases=2 Linecode=1P_UG_AL_1/0_Brenau_0_416_0_2_2_2_2

New Line.l(r:p1udm4493-p1udm4497) Units=km Length=0.00801452 bus1=p1udm4497.1.2 bus2=p1udm4493.1.2 switch=n enabled=y phases=2 Linecode=1P_UG_AL_1/0_Brenau_0_416_0_2_2_2_2

New Line.l(r:p1udm4495-p1udm4497) Units=km Length=0.00455151 bus1=p1udm4495.1.2 bus2=p1udm4497.1.2 switch=n enabled=y phases=2 Linecode=1P_UG_AL_4/0_Sweetbriar_0_416_0_2_2_2_2

New Line.l(r:p1udm4495-p1udt1219lv) Units=km Length=0.00471179 bus1=p1udt1219lv.1.2 bus2=p1udm4495.1.2 switch=n enabled=y phases=2 Linecode=1P_UG_AL_4/0_Sweetbriar_0_416_0_2_2_2_2

New Line.l(r:p1udm4498-p1ulv1254) Units=km Length=0.0114851 bus1=p1udm4498.1.2 bus2=p1ulv1254.1.2 switch=n enabled=y phases=2 Linecode=1P_UG_AL_1/0_Brenau_0_416_0_2_2_2_2

New Line.l(r:p1udm4498-p1ulv33577) Units=km Length=0.0167821 bus1=p1udm4498.1.2 bus2=p1ulv33577.1.2 switch=n enabled=y phases=2 Linecode=1P_UG_AL_1/0_Brenau_0_416_0_2_2_2_2

New Line.l(r:p1udm4498-p1udt1220lv) Units=km Length=0.00955491 bus1=p1udt1220lv.1.2 bus2=p1udm4498.1.2 switch=n enabled=y phases=2 Linecode=1P_UG_AL_4/0_Sweetbriar_0_416_0_2_2_2_2

New Line.l(r:p1udm4500-p1ulv43675) Units=km Length=0.0136912 bus1=p1udm4500.1.2 bus2=p1ulv43675.1.2 switch=n enabled=y phases=2 Linecode=1P_UG_AL_1/0_Brenau_0_416_0_2_2_2_2

New Line.l(r:p1udm4500-p1udt1220lv) Units=km Length=0.0191098 bus1=p1udt1220lv.1.2 bus2=p1udm4500.1.2 switch=n enabled=y phases=2 Linecode=1P_UG_AL_1/0_Brenau_0_416_0_2_2_2_2

New Line.l(r:p1udt1221lv-p1ulv1255) Units=km Length=0.0143287 bus1=p1udt1221lv.1.2 bus2=p1ulv1255.1.2 switch=n enabled=y phases=2 Linecode=1P_UG_AL_1/0_Brenau_0_416_0_2_2_2_2

New Line.l(r:p1udt1221lv-p1ulv55570) Units=km Length=0.0130857 bus1=p1udt1221lv.1.2 bus2=p1ulv55570.1.2 switch=n enabled=y phases=2 Linecode=1P_UG_AL_1/0_Brenau_0_416_0_2_2_2_2

New Line.l(r:p1udt1222lv-p1ulv1256) Units=km Length=0.0289874 bus1=p1udt1222lv.1.2 bus2=p1ulv1256.1.2 switch=n enabled=y phases=2 Linecode=1P_UG_AL_1/0_Brenau_0_416_0_2_2_2_2

New Line.l(r:p1udt1222lv-p1ulv6365) Units=km Length=0.0285829 bus1=p1udt1222lv.1.2 bus2=p1ulv6365.1.2 switch=n enabled=y phases=2 Linecode=1P_UG_AL_1/0_Brenau_0_416_0_2_2_2_2

New Line.l(r:p1udt1222lv-p1ulv8225) Units=km Length=0.032641 bus1=p1udt1222lv.1.2 bus2=p1ulv8225.1.2 switch=n enabled=y phases=2 Linecode=1P_UG_AL_1/0_Brenau_0_416_0_2_2_2_2

New Line.l(r:p1udt1222lv-p1ulv44954) Units=km Length=0.029867500000000005 bus1=p1udt1222lv.1.2 bus2=p1ulv44954.1.2 switch=n enabled=y phases=2 Linecode=1P_UG_AL_4/0_Sweetbriar_0_416_0_2_2_2_2

New Line.l(r:p1udt1223lv-p1ulv13842) Units=km Length=0.025830500000000003 bus1=p1udt1223lv.1.2 bus2=p1ulv13842.1.2 switch=n enabled=y phases=2 Linecode=1P_UG_AL_1/0_Brenau_0_416_0_2_2_2_2

New Line.l(r:p1udt1223lv-p1ulv39902) Units=km Length=0.0234216 bus1=p1udt1223lv.1.2 bus2=p1ulv39902.1.2 switch=n enabled=y phases=2 Linecode=1P_UG_AL_1/0_Brenau_0_416_0_2_2_2_2

New Line.l(r:p1udm4507-p1ulv1257) Units=km Length=0.0195454 bus1=p1udm4507.1.2 bus2=p1ulv1257.1.2 switch=n enabled=y phases=2 Linecode=1P_UG_AL_1/0_Brenau_0_416_0_2_2_2_2

New Line.l(r:p1udm4507-p1udt1223lv) Units=km Length=0.0185784 bus1=p1udt1223lv.1.2 bus2=p1udm4507.1.2 switch=n enabled=y phases=2 Linecode=1P_UG_AL_1/0_Brenau_0_416_0_2_2_2_2

New Line.l(r:p1udt1224lv-p1ulv1258) Units=km Length=0.0167996 bus1=p1udt1224lv.1.2 bus2=p1ulv1258.1.2 switch=n enabled=y phases=2 Linecode=1P_UG_AL_1/0_Brenau_0_416_0_2_2_2_2

New Line.l(r:p1udt1224lv-p1ulv56164) Units=km Length=0.016073 bus1=p1udt1224lv.1.2 bus2=p1ulv56164.1.2 switch=n enabled=y phases=2 Linecode=1P_UG_AL_1/0_Brenau_0_416_0_2_2_2_2

New Line.l(r:p1udm4511-p1ulv5062) Units=km Length=0.0160569 bus1=p1udm4511.1.2 bus2=p1ulv5062.1.2 switch=n enabled=y phases=2 Linecode=1P_UG_AL_1/0_Brenau_0_416_0_2_2_2_2

New Line.l(r:p1udm4511-p1udt1224lv) Units=km Length=0.0157495 bus1=p1udt1224lv.1.2 bus2=p1udm4511.1.2 switch=n enabled=y phases=2 Linecode=1P_UG_AL_1/0_Brenau_0_416_0_2_2_2_2

New Line.l(r:p1udm4512-p1ulv9489) Units=km Length=0.0147711 bus1=p1udm4512.1.2 bus2=p1ulv9489.1.2 switch=n enabled=y phases=2 Linecode=1P_UG_AL_1/0_Brenau_0_416_0_2_2_2_2

New Line.l(r:p1udm4512-p1udt1224lv) Units=km Length=0.00787475 bus1=p1udt1224lv.1.2 bus2=p1udm4512.1.2 switch=n enabled=y phases=2 Linecode=1P_UG_AL_1/0_Brenau_0_416_0_2_2_2_2

New Line.l(r:p1udt1225lv-p1ulv37996) Units=km Length=0.018270900000000003 bus1=p1udt1225lv.1.2 bus2=p1ulv37996.1.2 switch=n enabled=y phases=2 Linecode=1P_OH_AL_2/0_Rucina_0_416_0_2_2_2_2

New Line.l(r:p1udm4515-p1ulv8868) Units=km Length=0.016452300000000003 bus1=p1udm4515.1.2 bus2=p1ulv8868.1.2 switch=n enabled=y phases=2 Linecode=1P_OH_AL_2/0_Rucina_0_416_0_2_2_2_2

New Line.l(r:p1udm4515-p1ulv15692) Units=km Length=0.0181629 bus1=p1udm4515.1.2 bus2=p1ulv15692.1.2 switch=n enabled=y phases=2 Linecode=1P_OH_AL_2/0_Rucina_0_416_0_2_2_2_2

New Line.l(r:p1udm4514-p1ulv1259) Units=km Length=0.0190674 bus1=p1udm4514.1.2 bus2=p1ulv1259.1.2 switch=n enabled=y phases=2 Linecode=1P_OH_AL_2/0_Rucina_0_416_0_2_2_2_2

New Line.l(r:p1udm4514-p1udm4515) Units=km Length=0.012878 bus1=p1udm4515.1.2 bus2=p1udm4514.1.2 switch=n enabled=y phases=2 Linecode=1P_OH_AL_2/0_Rucina_0_416_0_2_2_2_2

New Line.l(r:p1udm4515-p1udt1225lv) Units=km Length=0.0134901 bus1=p1udt1225lv.1.2 bus2=p1udm4515.1.2 switch=n enabled=y phases=2 Linecode=1P_OH_AL_2/0_Rucina_0_416_0_2_0_2_2_2

New Line.l(r:p1udm4517-p1ulv18954) Units=km Length=0.0139939 bus1=p1udm4517.1.2 bus2=p1ulv18954.1.2 switch=n enabled=y phases=2 Linecode=1P_OH_AL_2/0_Rucina_0_416_0_2_2_2_2

New Line.l(r:p1udm4517-p1udt1225lv) Units=km Length=0.0251852 bus1=p1udt1225lv.1.2 bus2=p1udm4517.1.2 switch=n enabled=y phases=2 Linecode=1P_OH_AL_2/0_Rucina_0_416_0_2_2_2_2

New Line.l(r:p1udt1226lv-p1ulv62267) Units=km Length=0.0198388 bus1=p1udt1226lv.1.2 bus2=p1ulv62267.1.2 switch=n enabled=y phases=2 Linecode=1P_OH_AL_2/0_Rucina_0_416_0_2_2_2_2

New Line.l(r:p1udm4519-p1ulv1260) Units=km Length=0.018567 bus1=p1udm4519.1.2 bus2=p1ulv1260.1.2 switch=n enabled=y phases=2 Linecode=1P_OH_AL_2/0_Rucina_0_416_0_2_2_2_2

New Line.l(r:p1udm4519-p1ulv18955) Units=km Length=0.0175696 bus1=p1udm4519.1.2 bus2=p1ulv18955.1.2 switch=n enabled=y phases=2 Linecode=1P_OH_AL_2/0_Rucina_0_416_0_2_2_2_2

New Line.l(r:p1udm4519-p1udt1226lv) Units=km Length=0.01365 bus1=p1udt1226lv.1.2 bus2=p1udm4519.1.2 switch=n enabled=y phases=2 Linecode=1P_OH_AL_2/0_Rucina_0_416_0_2_2_2_2

New Line.l(r:p1udt1227lv-p1ulv61015) Units=km Length=0.0182941 bus1=p1udt1227lv.1.2 bus2=p1ulv61015.1.2 switch=n enabled=y phases=2 Linecode=1P_OH_AL_2/0_Rucina_0_416_0_2_2_2_2

New Line.l(r:p1udm4522-p1ulv1261) Units=km Length=0.0164737 bus1=p1udm4522.1.2 bus2=p1ulv1261.1.2 switch=n enabled=y phases=2 Linecode=1P_OH_AL_2/0_Rucina_0_416_0_2_2_2_2

New Line.l(r:p1udm4522-p1udt1227lv) Units=km Length=0.0188244 bus1=p1udt1227lv.1.2 bus2=p1udm4522.1.2 switch=n enabled=y phases=2 Linecode=1P_OH_AL_2/0_Rucina_0_416_0_2_2_2_2

New Line.l(r:p1udm4523-p1ulv21519) Units=km Length=0.0185222 bus1=p1udm4523.1.2 bus2=p1ulv21519.1.2 switch=n enabled=y phases=2 Linecode=1P_OH_AL_2/0_Rucina_0_416_0_2_2_2_2

New Line.l(r:p1udm4523-p1udt1227lv) Units=km Length=0.0376489 bus1=p1udt1227lv.1.2 bus2=p1udm4523.1.2 switch=n enabled=y phases=2 Linecode=1P_OH_AL_4/0_Zuzara_0_416_0_2_2_2_2

New Line.l(r:p1udm6712-p1ulv1936) Units=km Length=0.015614 bus1=p1udm6712.1.2 bus2=p1ulv1936.1.2 switch=n enabled=y phases=2 Linecode=1P_OH_AL_2/0_Rucina_0_416_0_2_2_2_2

New Line.l(r:p1udm6712-p1udt1847lv) Units=km Length=0.0190915 bus1=p1udt1847lv.1.2 bus2=p1udm6712.1.2 switch=n enabled=y phases=2 Linecode=1P_OH_AL_2/0_Rucina_0_416_0_2_2_2_2

New Line.l(r:p1udm6713-p1ulv54317) Units=km Length=0.0237089 bus1=p1udm6713.1.2 bus2=p1ulv54317.1.2 switch=n enabled=y phases=2 Linecode=1P_OH_AL_2/0_Rucina_0_416_0_2_2_2_2

New Line.l(r:p1udm6713-p1udt1847lv) Units=km Length=0.0190828 bus1=p1udt1847lv.1.2 bus2=p1udm6713.1.2 switch=n enabled=y phases=2 Linecode=1P_OH_AL_2/0_Rucina_0_416_0_2_2_2_2

New Line.l(r:p1udt1848lv-p1ulv1937) Units=km Length=0.0163687 bus1=p1udt1848lv.1.2 bus2=p1ulv1937.1.2 switch=n enabled=y phases=2 Linecode=1P_OH_AL_2/0_Rucina_0_416_0_2_2_2_2

New Line.l(r:p1udt1848lv-p1ulv24079) Units=km Length=0.0151022 bus1=p1udt1848lv.1.2 bus2=p1ulv24079.1.2 switch=n enabled=y phases=2 Linecode=1P_OH_AL_2/0_Rucina_0_416_0_2_2_2_2

New Line.l(r:p1udm6716-p1ulv34859) Units=km Length=0.0154257 bus1=p1udm6716.1.2 bus2=p1ulv34859.1.2 switch=n enabled=y phases=2 Linecode=1P_OH_AL_2/0_Rucina_0_416_0_2_2_2_2

New Line.l(r:p1udm6716-p1udt1848lv) Units=km Length=0.010828100000000002 bus1=p1udt1848lv.1.2 bus2=p1udm6716.1.2 switch=n enabled=y phases=2 Linecode=1P_OH_AL_2/0_Rucina_0_416_0_2_2_2_2

New Line.l(r:p1udm6717-p1ulv42388) Units=km Length=0.015317800000000001 bus1=p1udm6717.1.2 bus2=p1ulv42388.1.2 switch=n enabled=y phases=2 Linecode=1P_OH_AL_2/0_Rucina_0_416_0_2_2_2_2

New Line.l(r:p1udm6717-p1udt1848lv) Units=km Length=0.0100658 bus1=p1udt1848lv.1.2 bus2=p1udm6717.1.2 switch=n enabled=y phases=2 Linecode=1P_OH_AL_2/0_Rucina_0_416_0_2_2_2_2

New Line.l(r:p1udt2407lv-p1ulv27243) Units=km Length=0.014227100000000001 bus1=p1udt2407lv.1.2 bus2=p1ulv27243.1.2 switch=n enabled=y phases=2 Linecode=1P_OH_AL_2/0_Rucina_0_416_0_2_2_2_2

New Line.l(r:p1udm8686-p1ulv46248) Units=km Length=0.0195162 bus1=p1udm8686.1.2 bus2=p1ulv46248.1.2 switch=n enabled=y phases=2 Linecode=1P_OH_AL_2/0_Rucina_0_416_0_2_2_2_2

New Line.l(r:p1udm8686-p1ulv60403) Units=km Length=0.0124848 bus1=p1udm8686.1.2 bus2=p1ulv60403.1.2 switch=n enabled=y phases=2 Linecode=1P_OH_AL_2/0_Rucina_0_416_0_2_2_2_2

New Line.l(r:p1udm8686-p1udt2407lv) Units=km Length=0.0184952 bus1=p1udt2407lv.1.2 bus2=p1udm8686.1.2 switch=n enabled=y phases=2 Linecode=1P_OH_AL_2/0_Rucina_0_416_0_2_2_2_2

New Line.l(r:p1udm8687-p1ulv51776) Units=km Length=0.0185678 bus1=p1udm8687.1.2 bus2=p1ulv51776.1.2 switch=n enabled=y phases=2 Linecode=1P_OH_AL_2/0_Rucina_0_416_0_2_2_2_2

New Line.l(r:p1udm8684-p1ulv2547) Units=km Length=0.0166216 bus1=p1udm8684.1.2 bus2=p1ulv2547.1.2 switch=n enabled=y phases=2 Linecode=1P_OH_AL_2/0_Rucina_0_416_0_2_2_2_2

New Line.l(r:p1udm8684-p1udm8687) Units=km Length=0.0169473 bus1=p1udm8687.1.2 bus2=p1udm8684.1.2 switch=n enabled=y phases=2 Linecode=1P_OH_AL_2/0_Rucina_0_416_0_2_2_2_2

New Line.l(r:p1udm8687-p1udt2407lv) Units=km Length=0.0184875 bus1=p1udt2407lv.1.2 bus2=p1udm8687.1.2 switch=n enabled=y phases=2 Linecode=1P_OH_AL_2/0_Rucina_0_416_0_2_2_2_2

New Line.l(r:p1udt2408lv-p1ulv2548) Units=km Length=0.0184307 bus1=p1udt2408lv.1.2 bus2=p1ulv2548.1.2 switch=n enabled=y phases=2 Linecode=1P_UG_AL_1/0_Brenau_0_416_0_2_2_2_2

New Line.l(r:p1udt2408lv-p1ulv36754) Units=km Length=0.0242211 bus1=p1udt2408lv.1.2 bus2=p1ulv36754.1.2 switch=n enabled=y phases=2 Linecode=1P_UG_AL_1/0_Brenau_0_416_0_2_2_2_2

New Line.l(r:p1udm8690-p1ulv34857) Units=km Length=0.0192918 bus1=p1udm8690.1.2 bus2=p1ulv34857.1.2 switch=n enabled=y phases=2 Linecode=1P_UG_AL_1/0_Brenau_0_416_0_2_2_2_2

New Line.l(r:p1udm8690-p1udt2408lv) Units=km Length=0.0223935 bus1=p1udt2408lv.1.2 bus2=p1udm8690.1.2 switch=n enabled=y phases=2 Linecode=1P_UG_AL_1/0_Brenau_0_416_0_2_2_2_2

New Line.l(r:p1udt2409lv-p1ulv27878) Units=km Length=0.0161358 bus1=p1udt2409lv.1.2 bus2=p1ulv27878.1.2 switch=n enabled=y phases=2 Linecode=1P_UG_AL_1/0_Brenau_0_416_0_2_2_2_2

New Line.l(r:p1udm8692-p1ulv2549) Units=km Length=0.0158269 bus1=p1udm8692.1.2 bus2=p1ulv2549.1.2 switch=n enabled=y phases=2 Linecode=1P_UG_AL_1/0_Brenau_0_416_0_2_2_2_2

New Line.l(r:p1udm8692-p1ulv41135) Units=km Length=0.016414400000000003 bus1=p1udm8692.1.2 bus2=p1ulv41135.1.2 switch=n enabled=y phases=2 Linecode=1P_UG_AL_1/0_Brenau_0_416_0_2_2_2_2

New Line.l(r:p1udm8696-p1ulv62266) Units=km Length=0.0164088 bus1=p1udm8696.1.2 bus2=p1ulv62266.1.2 switch=n enabled=y phases=2 Linecode=1P_UG_AL_1/0_Brenau_0_416_0_2_2_2_2

New Line.l(r:p1udm8692-p1udm8696) Units=km Length=0.0200613 bus1=p1udm8692.1.2 bus2=p1udm8696.1.2 switch=n enabled=y phases=2 Linecode=1P_UG_AL_1/0_Brenau_0_416_0_2_2_2_2

New Line.l(r:p1udm8692-p1udt2409lv) Units=km Length=0.00673359 bus1=p1udt2409lv.1.2 bus2=p1udm8692.1.2 switch=n enabled=y phases=2 Linecode=1P_UG_AL_4/0_Sweetbriar_0_416_0_2_2_2_2

New Line.l(r:p1udm8694-p1ulv32248) Units=km Length=0.0147182 bus1=p1udm8694.1.2 bus2=p1ulv32248.1.2 switch=n enabled=y phases=2 Linecode=1P_UG_AL_1/0_Brenau_0_416_0_2_2_2_2

New Line.l(r:p1udm8694-p1udt2409lv) Units=km Length=0.0562009 bus1=p1udt2409lv.1.2 bus2=p1udm8694.1.2 switch=n enabled=y phases=2 Linecode=1P_UG_AL_1/0_Brenau_0_416_0_2_2_2_2

New Line.l(r:p1udt3002lv-p1ulv3210) Units=km Length=0.0157808 bus1=p1udt3002lv.1.2 bus2=p1ulv3210.1.2 switch=n enabled=y phases=2 Linecode=1P_UG_AL_1/0_Brenau_0_416_0_2_2_2_2

New Line.l(r:p1udt3002lv-p1ulv31639) Units=km Length=0.013220700000000002 bus1=p1udt3002lv.1.2 bus2=p1ulv31639.1.2 switch=n enabled=y phases=2 Linecode=1P_UG_AL_1/0_Brenau_0_416_0_2_2_2_2

New Line.l(r:p1udt3005lv-p1ulv47457) Units=km Length=0.0169213 bus1=p1udt3005lv.1.2 bus2=p1ulv47457.1.2 switch=n enabled=y phases=2 Linecode=1P_UG_AL_1/0_Brenau_0_416_0_2_2_2_2

New Line.l(r:p1udm10673-p1ulv3213) Units=km Length=0.0145911 bus1=p1udm10673.1.2 bus2=p1ulv3213.1.2 switch=n enabled=y phases=2 Linecode=1P_UG_AL_1/0_Brenau_0_416_0_2_2_2_2

New Line.l(r:p1udm10675-p1ulv24680) Units=km Length=0.0137804 bus1=p1udm10675.1.2 bus2=p1ulv24680.1.2 switch=n enabled=y phases=2 Linecode=1P_UG_AL_1/0_Brenau_0_416_0_2_2_2_2

New Line.l(r:p1udm10673-p1udm10675) Units=km Length=0.063193 bus1=p1udm10673.1.2 bus2=p1udm10675.1.2 switch=n enabled=y phases=2 Linecode=1P_UG_AL_1/0_Brenau_0_416_0_2_2_2_2

New Line.l(r:p1udm10673-p1udt3005lv) Units=km Length=0.00565035 bus1=p1udt3005lv.1.2 bus2=p1udm10673.1.2 switch=n enabled=y phases=2 Linecode=1P_UG_AL_4/0_Sweetbriar_0_416_0_2_2_2_2

New Line.l(r:p1udm10674-p1ulv9490) Units=km Length=0.0166203 bus1=p1udm10674.1.2 bus2=p1ulv9490.1.2 switch=n enabled=y phases=2 Linecode=1P_UG_AL_1/0_Brenau_0_416_0_2_2_2_2

New Line.l(r:p1udm10677-p1ulv57977) Units=km Length=0.0148306 bus1=p1udm10677.1.2 bus2=p1ulv57977.1.2 switch=n enabled=y phases=2 Linecode=1P_UG_AL_1/0_Brenau_0_416_0_2_2_2_2

New Line.l(r:p1udm10674-p1udm10677) Units=km Length=0.0066818 bus1=p1udm10674.1.2 bus2=p1udm10677.1.2 switch=n enabled=y phases=2 Linecode=1P_UG_AL_1/0_Brenau_0_416_0_2_2_2_2

New Line.l(r:p1udm10674-p1udt3005lv) Units=km Length=0.0188892 bus1=p1udt3005lv.1.2 bus2=p1udm10674.1.2 switch=n enabled=y phases=2 Linecode=1P_UG_AL_4/0_Sweetbriar_0_416_0_2_2_2_2

New Line.l(r:p1udt3006lv-p1ulv56768) Units=km Length=0.016116 bus1=p1udt3006lv.1.2 bus2=p1ulv56768.1.2 switch=n enabled=y phases=2 Linecode=1P_UG_AL_1/0_Brenau_0_416_0_2_2_2_2

New Line.l(r:p1udm10678-p1ulv3214) Units=km Length=0.0167991 bus1=p1udm10678.1.2 bus2=p1ulv3214.1.2 switch=n enabled=y phases=2 Linecode=1P_UG_AL_1/0_Brenau_0_416_0_2_2_2_2

New Line.l(r:p1udm10678-p1udt3006lv) Units=km Length=0.0140389 bus1=p1udt3006lv.1.2 bus2=p1udm10678.1.2 switch=n enabled=y phases=2 Linecode=1P_UG_AL_1/0_Brenau_0_416_0_2_2_2_2

New Line.l(r:p1udm10679-p1ulv50532) Units=km Length=0.0134383 bus1=p1udm10679.1.2 bus2=p1ulv50532.1.2 switch=n enabled=y phases=2 Linecode=1P_UG_AL_1/0_Brenau_0_416_0_2_2_2_2

New Line.l(r:p1udm10679-p1udt3006lv) Units=km Length=0.0121531 bus1=p1udt3006lv.1.2 bus2=p1udm10679.1.2 switch=n enabled=y phases=2 Linecode=1P_UG_AL_1/0_Brenau_0_416_0_2_2_2_2

New Line.l(r:p1udt3007lv-p1ulv3215) Units=km Length=0.0239158 bus1=p1udt3007lv.1.2 bus2=p1ulv3215.1.2 switch=n enabled=y phases=2 Linecode=1P_OH_AL_2/0_Rucina_0_416_0_2_2_2_2

New Line.l(r:p1udt3007lv-p1ulv11349) Units=km Length=0.0201052 bus1=p1udt3007lv.1.2 bus2=p1ulv11349.1.2 switch=n enabled=y phases=2 Linecode=1P_OH_AL_2/0_Rucina_0_416_0_2_2_2_2

New Line.l(r:p1udt3007lv-p1ulv17621) Units=km Length=0.026840200000000005 bus1=p1udt3007lv.1.2 bus2=p1ulv17621.1.2 switch=n enabled=y phases=2 Linecode=1P_OH_AL_2/0_Rucina_0_416_0_2_2_2_2

New Line.l(r:p1udt3007lv-p1ulv18271) Units=km Length=0.0231347 bus1=p1udt3007lv.1.2 bus2=p1ulv18271.1.2 switch=n enabled=y phases=2 Linecode=1P_OH_AL_2/0_Rucina_0_416_0_2_2_2_2

New Line.l(r:p1udm10685-p1ulv43007) Units=km Length=0.0136558 bus1=p1udm10685.1.2 bus2=p1ulv43007.1.2 switch=n enabled=y phases=2 Linecode=1P_OH_AL_2/0_Rucina_0_416_0_2_2_2_2

New Line.l(r:p1udm10685-p1udt3007lv) Units=km Length=0.0190957 bus1=p1udt3007lv.1.2 bus2=p1udm10685.1.2 switch=n enabled=y phases=2 Linecode=1P_OH_AL_2/0_Rucina_0_416_0_2_2_2_2

New Line.l(r:p1udt3567lv-p1ulv16333) Units=km Length=0.014930900000000002 bus1=p1udt3567lv.1.2 bus2=p1ulv16333.1.2 switch=n enabled=y phases=2 Linecode=1P_OH_AL_2/0_Rucina_0_416_0_2_2_2_2

New Line.l(r:p1udt3567lv-p1ulv41137) Units=km Length=0.0166951 bus1=p1udt3567lv.1.2 bus2=p1ulv41137.1.2 switch=n enabled=y phases=2 Linecode=1P_OH_AL_2/0_Rucina_0_416_0_2_2_2_2

New Line.l(r:p1udm12621-p1ulv3848) Units=km Length=0.0144433 bus1=p1udm12621.1.2 bus2=p1ulv3848.1.2 switch=n enabled=y phases=2 Linecode=1P_OH_AL_2/0_Rucina_0_416_0_2_2_2_2

New Line.l(r:p1udm12621-p1udt3567lv) Units=km Length=0.0191044 bus1=p1udt3567lv.1.2 bus2=p1udm12621.1.2 switch=n enabled=y phases=2 Linecode=1P_OH_AL_2/0_Rucina_0_416_0_2_2_2_2

New Line.l(r:p1udm12622-p1ulv8869) Units=km Length=0.0167571 bus1=p1udm12622.1.2 bus2=p1ulv8869.1.2 switch=n enabled=y phases=2 Linecode=1P_OH_AL_2/0_Rucina_0_416_0_2_2_2_2

New Line.l(r:p1udm12622-p1ulv59776) Units=km Length=0.015939 bus1=p1udm12622.1.2 bus2=p1ulv59776.1.2 switch=n enabled=y phases=2 Linecode=1P_OH_AL_2/0_Rucina_0_416_0_2_2_2_2

New Line.l(r:p1udm12622-p1udt3567lv) Units=km Length=0.0190957 bus1=p1udt3567lv.1.2 bus2=p1udm12622.1.2 switch=n enabled=y phases=2 Linecode=1P_OH_AL_2/0_Rucina_0_416_0_2_2_2_2

New Line.l(r:p1udt3568lv-p1ulv3849) Units=km Length=0.0169612 bus1=p1udt3568lv.1.2 bus2=p1ulv3849.1.2 switch=n enabled=y phases=2 Linecode=1P_OH_AL_2/0_Rucina_0_416_0_2_2_2_2

New Line.l(r:p1udt3568lv-p1ulv10096) Units=km Length=0.0138613 bus1=p1udt3568lv.1.2 bus2=p1ulv10096.1.2 switch=n enabled=y phases=2 Linecode=1P_OH_AL_2/0_Rucina_0_416_0_2_2_2_2

New Line.l(r:p1udt3568lv-p1ulv23403) Units=km Length=0.0205933 bus1=p1udt3568lv.1.2 bus2=p1ulv23403.1.2 switch=n enabled=y phases=2 Linecode=1P_OH_AL_2/0_Rucina_0_416_0_2_2_2_2

New Line.l(r:p1udt3568lv-p1ulv54961) Units=km Length=0.0263542 bus1=p1udt3568lv.1.2 bus2=p1ulv54961.1.2 switch=n enabled=y phases=2 Linecode=1P_OH_AL_2/0_Rucina_0_416_0_2_2_2_2

New Line.l(r:p1udm12628-p1ulv12599) Units=km Length=0.0269384 bus1=p1udm12628.1.2 bus2=p1ulv12599.1.2 switch=n enabled=y phases=2 Linecode=1P_OH_AL_2/0_Rucina_0_416_0_2_2_2_2

New Line.l(r:p1udm12628-p1udt3568lv) Units=km Length=0.0196327 bus1=p1udt3568lv.1.2 bus2=p1udm12628.1.2 switch=n enabled=y phases=2 Linecode=1P_OH_AL_2/0_Rucina_0_416_0_2_2_2_2

New Line.l(r:p1udm12631-p1ulv3850) Units=km Length=0.0158826 bus1=p1udm12631.1.2 bus2=p1ulv3850.1.2 switch=n enabled=y phases=2 Linecode=1P_OH_AL_2/0_Rucina_0_416_0_2_2_2_2

New Line.l(r:p1udm12631-p1udt3569lv) Units=km Length=0.0197953 bus1=p1udt3569lv.1.2 bus2=p1udm12631.1.2 switch=n enabled=y phases=2 Linecode=1P_OH_AL_2/0_Rucina_0_416_0_2_2_2_2

New Line.l(r:p1udm12632-p1ulv6367) Units=km Length=0.0109738 bus1=p1udm12632.1.2 bus2=p1ulv6367.1.2 switch=n enabled=y phases=2 Linecode=1P_OH_AL_2/0_Rucina_0_416_0_2_2_2_2

New Line.l(r:p1udm12632-p1ulv62271) Units=km Length=0.0118084 bus1=p1udm12632.1.2 bus2=p1ulv62271.1.2 switch=n enabled=y phases=2 Linecode=1P_OH_AL_2/0_Rucina_0_416_0_2_2_2_2

New Line.l(r:p1udm12632-p1udt3569lv) Units=km Length=0.0197911 bus1=p1udt3569lv.1.2 bus2=p1udm12632.1.2 switch=n enabled=y phases=2 Linecode=1P_OH_AL_2/0_Rucina_0_416_0_2_2_2_2

New Line.l(r:p1udt4064lv-p1ulv4447) Units=km Length=0.022595 bus1=p1udt4064lv.1.2 bus2=p1ulv4447.1.2 switch=n enabled=y phases=2 Linecode=1P_OH_AL_2/0_Rucina_0_416_0_2_2_2_2

New Line.l(r:p1udt5062lv-p1ulv5707) Units=km Length=0.0176302 bus1=p1udt5062lv.1.2 bus2=p1ulv5707.1.2 switch=n enabled=y phases=2 Linecode=1P_UG_AL_1/0_Brenau_0_416_0_2_2_2_2

New Line.l(r:p1udt5062lv-p1ulv34856) Units=km Length=0.0154905 bus1=p1udt5062lv.1.2 bus2=p1ulv34856.1.2 switch=n enabled=y phases=2 Linecode=1P_UG_AL_1/0_Brenau_0_416_0_2_2_2_2

New Line.l(r:p1udm17692-p1ulv60404) Units=km Length=0.0175774 bus1=p1udm17692.1.2 bus2=p1ulv60404.1.2 switch=n enabled=y phases=2 Linecode=1P_UG_AL_1/0_Brenau_0_416_0_2_2_2_2

New Line.l(r:p1udm17692-p1udt5062lv) Units=km Length=0.00955491 bus1=p1udt5062lv.1.2 bus2=p1udm17692.1.2 switch=n enabled=y phases=2 Linecode=1P_UG_AL_1/0_Brenau_0_416_0_2_2_2_2

New Line.l(r:p1udt5065lv-p1ulv5710) Units=km Length=0.0178891 bus1=p1udt5065lv.1.2 bus2=p1ulv5710.1.2 switch=n enabled=y phases=2 Linecode=1P_UG_AL_1/0_Brenau_0_416_0_2_2_2_2

New Line.l(r:p1udt5585lv-p1ulv6366) Units=km Length=0.0128781 bus1=p1udt5585lv.1.2 bus2=p1ulv6366.1.2 switch=n enabled=y phases=2 Linecode=1P_OH_AL_2/0_Rucina_0_416_0_2_2_2_2

New Line.l(r:p1udm21029-p1ulv6993) Units=km Length=0.0181096 bus1=p1udm21029.1.2 bus2=p1ulv6993.1.2 switch=n enabled=y phases=2 Linecode=1P_UG_AL_1/0_Brenau_0_416_0_2_2_2_2

New Line.l(r:p1udm21029-p1ulv13844) Units=km Length=0.0143875 bus1=p1udm21029.1.2 bus2=p1ulv13844.1.2 switch=n enabled=y phases=2 Linecode=1P_UG_AL_1/0_Brenau_0_416_0_2_2_2_2

New Line.l(r:p1udm21029-p1udt6065lv) Units=km Length=0.00872244 bus1=p1udt6065lv.1.2 bus2=p1udm21029.1.2 switch=n enabled=y phases=2 Linecode=1P_UG_AL_4/0_Sweetbriar_0_416_0_2_2_2_2

New Line.l(r:p1udm21030-p1ulv12597) Units=km Length=0.0151919 bus1=p1udm21030.1.2 bus2=p1ulv12597.1.2 switch=n enabled=y phases=2 Linecode=1P_UG_AL_1/0_Brenau_0_416_0_2_2_2_2

New Line.l(r:p1udm21030-p1udt6065lv) Units=km Length=0.0245792 bus1=p1udt6065lv.1.2 bus2=p1udm21030.1.2 switch=n enabled=y phases=2 Linecode=1P_UG_AL_1/0_Brenau_0_416_0_2_2_2_2

New Line.l(r:p1udt6967lv-p1ulv8223) Units=km Length=0.0212207 bus1=p1udt6967lv.1.2 bus2=p1ulv8223.1.2 switch=n enabled=y phases=2 Linecode=1P_OH_AL_2/0_Rucina_0_416_0_2_2_2_2

New Line.l(r:p1udt6967lv-p1ulv25947) Units=km Length=0.0201949 bus1=p1udt6967lv.1.2 bus2=p1ulv25947.1.2 switch=n enabled=y phases=2 Linecode=1P_OH_AL_2/0_Rucina_0_416_0_2_2_2_2

New Line.l(r:p1udt6967lv-p1ulv39268) Units=km Length=0.0307642 bus1=p1udt6967lv.1.2 bus2=p1ulv39268.1.2 switch=n enabled=y phases=2 Linecode=1P_OH_AL_4/0_Zuzara_0_416_0_2_2_2_2

New Line.l(r:p1udt7430lv-p1ulv8870) Units=km Length=0.024149300000000002 bus1=p1udt7430lv.1.2 bus2=p1ulv8870.1.2 switch=n enabled=y phases=2 Linecode=1P_OH_AL_2/0_Rucina_0_416_0_2_2_2_2

New Line.l(r:p1udt7430lv-p1ulv15693) Units=km Length=0.0259929 bus1=p1udt7430lv.1.2 bus2=p1ulv15693.1.2 switch=n enabled=y phases=2 Linecode=1P_OH_AL_2/0_Rucina_0_416_0_2_2_2_2

New Line.l(r:p1udt7430lv-p1ulv53063) Units=km Length=0.0267308 bus1=p1udt7430lv.1.2 bus2=p1ulv53063.1.2 switch=n enabled=y phases=2 Linecode=1P_OH_AL_2/0_Rucina_0_416_0_2_2_2_2

New Line.l(r:p1udm25469-p1ulv48090) Units=km Length=0.0125155 bus1=p1udm25469.1.2 bus2=p1ulv48090.1.2 switch=n enabled=y phases=2 Linecode=1P_OH_AL_2/0_Rucina_0_416_0_2_2_2_2

New Line.l(r:p1udm25469-p1ulv59168) Units=km Length=0.018286100000000003 bus1=p1udm25469.1.2 bus2=p1ulv59168.1.2 switch=n enabled=y phases=2 Linecode=1P_OH_AL_2/0_Rucina_0_416_0_2_2_2_2

New Line.l(r:p1udm25469-p1udt7430lv) Units=km Length=0.0167619 bus1=p1udt7430lv.1.2 bus2=p1udm25469.1.2 switch=n enabled=y phases=2 Linecode=1P_OH_AL_2/0_Rucina_0_416_0_2_2_2_2

New Line.l(r:p1udt8634lv-p1ulv10723) Units=km Length=0.0174254 bus1=p1udt8634lv.1.2 bus2=p1ulv10723.1.2 switch=n enabled=y phases=2 Linecode=1P_UG_AL_1/0_Brenau_0_416_0_2_2_2_2

New Line.l(r:p1udt8634lv-p1ulv32924) Units=km Length=0.014646300000000001 bus1=p1udt8634lv.1.2 bus2=p1ulv32924.1.2 switch=n enabled=y phases=2 Linecode=1P_UG_AL_1/0_Brenau_0_416_0_2_2_2_2

New Line.l(r:p1udt8634lv-p1ulv64202) Units=km Length=0.0164432 bus1=p1udt8634lv.1.2 bus2=p1ulv64202.1.2 switch=n enabled=y phases=2 Linecode=1P_UG_AL_1/0_Brenau_0_416_0_2_2_2_2

New Line.l(r:p1udm29294-p1ulv49298) Units=km Length=0.0151108 bus1=p1udm29294.1.2 bus2=p1ulv49298.1.2 switch=n enabled=y phases=2 Linecode=1P_UG_AL_1/0_Brenau_0_416_0_2_2_2_2

New Line.l(r:p1udm29293-p1ulv47456) Units=km Length=0.0154142 bus1=p1udm29293.1.2 bus2=p1ulv47456.1.2 switch=n enabled=y phases=2 Linecode=1P_UG_AL_1/0_Brenau_0_416_0_2_2_2_2

New Line.l(r:p1udm29293-p1udm29294) Units=km Length=0.10124200000000001 bus1=p1udm29294.1.2 bus2=p1udm29293.1.2 switch=n enabled=y phases=2 Linecode=1P_UG_AL_1/0_Brenau_0_416_0_2_2_2_2

New Line.l(r:p1udm29294-p1udt8634lv) Units=km Length=0.00986147 bus1=p1udt8634lv.1.2 bus2=p1udm29294.1.2 switch=n enabled=y phases=2 Linecode=1P_UG_AL_4/0_Sweetbriar_0_416_0_2_2_2_2

New Line.l(r:p1udt8635lv-p1ulv10724) Units=km Length=0.015060700000000002 bus1=p1udt8635lv.1.2 bus2=p1ulv10724.1.2 switch=n enabled=y phases=2 Linecode=1P_UG_AL_1/0_Brenau_0_416_0_2_2_2_2

New Line.l(r:p1udt9019lv-p1ulv59777) Units=km Length=0.0119651 bus1=p1udt9019lv.1.2 bus2=p1ulv59777.1.2 switch=n enabled=y phases=2 Linecode=1P_UG_AL_1/0_Brenau_0_416_0_2_2_2_2

New Line.l(r:p1udm30452-p1ulv11348) Units=km Length=0.0164676 bus1=p1udm30452.1.2 bus2=p1ulv11348.1.2 switch=n enabled=y phases=2 Linecode=1P_OH_AL_2/0_Rucina_0_416_0_2_2_2_2

New Line.l(r:p1udm30452-p1udt9019lv) Units=km Length=0.0429018 bus1=p1udt9019lv.1.2 bus2=p1udm30452.1.2 switch=n enabled=y phases=2 Linecode=1P_OH_AL_4/0_Zuzara_0_416_0_2_2_2_2

New Line.l(r:p1udm30453-p1ulv55574) Units=km Length=0.013455 bus1=p1udm30453.1.2 bus2=p1ulv55574.1.2 switch=n enabled=y phases=2 Linecode=1P_UG_AL_1/0_Brenau_0_416_0_2_2_2_2

New Line.l(r:p1udm30453-p1udt9019lv) Units=km Length=0.00921558 bus1=p1udt9019lv.1.2 bus2=p1udm30453.1.2 switch=n enabled=y phases=2 Linecode=1P_UG_AL_1/0_Brenau_0_416_0_2_2_2_2

New Line.l(r:p1udt9397lv-p1ulv11969) Units=km Length=0.0198469 bus1=p1udt9397lv.1.2 bus2=p1ulv11969.1.2 switch=n enabled=y phases=2 Linecode=1P_OH_AL_2/0_Rucina_0_416_0_2_2_2_2

New Line.l(r:p1udt9782lv-p1ulv22756) Units=km Length=0.0142307 bus1=p1udt9782lv.1.2 bus2=p1ulv22756.1.2 switch=n enabled=y phases=2 Linecode=1P_UG_AL_1/0_Brenau_0_416_0_2_2_2_2

New Line.l(r:p1udt9782lv-p1ulv44304) Units=km Length=0.0186104 bus1=p1udt9782lv.1.2 bus2=p1ulv44304.1.2 switch=n enabled=y phases=2 Linecode=1P_UG_AL_1/0_Brenau_0_416_0_2_2_2_2

New Line.l(r:p1udm32787-p1ulv12594) Units=km Length=0.0169451 bus1=p1udm32787.1.2 bus2=p1ulv12594.1.2 switch=n enabled=y phases=2 Linecode=1P_UG_AL_1/0_Brenau_0_416_0_2_2_2_2

New Line.l(r:p1udm32787-p1udt9782lv) Units=km Length=0.00912772 bus1=p1udt9782lv.1.2 bus2=p1udm32787.1.2 switch=n enabled=y phases=2 Linecode=1P_UG_AL_1/0_Brenau_0_416_0_2_2_2_2

New Line.l(r:p1udt9783lv-p1ulv12595) Units=km Length=0.017173 bus1=p1udt9783lv.1.2 bus2=p1ulv12595.1.2 switch=n enabled=y phases=2 Linecode=1P_UG_AL_4/0_Sweetbriar_0_416_0_2_2_2_2

New Line.l(r:p1udt9783lv-p1ulv54960) Units=km Length=0.0153128 bus1=p1udt9783lv.1.2 bus2=p1ulv54960.1.2 switch=n enabled=y phases=2 Linecode=1P_UG_AL_1/0_Brenau_0_416_0_2_2_2_2

New Line.l(r:p1udm32792-p1ulv12596) Units=km Length=0.016233500000000005 bus1=p1udm32792.1.2 bus2=p1ulv12596.1.2 switch=n enabled=y phases=2 Linecode=1P_OH_AL_2/0_Rucina_0_416_0_2_2_2_2

New Line.l(r:p1udm32792-p1ulv19608) Units=km Length=0.0158692 bus1=p1udm32792.1.2 bus2=p1ulv19608.1.2 switch=n enabled=y phases=2 Linecode=1P_OH_AL_2/0_Rucina_0_416_0_2_2_2_2

New Line.l(r:p1udm32792-p1udt9784lv) Units=km Length=0.0190957 bus1=p1udt9784lv.1.2 bus2=p1udm32792.1.2 switch=n enabled=y phases=2 Linecode=1P_OH_AL_2/0_Rucina_0_416_0_2_2_2_2

New Line.l(r:p1udm32793-p1ulv18953) Units=km Length=0.0139446 bus1=p1udm32793.1.2 bus2=p1ulv18953.1.2 switch=n enabled=y phases=2 Linecode=1P_OH_AL_2/0_Rucina_0_416_0_2_2_2_2

New Line.l(r:p1udm32793-p1udt9784lv) Units=km Length=0.0556427 bus1=p1udt9784lv.1.2 bus2=p1udm32793.1.2 switch=n enabled=y phases=2 Linecode=1P_OH_AL_4/0_Zuzara_0_416_0_2_2_2_2

New Line.l(r:p1udt9785lv-p1ulv26575) Units=km Length=0.0203109 bus1=p1udt9785lv.1.2 bus2=p1ulv26575.1.2 switch=n enabled=y phases=2 Linecode=1P_UG_AL_1/0_Brenau_0_416_0_2_2_2_2

New Line.l(r:p1udm32795-p1ulv12598) Units=km Length=0.0189449 bus1=p1udm32795.1.2 bus2=p1ulv12598.1.2 switch=n enabled=y phases=2 Linecode=1P_UG_AL_1/0_Brenau_0_416_0_2_2_2_2

New Line.l(r:p1udm32795-p1ulv31645) Units=km Length=0.0158088 bus1=p1udm32795.1.2 bus2=p1ulv31645.1.2 switch=n enabled=y phases=2 Linecode=1P_UG_AL_1/0_Brenau_0_416_0_2_2_2_2

New Line.l(r:p1udm32795-p1udt9785lv) Units=km Length=0.00801544 bus1=p1udt9785lv.1.2 bus2=p1udm32795.1.2 switch=n enabled=y phases=2 Linecode=1P_UG_AL_4/0_Sweetbriar_0_416_0_2_2_2_2

New Line.l(r:p1udm32798-p1ulv48091) Units=km Length=0.020501 bus1=p1udm32798.1.2 bus2=p1ulv48091.1.2 switch=n enabled=y phases=2 Linecode=1P_UG_AL_1/0_Brenau_0_416_0_2_2_2_2

New Line.l(r:p1udm32798-p1ulv59778) Units=km Length=0.0176776 bus1=p1udm32798.1.2 bus2=p1ulv59778.1.2 switch=n enabled=y phases=2 Linecode=1P_UG_AL_1/0_Brenau_0_416_0_2_2_2_2

New Line.l(r:p1udm32798-p1udt9785lv) Units=km Length=0.0160388 bus1=p1udt9785lv.1.2 bus2=p1udm32798.1.2 switch=n enabled=y phases=2 Linecode=1P_UG_AL_4/0_Sweetbriar_0_416_0_2_2_2_2

New Line.l(r:p1udt9786lv-p1ulv12600) Units=km Length=0.015332500000000002 bus1=p1udt9786lv.1.2 bus2=p1ulv12600.1.2 switch=n enabled=y phases=2 Linecode=1P_OH_AL_2/0_Rucina_0_416_0_2_2_2_2

New Line.l(r:p1udt9786lv-p1ulv22125) Units=km Length=0.0176598 bus1=p1udt9786lv.1.2 bus2=p1ulv22125.1.2 switch=n enabled=y phases=2 Linecode=1P_OH_AL_2/0_Rucina_0_416_0_2_2_2_2

New Line.l(r:p1udm32802-p1ulv41751) Units=km Length=0.015088 bus1=p1udm32802.1.2 bus2=p1ulv41751.1.2 switch=n enabled=y phases=2 Linecode=1P_OH_AL_2/0_Rucina_0_416_0_2_2_2_2

New Line.l(r:p1udm32802-p1ulv57978) Units=km Length=0.0175055 bus1=p1udm32802.1.2 bus2=p1ulv57978.1.2 switch=n enabled=y phases=2 Linecode=1P_OH_AL_2/0_Rucina_0_416_0_2_2_2_2

New Line.l(r:p1udm32802-p1udt9786lv) Units=km Length=0.0169783 bus1=p1udt9786lv.1.2 bus2=p1udm32802.1.2 switch=n enabled=y phases=2 Linecode=1P_OH_AL_2/0_Rucina_0_416_0_2_2_2_2

New Line.l(r:p1udt10146lv-p1ulv13216) Units=km Length=0.0170559 bus1=p1udt10146lv.1.2 bus2=p1ulv13216.1.2 switch=n enabled=y phases=2 Linecode=1P_UG_AL_1/0_Brenau_0_416_0_2_2_2_2

New Line.l(r:p1udm34950-p1ulv13843) Units=km Length=0.0180854 bus1=p1udm34950.1.2 bus2=p1ulv13843.1.2 switch=n enabled=y phases=2 Linecode=1P_UG_AL_1/0_Brenau_0_416_0_2_2_2_2

New Line.l(r:p1udm34954-p1ulv59775) Units=km Length=0.0177464 bus1=p1udm34954.1.2 bus2=p1ulv59775.1.2 switch=n enabled=y phases=2 Linecode=1P_UG_AL_1/0_Brenau_0_416_0_2_2_2_2

New Line.l(r:p1udm34950-p1udm34954) Units=km Length=0.03957680000000001 bus1=p1udm34950.1.2 bus2=p1udm34954.1.2 switch=n enabled=y phases=2 Linecode=1P_UG_AL_1/0_Brenau_0_416_0_2_2_2_2

New Line.l(r:p1udm34950-p1udt10510lv) Units=km Length=0.0266083 bus1=p1udt10510lv.1.2 bus2=p1udm34950.1.2 switch=n enabled=y phases=2 Linecode=1P_UG_AL_4/0_Sweetbriar_0_416_0_2_2_2_2

New Line.l(r:p1udm34952-p1ulv43678) Units=km Length=0.014235200000000002 bus1=p1udm34952.1.2 bus2=p1ulv43678.1.2 switch=n enabled=y phases=2 Linecode=1P_UG_AL_1/0_Brenau_0_416_0_2_2_2_2

New Line.l(r:p1udm34951-p1ulv32925) Units=km Length=0.012843300000000002 bus1=p1udm34951.1.2 bus2=p1ulv32925.1.2 switch=n enabled=y phases=2 Linecode=1P_UG_AL_1/0_Brenau_0_416_0_2_2_2_2

New Line.l(r:p1udm34953-p1ulv57388) Units=km Length=0.0144868 bus1=p1udm34953.1.2 bus2=p1ulv57388.1.2 switch=n enabled=y phases=2 Linecode=1P_UG_AL_1/0_Brenau_0_416_0_2_2_2_2

New Line.l(r:p1udm34951-p1udm34953) Units=km Length=0.00946231 bus1=p1udm34951.1.2 bus2=p1udm34953.1.2 switch=n enabled=y phases=2 Linecode=1P_UG_AL_1/0_Brenau_0_416_0_2_2_2_2

New Line.l(r:p1udm34951-p1udm34952) Units=km Length=0.01893 bus1=p1udm34952.1.2 bus2=p1udm34951.1.2 switch=n enabled=y phases=2 Linecode=1P_UG_AL_4/0_Sweetbriar_0_416_0_2_2_2_2

New Line.l(r:p1udm34952-p1udt10510lv) Units=km Length=0.00945846 bus1=p1udt10510lv.1.2 bus2=p1udm34952.1.2 switch=n enabled=y phases=2 Linecode=1P_UG_AL_4/0_Sweetbriar_0_416_0_2_2_2_2

New Line.l(r:p1udm35911-p1ulv14450) Units=km Length=0.0118928 bus1=p1udm35911.1.2 bus2=p1ulv14450.1.2 switch=n enabled=y phases=2 Linecode=1P_UG_AL_1/0_Brenau_0_416_0_2_2_2_2

New Line.l(r:p1udm35911-p1udt10847lv) Units=km Length=0.0313813 bus1=p1udt10847lv.1.2 bus2=p1udm35911.1.2 switch=n enabled=y phases=2 Linecode=1P_UG_AL_1/0_Brenau_0_416_0_2_2_2_2

New Line.l(r:p1udm35912-p1ulv35489) Units=km Length=0.0140312 bus1=p1udm35912.1.2 bus2=p1ulv35489.1.2 switch=n enabled=y phases=2 Linecode=1P_UG_AL_1/0_Brenau_0_416_0_2_2_2_2

New Line.l(r:p1udm35912-p1udt10847lv) Units=km Length=0.034308500000000006 bus1=p1udt10847lv.1.2 bus2=p1udm35912.1.2 switch=n enabled=y phases=2 Linecode=1P_UG_AL_1/0_Brenau_0_416_0_2_2_2_2

New Line.l(r:p1udt10849lv-p1ulv14452) Units=km Length=0.0107818 bus1=p1udt10849lv.1.2 bus2=p1ulv14452.1.2 switch=n enabled=y phases=2 Linecode=1P_OH_AL_2/0_Rucina_0_416_0_2_2_2_2

New Line.l(r:p1udt11533lv-p1ulv17618) Units=km Length=0.0140122 bus1=p1udt11533lv.1.2 bus2=p1ulv17618.1.2 switch=n enabled=y phases=2 Linecode=1P_OH_AL_2/0_Rucina_0_416_0_2_2_2_2

New Line.l(r:p1udt11533lv-p1ulv33576) Units=km Length=0.020723300000000004 bus1=p1udt11533lv.1.2 bus2=p1ulv33576.1.2 switch=n enabled=y phases=2 Linecode=1P_OH_AL_2/0_Rucina_0_416_0_2_2_2_2

New Line.l(r:p1udm37857-p1ulv15690) Units=km Length=0.0184404 bus1=p1udm37857.1.2 bus2=p1ulv15690.1.2 switch=n enabled=y phases=2 Linecode=1P_OH_AL_2/0_Rucina_0_416_0_2_2_2_2

New Line.l(r:p1udm37857-p1ulv45587) Units=km Length=0.0138213 bus1=p1udm37857.1.2 bus2=p1ulv45587.1.2 switch=n enabled=y phases=2 Linecode=1P_OH_AL_2/0_Rucina_0_416_0_2_2_2_2

New Line.l(r:p1udm37857-p1udt11533lv) Units=km Length=0.0184952 bus1=p1udt11533lv.1.2 bus2=p1udm37857.1.2 switch=n enabled=y phases=2 Linecode=1P_OH_AL_2/0_Rucina_0_416_0_2_2_2_2

New Line.l(r:p1udt11534lv-p1ulv27881) Units=km Length=0.0168036 bus1=p1udt11534lv.1.2 bus2=p1ulv27881.1.2 switch=n enabled=y phases=2 Linecode=1P_OH_AL_2/0_Rucina_0_416_0_2_2_2_2

New Line.l(r:p1udt11534lv-p1ulv54318) Units=km Length=0.0156686 bus1=p1udt11534lv.1.2 bus2=p1ulv54318.1.2 switch=n enabled=y phases=2 Linecode=1P_OH_AL_2/0_Rucina_0_416_0_2_2_2_2

New Line.l(r:p1udm37861-p1ulv15694) Units=km Length=0.0163495 bus1=p1udm37861.1.2 bus2=p1ulv15694.1.2 switch=n enabled=y phases=2 Linecode=1P_OH_AL_2/0_Rucina_0_416_0_2_2_2_2

New Line.l(r:p1udm37861-p1udt11534lv) Units=km Length=0.0178923 bus1=p1udt11534lv.1.2 bus2=p1udm37861.1.2 switch=n enabled=y phases=2 Linecode=1P_OH_AL_2/0_Rucina_0_416_0_2_2_2_2

New Line.l(r:p1udm42433-p1ulv18951) Units=km Length=0.0129682 bus1=p1udm42433.1.2 bus2=p1ulv18951.1.2 switch=n enabled=y phases=2 Linecode=1P_OH_AL_2/0_Rucina_0_416_0_2_2_2_2

New Line.l(r:p1udm42433-p1ulv57385) Units=km Length=0.0240812 bus1=p1udm42433.1.2 bus2=p1ulv57385.1.2 switch=n enabled=y phases=2 Linecode=1P_OH_AL_2/0_Rucina_0_416_0_2_2_2_2

New Line.l(r:p1udm42433-p1udt13211lv) Units=km Length=0.0374396 bus1=p1udt13211lv.1.2 bus2=p1udm42433.1.2 switch=n enabled=y phases=2 Linecode=1P_OH_AL_4/0_Zuzara_0_416_0_2_2_2_2

New Line.l(r:p1udm42434-p1ulv25951) Units=km Length=0.017413700000000004 bus1=p1udm42434.1.2 bus2=p1ulv25951.1.2 switch=n enabled=y phases=2 Linecode=1P_UG_AL_1/0_Brenau_0_416_0_2_2_2_2

New Line.l(r:p1udm42434-p1ulv46247) Units=km Length=0.0187848 bus1=p1udm42434.1.2 bus2=p1ulv46247.1.2 switch=n enabled=y phases=2 Linecode=1P_UG_AL_1/0_Brenau_0_416_0_2_2_2_2

New Line.l(r:p1udm42434-p1ulv52451) Units=km Length=0.013779600000000001 bus1=p1udm42434.1.2 bus2=p1ulv52451.1.2 switch=n enabled=y phases=2 Linecode=1P_UG_AL_1/0_Brenau_0_416_0_2_2_2_2

New Line.l(r:p1udm42438-p1ulv61016) Units=km Length=0.0189666 bus1=p1udm42438.1.2 bus2=p1ulv61016.1.2 switch=n enabled=y phases=2 Linecode=1P_UG_AL_1/0_Brenau_0_416_0_2_2_2_2

New Line.l(r:p1udm42434-p1udm42438) Units=km Length=0.0268471 bus1=p1udm42434.1.2 bus2=p1udm42438.1.2 switch=n enabled=y phases=2 Linecode=1P_UG_AL_1/0_Brenau_0_416_0_2_2_2_2

New Line.l(r:p1udm42434-p1udt13211lv) Units=km Length=0.00915079 bus1=p1udt13211lv.1.2 bus2=p1udm42434.1.2 switch=n enabled=y phases=2 Linecode=1P_UG_AL_4/0_Sweetbriar_0_416_0_2_2_2_2

New Line.l(r:p1udt13802lv-p1ulv20223) Units=km Length=0.0161921 bus1=p1udt13802lv.1.2 bus2=p1ulv20223.1.2 switch=n enabled=y phases=2 Linecode=1P_UG_AL_1/0_Brenau_0_416_0_2_2_2_2

New Line.l(r:p1udt13802lv-p1ulv48088) Units=km Length=0.012638200000000002 bus1=p1udt13802lv.1.2 bus2=p1ulv48088.1.2 switch=n enabled=y phases=2 Linecode=1P_UG_AL_1/0_Brenau_0_416_0_2_2_2_2

New Line.l(r:p1udm43922-p1ulv52450) Units=km Length=0.0161708 bus1=p1udm43922.1.2 bus2=p1ulv52450.1.2 switch=n enabled=y phases=2 Linecode=1P_UG_AL_1/0_Brenau_0_416_0_2_2_2_2

New Line.l(r:p1udm43922-p1udt13802lv) Units=km Length=0.00815412 bus1=p1udt13802lv.1.2 bus2=p1udm43922.1.2 switch=n enabled=y phases=2 Linecode=1P_UG_AL_1/0_Brenau_0_416_0_2_2_2_2

New Line.l(r:p1udt13803lv-p1ulv20224) Units=km Length=0.043092700000000005 bus1=p1udt13803lv.1.2 bus2=p1ulv20224.1.2 switch=n enabled=y phases=2 Linecode=1P_OH_AL_4/0_Zuzara_0_416_0_2_2_2_2

New Line.l(r:p1udt13803lv-p1ulv54962) Units=km Length=0.07576990000000002 bus1=p1udt13803lv.1.2 bus2=p1ulv54962.1.2 switch=n enabled=y phases=2 Linecode=1P_OH_AL_4/0_Zuzara_0_416_0_2_2_2_2

New Line.l(r:p1udm43924-p1ulv46251) Units=km Length=0.0547399 bus1=p1udm43924.1.2 bus2=p1ulv46251.1.2 switch=n enabled=y phases=2 Linecode=1P_OH_AL_4/0_Zuzara_0_416_0_2_2_2_2

New Line.l(r:p1udm43924-p1udt13803lv) Units=km Length=0.0187016 bus1=p1udt13803lv.1.2 bus2=p1udm43924.1.2 switch=n enabled=y phases=2 Linecode=1P_OH_AL_2/0_Rucina_0_416_0_2_2_2_2

New Line.l(r:p1udm45958-p1ulv22124) Units=km Length=0.016151 bus1=p1udm45958.1.2 bus2=p1ulv22124.1.2 switch=n enabled=y phases=2 Linecode=1P_OH_AL_2/0_Rucina_0_416_0_2_2_2_2

New Line.l(r:p1udm45958-p1udt14627lv) Units=km Length=0.0108405 bus1=p1udt14627lv.1.2 bus2=p1udm45958.1.2 switch=n enabled=y phases=2 Linecode=1P_OH_AL_2/0_Rucina_0_416_0_2_2_2_2

New Line.l(r:p1udm45959-p1ulv31647) Units=km Length=0.0168377 bus1=p1udm45959.1.2 bus2=p1ulv31647.1.2 switch=n enabled=y phases=2 Linecode=1P_OH_AL_2/0_Rucina_0_416_0_2_2_2_2

New Line.l(r:p1udm45959-p1udt14627lv) Units=km Length=0.0110523 bus1=p1udt14627lv.1.2 bus2=p1udm45959.1.2 switch=n enabled=y phases=2 Linecode=1P_OH_AL_2/0_Rucina_0_416_0_2_2_2_2

New Line.l(r:p1udm46576-p1ulv22755) Units=km Length=0.015000500000000002 bus1=p1udm46576.1.2 bus2=p1ulv22755.1.2 switch=n enabled=y phases=2 Linecode=1P_UG_AL_1/0_Brenau_0_416_0_2_2_2_2

New Line.l(r:p1udm46576-p1ulv47455) Units=km Length=0.018199900000000005 bus1=p1udm46576.1.2 bus2=p1ulv47455.1.2 switch=n enabled=y phases=2 Linecode=1P_UG_AL_1/0_Brenau_0_416_0_2_2_2_2

New Line.l(r:p1udm46579-p1ulv46858) Units=km Length=0.0159867 bus1=p1udm46579.1.2 bus2=p1ulv46858.1.2 switch=n enabled=y phases=2 Linecode=1P_UG_AL_1/0_Brenau_0_416_0_2_2_2_2

New Line.l(r:p1udm46576-p1udm46579) Units=km Length=0.0701169 bus1=p1udm46576.1.2 bus2=p1udm46579.1.2 switch=n enabled=y phases=2 Linecode=1P_UG_AL_1/0_Brenau_0_416_0_2_2_2_2

New Line.l(r:p1udm46576-p1udt14879lv) Units=km Length=0.00952119 bus1=p1udt14879lv.1.2 bus2=p1udm46576.1.2 switch=n enabled=y phases=2 Linecode=1P_UG_AL_4/0_Sweetbriar_0_416_0_2_2_2_2

New Line.l(r:p1udm46577-p1ulv26569) Units=km Length=0.018182 bus1=p1udm46577.1.2 bus2=p1ulv26569.1.2 switch=n enabled=y phases=2 Linecode=1P_UG_AL_1/0_Brenau_0_416_0_2_2_2_2

New Line.l(r:p1udm46578-p1ulv32923) Units=km Length=0.013297900000000001 bus1=p1udm46578.1.2 bus2=p1ulv32923.1.2 switch=n enabled=y phases=2 Linecode=1P_UG_AL_1/0_Brenau_0_416_0_2_2_2_2

New Line.l(r:p1udm46577-p1udm46578) Units=km Length=0.00952568 bus1=p1udm46577.1.2 bus2=p1udm46578.1.2 switch=n enabled=y phases=2 Linecode=1P_UG_AL_1/0_Brenau_0_416_0_2_2_2_2

New Line.l(r:p1udm46577-p1udt14879lv) Units=km Length=0.00952119 bus1=p1udt14879lv.1.2 bus2=p1udm46577.1.2 switch=n enabled=y phases=2 Linecode=1P_UG_AL_4/0_Sweetbriar_0_416_0_2_2_2_2

New Line.l(r:p1udt14880lv-p1ulv22757) Units=km Length=0.0135042 bus1=p1udt14880lv.1.2 bus2=p1ulv22757.1.2 switch=n enabled=y phases=2 Linecode=1P_UG_AL_1/0_Brenau_0_416_0_2_2_2_2

New Line.l(r:p1udt15421lv-p1ulv24076) Units=km Length=0.0134458 bus1=p1udt15421lv.1.2 bus2=p1ulv24076.1.2 switch=n enabled=y phases=2 Linecode=1P_UG_AL_1/0_Brenau_0_416_0_2_2_2_2

New Line.l(r:p1udt15422lv-p1ulv24077) Units=km Length=0.0131236 bus1=p1udt15422lv.1.2 bus2=p1ulv24077.1.2 switch=n enabled=y phases=2 Linecode=1P_OH_AL_2/0_Rucina_0_416_0_2_2_2_2

New Line.l(r:p1udt15422lv-p1ulv64819) Units=km Length=0.017155200000000002 bus1=p1udt15422lv.1.2 bus2=p1ulv64819.1.2 switch=n enabled=y phases=2 Linecode=1P_OH_AL_2/0_Rucina_0_416_0_2_2_2_2

New Line.l(r:p1udm49036-p1ulv25308) Units=km Length=0.0181486 bus1=p1udm49036.1.2 bus2=p1ulv25308.1.2 switch=n enabled=y phases=2 Linecode=1P_UG_AL_2/0_Converse_0_416_0_2_2_2_2

New Line.l(r:p1udm49036-p1ulv51779) Units=km Length=0.017141900000000005 bus1=p1udm49036.1.2 bus2=p1ulv51779.1.2 switch=n enabled=y phases=2 Linecode=1P_UG_AL_1/0_Brenau_0_416_0_2_2_2_2

New Line.l(r:p1udm49036-p1udt15891lv) Units=km Length=0.00672043 bus1=p1udt15891lv.1.2 bus2=p1udm49036.1.2 switch=n enabled=y phases=2 Linecode=1P_UG_AL_4/0_Sweetbriar_0_416_0_2_2_2_2

New Line.l(r:p1udm49038-p1ulv42386) Units=km Length=0.0129212 bus1=p1udm49038.1.2 bus2=p1ulv42386.1.2 switch=n enabled=y phases=2 Linecode=1P_UG_AL_1/0_Brenau_0_416_0_2_2_2_2

New Line.l(r:p1udm49037-p1ulv38635) Units=km Length=0.0178856 bus1=p1udm49037.1.2 bus2=p1ulv38635.1.2 switch=n enabled=y phases=2 Linecode=1P_UG_AL_1/0_Brenau_0_416_0_2_2_2_2

New Line.l(r:p1udm49037-p1udm49038) Units=km Length=0.00669837 bus1=p1udm49038.1.2 bus2=p1udm49037.1.2 switch=n enabled=y phases=2 Linecode=1P_UG_AL_1/0_Brenau_0_416_0_2_2_2_2

New Line.l(r:p1udm49038-p1udt15891lv) Units=km Length=0.00672086 bus1=p1udt15891lv.1.2 bus2=p1udm49038.1.2 switch=n enabled=y phases=2 Linecode=1P_UG_AL_4/0_Sweetbriar_0_416_0_2_2_2_2

New Line.l(r:p1udt15892lv-p1ulv25309) Units=km Length=0.010954100000000001 bus1=p1udt15892lv.1.2 bus2=p1ulv25309.1.2 switch=n enabled=y phases=2 Linecode=1P_UG_AL_1/0_Brenau_0_416_0_2_2_2_2

New Line.l(r:p1udt16134lv-p1ulv25950) Units=km Length=0.015171500000000001 bus1=p1udt16134lv.1.2 bus2=p1ulv25950.1.2 switch=n enabled=y phases=2 Linecode=1P_OH_AL_2/0_Rucina_0_416_0_2_2_2_2

New Line.l(r:p1udt16134lv-p1ulv61010) Units=km Length=0.0136179 bus1=p1udt16134lv.1.2 bus2=p1ulv61010.1.2 switch=n enabled=y phases=2 Linecode=1P_OH_AL_2/0_Rucina_0_416_0_2_2_2_2

New Line.l(r:p1udt16365lv-p1ulv26573) Units=km Length=0.0291446 bus1=p1udt16365lv.1.2 bus2=p1ulv26573.1.2 switch=n enabled=y phases=2 Linecode=1P_OH_AL_4/0_Zuzara_0_416_0_2_2_2_2

New Line.l(r:p1udt16365lv-p1ulv62932) Units=km Length=0.0295087 bus1=p1udt16365lv.1.2 bus2=p1ulv62932.1.2 switch=n enabled=y phases=2 Linecode=1P_OH_AL_4/0_Zuzara_0_416_0_2_2_2_2

New Line.l(r:p1udm50079-p1ulv26574) Units=km Length=0.0191865 bus1=p1udm50079.1.2 bus2=p1ulv26574.1.2 switch=n enabled=y phases=2 Linecode=1P_UG_AL_1/0_Brenau_0_416_0_2_2_2_2

New Line.l(r:p1udm50079-p1udt16366lv) Units=km Length=0.0180612 bus1=p1udt16366lv.1.2 bus2=p1udm50079.1.2 switch=n enabled=y phases=2 Linecode=1P_UG_AL_1/0_Brenau_0_416_0_2_2_2_2

New Line.l(r:p1udm50082-p1ulv51780) Units=km Length=0.0185129 bus1=p1udm50082.1.2 bus2=p1ulv51780.1.2 switch=n enabled=y phases=2 Linecode=1P_UG_AL_1/0_Brenau_0_416_0_2_2_2_2

New Line.l(r:p1udm50080-p1ulv31644) Units=km Length=0.0171877 bus1=p1udm50080.1.2 bus2=p1ulv31644.1.2 switch=n enabled=y phases=2 Linecode=1P_UG_AL_2/0_Converse_0_416_0_2_2_2_2

New Line.l(r:p1udm50080-p1ulv46859) Units=km Length=0.017902500000000002 bus1=p1udm50080.1.2 bus2=p1ulv46859.1.2 switch=n enabled=y phases=2 Linecode=1P_UG_AL_2/0_Converse_0_416_0_2_2_2_2

New Line.l(r:p1udm50080-p1udm50082) Units=km Length=0.008384460000000002 bus1=p1udm50082.1.2 bus2=p1udm50080.1.2 switch=n enabled=y phases=2 Linecode=1P_UG_AL_4/0_Sweetbriar_0_416_0_2_2_2_2

New Line.l(r:p1udm50082-p1udt16366lv) Units=km Length=0.00903297 bus1=p1udt16366lv.1.2 bus2=p1udm50082.1.2 switch=n enabled=y phases=2 Linecode=1P_UG_AL_4/0_Sweetbriar_0_416_0_2_2_2_2

New Line.l(r:p1udt16367lv-p1ulv26576) Units=km Length=0.0133066 bus1=p1udt16367lv.1.2 bus2=p1ulv26576.1.2 switch=n enabled=y phases=2 Linecode=1P_OH_AL_2/0_Rucina_0_416_0_2_2_2_2

New Line.l(r:p1udt16367lv-p1ulv32926) Units=km Length=0.0172676 bus1=p1udt16367lv.1.2 bus2=p1ulv32926.1.2 switch=n enabled=y phases=2 Linecode=1P_OH_AL_2/0_Rucina_0_416_0_2_2_2_2

New Line.l(r:p1udm50085-p1ulv58569) Units=km Length=0.0147901 bus1=p1udm50085.1.2 bus2=p1ulv58569.1.2 switch=n enabled=y phases=2 Linecode=1P_OH_AL_2/0_Rucina_0_416_0_2_2_2_2

New Line.l(r:p1udm50085-p1udt16367lv) Units=km Length=0.00848069 bus1=p1udt16367lv.1.2 bus2=p1udm50085.1.2 switch=n enabled=y phases=2 Linecode=1P_OH_AL_2/0_Rucina_0_416_0_2_2_2_2

New Line.l(r:p1udm50086-p1ulv62270) Units=km Length=0.014937 bus1=p1udm50086.1.2 bus2=p1ulv62270.1.2 switch=n enabled=y phases=2 Linecode=1P_OH_AL_2/0_Rucina_0_416_0_2_2_2_2

New Line.l(r:p1udm50086-p1udt16367lv) Units=km Length=0.018029400000000004 bus1=p1udt16367lv.1.2 bus2=p1udm50086.1.2 switch=n enabled=y phases=2 Linecode=1P_OH_AL_2/0_Rucina_0_416_0_2_2_2_2

New Line.l(r:p1udm50594-p1ulv27246) Units=km Length=0.0168451 bus1=p1udm50594.1.2 bus2=p1ulv27246.1.2 switch=n enabled=y phases=2 Linecode=1P_UG_AL_1/0_Brenau_0_416_0_2_2_2_2

New Line.l(r:p1udm50594-p1udt16599lv) Units=km Length=0.0393177 bus1=p1udt16599lv.1.2 bus2=p1udm50594.1.2 switch=n enabled=y phases=2 Linecode=1P_UG_AL_1/0_Brenau_0_416_0_2_2_2_2

New Line.l(r:p1udm50595-p1ulv44306) Units=km Length=0.015022 bus1=p1udm50595.1.2 bus2=p1ulv44306.1.2 switch=n enabled=y phases=2 Linecode=1P_UG_AL_1/0_Brenau_0_416_0_2_2_2_2

New Line.l(r:p1udm50596-p1ulv63545) Units=km Length=0.0157924 bus1=p1udm50596.1.2 bus2=p1ulv63545.1.2 switch=n enabled=y phases=2 Linecode=1P_UG_AL_1/0_Brenau_0_416_0_2_2_2_2

New Line.l(r:p1udm50595-p1udm50596) Units=km Length=0.00920228 bus1=p1udm50595.1.2 bus2=p1udm50596.1.2 switch=n enabled=y phases=2 Linecode=1P_UG_AL_1/0_Brenau_0_416_0_2_2_2_2

New Line.l(r:p1udm50595-p1udt16599lv) Units=km Length=0.0151846 bus1=p1udt16599lv.1.2 bus2=p1udm50595.1.2 switch=n enabled=y phases=2 Linecode=1P_UG_AL_4/0_Sweetbriar_0_416_0_2_2_2_2

New Line.l(r:p1udm51034-p1ulv27879) Units=km Length=0.0208175 bus1=p1udm51034.1.2 bus2=p1ulv27879.1.2 switch=n enabled=y phases=2 Linecode=1P_OH_AL_2/0_Rucina_0_416_0_2_2_2_2

New Line.l(r:p1udm51034-p1udt16818lv) Units=km Length=0.0662847 bus1=p1udt16818lv.1.2 bus2=p1udm51034.1.2 switch=n enabled=y phases=2 Linecode=1P_OH_AL_4/0_Zuzara_0_416_0_2_2_2_2

New Line.l(r:p1udm51035-p1ulv36143) Units=km Length=0.019134800000000004 bus1=p1udm51035.1.2 bus2=p1ulv36143.1.2 switch=n enabled=y phases=2 Linecode=1P_UG_AL_1/0_Brenau_0_416_0_2_2_2_2

New Line.l(r:p1udm51035-p1udt16818lv) Units=km Length=0.015567400000000002 bus1=p1udt16818lv.1.2 bus2=p1udm51035.1.2 switch=n enabled=y phases=2 Linecode=1P_UG_AL_1/0_Brenau_0_416_0_2_2_2_2

New Line.l(r:p1udt16819lv-p1ulv27880) Units=km Length=0.0173542 bus1=p1udt16819lv.1.2 bus2=p1ulv27880.1.2 switch=n enabled=y phases=2 Linecode=1P_OH_AL_2/0_Rucina_0_416_0_2_2_2_2

New Line.l(r:p1udm51565-p1ulv28510) Units=km Length=0.0184148 bus1=p1udm51565.1.2 bus2=p1ulv28510.1.2 switch=n enabled=y phases=2 Linecode=1P_OH_AL_2/0_Rucina_0_416_0_2_2_2_2

New Line.l(r:p1udm51565-p1ulv62930) Units=km Length=0.0187613 bus1=p1udm51565.1.2 bus2=p1ulv62930.1.2 switch=n enabled=y phases=2 Linecode=1P_OH_AL_2/0_Rucina_0_416_0_2_2_2_2

New Line.l(r:p1udm51565-p1udt17056lv) Units=km Length=0.0117093 bus1=p1udt17056lv.1.2 bus2=p1udm51565.1.2 switch=n enabled=y phases=2 Linecode=1P_OH_AL_2/0_Rucina_0_416_0_2_2_2_2

New Line.l(r:p1udm51566-p1ulv37995) Units=km Length=0.0137695 bus1=p1udm51566.1.2 bus2=p1ulv37995.1.2 switch=n enabled=y phases=2 Linecode=1P_OH_AL_2/0_Rucina_0_416_0_2_2_2_2

New Line.l(r:p1udm51566-p1udt17056lv) Units=km Length=0.0884536 bus1=p1udt17056lv.1.2 bus2=p1udm51566.1.2 switch=n enabled=y phases=2 Linecode=1P_OH_AL_4/0_Zuzara_0_416_0_2_2_2_2

New Line.l(r:p1udt17257lv-p1ulv29107) Units=km Length=0.0159656 bus1=p1udt17257lv.1.2 bus2=p1ulv29107.1.2 switch=n enabled=y phases=2 Linecode=1P_UG_AL_1/0_Brenau_0_416_0_2_2_2_2

New Line.l(r:p1udt17257lv-p1ulv32249) Units=km Length=0.0162678 bus1=p1udt17257lv.1.2 bus2=p1ulv32249.1.2 switch=n enabled=y phases=2 Linecode=1P_UG_AL_1/0_Brenau_0_416_0_2_2_2_2

New Line.l(r:p1udm51993-p1ulv33578) Units=km Length=0.0175746 bus1=p1udm51993.1.2 bus2=p1ulv33578.1.2 switch=n enabled=y phases=2 Linecode=1P_UG_AL_1/0_Brenau_0_416_0_2_2_2_2

New Line.l(r:p1udm51993-p1udt17257lv) Units=km Length=0.00919083 bus1=p1udt17257lv.1.2 bus2=p1udm51993.1.2 switch=n enabled=y phases=2 Linecode=1P_UG_AL_1/0_Brenau_0_416_0_2_2_2_2

New Line.l(r:p1udt17474lv-p1ulv63546) Units=km Length=0.0186111 bus1=p1udt17474lv.1.2 bus2=p1ulv63546.1.2 switch=n enabled=y phases=2 Linecode=1P_UG_AL_1/0_Brenau_0_416_0_2_2_2_2

New Line.l(r:p1udm52452-p1ulv29736) Units=km Length=0.00895755 bus1=p1udm52452.1.2 bus2=p1ulv29736.1.2 switch=n enabled=y phases=2 Linecode=1P_UG_AL_1/0_Brenau_0_416_0_2_2_2_2

New Line.l(r:p1udm52452-p1udt17474lv) Units=km Length=0.0592262 bus1=p1udt17474lv.1.2 bus2=p1udm52452.1.2 switch=n enabled=y phases=2 Linecode=1P_UG_AL_1/0_Brenau_0_416_0_2_2_2_2

New Line.l(r:p1udt17680lv-p1ulv30369) Units=km Length=0.012193500000000001 bus1=p1udt17680lv.1.2 bus2=p1ulv30369.1.2 switch=n enabled=y phases=2 Linecode=1P_UG_AL_1/0_Brenau_0_416_0_2_2_2_2

New Line.l(r:p1udt17680lv-p1ulv37376) Units=km Length=0.0206139 bus1=p1udt17680lv.1.2 bus2=p1ulv37376.1.2 switch=n enabled=y phases=2 Linecode=1P_UG_AL_2/0_Converse_0_416_0_2_2_2_2

New Line.l(r:p1udt17680lv-p1ulv39271) Units=km Length=0.019749 bus1=p1udt17680lv.1.2 bus2=p1ulv39271.1.2 switch=n enabled=y phases=2 Linecode=1P_UG_AL_1/0_Brenau_0_416_0_2_2_2_2

New Line.l(r:p1udm53642-p1ulv31643) Units=km Length=0.0173723 bus1=p1udm53642.1.2 bus2=p1ulv31643.1.2 switch=n enabled=y phases=2 Linecode=1P_OH_AL_2/0_Rucina_0_416_0_2_2_2_2

New Line.l(r:p1udm53642-p1udt18067lv) Units=km Length=0.01365 bus1=p1udt18067lv.1.2 bus2=p1udm53642.1.2 switch=n enabled=y phases=2 Linecode=1P_OH_AL_2/0_Rucina_0_416_0_2_2_2_2

New Line.l(r:p1udm53643-p1ulv60406) Units=km Length=0.019009700000000004 bus1=p1udm53643.1.2 bus2=p1ulv60406.1.2 switch=n enabled=y phases=2 Linecode=1P_OH_AL_2/0_Rucina_0_416_0_2_2_2_2

New Line.l(r:p1udm53643-p1udt18067lv) Units=km Length=0.0196533 bus1=p1udt18067lv.1.2 bus2=p1udm53643.1.2 switch=n enabled=y phases=2 Linecode=1P_OH_AL_2/0_Rucina_0_416_0_2_2_2_2

New Line.l(r:p1udt18068lv-p1ulv37997) Units=km Length=0.0161101 bus1=p1udt18068lv.1.2 bus2=p1ulv37997.1.2 switch=n enabled=y phases=2 Linecode=1P_OH_AL_2/0_Rucina_0_416_0_2_2_2_2

New Line.l(r:p1udt18068lv-p1ulv49300) Units=km Length=0.014138 bus1=p1udt18068lv.1.2 bus2=p1ulv49300.1.2 switch=n enabled=y phases=2 Linecode=1P_OH_AL_2/0_Rucina_0_416_0_2_2_2_2

New Line.l(r:p1udm53644-p1ulv31646) Units=km Length=0.0146691 bus1=p1udm53644.1.2 bus2=p1ulv31646.1.2 switch=n enabled=y phases=2 Linecode=1P_OH_AL_2/0_Rucina_0_416_0_2_2_2_2

New Line.l(r:p1udm53644-p1ulv43679) Units=km Length=0.016595400000000003 bus1=p1udm53644.1.2 bus2=p1ulv43679.1.2 switch=n enabled=y phases=2 Linecode=1P_OH_AL_2/0_Rucina_0_416_0_2_2_2_2

New Line.l(r:p1udm53644-p1udt18068lv) Units=km Length=0.0117906 bus1=p1udt18068lv.1.2 bus2=p1udm53644.1.2 switch=n enabled=y phases=2 Linecode=1P_OH_AL_2/0_Rucina_0_416_0_2_2_2_2

New Line.l(r:p1udm53646-p1ulv42387) Units=km Length=0.013376 bus1=p1udm53646.1.2 bus2=p1ulv42387.1.2 switch=n enabled=y phases=2 Linecode=1P_OH_AL_2/0_Rucina_0_416_0_2_2_2_2

New Line.l(r:p1udm53646-p1udt18068lv) Units=km Length=0.0117906 bus1=p1udt18068lv.1.2 bus2=p1udm53646.1.2 switch=n enabled=y phases=2 Linecode=1P_OH_AL_2/0_Rucina_0_416_0_2_2_2_2

New Line.l(r:p1udm54011-p1ulv32250) Units=km Length=0.0186722 bus1=p1udm54011.1.2 bus2=p1ulv32250.1.2 switch=n enabled=y phases=2 Linecode=1P_UG_AL_1/0_Brenau_0_416_0_2_2_2_2

New Line.l(r:p1udm54011-p1udt18263lv) Units=km Length=0.0564383 bus1=p1udt18263lv.1.2 bus2=p1udm54011.1.2 switch=n enabled=y phases=2 Linecode=1P_UG_AL_1/0_Brenau_0_416_0_2_2_2_2

New Line.l(r:p1udm54012-p1ulv35490) Units=km Length=0.014311 bus1=p1udm54012.1.2 bus2=p1ulv35490.1.2 switch=n enabled=y phases=2 Linecode=1P_UG_AL_1/0_Brenau_0_416_0_2_2_2_2

New Line.l(r:p1udm54012-p1ulv40543) Units=km Length=0.0119093 bus1=p1udm54012.1.2 bus2=p1ulv40543.1.2 switch=n enabled=y phases=2 Linecode=1P_UG_AL_1/0_Brenau_0_416_0_2_2_2_2

New Line.l(r:p1udm54012-p1udt18263lv) Units=km Length=0.018476500000000003 bus1=p1udt18263lv.1.2 bus2=p1udm54012.1.2 switch=n enabled=y phases=2 Linecode=1P_UG_AL_4/0_Sweetbriar_0_416_0_2_2_2_2

New Line.l(r:p1udm54765-p1ulv51147) Units=km Length=0.0188898 bus1=p1udm54765.1.2 bus2=p1ulv51147.1.2 switch=n enabled=y phases=2 Linecode=1P_UG_AL_1/0_Brenau_0_416_0_2_2_2_2

New Line.l(r:p1udm54764-p1ulv33579) Units=km Length=0.0183636 bus1=p1udm54764.1.2 bus2=p1ulv33579.1.2 switch=n enabled=y phases=2 Linecode=1P_UG_AL_1/0_Brenau_0_416_0_2_2_2_2

New Line.l(r:p1udm54764-p1udm54765) Units=km Length=0.008384460000000002 bus1=p1udm54765.1.2 bus2=p1udm54764.1.2 switch=n enabled=y phases=2 Linecode=1P_UG_AL_1/0_Brenau_0_416_0_2_2_2_2

New Line.l(r:p1udm54765-p1udt18664lv) Units=km Length=0.00839253 bus1=p1udt18664lv.1.2 bus2=p1udm54765.1.2 switch=n enabled=y phases=2 Linecode=1P_UG_AL_4/0_Sweetbriar_0_416_0_2_2_2_2

New Line.l(r:p1udm54766-p1ulv62268) Units=km Length=0.0166567 bus1=p1udm54766.1.2 bus2=p1ulv62268.1.2 switch=n enabled=y phases=2 Linecode=1P_UG_AL_1/0_Brenau_0_416_0_2_2_2_2

New Line.l(r:p1udm54766-p1udt18664lv) Units=km Length=0.0264504 bus1=p1udt18664lv.1.2 bus2=p1udm54766.1.2 switch=n enabled=y phases=2 Linecode=1P_UG_AL_1/0_Brenau_0_416_0_2_2_2_2

New Line.l(r:p1udm55801-p1ulv35491) Units=km Length=0.0160253 bus1=p1udm55801.1.2 bus2=p1ulv35491.1.2 switch=n enabled=y phases=2 Linecode=1P_OH_AL_2/0_Rucina_0_416_0_2_2_2_2

New Line.l(r:p1udm55801-p1udt19234lv) Units=km Length=0.0174153 bus1=p1udt19234lv.1.2 bus2=p1udm55801.1.2 switch=n enabled=y phases=2 Linecode=1P_OH_AL_2/0_Rucina_0_416_0_2_2_2_2

New Line.l(r:p1udm55802-p1ulv59780) Units=km Length=0.0498638 bus1=p1udm55802.1.2 bus2=p1ulv59780.1.2 switch=n enabled=y phases=2 Linecode=1P_OH_AL_4/0_Zuzara_0_416_0_2_2_2_2

New Line.l(r:p1udm55802-p1udt19234lv) Units=km Length=0.0348396 bus1=p1udt19234lv.1.2 bus2=p1udm55802.1.2 switch=n enabled=y phases=2 Linecode=1P_OH_AL_4/0_Zuzara_0_416_0_2_2_2_2

New Line.l(r:p1udt20105lv-p1ulv44308) Units=km Length=0.0137653 bus1=p1udt20105lv.1.2 bus2=p1ulv44308.1.2 switch=n enabled=y phases=2 Linecode=1P_OH_AL_2/0_Rucina_0_416_0_2_2_2_2

New Line.l(r:p1udm57315-p1ulv53721) Units=km Length=0.0127697 bus1=p1udm57315.1.2 bus2=p1ulv53721.1.2 switch=n enabled=y phases=2 Linecode=1P_OH_AL_2/0_Rucina_0_416_0_2_2_2_2

New Line.l(r:p1udm57315-p1ulv57389) Units=km Length=0.0139485 bus1=p1udm57315.1.2 bus2=p1ulv57389.1.2 switch=n enabled=y phases=2 Linecode=1P_OH_AL_2/0_Rucina_0_416_0_2_2_2_2

New Line.l(r:p1udm57313-p1ulv38636) Units=km Length=0.017022 bus1=p1udm57313.1.2 bus2=p1ulv38636.1.2 switch=n enabled=y phases=2 Linecode=1P_OH_AL_2/0_Rucina_0_416_0_2_2_2_2

New Line.l(r:p1udm57313-p1udm57315) Units=km Length=0.00423043 bus1=p1udm57315.1.2 bus2=p1udm57313.1.2 switch=n enabled=y phases=2 Linecode=1P_OH_AL_2/0_Rucina_0_416_0_2_2_2_2

New Line.l(r:p1udm57315-p1udt20105lv) Units=km Length=0.01534 bus1=p1udt20105lv.1.2 bus2=p1udm57315.1.2 switch=n enabled=y phases=2 Linecode=1P_OH_AL_2/0_Rucina_0_416_0_2_2_2_2

New Line.l(r:p1udm57317-p1ulv59779) Units=km Length=0.0164408 bus1=p1udm57317.1.2 bus2=p1ulv59779.1.2 switch=n enabled=y phases=2 Linecode=1P_OH_AL_2/0_Rucina_0_416_0_2_2_2_2

New Line.l(r:p1udm57317-p1udt20105lv) Units=km Length=0.0153513 bus1=p1udt20105lv.1.2 bus2=p1udm57317.1.2 switch=n enabled=y phases=2 Linecode=1P_OH_AL_2/0_Rucina_0_416_0_2_2_2_2

New Line.l(r:p1udt20266lv-p1ulv39272) Units=km Length=0.0196628 bus1=p1udt20266lv.1.2 bus2=p1ulv39272.1.2 switch=n enabled=y phases=2 Linecode=1P_UG_AL_1/0_Brenau_0_416_0_2_2_2_2

New Line.l(r:p1udt20723lv-p1ulv53062) Units=km Length=0.017712100000000005 bus1=p1udt20723lv.1.2 bus2=p1ulv53062.1.2 switch=n enabled=y phases=2 Linecode=1P_UG_AL_1/0_Brenau_0_416_0_2_2_2_2

New Line.l(r:p1udm58329-p1ulv41136) Units=km Length=0.0141107 bus1=p1udm58329.1.2 bus2=p1ulv41136.1.2 switch=n enabled=y phases=2 Linecode=1P_UG_AL_1/0_Brenau_0_416_0_2_2_2_2

New Line.l(r:p1udm58329-p1udt20723lv) Units=km Length=0.00687612 bus1=p1udt20723lv.1.2 bus2=p1udm58329.1.2 switch=n enabled=y phases=2 Linecode=1P_UG_AL_1/0_Brenau_0_416_0_2_2_2_2

New Line.l(r:p1udm58331-p1ulv62931) Units=km Length=0.0178808 bus1=p1udm58331.1.2 bus2=p1ulv62931.1.2 switch=n enabled=y phases=2 Linecode=1P_UG_AL_1/0_Brenau_0_416_0_2_2_2_2

New Line.l(r:p1udm58331-p1udt20723lv) Units=km Length=0.00687189 bus1=p1udt20723lv.1.2 bus2=p1udm58331.1.2 switch=n enabled=y phases=2 Linecode=1P_UG_AL_1/0_Brenau_0_416_0_2_2_2_2

New Line.l(r:p1udt20861lv-p1ulv41747) Units=km Length=0.0207288 bus1=p1udt20861lv.1.2 bus2=p1ulv41747.1.2 switch=n enabled=y phases=2 Linecode=1P_OH_AL_2/0_Rucina_0_416_0_2_2_2_2

New Line.l(r:p1udt20862lv-p1ulv41750) Units=km Length=0.015643 bus1=p1udt20862lv.1.2 bus2=p1ulv41750.1.2 switch=n enabled=y phases=2 Linecode=1P_UG_AL_1/0_Brenau_0_416_0_2_2_2_2

New Line.l(r:p1udt21140lv-p1ulv56766) Units=km Length=0.017451 bus1=p1udt21140lv.1.2 bus2=p1ulv56766.1.2 switch=n enabled=y phases=2 Linecode=1P_UG_AL_1/0_Brenau_0_416_0_2_2_2_2

New Line.l(r:p1udm58952-p1ulv43004) Units=km Length=0.0205065 bus1=p1udm58952.1.2 bus2=p1ulv43004.1.2 switch=n enabled=y phases=2 Linecode=1P_UG_AL_1/0_Brenau_0_416_0_2_2_2_2

New Line.l(r:p1udm58952-p1udt21140lv) Units=km Length=0.009468620000000002 bus1=p1udt21140lv.1.2 bus2=p1udm58952.1.2 switch=n enabled=y phases=2 Linecode=1P_UG_AL_1/0_Brenau_0_416_0_2_2_2_2

New Line.l(r:p1udt21305lv-p1ulv43677) Units=km Length=0.014050000000000002 bus1=p1udt21305lv.1.2 bus2=p1ulv43677.1.2 switch=n enabled=y phases=2 Linecode=1P_UG_AL_1/0_Brenau_0_416_0_2_2_2_2

New Line.l(r:p1udt21433lv-p1ulv44307) Units=km Length=0.0174129 bus1=p1udt21433lv.1.2 bus2=p1ulv44307.1.2 switch=n enabled=y phases=2 Linecode=1P_UG_AL_1/0_Brenau_0_416_0_2_2_2_2

New Line.l(r:p1udt21843lv-p1ulv46249) Units=km Length=0.0169926 bus1=p1udt21843lv.1.2 bus2=p1ulv46249.1.2 switch=n enabled=y phases=2 Linecode=1P_OH_AL_2/0_Rucina_0_416_0_2_2_2_2

New Line.l(r:p1udt21982lv-p1ulv46860) Units=km Length=0.016007 bus1=p1udt21982lv.1.2 bus2=p1ulv46860.1.2 switch=n enabled=y phases=2 Linecode=1P_OH_AL_2/0_Rucina_0_416_0_2_2_2_2

New Line.l(r:p1udt22099lv-p1ulv47458) Units=km Length=0.0181972 bus1=p1udt22099lv.1.2 bus2=p1ulv47458.1.2 switch=n enabled=y phases=2 Linecode=1P_OH_AL_2/0_Rucina_0_416_0_2_2_2_2

New Line.l(r:p1udt22224lv-p1ulv48089) Units=km Length=0.0126437 bus1=p1udt22224lv.1.2 bus2=p1ulv48089.1.2 switch=n enabled=y phases=2 Linecode=1P_UG_AL_1/0_Brenau_0_416_0_2_2_2_2

New Line.l(r:p1udt22224lv-p1ulv65469) Units=km Length=0.0143142 bus1=p1udt22224lv.1.2 bus2=p1ulv65469.1.2 switch=n enabled=y phases=2 Linecode=1P_UG_AL_1/0_Brenau_0_416_0_2_2_2_2

New Line.l(r:p1udt23199lv-p1ulv53064) Units=km Length=0.0659764 bus1=p1udt23199lv.1.2 bus2=p1ulv53064.1.2 switch=n enabled=y phases=2 Linecode=1P_OH_AL_4/0_Zuzara_0_416_0_2_2_2_2

New Line.l(r:p1udt23775lv-p1ulv56163) Units=km Length=0.013533 bus1=p1udt23775lv.1.2 bus2=p1ulv56163.1.2 switch=n enabled=y phases=2 Linecode=1P_OH_AL_2/0_Rucina_0_416_0_2_2_2_2

New Line.l(r:p1udt24827lv-p1ulv62269) Units=km Length=0.0181352 bus1=p1udt24827lv.1.2 bus2=p1ulv62269.1.2 switch=n enabled=y phases=2 Linecode=1P_OH_AL_2/0_Rucina_0_416_0_2_2_2_2

New Line.l(r:p1udt25318lv-p1ulv65468) Units=km Length=0.0162237 bus1=p1udt25318lv.1.2 bus2=p1ulv65468.1.2 switch=n enabled=y phases=2 Linecode=1P_OH_AL_2/0_Rucina_0_416_0_2_2_2_2

New Line.l(r:p1udt1847-p1udt23199) Units=km Length=0.297845 bus1=p1udt1847-p1udt23199x.2 bus2=p1udt1847.2 switch=n enabled=y phases=1 Linecode=1P_OH_AL_ACSR_#2_Sparrow_12_47_0_1_1_1_1

New Line.l(r:p1udt16365-p1udt7430) Units=km Length=0.001 bus1=p1udt7430.2 bus2=p1udt16365.2 switch=n enabled=y phases=1 Linecode=1P_OH_AL_ACSR_#2_Sparrow_12_47_0_1_1_1_1

New Line.l(r:p1udt3007-p1udt7430) Units=km Length=0.0502806 bus1=p1udt3007.2 bus2=p1udt7430.2 switch=n enabled=y phases=1 Linecode=1P_OH_AL_ACSR_#2_Sparrow_12_47_0_1_1_1_1

New Line.l(r:p1udt3007-p1udt3567) Units=km Length=0.05730070000000001 bus1=p1udt3007-p1udt3567x.2 bus2=p1udt3007.2 switch=n enabled=y phases=1 Linecode=1P_OH_AL_ACSR_#2_Sparrow_12_47_0_1_1_1_1

New Line.l(r:p1udt1226-p1udt18067) Units=km Length=0.001 bus1=p1udt1226.3 bus2=p1udt18067.3 switch=n enabled=y phases=1 Linecode=1P_OH_AL_ACSR_#2_Sparrow_12_47_0_1_1_1_1

New Line.l(r:p1udt16599-p1udt21433) Units=km Length=0.012624500000000002 bus1=p1udt16599-p1udt21433xx.3 bus2=p1udt16599-p1udt21433x.3 switch=n enabled=y phases=1 Linecode=1P_UG_AL_#2_15_12_47_0_1_1_1_1

New Line.l(r:p1udt10146-p1udt21433) Units=km Length=0.0515047 bus1=p1udt10146-p1udt21433x.3 bus2=p1udt10146-p1udt21433xx.3 switch=n enabled=y phases=1 Linecode=1P_UG_AL_#2_15_12_47_0_1_1_1_1

New Line.l(r:p1udt10146-p1udt5065) Units=km Length=0.027814900000000004 bus1=p1udt10146-p1udt5065xx.3 bus2=p1udt10146-p1udt5065x.3 switch=n enabled=y phases=1 Linecode=1P_UG_AL_#2_15_12_47_0_1_1_1_1

New Line.l(r:p1udt1221-p1udt6065) Units=km Length=0.0464852 bus1=p1udt1221-p1udt6065xx.3 bus2=p1udt1221-p1udt6065x.3 switch=n enabled=y phases=1 Linecode=1P_UG_AL_#2_15_12_47_0_1_1_1_1

New Line.l(r:p1udt10847-p1udt9019) Units=km Length=0.0715844 bus1=p1udt10847-p1udt9019xx.3 bus2=p1udt10847-p1udt9019x.3 switch=n enabled=y phases=1 Linecode=1P_UG_AL_#2_15_12_47_0_1_1_1_1

New Line.l(r:p1udt20861-p1udt6967) Units=km Length=0.0152538 bus1=p1udt20861.3 bus2=p1udt6967.3 switch=n enabled=y phases=1 Linecode=1P_OH_AL_ACSR_#2_Sparrow_12_47_0_1_1_1_1

New Line.l(r:p1udt20861-p1udt21843) Units=km Length=0.015255 bus1=p1udt21843.3 bus2=p1udt20861.3 switch=n enabled=y phases=1 Linecode=1P_OH_AL_ACSR_#2_Sparrow_12_47_0_1_1_1_1

New Line.l(r:p1udt21843-p1udt9019) Units=km Length=0.0581556 bus1=p1udt9019.3 bus2=p1udt21843.3 switch=n enabled=y phases=1 Linecode=1P_OH_AL_ACSR_#2_Sparrow_12_47_0_1_1_1_1

New Line.l(r:p1udt6065-p1udt9019) Units=km Length=0.0440999 bus1=p1udt6065-p1udt9019x.3 bus2=p1udt6065-p1udt9019xx.3 switch=n enabled=y phases=1 Linecode=1P_UG_AL_#2_15_12_47_0_1_1_1_1

New Line.l(r:p1udt3006-p1udt6065) Units=km Length=0.058189000000000005 bus1=p1udt3006-p1udt6065x.3 bus2=p1udt3006-p1udt6065xx.3 switch=n enabled=y phases=1 Linecode=1P_UG_AL_#2_15_12_47_0_1_1_1_1

New Line.l(r:p1udt15892-p1udt3006) Units=km Length=0.0638971 bus1=p1udt15892-p1udt3006x.3 bus2=p1udt15892-p1udt3006xx.3 switch=n enabled=y phases=1 Linecode=1P_UG_AL_#2_15_12_47_0_1_1_1_1

New Line.l(r:p1udt3568-p1udt4064) Units=km Length=0.0392654 bus1=p1udt4064.3 bus2=p1udt3568.3 switch=n enabled=y phases=1 Linecode=1P_OH_AL_ACSR_#2_Sparrow_12_47_0_1_1_1_1

New Line.l(r:p1udt15421-p1udt4064) Units=km Length=0.0382782 bus1=p1udt15421.3 bus2=p1udt4064.3 switch=n enabled=y phases=1 Linecode=1P_OH_AL_ACSR_#2_Sparrow_12_47_0_1_1_1_1

New Line.l(r:p1udt15421-p1udt15892) Units=km Length=0.0663174 bus1=p1udt15421-p1udt15892xx.3 bus2=p1udt15421-p1udt15892x.3 switch=n enabled=y phases=1 Linecode=1P_UG_AL_#2_15_12_47_0_1_1_1_1

New Line.l(r:p1udt15892-p1udt5065) Units=km Length=0.0174398 bus1=p1udt15892-p1udt5065xx.3 bus2=p1udt15892-p1udt5065x.3 switch=n enabled=y phases=1 Linecode=1P_UG_AL_#2_15_12_47_0_1_1_1_1

New Line.l(r:p1udt20266-p1udt5065) Units=km Length=0.0264792 bus1=p1udt20266-p1udt5065x.3 bus2=p1udt20266-p1udt5065xx.3 switch=n enabled=y phases=1 Linecode=1P_UG_AL_#2_15_12_47_0_1_1_1_1

New Line.l(r:p1udt16818-p1udt20266) Units=km Length=0.0340328 bus1=p1udt16818-p1udt20266x.3 bus2=p1udt16818-p1udt20266xx.3 switch=n enabled=y phases=1 Linecode=1P_UG_AL_#2_15_12_47_0_1_1_1_1

New Line.l(r:p1udt16818-p1udt18263) Units=km Length=0.0469455 bus1=p1udt16818-p1udt18263xx.3 bus2=p1udt16818-p1udt18263x.3 switch=n enabled=y phases=1 Linecode=1P_UG_AL_#2_15_12_47_0_1_1_1_1

New Line.l(r:p1udt24827-p1udt5585) Units=km Length=0.0288412 bus1=p1udt24827.3 bus2=p1udt5585.3 switch=n enabled=y phases=1 Linecode=1P_OH_AL_ACSR_#2_Sparrow_12_47_0_1_1_1_1

New Line.l(r:p1udt18263-p1udt24827) Units=km Length=0.0449731 bus1=p1udt18263.3 bus2=p1udt24827.3 switch=n enabled=y phases=1 Linecode=1P_OH_AL_ACSR_#2_Sparrow_12_47_0_1_1_1_1

New Line.l(r:p1udt18263-p1udt9785) Units=km Length=0.09621830000000002 bus1=p1udt18263-p1udt9785xx.3 bus2=p1udt18263-p1udt9785x.3 switch=n enabled=y phases=1 Linecode=1P_UG_AL_#2_15_12_47_0_1_1_1_1

New Line.l(r:p1udt20862-p1udt9785) Units=km Length=0.0254959 bus1=p1udt20862-p1udt9785x.3 bus2=p1udt20862-p1udt9785xx.3 switch=n enabled=y phases=1 Linecode=1P_UG_AL_#2_15_12_47_0_1_1_1_1

New Line.l(r:p1udt16366-p1udt20862) Units=km Length=0.036975 bus1=p1udt16366-p1udt20862x.3 bus2=p1udt16366-p1udt20862xx.3 switch=n enabled=y phases=1 Linecode=1P_UG_AL_#2_15_12_47_0_1_1_1_1

New Line.l(r:p1udt16366-p1udt18664) Units=km Length=0.0174174 bus1=p1udt16366-p1udt18664xx.3 bus2=p1udt16366-p1udt18664x.3 switch=n enabled=y phases=1 Linecode=1P_UG_AL_#2_15_12_47_0_1_1_1_1

New Line.l(r:p1udt1226-p1udt18664) Units=km Length=0.0560904 bus1=p1udt1226.3 bus2=p1udt18664.3 switch=n enabled=y phases=1 Linecode=1P_OH_AL_ACSR_#2_Sparrow_12_47_0_1_1_1_1

New Line.l(r:p1udt1225-p1udt1226) Units=km Length=0.0665461 bus1=p1udt1225.3 bus2=p1udt1226.3 switch=n enabled=y phases=1 Linecode=1P_OH_AL_ACSR_#2_Sparrow_12_47_0_1_1_1_1

New Line.l(r:p1udt1225-p1udt17056) Units=km Length=0.0251852 bus1=p1udt17056.3 bus2=p1udt1225.3 switch=n enabled=y phases=1 Linecode=1P_OH_AL_ACSR_#2_Sparrow_12_47_0_1_1_1_1

New Line.l(r:p1udt17056-p1udt9784) Units=km Length=0.0527387 bus1=p1udt17056-p1udt9784x.3 bus2=p1udt17056.3 switch=n enabled=y phases=1 Linecode=1P_OH_AL_ACSR_#2_Sparrow_12_47_0_1_1_1_1

New Line.l(r:p1udt2409-p1udt9783) Units=km Length=0.0364689 bus1=p1udt2409-p1udt9783xx.1 bus2=p1udt2409-p1udt9783x.1 switch=n enabled=y phases=1 Linecode=1P_UG_AL_#2_15_12_47_0_1_1_1_1

New Line.l(r:p1udt8634-p1udt9783) Units=km Length=0.0295934 bus1=p1udt8634-p1udt9783x.1 bus2=p1udt8634-p1udt9783xx.1 switch=n enabled=y phases=1 Linecode=1P_UG_AL_#2_15_12_47_0_1_1_1_1

New Line.l(r:p1udt1219-p1udt3002) Units=km Length=0.035066200000000006 bus1=p1udt1219-p1udt3002xx.1 bus2=p1udt1219-p1udt3002x.1 switch=n enabled=y phases=1 Linecode=1P_UG_AL_#2_15_12_47_0_1_1_1_1

New Line.l(r:p1udt13211-p1udt3002) Units=km Length=0.201227 bus1=p1udt13211-p1udt3002x.1 bus2=p1udt13211-p1udt3002xx.1 switch=n enabled=y phases=1 Linecode=1P_UG_AL_#2_15_12_47_0_1_1_1_1

New Line.l(r:p1udt13211-p1udt21140) Units=km Length=0.0189445 bus1=p1udt13211-p1udt21140xx.1 bus2=p1udt13211-p1udt21140x.1 switch=n enabled=y phases=1 Linecode=1P_UG_AL_#2_15_12_47_0_1_1_1_1

New Line.l(r:p1udt11533-p1udt21140) Units=km Length=0.0369827 bus1=p1udt11533.1 bus2=p1udt21140.1 switch=n enabled=y phases=1 Linecode=1P_OH_AL_ACSR_#2_Sparrow_12_47_0_1_1_1_1

New Line.l(r:p1udt11533-p1udt2407) Units=km Length=0.0554855 bus1=p1udt2407.1 bus2=p1udt11533.1 switch=n enabled=y phases=1 Linecode=1P_OH_AL_ACSR_#2_Sparrow_12_47_0_1_1_1_1

New Line.l(r:p1udt2407-p1udt5062) Units=km Length=0.073214 bus1=p1udt5062.1 bus2=p1udt2407.1 switch=n enabled=y phases=1 Linecode=1P_OH_AL_ACSR_#2_Sparrow_12_47_0_1_1_1_1

New Line.l(r:p1udt1220-p1udt5062) Units=km Length=0.0382197 bus1=p1udt1220-p1udt5062x.1 bus2=p1udt1220-p1udt5062xx.1 switch=n enabled=y phases=1 Linecode=1P_UG_AL_#2_15_12_47_0_1_1_1_1

New Line.l(r:p1udt1220-p1udt14880) Units=km Length=0.06159540000000001 bus1=p1udt1220-p1udt14880xx.1 bus2=p1udt1220-p1udt14880x.1 switch=n enabled=y phases=1 Linecode=1P_UG_AL_#2_15_12_47_0_1_1_1_1

New Line.l(r:p1udt14880-p1udt9782) Units=km Length=0.0249379 bus1=p1udt14880-p1udt9782xx.1 bus2=p1udt14880-p1udt9782x.1 switch=n enabled=y phases=1 Linecode=1P_UG_AL_#2_15_12_47_0_1_1_1_1

New Line.l(r:p1udt14879-p1udt9782) Units=km Length=0.0476149 bus1=p1udt14879-p1udt9782x.1 bus2=p1udt14879-p1udt9782xx.1 switch=n enabled=y phases=1 Linecode=1P_UG_AL_#2_15_12_47_0_1_1_1_1

New Line.l(r:p1udt14879-p1udt8634) Units=km Length=0.171811 bus1=p1udt14879-p1udt8634xx.1 bus2=p1udt14879-p1udt8634x.1 switch=n enabled=y phases=1 Linecode=1P_UG_AL_#2_15_12_47_0_1_1_1_1

New Line.l(r:p1udt10510-p1udt21305) Units=km Length=0.0567808 bus1=p1udt10510-p1udt21305xx.1 bus2=p1udt10510-p1udt21305x.1 switch=n enabled=y phases=1 Linecode=1P_UG_AL_#2_15_12_47_0_1_1_1_1

New Line.l(r:p1udt21305-p1udt8634) Units=km Length=0.148954 bus1=p1udt21305-p1udt8634xx.1 bus2=p1udt21305-p1udt8634x.1 switch=n enabled=y phases=1 Linecode=1P_UG_AL_#2_15_12_47_0_1_1_1_1

New Line.l(r:p1udt2408-p1udt8634) Units=km Length=0.178212 bus1=p1udt2408-p1udt8634x.1 bus2=p1udt2408-p1udt8634xx.1 switch=n enabled=y phases=1 Linecode=1P_UG_AL_#2_15_12_47_0_1_1_1_1

New Line.l(r:p1udt2408-p1udt25318) Units=km Length=0.0702432 bus1=p1udt2408-p1udt25318x.1 bus2=p1udt2408.1 switch=n enabled=y phases=1 Linecode=1P_OH_AL_ACSR_#2_Sparrow_12_47_0_1_1_1_1

New Line.l(r:p1udt15891-p1udt3005) Units=km Length=0.0432472 bus1=p1udt15891-p1udt3005x.2 bus2=p1udt15891-p1udt3005xx.2 switch=n enabled=y phases=1 Linecode=1P_UG_AL_#2_15_12_47_0_1_1_1_1

New Line.l(r:p1udt15891-p1udt17474) Units=km Length=0.0781616 bus1=p1udt15891-p1udt17474xx.2 bus2=p1udt15891-p1udt17474x.2 switch=n enabled=y phases=1 Linecode=1P_UG_AL_#2_15_12_47_0_1_1_1_1

New Line.l(r:p1udt1222-p1udt1223) Units=km Length=0.001 bus1=p1udt1222-p1udt1223x.2 bus2=p1udt1222-p1udt1223xx.2 switch=n enabled=y phases=1 Linecode=1P_UG_AL_#2_15_12_47_0_1_1_1_1

New Line.l(r:p1udt1222-p1udt17680) Units=km Length=0.0371688 bus1=p1udt1222-p1udt17680xx.2 bus2=p1udt1222-p1udt17680x.2 switch=n enabled=y phases=1 Linecode=1P_UG_AL_#2_15_12_47_0_1_1_1_1

New Line.l(r:p1udt17474-p1udt17680) Units=km Length=0.096395 bus1=p1udt17474-p1udt17680x.2 bus2=p1udt17474-p1udt17680xx.2 switch=n enabled=y phases=1 Linecode=1P_UG_AL_#2_15_12_47_0_1_1_1_1

New Line.l(r:p1udt17474-p1udt22224) Units=km Length=0.040531500000000005 bus1=p1udt17474-p1udt22224x.2 bus2=p1udt17474-p1udt22224xx.2 switch=n enabled=y phases=1 Linecode=1P_UG_AL_#2_15_12_47_0_1_1_1_1

New Line.l(r:p1udt17474-p1udt20723) Units=km Length=0.041191 bus1=p1udt17474-p1udt20723xx.2 bus2=p1udt17474-p1udt20723x.2 switch=n enabled=y phases=1 Linecode=1P_UG_AL_#2_15_12_47_0_1_1_1_1

New Line.l(r:p1udt17257-p1udt20723) Units=km Length=0.03399400000000001 bus1=p1udt17257-p1udt20723x.2 bus2=p1udt17257-p1udt20723xx.2 switch=n enabled=y phases=1 Linecode=1P_UG_AL_#2_15_12_47_0_1_1_1_1

New Line.l(r:p1udt1224-p1udt17257) Units=km Length=0.03281370000000001 bus1=p1udt1224-p1udt17257x.2 bus2=p1udt1224-p1udt17257xx.2 switch=n enabled=y phases=1 Linecode=1P_UG_AL_#2_15_12_47_0_1_1_1_1

New Line.l(r:p1udt1224-p1udt13802) Units=km Length=0.0358235 bus1=p1udt1224-p1udt13802xx.2 bus2=p1udt1224-p1udt13802x.2 switch=n enabled=y phases=1 Linecode=1P_UG_AL_#2_15_12_47_0_1_1_1_1

New Line.l(r:p1udt13802-p1udt8635) Units=km Length=0.0244781 bus1=p1udt13802-p1udt8635xx.2 bus2=p1udt13802-p1udt8635x.2 switch=n enabled=y phases=1 Linecode=1P_UG_AL_#2_15_12_47_0_1_1_1_1

New Line.l(r:p1udt25318-p1udt8635) Units=km Length=0.021433600000000004 bus1=p1udt25318-p1udt8635x.2 bus2=p1udt8635.2 switch=n enabled=y phases=1 Linecode=1P_OH_AL_ACSR_#2_Sparrow_12_47_0_1_1_1_1

New Line.l(r:p1udt16134-p1udt648) Units=km Length=0.0325149 bus1=p1udt648.2 bus2=p1udt16134.2 switch=n enabled=y phases=1 Linecode=1P_OH_AL_ACSR_#2_Sparrow_12_47_0_1_1_1_1

New Line.l(r:p1udt1848-p1udt648) Units=km Length=0.032017 bus1=p1udt1848.2 bus2=p1udt648.2 switch=n enabled=y phases=1 Linecode=1P_OH_AL_ACSR_#2_Sparrow_12_47_0_1_1_1_1

New Line.l(r:p1udt15422-p1udt1848) Units=km Length=0.0304684 bus1=p1udt15422.2 bus2=p1udt1848.2 switch=n enabled=y phases=1 Linecode=1P_OH_AL_ACSR_#2_Sparrow_12_47_0_1_1_1_1

New Line.l(r:p1udt15422-p1udt9786) Units=km Length=0.0190247 bus1=p1udt9786.2 bus2=p1udt15422.2 switch=n enabled=y phases=1 Linecode=1P_OH_AL_ACSR_#2_Sparrow_12_47_0_1_1_1_1

New Line.l(r:p1udt11534-p1udt9786) Units=km Length=0.0339606 bus1=p1udt11534.2 bus2=p1udt9786.2 switch=n enabled=y phases=1 Linecode=1P_OH_AL_ACSR_#2_Sparrow_12_47_0_1_1_1_1

New Line.l(r:p1udt11534-p1udt16367) Units=km Length=0.04426540000000001 bus1=p1udt16367.2 bus2=p1udt11534.2 switch=n enabled=y phases=1 Linecode=1P_OH_AL_ACSR_#2_Sparrow_12_47_0_1_1_1_1

New Line.l(r:p1udt16367-p1udt20105) Units=km Length=0.0551326 bus1=p1udt20105.2 bus2=p1udt16367.2 switch=n enabled=y phases=1 Linecode=1P_OH_AL_ACSR_#2_Sparrow_12_47_0_1_1_1_1

New Line.l(r:p1udt18068-p1udt20105) Units=km Length=0.0424819 bus1=p1udt18068.2 bus2=p1udt20105.2 switch=n enabled=y phases=1 Linecode=1P_OH_AL_ACSR_#2_Sparrow_12_47_0_1_1_1_1

New Line.l(r:p1udt14627-p1udt18068) Units=km Length=0.0370955 bus1=p1udt14627.2 bus2=p1udt18068.2 switch=n enabled=y phases=1 Linecode=1P_OH_AL_ACSR_#2_Sparrow_12_47_0_1_1_1_1

New Line.l(r:p1udt14627-p1udt3569) Units=km Length=0.0506429 bus1=p1udt3569.2 bus2=p1udt14627.2 switch=n enabled=y phases=1 Linecode=1P_OH_AL_ACSR_#2_Sparrow_12_47_0_1_1_1_1

New Line.l(r:p1udt22099-p1udt3569) Units=km Length=0.0654334 bus1=p1udt22099.2 bus2=p1udt3569.2 switch=n enabled=y phases=1 Linecode=1P_OH_AL_ACSR_#2_Sparrow_12_47_0_1_1_1_1

New Line.l(r:p1udt10849-p1udt9397) Units=km Length=0.0508915 bus1=p1udt9397.2 bus2=p1udt10849.2 switch=n enabled=y phases=1 Linecode=1P_OH_AL_ACSR_#2_Sparrow_12_47_0_1_1_1_1

New Line.l(r:p1udt22099-p1udt9397) Units=km Length=0.0768853 bus1=p1udt22099.2 bus2=p1udt9397.2 switch=n enabled=y phases=1 Linecode=1P_OH_AL_ACSR_#2_Sparrow_12_47_0_1_1_1_1

New Line.l(r:p1udt16819-p1udt22099) Units=km Length=0.0376489 bus1=p1udt16819.2 bus2=p1udt22099.2 switch=n enabled=y phases=1 Linecode=1P_OH_AL_ACSR_#2_Sparrow_12_47_0_1_1_1_1

New Line.l(r:p1udt1227-p1udt16819) Units=km Length=0.0188244 bus1=p1udt1227.2 bus2=p1udt16819.2 switch=n enabled=y phases=1 Linecode=1P_OH_AL_ACSR_#2_Sparrow_12_47_0_1_1_1_1

New Line.l(r:p1udt1227-p1udt21982) Units=km Length=0.0376489 bus1=p1udt21982.2 bus2=p1udt1227.2 switch=n enabled=y phases=1 Linecode=1P_OH_AL_ACSR_#2_Sparrow_12_47_0_1_1_1_1

New Line.l(r:p1udt19234-p1udt21982) Units=km Length=0.0362398 bus1=p1udt19234-p1udt21982x.2 bus2=p1udt21982.2 switch=n enabled=y phases=1 Linecode=1P_OH_AL_ACSR_#2_Sparrow_12_47_0_1_1_1_1

New Line.l(r:p1udt19234-p1uhs9_1247) Units=km Length=0.8717 bus1=p1udt19234-p1uhs9_1247x.1.2.3 bus2=p1udt19234-p1uhs9_1247x_b1_1.1.2.3 switch=n enabled=y phases=3 Linecode=3P_OH_AL_ACSR_1033kcmil_Curlew_12.47_1_3_3_3_3

New Line.l(r:p1udt23775-p1udt25318) Units=km Length=0.0156632 bus1=p1udt23775.1.2.3 bus2=p1udt25318.1.2.3 switch=n enabled=y phases=3 Linecode=3P_OH_AL_ACSR_4/0_Penguin_12_47_0_3_3_3_3

New Line.l(r:p1udt23775-p1udt9784) Units=km Length=0.133549 bus1=p1udt9784.1.2.3 bus2=p1udt23775.1.2.3 switch=n enabled=y phases=3 Linecode=3P_OH_AL_ACSR_4/0_Penguin_12_47_0_3_3_3_3

New Line.l(r:p1udt3567-p1udt9784) Units=km Length=0.057287 bus1=p1udt3567.1.2.3 bus2=p1udt9784.1.2.3 switch=n enabled=y phases=3 Linecode=3P_OH_AL_ACSR_4/0_Penguin_12_47_0_3_3_3_3

New Line.l(r:p1udt23199-p1udt3567) Units=km Length=0.3967530000000001 bus1=p1udt23199.1.2.3 bus2=p1udt3567.1.2.3 switch=n enabled=y phases=3 Linecode=3P_OH_AL_ACSR_4/0_Penguin_12_47_0_3_3_3_3

New Line.l(r:p1udt13803-p1udt23199) Units=km Length=0.0560866 bus1=p1udt13803.1.2.3 bus2=p1udt23199.1.2.3 switch=n enabled=y phases=3 Linecode=3P_OH_AL_ACSR_4/0_Penguin_12_47_0_3_3_3_3

New Line.l(r:p1udt13803-p1udt19234) Units=km Length=0.486014 bus1=p1udt19234.1.2.3 bus2=p1udt13803.1.2.3 switch=n enabled=y phases=3 Linecode=3P_OH_AL_ACSR_4/0_Penguin_12_47_0_3_3_3_3

New Line.padswitch(r:p1udt16599-p1udt21433)p1u_245734 Units=km Length=0.001 bus1=p1udt21433.3 bus2=p1udt16599-p1udt21433xx.3 switch=y enabled=y phases=1 Linecode=padswitch_1_1_1_1

New Line.padswitch(r:p1udt16599-p1udt21433)p1u_245735 Units=km Length=0.001 bus1=p1udt16599-p1udt21433x.3 bus2=p1udt16599.3 switch=y enabled=y phases=1 Linecode=padswitch_1_2_1_1_1

New Line.padswitch(r:p1udt10146-p1udt21433)p1u_245736 Units=km Length=0.001 bus1=p1udt10146.3 bus2=p1udt10146-p1udt21433x.3 switch=y enabled=y phases=1 Linecode=padswitch_1_2_1_0_1_1

New Line.padswitch(r:p1udt10146-p1udt21433)p1u_245737 Units=km Length=0.001 bus1=p1udt10146-p1udt21433xx.3 bus2=p1udt21433.3 switch=y enabled=y phases=1 Linecode=padswitch_1_2_1_0_1_0_1

New Line.padswitch(r:p1udt10146-p1udt5065)p1u_245738 Units=km Length=0.001 bus1=p1udt5065.3 bus2=p1udt10146-p1udt5065xx.3 switch=y enabled=y phases=1 Linecode=padswitch_1_2_1_0_1_0_1

New Line.padswitch(r:p1udt10146-p1udt5065)p1u_245739 Units=km Length=0.001 bus1=p1udt10146-p1udt5065x.3 bus2=p1udt10146.3 switch=y enabled=y phases=1 Linecode=padswitch_1_2_1_0_1_0_1

New Line.padswitch(r:p1udt1221-p1udt6065)p1u_245740 Units=km Length=0.001 bus1=p1udt6065.3 bus2=p1udt1221-p1udt6065xx.3 switch=y enabled=y phases=1 Linecode=padswitch_1_1_1_1

New Line.padswitch(r:p1udt1221-p1udt6065)p1u_245741 Units=km Length=0.001 bus1=p1udt1221-p1udt6065x.3 bus2=p1udt1221.3 switch=y enabled=y phases=1 Linecode=padswitch_1_1_1_1

New Line.padswitch(r:p1udt10847-p1udt9019)p1u_245742 Units=km Length=0.001 bus1=p1udt9019.3 bus2=p1udt10847-p1udt9019xx.3 switch=y enabled=y phases=1 Linecode=padswitch_1_2_1_1_1

New Line.padswitch(r:p1udt10847-p1udt9019)p1u_245743 Units=km Length=0.001 bus1=p1udt10847-p1udt9019x.3 bus2=p1udt10847.3 switch=y enabled=y phases=1 Linecode=padswitch_1_1_1_1

New Line.padswitch(r:p1udt6065-p1udt9019)p1u_245744 Units=km Length=0.001 bus1=p1udt6065.3 bus2=p1udt6065-p1udt9019x.3 switch=y enabled=y phases=1 Linecode=padswitch_1_1_1_1

New Line.padswitch(r:p1udt6065-p1udt9019)p1u_245745 Units=km Length=0.001 bus1=p1udt6065-p1udt9019xx.3 bus2=p1udt9019.3 switch=y enabled=y phases=1 Linecode=padswitch_1_2_1_1_1

New Line.padswitch(r:p1udt3006-p1udt6065)p1u_245746 Units=km Length=0.001 bus1=p1udt3006.3 bus2=p1udt3006-p1udt6065x.3 switch=y enabled=y phases=1 Linecode=padswitch_1_2_1_0_1_0_1

New Line.padswitch(r:p1udt3006-p1udt6065)p1u_245747 Units=km Length=0.001 bus1=p1udt3006-p1udt6065xx.3 bus2=p1udt6065.3 switch=y enabled=y phases=1 Linecode=padswitch_1_1_1_1

New Line.padswitch(r:p1udt15892-p1udt3006)p1u_245748 Units=km Length=0.001 bus1=p1udt15892.3 bus2=p1udt15892-p1udt3006x.3 switch=y enabled=y phases=1 Linecode=padswitch_1_2_1_0_1_0_1

New Line.padswitch(r:p1udt15892-p1udt3006)p1u_245749 Units=km Length=0.001 bus1=p1udt15892-p1udt3006xx.3 bus2=p1udt3006.3 switch=y enabled=y phases=1 Linecode=padswitch_1_2_1_0_1_0_1

New Line.padswitch(r:p1udt15421-p1udt15892)p1u_245750 Units=km Length=0.001 bus1=p1udt15892.3 bus2=p1udt15421-p1udt15892xx.3 switch=y enabled=y phases=1 Linecode=padswitch_1_2_1_0_1_0_1

New Line.padswitch(r:p1udt15421-p1udt15892)p1u_245751 Units=km Length=0.001 bus1=p1udt15421-p1udt15892x.3 bus2=p1udt15421.3 switch=y enabled=y phases=1 Linecode=padswitch_1_2_1_1_1

New Line.padswitch(r:p1udt15892-p1udt5065)p1u_245752 Units=km Length=0.001 bus1=p1udt5065.3 bus2=p1udt15892-p1udt5065xx.3 switch=y enabled=y phases=1 Linecode=padswitch_1_2_1_0_1_0_1

New Line.padswitch(r:p1udt15892-p1udt5065)p1u_245753 Units=km Length=0.001 bus1=p1udt15892-p1udt5065x.3 bus2=p1udt15892.3 switch=y enabled=y phases=1 Linecode=padswitch_1_2_1_0_1_0_1

New Line.padswitch(r:p1udt20266-p1udt5065)p1u_245754 Units=km Length=0.001 bus1=p1udt20266.3 bus2=p1udt20266-p1udt5065x.3 switch=y enabled=y phases=1 Linecode=padswitch_1_2_1_0_1_0_1

New Line.padswitch(r:p1udt20266-p1udt5065)p1u_245755 Units=km Length=0.001 bus1=p1udt20266-p1udt5065xx.3 bus2=p1udt5065.3 switch=y enabled=y phases=1 Linecode=padswitch_1_2_1_0_1_0_1

New Line.padswitch(r:p1udt16818-p1udt20266)p1u_245756 Units=km Length=0.001 bus1=p1udt16818.3 bus2=p1udt16818-p1udt20266x.3 switch=y enabled=y phases=1 Linecode=padswitch_1_2_1_0_1_0_1

New Line.padswitch(r:p1udt16818-p1udt20266)p1u_245757 Units=km Length=0.001 bus1=p1udt16818-p1udt20266xx.3 bus2=p1udt20266.3 switch=y enabled=y phases=1 Linecode=padswitch_1_2_1_0_1_0_1

New Line.padswitch(r:p1udt16818-p1udt18263)p1u_245758 Units=km Length=0.001 bus1=p1udt18263.3 bus2=p1udt16818-p1udt18263xx.3 switch=y enabled=y phases=1 Linecode=padswitch_1_2_1_1_1

New Line.padswitch(r:p1udt16818-p1udt18263)p1u_245759 Units=km Length=0.001 bus1=p1udt16818-p1udt18263x.3 bus2=p1udt16818.3 switch=y enabled=y phases=1 Linecode=padswitch_1_2_1_0_1_0_1

New Line.padswitch(r:p1udt18263-p1udt9785)p1u_245760 Units=km Length=0.001 bus1=p1udt9785.3 bus2=p1udt18263-p1udt9785xx.3 switch=y enabled=y phases=1 Linecode=padswitch_1_1_1_1

New Line.padswitch(r:p1udt18263-p1udt9785)p1u_245761 Units=km Length=0.001 bus1=p1udt18263-p1udt9785x.3 bus2=p1udt18263.3 switch=y enabled=y phases=1 Linecode=padswitch_1_2_1_0_1_0_1_0

New Line.padswitch(r:p1udt20862-p1udt9785)p1u_245762 Units=km Length=0.001 bus1=p1udt20862.3 bus2=p1udt20862-p1udt9785x.3 switch=y enabled=y phases=1 Linecode=padswitch_1_2_1_0_1_0_1

New Line.padswitch(r:p1udt20862-p1udt9785)p1u_245763 Units=km Length=0.001 bus1=p1udt20862-p1udt9785xx.3 bus2=p1udt9785.3 switch=y enabled=y phases=1 Linecode=padswitch_1_2_1_0_1_0_1

New Line.padswitch(r:p1udt16366-p1udt20862)p1u_245764 Units=km Length=0.001 bus1=p1udt16366.3 bus2=p1udt16366-p1udt20862x.3 switch=y enabled=y phases=1 Linecode=padswitch_1_1_1_1

New Line.padswitch(r:p1udt16366-p1udt20862)p1u_245765 Units=km Length=0.001 bus1=p1udt16366-p1udt20862xx.3 bus2=p1udt20862.3 switch=y enabled=y phases=1 Linecode=padswitch_1_2_1_0_1_0_1

New Line.padswitch(r:p1udt16366-p1udt18664)p1u_245766 Units=km Length=0.001 bus1=p1udt18664.3 bus2=p1udt16366-p1udt18664xx.3 switch=y enabled=y phases=1 Linecode=padswitch_1_2_1_1_1

New Line.padswitch(r:p1udt16366-p1udt18664)p1u_245767 Units=km Length=0.001 bus1=p1udt16366-p1udt18664x.3 bus2=p1udt16366.3 switch=y enabled=y phases=1 Linecode=padswitch_1_1_1_1

New Line.padswitch(r:p1udt2409-p1udt9783)p1u_245768 Units=km Length=0.001 bus1=p1udt9783.1 bus2=p1udt2409-p1udt9783xx.1 switch=y enabled=y phases=1 Linecode=padswitch_1_2_1_0_1_0_1

New Line.padswitch(r:p1udt2409-p1udt9783)p1u_245769 Units=km Length=0.001 bus1=p1udt2409-p1udt9783x.1 bus2=p1udt2409.1 switch=y enabled=y phases=1 Linecode=padswitch_1_1_1_1

New Line.padswitch(r:p1udt8634-p1udt9783)p1u_245770 Units=km Length=0.001 bus1=p1udt8634.1 bus2=p1udt8634-p1udt9783x.1 switch=y enabled=y phases=1 Linecode=padswitch_1_2_1_0_1_0_1_0

New Line.padswitch(r:p1udt8634-p1udt9783)p1u_245771 Units=km Length=0.001 bus1=p1udt8634-p1udt9783xx.1 bus2=p1udt9783.1 switch=y enabled=y phases=1 Linecode=padswitch_1_2_1_0_1_0_1

New Line.padswitch(r:p1udt1219-p1udt3002)p1u_245772 Units=km Length=0.001 bus1=p1udt3002.1 bus2=p1udt1219-p1udt3002xx.1 switch=y enabled=y phases=1 Linecode=padswitch_1_2_1_0_1_0_1

New Line.padswitch(r:p1udt1219-p1udt3002)p1u_245773 Units=km Length=0.001 bus1=p1udt1219-p1udt3002x.1 bus2=p1udt1219.1 switch=y enabled=y phases=1 Linecode=padswitch_1_1_1_1

New Line.padswitch(r:p1udt13211-p1udt3002)p1u_245774 Units=km Length=0.001 bus1=p1udt13211.1 bus2=p1udt13211-p1udt3002x.1 switch=y enabled=y phases=1 Linecode=padswitch_1_2_1_0_1_0_1

New Line.padswitch(r:p1udt13211-p1udt3002)p1u_245775 Units=km Length=0.001 bus1=p1udt13211-p1udt3002xx.1 bus2=p1udt3002.1 switch=y enabled=y phases=1 Linecode=padswitch_1_1_1_1

New Line.padswitch(r:p1udt13211-p1udt21140)p1u_245776 Units=km Length=0.001 bus1=p1udt21140.1 bus2=p1udt13211-p1udt21140xx.1 switch=y enabled=y phases=1 Linecode=padswitch_1_2_1_0_1_0_1

New Line.padswitch(r:p1udt13211-p1udt21140)p1u_245777 Units=km Length=0.001 bus1=p1udt13211-p1udt21140x.1 bus2=p1udt13211.1 switch=y enabled=y phases=1 Linecode=padswitch_1_2_1_0_1_0_1

New Line.padswitch(r:p1udt1220-p1udt5062)p1u_245778 Units=km Length=0.001 bus1=p1udt1220.1 bus2=p1udt1220-p1udt5062x.1 switch=y enabled=y phases=1 Linecode=padswitch_1_2_1_0_1_0_1

New Line.padswitch(r:p1udt1220-p1udt5062)p1u_245779 Units=km Length=0.001 bus1=p1udt1220-p1udt5062xx.1 bus2=p1udt5062.1 switch=y enabled=y phases=1 Linecode=padswitch_1_2_1_1_1

New Line.padswitch(r:p1udt1220-p1udt14880)p1u_245780 Units=km Length=0.001 bus1=p1udt14880.1 bus2=p1udt1220-p1udt14880xx.1 switch=y enabled=y phases=1 Linecode=padswitch_1_2_1_0_1_0_1

New Line.padswitch(r:p1udt1220-p1udt14880)p1u_245781 Units=km Length=0.001 bus1=p1udt1220-p1udt14880x.1 bus2=p1udt1220.1 switch=y enabled=y phases=1 Linecode=padswitch_1_2_1_0_1_0_1

New Line.padswitch(r:p1udt14880-p1udt9782)p1u_245782 Units=km Length=0.001 bus1=p1udt9782.1 bus2=p1udt14880-p1udt9782xx.1 switch=y enabled=y phases=1 Linecode=padswitch_1_2_1_0_1_0_1

New Line.padswitch(r:p1udt14880-p1udt9782)p1u_245783 Units=km Length=0.001 bus1=p1udt14880-p1udt9782x.1 bus2=p1udt14880.1 switch=y enabled=y phases=1 Linecode=padswitch_1_2_1_0_1_0_1

New Line.padswitch(r:p1udt14879-p1udt9782)p1u_245784 Units=km Length=0.001 bus1=p1udt14879.1 bus2=p1udt14879-p1udt9782x.1 switch=y enabled=y phases=1 Linecode=padswitch_1_2_1_0_1_0_1

New Line.padswitch(r:p1udt14879-p1udt9782)p1u_245785 Units=km Length=0.001 bus1=p1udt14879-p1udt9782xx.1 bus2=p1udt9782.1 switch=y enabled=y phases=1 Linecode=padswitch_1_2_1_0_1_0_1

New Line.padswitch(r:p1udt14879-p1udt8634)p1u_245786 Units=km Length=0.001 bus1=p1udt8634.1 bus2=p1udt14879-p1udt8634xx.1 switch=y enabled=y phases=1 Linecode=padswitch_1_2_1_0_1_0_1_0

New Line.padswitch(r:p1udt14879-p1udt8634)p1u_245787 Units=km Length=0.001 bus1=p1udt14879-p1udt8634x.1 bus2=p1udt14879.1 switch=y enabled=y phases=1 Linecode=padswitch_1_2_1_0_1_0_1

New Line.padswitch(r:p1udt10510-p1udt21305)p1u_245788 Units=km Length=0.001 bus1=p1udt21305.1 bus2=p1udt10510-p1udt21305xx.1 switch=y enabled=y phases=1 Linecode=padswitch_1_2_1_0_1_0_1

New Line.padswitch(r:p1udt10510-p1udt21305)p1u_245789 Units=km Length=0.001 bus1=p1udt10510-p1udt21305x.1 bus2=p1udt10510.1 switch=y enabled=y phases=1 Linecode=padswitch_1_1_1_1

New Line.padswitch(r:p1udt21305-p1udt8634)p1u_245790 Units=km Length=0.001 bus1=p1udt8634.1 bus2=p1udt21305-p1udt8634xx.1 switch=y enabled=y phases=1 Linecode=padswitch_1_2_1_0_1_0_1_0

New Line.padswitch(r:p1udt21305-p1udt8634)p1u_245791 Units=km Length=0.001 bus1=p1udt21305-p1udt8634x.1 bus2=p1udt21305.1 switch=y enabled=y phases=1 Linecode=padswitch_1_2_1_0_1_0_1

New Line.padswitch(r:p1udt2408-p1udt8634)p1u_245792 Units=km Length=0.001 bus1=p1udt2408.1 bus2=p1udt2408-p1udt8634x.1 switch=y enabled=y phases=1 Linecode=padswitch_1_2_1_0_1_0_1

New Line.padswitch(r:p1udt2408-p1udt8634)p1u_245793 Units=km Length=0.001 bus1=p1udt2408-p1udt8634xx.1 bus2=p1udt8634.1 switch=y enabled=y phases=1 Linecode=padswitch_1_2_1_0_1_0_1_0

New Line.padswitch(r:p1udt15891-p1udt3005)p1u_245794 Units=km Length=0.001 bus1=p1udt15891.2 bus2=p1udt15891-p1udt3005x.2 switch=y enabled=y phases=1 Linecode=padswitch_1_2_1_0_1_0_1

New Line.padswitch(r:p1udt15891-p1udt3005)p1u_245795 Units=km Length=0.001 bus1=p1udt15891-p1udt3005xx.2 bus2=p1udt3005.2 switch=y enabled=y phases=1 Linecode=padswitch_1_2_1_0_1_0_1_0

New Line.padswitch(r:p1udt15891-p1udt17474)p1u_245796 Units=km Length=0.001 bus1=p1udt17474.2 bus2=p1udt15891-p1udt17474xx.2 switch=y enabled=y phases=1 Linecode=padswitch_1_2_1_0_1_0_1_0

New Line.padswitch(r:p1udt15891-p1udt17474)p1u_245797 Units=km Length=0.001 bus1=p1udt15891-p1udt17474x.2 bus2=p1udt15891.2 switch=y enabled=y phases=1 Linecode=padswitch_1_2_1_0_1_0_1

New Line.padswitch(r:p1udt1222-p1udt1223)p1u_245798 Units=km Length=0.001 bus1=p1udt1222.2 bus2=p1udt1222-p1udt1223x.2 switch=y enabled=y phases=1 Linecode=padswitch_1_1_1_1

New Line.padswitch(r:p1udt1222-p1udt1223)p1u_245799 Units=km Length=0.001 bus1=p1udt1222-p1udt1223xx.2 bus2=p1udt1223.2 switch=y enabled=y phases=1 Linecode=padswitch_1_1_1_1

New Line.padswitch(r:p1udt1222-p1udt17680)p1u_245800 Units=km Length=0.001 bus1=p1udt17680.2 bus2=p1udt1222-p1udt17680xx.2 switch=y enabled=y phases=1 Linecode=padswitch_1_1_1_1

New Line.padswitch(r:p1udt1222-p1udt17680)p1u_245801 Units=km Length=0.001 bus1=p1udt1222-p1udt17680x.2 bus2=p1udt1222.2 switch=y enabled=y phases=1 Linecode=padswitch_1_1_1_1

New Line.padswitch(r:p1udt17474-p1udt17680)p1u_245802 Units=km Length=0.001 bus1=p1udt17474.2 bus2=p1udt17474-p1udt17680x.2 switch=y enabled=y phases=1 Linecode=padswitch_1_2_1_0_1_0_1_0

New Line.padswitch(r:p1udt17474-p1udt17680)p1u_245803 Units=km Length=0.001 bus1=p1udt17474-p1udt17680xx.2 bus2=p1udt17680.2 switch=y enabled=y phases=1 Linecode=padswitch_1_1_1_1

New Line.padswitch(r:p1udt17474-p1udt22224)p1u_245804 Units=km Length=0.001 bus1=p1udt17474.2 bus2=p1udt17474-p1udt22224x.2 switch=y enabled=y phases=1 Linecode=padswitch_1_2_1_0_1_0_1_0

New Line.padswitch(r:p1udt17474-p1udt22224)p1u_245805 Units=km Length=0.001 bus1=p1udt17474-p1udt22224xx.2 bus2=p1udt22224.2 switch=y enabled=y phases=1 Linecode=padswitch_1_1_1_1

New Line.padswitch(r:p1udt17474-p1udt20723)p1u_245806 Units=km Length=0.001 bus1=p1udt20723.2 bus2=p1udt17474-p1udt20723xx.2 switch=y enabled=y phases=1 Linecode=padswitch_1_2_1_0_1_0_1

New Line.padswitch(r:p1udt17474-p1udt20723)p1u_245807 Units=km Length=0.001 bus1=p1udt17474-p1udt20723x.2 bus2=p1udt17474.2 switch=y enabled=y phases=1 Linecode=padswitch_1_2_1_0_1_0_1

New Line.padswitch(r:p1udt17257-p1udt20723)p1u_245808 Units=km Length=0.001 bus1=p1udt17257.2 bus2=p1udt17257-p1udt20723x.2 switch=y enabled=y phases=1 Linecode=padswitch_1_2_1_0_1_0_1

New Line.padswitch(r:p1udt17257-p1udt20723)p1u_245809 Units=km Length=0.001 bus1=p1udt17257-p1udt20723xx.2 bus2=p1udt20723.2 switch=y enabled=y phases=1 Linecode=padswitch_1_2_1_0_1_0_1

New Line.padswitch(r:p1udt1224-p1udt17257)p1u_245810 Units=km Length=0.001 bus1=p1udt1224.2 bus2=p1udt1224-p1udt17257x.2 switch=y enabled=y phases=1 Linecode=padswitch_1_1_1_1

New Line.padswitch(r:p1udt1224-p1udt17257)p1u_245811 Units=km Length=0.001 bus1=p1udt1224-p1udt17257xx.2 bus2=p1udt17257.2 switch=y enabled=y phases=1 Linecode=padswitch_1_2_1_0_1_0_1

New Line.padswitch(r:p1udt1224-p1udt13802)p1u_245812 Units=km Length=0.001 bus1=p1udt13802.2 bus2=p1udt1224-p1udt13802xx.2 switch=y enabled=y phases=1 Linecode=padswitch_1_1_1_1

New Line.padswitch(r:p1udt1224-p1udt13802)p1u_245813 Units=km Length=0.001 bus1=p1udt1224-p1udt13802x.2 bus2=p1udt1224.2 switch=y enabled=y phases=1 Linecode=padswitch_1_1_1_1

New Line.padswitch(r:p1udt13802-p1udt8635)p1u_245814 Units=km Length=0.001 bus1=p1udt8635.2 bus2=p1udt13802-p1udt8635xx.2 switch=y enabled=y phases=1 Linecode=padswitch_1_2_1_0_1_0_1

New Line.padswitch(r:p1udt13802-p1udt8635)p1u_245815 Units=km Length=0.001 bus1=p1udt13802-p1udt8635x.2 bus2=p1udt13802.2 switch=y enabled=y phases=1 Linecode=padswitch_1_1_1_1

New Line.fuse(r:p1udt3007-p1udt3567)p1u_266358 Units=km Length=0.001 bus1=p1udt3567.2 bus2=p1udt3007-p1udt3567x.2 switch=n enabled=y phases=1 Linecode=fuse_1_1_1_1

New Fuse.Fuse_fuse(r:p1udt3007-p1udt3567)p1u_266358 monitoredobj=Line.fuse(r:p1udt3007-p1udt3567)p1u_266358 enabled=y ratedcurrent=100.0

New Line.fuse(r:p1udt17056-p1udt9784)p1u_266947 Units=km Length=0.001 bus1=p1udt9784.3 bus2=p1udt17056-p1udt9784x.3 switch=n enabled=y phases=1 Linecode=fuse_1_1_1_1

New Fuse.Fuse_fuse(r:p1udt17056-p1udt9784)p1u_266947 monitoredobj=Line.fuse(r:p1udt17056-p1udt9784)p1u_266947 enabled=y ratedcurrent=100.0

New Line.fuse(r:p1udt19234-p1udt21982)p1u_267876 Units=km Length=0.001 bus1=p1udt19234.2 bus2=p1udt19234-p1udt21982x.2 switch=n enabled=y phases=1 Linecode=fuse_1_6_1_1_1

New Fuse.Fuse_fuse(r:p1udt19234-p1udt21982)p1u_267876 monitoredobj=Line.fuse(r:p1udt19234-p1udt21982)p1u_267876 enabled=y ratedcurrent=100.0

New Line.fuse(r:p1udt1847-p1udt23199)p1u_268282 Units=km Length=0.001 bus1=p1udt23199.2 bus2=p1udt1847-p1udt23199x.2 switch=n enabled=y phases=1 Linecode=fuse_1_1_1_1

New Fuse.Fuse_fuse(r:p1udt1847-p1udt23199)p1u_268282 monitoredobj=Line.fuse(r:p1udt1847-p1udt23199)p1u_268282 enabled=y ratedcurrent=100.0

New Line.fuse(r:p1udt2408-p1udt25318)p1u_268509 Units=km Length=0.001 bus1=p1udt25318.1 bus2=p1udt2408-p1udt25318x.1 switch=n enabled=y phases=1 Linecode=fuse_1_6_1_1_1

New Fuse.Fuse_fuse(r:p1udt2408-p1udt25318)p1u_268509 monitoredobj=Line.fuse(r:p1udt2408-p1udt25318)p1u_268509 enabled=y ratedcurrent=100.0

New Line.fuse(r:p1udt25318-p1udt8635)p1u_268510 Units=km Length=0.001 bus1=p1udt25318.2 bus2=p1udt25318-p1udt8635x.2 switch=n enabled=y phases=1 Linecode=fuse_1_6_1_4_1_1

New Fuse.Fuse_fuse(r:p1udt25318-p1udt8635)p1u_268510 monitoredobj=Line.fuse(r:p1udt25318-p1udt8635)p1u_268510 enabled=y ratedcurrent=100.0

New Line.l(r:p1udt19234-p1uhs9_1247)_disconnect Units=km Length=0.001 bus1=p1udt19234-p1uhs9_1247x_b1_1.1.2.3 bus2=p1udt19234-p1uhs9_1247x_b2_1.1.2.3 switch=y enabled=y phases=3 Linecode=3P_OH_AL_ACSR_1033kcmil_Curlew_12.47_1_3_3_3_3

New Line.l(r:p1udt19234-p1uhs9_1247)_cont Units=km Length=7.8543 bus1=p1udt19234-p1uhs9_1247x_b2_1.1.2.3 bus2=p1udt19234.1.2.3 switch=n enabled=y phases=3 Linecode=3P_OH_AL_ACSR_1033kcmil_Curlew_12.47_1_3_3_3_3
