New Line.l(r:p1udm1417-p1ulv395) Units=km Length=0.0186831 bus1=p1udm1417.1.2 bus2=p1ulv395.1.2 switch=n enabled=y phases=2 Linecode=1P_UG_AL_1/0_Brenau_0_416_0_2_2_2_2

New Line.l(r:p1udm1417-p1ulv62033) Units=km Length=0.0136417 bus1=p1udm1417.1.2 bus2=p1ulv62033.1.2 switch=n enabled=y phases=2 Linecode=1P_UG_AL_1/0_Brenau_0_416_0_2_2_2_2

New Line.l(r:p1udm1417-p1udt391lv) Units=km Length=0.00762232 bus1=p1udt391lv.1.2 bus2=p1udm1417.1.2 switch=n enabled=y phases=2 Linecode=1P_UG_AL_4/0_Sweetbriar_0_416_0_2_2_2_2

New Line.l(r:p1udm1418-p1ulv39027) Units=km Length=0.0177654 bus1=p1udm1418.1.2 bus2=p1ulv39027.1.2 switch=n enabled=y phases=2 Linecode=1P_UG_AL_1/0_Brenau_0_416_0_2_2_2_2

New Line.l(r:p1udm1418-p1ulv60157) Units=km Length=0.0133686 bus1=p1udm1418.1.2 bus2=p1ulv60157.1.2 switch=n enabled=y phases=2 Linecode=1P_UG_AL_1/0_Brenau_0_416_0_2_2_2_2

New Line.l(r:p1udm1418-p1udt391lv) Units=km Length=0.00867413 bus1=p1udt391lv.1.2 bus2=p1udm1418.1.2 switch=n enabled=y phases=2 Linecode=1P_UG_AL_4/0_Sweetbriar_0_416_0_2_2_2_2

New Line.l(r:p1udt393lv-p1ulv19345) Units=km Length=0.0187137 bus1=p1udt393lv.1.2 bus2=p1ulv19345.1.2 switch=n enabled=y phases=2 Linecode=1P_UG_AL_1/0_Brenau_0_416_0_2_2_2_2

New Line.l(r:p1udt393lv-p1ulv63304) Units=km Length=0.0197185 bus1=p1udt393lv.1.2 bus2=p1ulv63304.1.2 switch=n enabled=y phases=2 Linecode=1P_UG_AL_1/0_Brenau_0_416_0_2_2_2_2

New Line.l(r:p1udm1425-p1ulv397) Units=km Length=0.0118996 bus1=p1udm1425.1.2 bus2=p1ulv397.1.2 switch=n enabled=y phases=2 Linecode=1P_UG_AL_1/0_Brenau_0_416_0_2_2_2_2

New Line.l(r:p1udm1425-p1udt393lv) Units=km Length=0.00980509 bus1=p1udt393lv.1.2 bus2=p1udm1425.1.2 switch=n enabled=y phases=2 Linecode=1P_UG_AL_1/0_Brenau_0_416_0_2_2_2_2

New Line.l(r:p1udt394lv-p1ulv398) Units=km Length=0.0148348 bus1=p1udt394lv.1.2 bus2=p1ulv398.1.2 switch=n enabled=y phases=2 Linecode=1P_UG_AL_1/0_Brenau_0_416_0_2_2_2_2

New Line.l(r:p1udt394lv-p1ulv27635) Units=km Length=0.016164 bus1=p1udt394lv.1.2 bus2=p1ulv27635.1.2 switch=n enabled=y phases=2 Linecode=1P_UG_AL_1/0_Brenau_0_416_0_2_2_2_2

New Line.l(r:p1udm3653-p1ulv1014) Units=km Length=0.0155085 bus1=p1udm3653.1.2 bus2=p1ulv1014.1.2 switch=n enabled=y phases=2 Linecode=1P_UG_AL_4/0_Sweetbriar_0_416_0_2_2_2_2

New Line.l(r:p1udm3653-p1ulv25066) Units=km Length=0.016898500000000004 bus1=p1udm3653.1.2 bus2=p1ulv25066.1.2 switch=n enabled=y phases=2 Linecode=1P_UG_AL_1/0_Brenau_0_416_0_2_2_2_2

New Line.l(r:p1udm3653-p1ulv40903) Units=km Length=0.016872900000000003 bus1=p1udm3653.1.2 bus2=p1ulv40903.1.2 switch=n enabled=y phases=2 Linecode=1P_UG_AL_1/0_Brenau_0_416_0_2_2_2_2

New Line.l(r:p1udm3653-p1udt994lv) Units=km Length=0.00949081 bus1=p1udt994lv.1.2 bus2=p1udm3653.1.2 switch=n enabled=y phases=2 Linecode=1P_UG_AL_4/0_Sweetbriar_0_416_0_2_2_2_2

New Line.l(r:p1udm3655-p1ulv26987) Units=km Length=0.0169066 bus1=p1udm3655.1.2 bus2=p1ulv26987.1.2 switch=n enabled=y phases=2 Linecode=1P_UG_AL_1/0_Brenau_0_416_0_2_2_2_2

New Line.l(r:p1udm3656-p1ulv27634) Units=km Length=0.016427700000000003 bus1=p1udm3656.1.2 bus2=p1ulv27634.1.2 switch=n enabled=y phases=2 Linecode=1P_UG_AL_1/0_Brenau_0_416_0_2_2_2_2

New Line.l(r:p1udm3655-p1udm3656) Units=km Length=0.00949899 bus1=p1udm3655.1.2 bus2=p1udm3656.1.2 switch=n enabled=y phases=2 Linecode=1P_UG_AL_1/0_Brenau_0_416_0_2_2_2_2

New Line.l(r:p1udm3655-p1udt994lv) Units=km Length=0.00948507 bus1=p1udt994lv.1.2 bus2=p1udm3655.1.2 switch=n enabled=y phases=2 Linecode=1P_UG_AL_4/0_Sweetbriar_0_416_0_2_2_2_2

New Line.l(r:p1udt1639lv-p1ulv17358) Units=km Length=0.0166526 bus1=p1udt1639lv.1.2 bus2=p1ulv17358.1.2 switch=n enabled=y phases=2 Linecode=1P_UG_AL_1/0_Brenau_0_416_0_2_2_2_2

New Line.l(r:p1udm6008-p1ulv1709) Units=km Length=0.015449500000000001 bus1=p1udm6008.1.2 bus2=p1ulv1709.1.2 switch=n enabled=y phases=2 Linecode=1P_UG_AL_1/0_Brenau_0_416_0_2_2_2_2

New Line.l(r:p1udm6008-p1udt1639lv) Units=km Length=0.00970236 bus1=p1udt1639lv.1.2 bus2=p1udm6008.1.2 switch=n enabled=y phases=2 Linecode=1P_UG_AL_1/0_Brenau_0_416_0_2_2_2_2

New Line.l(r:p1udt2200lv-p1ulv25063) Units=km Length=0.0206894 bus1=p1udt2200lv.1.2 bus2=p1ulv25063.1.2 switch=n enabled=y phases=2 Linecode=1P_UG_AL_1/0_Brenau_0_416_0_2_2_2_2

New Line.l(r:p1udm7987-p1ulv2322) Units=km Length=0.015808 bus1=p1udm7987.1.2 bus2=p1ulv2322.1.2 switch=n enabled=y phases=2 Linecode=1P_UG_AL_1/0_Brenau_0_416_0_2_2_2_2

New Line.l(r:p1udm7987-p1udt2200lv) Units=km Length=0.00932103 bus1=p1udt2200lv.1.2 bus2=p1udm7987.1.2 switch=n enabled=y phases=2 Linecode=1P_UG_AL_1/0_Brenau_0_416_0_2_2_2_2

New Line.l(r:p1udm7989-p1ulv27628) Units=km Length=0.0157797 bus1=p1udm7989.1.2 bus2=p1ulv27628.1.2 switch=n enabled=y phases=2 Linecode=1P_UG_AL_1/0_Brenau_0_416_0_2_2_2_2

New Line.l(r:p1udm7989-p1udt2200lv) Units=km Length=0.00932103 bus1=p1udt2200lv.1.2 bus2=p1udm7989.1.2 switch=n enabled=y phases=2 Linecode=1P_UG_AL_1/0_Brenau_0_416_0_2_2_2_2

New Line.l(r:p1udt2202lv-p1ulv47217) Units=km Length=0.0144622 bus1=p1udt2202lv.1.2 bus2=p1ulv47217.1.2 switch=n enabled=y phases=2 Linecode=1P_UG_AL_1/0_Brenau_0_416_0_2_2_2_2

New Line.l(r:p1udm7994-p1ulv2326) Units=km Length=0.0165501 bus1=p1udm7994.1.2 bus2=p1ulv2326.1.2 switch=n enabled=y phases=2 Linecode=1P_UG_AL_1/0_Brenau_0_416_0_2_2_2_2

New Line.l(r:p1udm7994-p1ulv29510) Units=km Length=0.0153356 bus1=p1udm7994.1.2 bus2=p1ulv29510.1.2 switch=n enabled=y phases=2 Linecode=1P_UG_AL_1/0_Brenau_0_416_0_2_2_2_2

New Line.l(r:p1udm7994-p1udt2202lv) Units=km Length=0.00989417 bus1=p1udt2202lv.1.2 bus2=p1udm7994.1.2 switch=n enabled=y phases=2 Linecode=1P_UG_AL_4/0_Sweetbriar_0_416_0_2_2_2_2

New Line.l(r:p1udm7995-p1ulv18691) Units=km Length=0.0151058 bus1=p1udm7995.1.2 bus2=p1ulv18691.1.2 switch=n enabled=y phases=2 Linecode=1P_UG_AL_1/0_Brenau_0_416_0_2_2_2_2

New Line.l(r:p1udm7995-p1ulv21278) Units=km Length=0.0164208 bus1=p1udm7995.1.2 bus2=p1ulv21278.1.2 switch=n enabled=y phases=2 Linecode=1P_UG_AL_1/0_Brenau_0_416_0_2_2_2_2

New Line.l(r:p1udm7998-p1ulv32017) Units=km Length=0.0167539 bus1=p1udm7998.1.2 bus2=p1ulv32017.1.2 switch=n enabled=y phases=2 Linecode=1P_UG_AL_1/0_Brenau_0_416_0_2_2_2_2

New Line.l(r:p1udm7995-p1udm7998) Units=km Length=0.0197688 bus1=p1udm7995.1.2 bus2=p1udm7998.1.2 switch=n enabled=y phases=2 Linecode=1P_UG_AL_1/0_Brenau_0_416_0_2_2_2_2

New Line.l(r:p1udm7995-p1udt2202lv) Units=km Length=0.009888500000000001 bus1=p1udt2202lv.1.2 bus2=p1udm7995.1.2 switch=n enabled=y phases=2 Linecode=1P_UG_AL_4/0_Sweetbriar_0_416_0_2_2_2_2

New Line.l(r:p1udt2785lv-p1ulv2970) Units=km Length=0.0137084 bus1=p1udt2785lv.1.2 bus2=p1ulv2970.1.2 switch=n enabled=y phases=2 Linecode=1P_UG_AL_4/0_Sweetbriar_0_416_0_2_2_2_2

New Line.l(r:p1udt2785lv-p1ulv30130) Units=km Length=0.0180909 bus1=p1udt2785lv.1.2 bus2=p1ulv30130.1.2 switch=n enabled=y phases=2 Linecode=1P_UG_AL_1/0_Brenau_0_416_0_2_2_2_2

New Line.l(r:p1udt2785lv-p1ulv51534) Units=km Length=0.0177117 bus1=p1udt2785lv.1.2 bus2=p1ulv51534.1.2 switch=n enabled=y phases=2 Linecode=1P_UG_AL_1/0_Brenau_0_416_0_2_2_2_2

New Line.l(r:p1udm15419-p1ulv4837) Units=km Length=0.013166300000000002 bus1=p1udm15419.1.2 bus2=p1ulv4837.1.2 switch=n enabled=y phases=2 Linecode=1P_UG_AL_1/0_Brenau_0_416_0_2_2_2_2

New Line.l(r:p1udm15420-p1ulv12374) Units=km Length=0.0144893 bus1=p1udm15420.1.2 bus2=p1ulv12374.1.2 switch=n enabled=y phases=2 Linecode=1P_UG_AL_4/0_Sweetbriar_0_416_0_2_2_2_2

New Line.l(r:p1udm15419-p1udm15420) Units=km Length=0.00992424 bus1=p1udm15419.1.2 bus2=p1udm15420.1.2 switch=n enabled=y phases=2 Linecode=1P_UG_AL_4/0_Sweetbriar_0_416_0_2_2_2_2

New Line.l(r:p1udm15419-p1udt4376lv) Units=km Length=0.00992132 bus1=p1udt4376lv.1.2 bus2=p1udm15419.1.2 switch=n enabled=y phases=2 Linecode=1P_UG_AL_4/0_Sweetbriar_0_416_0_2_2_2_2

New Line.l(r:p1udm15421-p1ulv33348) Units=km Length=0.0149537 bus1=p1udm15421.1.2 bus2=p1ulv33348.1.2 switch=n enabled=y phases=2 Linecode=1P_UG_AL_4/0_Sweetbriar_0_416_0_2_2_2_2

New Line.l(r:p1udm15421-p1ulv55331) Units=km Length=0.012537300000000001 bus1=p1udm15421.1.2 bus2=p1ulv55331.1.2 switch=n enabled=y phases=2 Linecode=1P_UG_AL_1/0_Brenau_0_416_0_2_2_2_2

New Line.l(r:p1udm15421-p1udt4376lv) Units=km Length=0.00992969 bus1=p1udt4376lv.1.2 bus2=p1udm15421.1.2 switch=n enabled=y phases=2 Linecode=1P_UG_AL_4/0_Sweetbriar_0_416_0_2_2_2_2

New Line.l(r:p1udt4854lv-p1ulv5447) Units=km Length=0.0168631 bus1=p1udt4854lv.1.2 bus2=p1ulv5447.1.2 switch=n enabled=y phases=2 Linecode=1P_UG_AL_4/0_Sweetbriar_0_416_0_2_2_2_2

New Line.l(r:p1udt4854lv-p1ulv32666) Units=km Length=0.0184449 bus1=p1udt4854lv.1.2 bus2=p1ulv32666.1.2 switch=n enabled=y phases=2 Linecode=1P_UG_AL_1/0_Brenau_0_416_0_2_2_2_2

New Line.l(r:p1udm16992-p1ulv54743) Units=km Length=0.0168676 bus1=p1udm16992.1.2 bus2=p1ulv54743.1.2 switch=n enabled=y phases=2 Linecode=1P_UG_AL_1/0_Brenau_0_416_0_2_2_2_2

New Line.l(r:p1udm16992-p1udt4854lv) Units=km Length=0.00994037 bus1=p1udt4854lv.1.2 bus2=p1udm16992.1.2 switch=n enabled=y phases=2 Linecode=1P_UG_AL_1/0_Brenau_0_416_0_2_2_2_2

New Line.l(r:p1udt5385lv-p1ulv45327) Units=km Length=0.0177628 bus1=p1udt5385lv.1.2 bus2=p1ulv45327.1.2 switch=n enabled=y phases=2 Linecode=1P_UG_AL_1/0_Brenau_0_416_0_2_2_2_2

New Line.l(r:p1udm18805-p1ulv14222) Units=km Length=0.0175268 bus1=p1udm18805.1.2 bus2=p1ulv14222.1.2 switch=n enabled=y phases=2 Linecode=1P_UG_AL_1/0_Brenau_0_416_0_2_2_2_2

New Line.l(r:p1udm18805-p1ulv62034) Units=km Length=0.0144847 bus1=p1udm18805.1.2 bus2=p1ulv62034.1.2 switch=n enabled=y phases=2 Linecode=1P_UG_AL_1/0_Brenau_0_416_0_2_2_2_2

New Line.l(r:p1udm18804-p1ulv6115) Units=km Length=0.013951500000000002 bus1=p1udm18804.1.2 bus2=p1ulv6115.1.2 switch=n enabled=y phases=2 Linecode=1P_UG_AL_1/0_Brenau_0_416_0_2_2_2_2

New Line.l(r:p1udm18804-p1udm18805) Units=km Length=0.00999666 bus1=p1udm18805.1.2 bus2=p1udm18804.1.2 switch=n enabled=y phases=2 Linecode=1P_UG_AL_1/0_Brenau_0_416_0_2_2_2_2

New Line.l(r:p1udm18805-p1udt5385lv) Units=km Length=0.00999666 bus1=p1udt5385lv.1.2 bus2=p1udm18805.1.2 switch=n enabled=y phases=2 Linecode=1P_UG_AL_4/0_Sweetbriar_0_416_0_2_2_2_2

New Line.l(r:p1udm18806-p1ulv40905) Units=km Length=0.0184576 bus1=p1udm18806.1.2 bus2=p1ulv40905.1.2 switch=n enabled=y phases=2 Linecode=1P_UG_AL_1/0_Brenau_0_416_0_2_2_2_2

New Line.l(r:p1udm18808-p1ulv57744) Units=km Length=0.0135555 bus1=p1udm18808.1.2 bus2=p1ulv57744.1.2 switch=n enabled=y phases=2 Linecode=1P_UG_AL_1/0_Brenau_0_416_0_2_2_2_2

New Line.l(r:p1udm18806-p1udm18808) Units=km Length=0.00999666 bus1=p1udm18806.1.2 bus2=p1udm18808.1.2 switch=n enabled=y phases=2 Linecode=1P_UG_AL_1/0_Brenau_0_416_0_2_2_2_2

New Line.l(r:p1udm18806-p1udt5385lv) Units=km Length=0.0100106 bus1=p1udt5385lv.1.2 bus2=p1udm18806.1.2 switch=n enabled=y phases=2 Linecode=1P_UG_AL_4/0_Sweetbriar_0_416_0_2_2_2_2

New Line.l(r:p1udt5890lv-p1ulv35890) Units=km Length=0.0129449 bus1=p1udt5890lv.1.2 bus2=p1ulv35890.1.2 switch=n enabled=y phases=2 Linecode=1P_UG_AL_4/0_Sweetbriar_0_416_0_2_2_2_2

New Line.l(r:p1udm20461-p1ulv6768) Units=km Length=0.0177305 bus1=p1udm20461.1.2 bus2=p1ulv6768.1.2 switch=n enabled=y phases=2 Linecode=1P_UG_AL_1/0_Brenau_0_416_0_2_2_2_2

New Line.l(r:p1udm20463-p1ulv27639) Units=km Length=0.0125144 bus1=p1udm20463.1.2 bus2=p1ulv27639.1.2 switch=n enabled=y phases=2 Linecode=1P_UG_AL_1/0_Brenau_0_416_0_2_2_2_2

New Line.l(r:p1udm20461-p1udm20463) Units=km Length=0.0452497 bus1=p1udm20461.1.2 bus2=p1udm20463.1.2 switch=n enabled=y phases=2 Linecode=1P_UG_AL_1/0_Brenau_0_416_0_2_2_2_2

New Line.l(r:p1udm20461-p1udt5890lv) Units=km Length=0.00765325 bus1=p1udt5890lv.1.2 bus2=p1udm20461.1.2 switch=n enabled=y phases=2 Linecode=1P_UG_AL_4/0_Sweetbriar_0_416_0_2_2_2_2

New Line.l(r:p1udm20462-p1ulv21280) Units=km Length=0.0188539 bus1=p1udm20462.1.2 bus2=p1ulv21280.1.2 switch=n enabled=y phases=2 Linecode=1P_UG_AL_1/0_Brenau_0_416_0_2_2_2_2

New Line.l(r:p1udm20465-p1ulv40297) Units=km Length=0.0137831 bus1=p1udm20465.1.2 bus2=p1ulv40297.1.2 switch=n enabled=y phases=2 Linecode=1P_UG_AL_1/0_Brenau_0_416_0_2_2_2_2

New Line.l(r:p1udm20462-p1udm20465) Units=km Length=0.00817436 bus1=p1udm20462.1.2 bus2=p1udm20465.1.2 switch=n enabled=y phases=2 Linecode=1P_UG_AL_1/0_Brenau_0_416_0_2_2_2_2

New Line.l(r:p1udm20462-p1udt5890lv) Units=km Length=0.0163617 bus1=p1udt5890lv.1.2 bus2=p1udm20462.1.2 switch=n enabled=y phases=2 Linecode=1P_UG_AL_4/0_Sweetbriar_0_416_0_2_2_2_2

New Line.l(r:p1udm21989-p1ulv7388) Units=km Length=0.0188795 bus1=p1udm21989.1.2 bus2=p1ulv7388.1.2 switch=n enabled=y phases=2 Linecode=1P_UG_AL_1/0_Brenau_0_416_0_2_2_2_2

New Line.l(r:p1udm21989-p1ulv26344) Units=km Length=0.015383700000000002 bus1=p1udm21989.1.2 bus2=p1ulv26344.1.2 switch=n enabled=y phases=2 Linecode=1P_UG_AL_1/0_Brenau_0_416_0_2_2_2_2

New Line.l(r:p1udm21989-p1ulv38406) Units=km Length=0.016469 bus1=p1udm21989.1.2 bus2=p1ulv38406.1.2 switch=n enabled=y phases=2 Linecode=1P_UG_AL_1/0_Brenau_0_416_0_2_2_2_2

New Line.l(r:p1udm21991-p1ulv29512) Units=km Length=0.0149879 bus1=p1udm21991.1.2 bus2=p1ulv29512.1.2 switch=n enabled=y phases=2 Linecode=1P_UG_AL_1/0_Brenau_0_416_0_2_2_2_2

New Line.l(r:p1udm21989-p1udm21991) Units=km Length=0.00845832 bus1=p1udm21989.1.2 bus2=p1udm21991.1.2 switch=n enabled=y phases=2 Linecode=1P_UG_AL_1/0_Brenau_0_416_0_2_2_2_2

New Line.l(r:p1udm21989-p1udt6358lv) Units=km Length=0.008444610000000002 bus1=p1udt6358lv.1.2 bus2=p1udm21989.1.2 switch=n enabled=y phases=2 Linecode=1P_UG_AL_4/0_Sweetbriar_0_416_0_2_2_2_2

New Line.l(r:p1udm21994-p1ulv57745) Units=km Length=0.0142065 bus1=p1udm21994.1.2 bus2=p1ulv57745.1.2 switch=n enabled=y phases=2 Linecode=1P_UG_AL_1/0_Brenau_0_416_0_2_2_2_2

New Line.l(r:p1udm21993-p1ulv44068) Units=km Length=0.016991 bus1=p1udm21993.1.2 bus2=p1ulv44068.1.2 switch=n enabled=y phases=2 Linecode=1P_UG_AL_1/0_Brenau_0_416_0_2_2_2_2

New Line.l(r:p1udm21993-p1udm21994) Units=km Length=0.00844974 bus1=p1udm21994.1.2 bus2=p1udm21993.1.2 switch=n enabled=y phases=2 Linecode=1P_UG_AL_1/0_Brenau_0_416_0_2_2_2_2

New Line.l(r:p1udm21994-p1udt6358lv) Units=km Length=0.00845319 bus1=p1udt6358lv.1.2 bus2=p1udm21994.1.2 switch=n enabled=y phases=2 Linecode=1P_UG_AL_4/0_Sweetbriar_0_416_0_2_2_2_2

New Line.l(r:p1udt7249lv-p1ulv29508) Units=km Length=0.0170965 bus1=p1udt7249lv.1.2 bus2=p1ulv29508.1.2 switch=n enabled=y phases=2 Linecode=1P_UG_AL_1/0_Brenau_0_416_0_2_2_2_2

New Line.l(r:p1udt7249lv-p1ulv32668) Units=km Length=0.0150245 bus1=p1udt7249lv.1.2 bus2=p1ulv32668.1.2 switch=n enabled=y phases=2 Linecode=1P_UG_AL_1/0_Brenau_0_416_0_2_2_2_2

New Line.l(r:p1udm24869-p1ulv8627) Units=km Length=0.0152637 bus1=p1udm24869.1.2 bus2=p1ulv8627.1.2 switch=n enabled=y phases=2 Linecode=1P_UG_AL_1/0_Brenau_0_416_0_2_2_2_2

New Line.l(r:p1udm24869-p1udt7249lv) Units=km Length=0.00949899 bus1=p1udt7249lv.1.2 bus2=p1udm24869.1.2 switch=n enabled=y phases=2 Linecode=1P_UG_AL_1/0_Brenau_0_416_0_2_2_2_2

New Line.l(r:p1udm24871-p1ulv30129) Units=km Length=0.0174712 bus1=p1udm24871.1.2 bus2=p1ulv30129.1.2 switch=n enabled=y phases=2 Linecode=1P_UG_AL_1/0_Brenau_0_416_0_2_2_2_2

New Line.l(r:p1udm24871-p1udt7249lv) Units=km Length=0.00948507 bus1=p1udt7249lv.1.2 bus2=p1udm24871.1.2 switch=n enabled=y phases=2 Linecode=1P_UG_AL_1/0_Brenau_0_416_0_2_2_2_2

New Line.l(r:p1udt7673lv-p1ulv35900) Units=km Length=0.0176198 bus1=p1udt7673lv.1.2 bus2=p1ulv35900.1.2 switch=n enabled=y phases=2 Linecode=1P_UG_AL_1/0_Brenau_0_416_0_2_2_2_2

New Line.l(r:p1udm26284-p1ulv9250) Units=km Length=0.0183953 bus1=p1udm26284.1.2 bus2=p1ulv9250.1.2 switch=n enabled=y phases=2 Linecode=1P_UG_AL_1/0_Brenau_0_416_0_2_2_2_2

New Line.l(r:p1udm26284-p1udt7673lv) Units=km Length=0.00999666 bus1=p1udt7673lv.1.2 bus2=p1udm26284.1.2 switch=n enabled=y phases=2 Linecode=1P_UG_AL_1/0_Brenau_0_416_0_2_2_2_2

New Line.l(r:p1udm26285-p1ulv26340) Units=km Length=0.0137632 bus1=p1udm26285.1.2 bus2=p1ulv26340.1.2 switch=n enabled=y phases=2 Linecode=1P_UG_AL_1/0_Brenau_0_416_0_2_2_2_2

New Line.l(r:p1udm26287-p1ulv54100) Units=km Length=0.0179189 bus1=p1udm26287.1.2 bus2=p1ulv54100.1.2 switch=n enabled=y phases=2 Linecode=1P_UG_AL_1/0_Brenau_0_416_0_2_2_2_2

New Line.l(r:p1udm26285-p1udm26287) Units=km Length=0.00999666 bus1=p1udm26285.1.2 bus2=p1udm26287.1.2 switch=n enabled=y phases=2 Linecode=1P_UG_AL_1/0_Brenau_0_416_0_2_2_2_2

New Line.l(r:p1udm26285-p1udt7673lv) Units=km Length=0.0100106 bus1=p1udt7673lv.1.2 bus2=p1udm26285.1.2 switch=n enabled=y phases=2 Linecode=1P_UG_AL_4/0_Sweetbriar_0_416_0_2_2_2_2

New Line.l(r:p1udm28830-p1ulv10490) Units=km Length=0.0299005 bus1=p1udm28830.1.2 bus2=p1ulv10490.1.2 switch=n enabled=y phases=2 Linecode=1P_UG_AL_1/0_Brenau_0_416_0_2_2_2_2

New Line.l(r:p1udm28830-p1ulv16753) Units=km Length=0.0270121 bus1=p1udm28830.1.2 bus2=p1ulv16753.1.2 switch=n enabled=y phases=2 Linecode=1P_UG_AL_1/0_Brenau_0_416_0_2_2_2_2

New Line.l(r:p1udm28830-p1udt8483lv) Units=km Length=0.00681238 bus1=p1udt8483lv.1.2 bus2=p1udm28830.1.2 switch=n enabled=y phases=2 Linecode=1P_UG_AL_4/0_Sweetbriar_0_416_0_2_2_2_2

New Line.l(r:p1udm28833-p1ulv21888) Units=km Length=0.0230935 bus1=p1udm28833.1.2 bus2=p1ulv21888.1.2 switch=n enabled=y phases=2 Linecode=1P_UG_AL_1/0_Brenau_0_416_0_2_2_2_2

New Line.l(r:p1udm28831-p1ulv14216) Units=km Length=0.0199708 bus1=p1udm28831.1.2 bus2=p1ulv14216.1.2 switch=n enabled=y phases=2 Linecode=1P_UG_AL_1/0_Brenau_0_416_0_2_2_2_2

New Line.l(r:p1udm28831-p1udm28833) Units=km Length=0.00681238 bus1=p1udm28833.1.2 bus2=p1udm28831.1.2 switch=n enabled=y phases=2 Linecode=1P_UG_AL_1/0_Brenau_0_416_0_2_2_2_2

New Line.l(r:p1udm28833-p1udt8483lv) Units=km Length=0.00680617 bus1=p1udt8483lv.1.2 bus2=p1udm28833.1.2 switch=n enabled=y phases=2 Linecode=1P_UG_AL_4/0_Sweetbriar_0_416_0_2_2_2_2

New Line.l(r:p1udt9238lv-p1ulv35243) Units=km Length=0.0158473 bus1=p1udt9238lv.1.2 bus2=p1ulv35243.1.2 switch=n enabled=y phases=2 Linecode=1P_UG_AL_1/0_Brenau_0_416_0_2_2_2_2

New Line.l(r:p1udt9238lv-p1ulv39030) Units=km Length=0.0142719 bus1=p1udt9238lv.1.2 bus2=p1ulv39030.1.2 switch=n enabled=y phases=2 Linecode=1P_UG_AL_1/0_Brenau_0_416_0_2_2_2_2

New Line.l(r:p1udm31117-p1ulv32016) Units=km Length=0.0165807 bus1=p1udm31117.1.2 bus2=p1ulv32016.1.2 switch=n enabled=y phases=2 Linecode=1P_UG_AL_1/0_Brenau_0_416_0_2_2_2_2

New Line.l(r:p1udm31116-p1ulv11713) Units=km Length=0.0164164 bus1=p1udm31116.1.2 bus2=p1ulv11713.1.2 switch=n enabled=y phases=2 Linecode=1P_UG_AL_1/0_Brenau_0_416_0_2_2_2_2

New Line.l(r:p1udm31116-p1udm31117) Units=km Length=0.00989417 bus1=p1udm31117.1.2 bus2=p1udm31116.1.2 switch=n enabled=y phases=2 Linecode=1P_UG_AL_1/0_Brenau_0_416_0_2_2_2_2

New Line.l(r:p1udm31117-p1udt9238lv) Units=km Length=0.009888500000000001 bus1=p1udt9238lv.1.2 bus2=p1udm31117.1.2 switch=n enabled=y phases=2 Linecode=1P_UG_AL_4/0_Sweetbriar_0_416_0_2_2_2_2

New Line.l(r:p1udm31120-p1ulv64580) Units=km Length=0.0167106 bus1=p1udm31120.1.2 bus2=p1ulv64580.1.2 switch=n enabled=y phases=2 Linecode=1P_UG_AL_1/0_Brenau_0_416_0_2_2_2_2

New Line.l(r:p1udm31120-p1udt9238lv) Units=km Length=0.009888500000000001 bus1=p1udt9238lv.1.2 bus2=p1udm31120.1.2 switch=n enabled=y phases=2 Linecode=1P_UG_AL_1/0_Brenau_0_416_0_2_2_2_2

New Line.l(r:p1udt9241lv-p1ulv11717) Units=km Length=0.015394 bus1=p1udt9241lv.1.2 bus2=p1ulv11717.1.2 switch=n enabled=y phases=2 Linecode=1P_UG_AL_4/0_Sweetbriar_0_416_0_2_2_2_2

New Line.l(r:p1udt9649lv-p1ulv12372) Units=km Length=0.0179537 bus1=p1udt9649lv.1.2 bus2=p1ulv12372.1.2 switch=n enabled=y phases=2 Linecode=1P_UG_AL_1/0_Brenau_0_416_0_2_2_2_2

New Line.l(r:p1udm32380-p1ulv30761) Units=km Length=0.0147403 bus1=p1udm32380.1.2 bus2=p1ulv30761.1.2 switch=n enabled=y phases=2 Linecode=1P_UG_AL_4/0_Sweetbriar_0_416_0_2_2_2_2

New Line.l(r:p1udm32380-p1udt9649lv) Units=km Length=0.00999666 bus1=p1udt9649lv.1.2 bus2=p1udm32380.1.2 switch=n enabled=y phases=2 Linecode=1P_UG_AL_4/0_Sweetbriar_0_416_0_2_2_2_2

New Line.l(r:p1udm32381-p1ulv60766) Units=km Length=0.0180641 bus1=p1udm32381.1.2 bus2=p1ulv60766.1.2 switch=n enabled=y phases=2 Linecode=1P_UG_AL_1/0_Brenau_0_416_0_2_2_2_2

New Line.l(r:p1udm32381-p1udt9649lv) Units=km Length=0.0100023 bus1=p1udt9649lv.1.2 bus2=p1udm32381.1.2 switch=n enabled=y phases=2 Linecode=1P_UG_AL_1/0_Brenau_0_416_0_2_2_2_2

New Line.l(r:p1udt9650lv-p1ulv12373) Units=km Length=0.0112976 bus1=p1udt9650lv.1.2 bus2=p1ulv12373.1.2 switch=n enabled=y phases=2 Linecode=1P_UG_AL_1/0_Brenau_0_416_0_2_2_2_2

New Line.l(r:p1udm32383-p1ulv45328) Units=km Length=0.0156799 bus1=p1udm32383.1.2 bus2=p1ulv45328.1.2 switch=n enabled=y phases=2 Linecode=1P_UG_AL_1/0_Brenau_0_416_0_2_2_2_2

New Line.l(r:p1udm32383-p1udt9650lv) Units=km Length=0.00843826 bus1=p1udt9650lv.1.2 bus2=p1udm32383.1.2 switch=n enabled=y phases=2 Linecode=1P_UG_AL_1/0_Brenau_0_416_0_2_2_2_2

New Line.l(r:p1udm32384-p1ulv49082) Units=km Length=0.008209880000000001 bus1=p1udm32384.1.2 bus2=p1ulv49082.1.2 switch=n enabled=y phases=2 Linecode=1P_UG_AL_1/0_Brenau_0_416_0_2_2_2_2

New Line.l(r:p1udm32384-p1udt9650lv) Units=km Length=0.00843616 bus1=p1udt9650lv.1.2 bus2=p1udm32384.1.2 switch=n enabled=y phases=2 Linecode=1P_UG_AL_1/0_Brenau_0_416_0_2_2_2_2

New Line.l(r:p1udt10362lv-p1ulv34620) Units=km Length=0.0145818 bus1=p1udt10362lv.1.2 bus2=p1ulv34620.1.2 switch=n enabled=y phases=2 Linecode=1P_UG_AL_1/0_Brenau_0_416_0_2_2_2_2

New Line.l(r:p1udt10362lv-p1ulv51535) Units=km Length=0.0165384 bus1=p1udt10362lv.1.2 bus2=p1ulv51535.1.2 switch=n enabled=y phases=2 Linecode=1P_UG_AL_1/0_Brenau_0_416_0_2_2_2_2

New Line.l(r:p1udm34509-p1ulv14848) Units=km Length=0.0166391 bus1=p1udm34509.1.2 bus2=p1ulv14848.1.2 switch=n enabled=y phases=2 Linecode=1P_UG_AL_1/0_Brenau_0_416_0_2_2_2_2

New Line.l(r:p1udm34508-p1ulv13590) Units=km Length=0.0148727 bus1=p1udm34508.1.2 bus2=p1ulv13590.1.2 switch=n enabled=y phases=2 Linecode=1P_UG_AL_1/0_Brenau_0_416_0_2_2_2_2

New Line.l(r:p1udm34508-p1udm34509) Units=km Length=0.009888500000000001 bus1=p1udm34509.1.2 bus2=p1udm34508.1.2 switch=n enabled=y phases=2 Linecode=1P_UG_AL_1/0_Brenau_0_416_0_2_2_2_2

New Line.l(r:p1udm34509-p1udt10362lv) Units=km Length=0.00989417 bus1=p1udt10362lv.1.2 bus2=p1udm34509.1.2 switch=n enabled=y phases=2 Linecode=1P_UG_AL_4/0_Sweetbriar_0_416_0_2_2_2_2

New Line.l(r:p1udm34510-p1ulv33345) Units=km Length=0.0142419 bus1=p1udm34510.1.2 bus2=p1ulv33345.1.2 switch=n enabled=y phases=2 Linecode=1P_UG_AL_1/0_Brenau_0_416_0_2_2_2_2

New Line.l(r:p1udm34512-p1ulv34621) Units=km Length=0.0149378 bus1=p1udm34512.1.2 bus2=p1ulv34621.1.2 switch=n enabled=y phases=2 Linecode=1P_UG_AL_1/0_Brenau_0_416_0_2_2_2_2

New Line.l(r:p1udm34510-p1udm34512) Units=km Length=0.009888500000000001 bus1=p1udm34510.1.2 bus2=p1udm34512.1.2 switch=n enabled=y phases=2 Linecode=1P_UG_AL_1/0_Brenau_0_416_0_2_2_2_2

New Line.l(r:p1udm34510-p1udt10362lv) Units=km Length=0.009888500000000001 bus1=p1udt10362lv.1.2 bus2=p1udm34510.1.2 switch=n enabled=y phases=2 Linecode=1P_UG_AL_4/0_Sweetbriar_0_416_0_2_2_2_2

New Line.l(r:p1udt10363lv-p1ulv39031) Units=km Length=0.014424600000000001 bus1=p1udt10363lv.1.2 bus2=p1ulv39031.1.2 switch=n enabled=y phases=2 Linecode=1P_UG_AL_1/0_Brenau_0_416_0_2_2_2_2

New Line.l(r:p1udt10363lv-p1ulv44066) Units=km Length=0.0174861 bus1=p1udt10363lv.1.2 bus2=p1ulv44066.1.2 switch=n enabled=y phases=2 Linecode=1P_UG_AL_1/0_Brenau_0_416_0_2_2_2_2

New Line.l(r:p1udm34514-p1ulv13591) Units=km Length=0.0147262 bus1=p1udm34514.1.2 bus2=p1ulv13591.1.2 switch=n enabled=y phases=2 Linecode=1P_UG_AL_1/0_Brenau_0_416_0_2_2_2_2

New Line.l(r:p1udm34514-p1ulv26989) Units=km Length=0.0179646 bus1=p1udm34514.1.2 bus2=p1ulv26989.1.2 switch=n enabled=y phases=2 Linecode=1P_UG_AL_1/0_Brenau_0_416_0_2_2_2_2

New Line.l(r:p1udm34514-p1udt10363lv) Units=km Length=0.00999666 bus1=p1udt10363lv.1.2 bus2=p1udm34514.1.2 switch=n enabled=y phases=2 Linecode=1P_UG_AL_4/0_Sweetbriar_0_416_0_2_2_2_2

New Line.l(r:p1udt11737lv-p1ulv16069) Units=km Length=0.0109737 bus1=p1udt11737lv.1.2 bus2=p1ulv16069.1.2 switch=n enabled=y phases=2 Linecode=1P_UG_AL_1/0_Brenau_0_416_0_2_2_2_2

New Line.l(r:p1udm38433-p1ulv36516) Units=km Length=0.0157627 bus1=p1udm38433.1.2 bus2=p1ulv36516.1.2 switch=n enabled=y phases=2 Linecode=1P_UG_AL_1/0_Brenau_0_416_0_2_2_2_2

New Line.l(r:p1udm38434-p1ulv63303) Units=km Length=0.017518900000000004 bus1=p1udm38434.1.2 bus2=p1ulv63303.1.2 switch=n enabled=y phases=2 Linecode=1P_UG_AL_1/0_Brenau_0_416_0_2_2_2_2

New Line.l(r:p1udm38433-p1udm38434) Units=km Length=0.00993202 bus1=p1udm38433.1.2 bus2=p1udm38434.1.2 switch=n enabled=y phases=2 Linecode=1P_UG_AL_1/0_Brenau_0_416_0_2_2_2_2

New Line.l(r:p1udm38433-p1udt11737lv) Units=km Length=0.0394826 bus1=p1udt11737lv.1.2 bus2=p1udm38433.1.2 switch=n enabled=y phases=2 Linecode=1P_UG_AL_4/0_Sweetbriar_0_416_0_2_2_2_2

New Line.l(r:p1udm38436-p1ulv34619) Units=km Length=0.0136341 bus1=p1udm38436.1.2 bus2=p1ulv34619.1.2 switch=n enabled=y phases=2 Linecode=1P_UG_AL_1/0_Brenau_0_416_0_2_2_2_2

New Line.l(r:p1udm38435-p1ulv16071) Units=km Length=0.0139232 bus1=p1udm38435.1.2 bus2=p1ulv16071.1.2 switch=n enabled=y phases=2 Linecode=1P_UG_AL_1/0_Brenau_0_416_0_2_2_2_2

New Line.l(r:p1udm38435-p1udm38436) Units=km Length=0.00940669 bus1=p1udm38436.1.2 bus2=p1udm38435.1.2 switch=n enabled=y phases=2 Linecode=1P_UG_AL_1/0_Brenau_0_416_0_2_2_2_2

New Line.l(r:p1udm38436-p1udt11738lv) Units=km Length=0.0317141 bus1=p1udt11738lv.1.2 bus2=p1udm38436.1.2 switch=n enabled=y phases=2 Linecode=1P_UG_AL_4/0_Sweetbriar_0_416_0_2_2_2_2

New Line.l(r:p1udm38437-p1ulv35241) Units=km Length=0.0176902 bus1=p1udm38437.1.2 bus2=p1ulv35241.1.2 switch=n enabled=y phases=2 Linecode=1P_UG_AL_1/0_Brenau_0_416_0_2_2_2_2

New Line.l(r:p1udm38438-p1ulv62687) Units=km Length=0.0140868 bus1=p1udm38438.1.2 bus2=p1ulv62687.1.2 switch=n enabled=y phases=2 Linecode=1P_UG_AL_1/0_Brenau_0_416_0_2_2_2_2

New Line.l(r:p1udm38437-p1udm38438) Units=km Length=0.00928285 bus1=p1udm38437.1.2 bus2=p1udm38438.1.2 switch=n enabled=y phases=2 Linecode=1P_UG_AL_1/0_Brenau_0_416_0_2_2_2_2

New Line.l(r:p1udm38437-p1udt11738lv) Units=km Length=0.0185793 bus1=p1udt11738lv.1.2 bus2=p1udm38437.1.2 switch=n enabled=y phases=2 Linecode=1P_UG_AL_4/0_Sweetbriar_0_416_0_2_2_2_2

New Line.l(r:p1udt11739lv-p1ulv16073) Units=km Length=0.016003300000000005 bus1=p1udt11739lv.1.2 bus2=p1ulv16073.1.2 switch=n enabled=y phases=2 Linecode=1P_UG_AL_4/0_Sweetbriar_0_416_0_2_2_2_2

New Line.l(r:p1udm39445-p1ulv16754) Units=km Length=0.0191531 bus1=p1udm39445.1.2 bus2=p1ulv16754.1.2 switch=n enabled=y phases=2 Linecode=1P_UG_AL_1/0_Brenau_0_416_0_2_2_2_2

New Line.l(r:p1udm39445-p1ulv39645) Units=km Length=0.0119435 bus1=p1udm39445.1.2 bus2=p1ulv39645.1.2 switch=n enabled=y phases=2 Linecode=1P_UG_AL_1/0_Brenau_0_416_0_2_2_2_2

New Line.l(r:p1udm39445-p1udt12093lv) Units=km Length=0.008080750000000001 bus1=p1udt12093lv.1.2 bus2=p1udm39445.1.2 switch=n enabled=y phases=2 Linecode=1P_UG_AL_4/0_Sweetbriar_0_416_0_2_2_2_2

New Line.l(r:p1udm39447-p1ulv60158) Units=km Length=0.0179795 bus1=p1udm39447.1.2 bus2=p1ulv60158.1.2 switch=n enabled=y phases=2 Linecode=1P_UG_AL_1/0_Brenau_0_416_0_2_2_2_2

New Line.l(r:p1udm39447-p1udt12093lv) Units=km Length=0.00809457 bus1=p1udt12093lv.1.2 bus2=p1udm39447.1.2 switch=n enabled=y phases=2 Linecode=1P_UG_AL_1/0_Brenau_0_416_0_2_2_2_2

New Line.l(r:p1udt12421lv-p1ulv56543) Units=km Length=0.0147672 bus1=p1udt12421lv.1.2 bus2=p1ulv56543.1.2 switch=n enabled=y phases=2 Linecode=1P_UG_AL_1/0_Brenau_0_416_0_2_2_2_2

New Line.l(r:p1udm40351-p1ulv17359) Units=km Length=0.0150779 bus1=p1udm40351.1.2 bus2=p1ulv17359.1.2 switch=n enabled=y phases=2 Linecode=1P_UG_AL_1/0_Brenau_0_416_0_2_2_2_2

New Line.l(r:p1udm40351-p1ulv50289) Units=km Length=0.0162801 bus1=p1udm40351.1.2 bus2=p1ulv50289.1.2 switch=n enabled=y phases=2 Linecode=1P_UG_AL_1/0_Brenau_0_416_0_2_2_2_2

New Line.l(r:p1udm40351-p1udt12421lv) Units=km Length=0.009888500000000001 bus1=p1udt12421lv.1.2 bus2=p1udm40351.1.2 switch=n enabled=y phases=2 Linecode=1P_UG_AL_4/0_Sweetbriar_0_416_0_2_2_2_2

New Line.l(r:p1udm40355-p1ulv61399) Units=km Length=0.0163799 bus1=p1udm40355.1.2 bus2=p1ulv61399.1.2 switch=n enabled=y phases=2 Linecode=1P_UG_AL_1/0_Brenau_0_416_0_2_2_2_2

New Line.l(r:p1udm40354-p1ulv60160) Units=km Length=0.016787600000000003 bus1=p1udm40354.1.2 bus2=p1ulv60160.1.2 switch=n enabled=y phases=2 Linecode=1P_UG_AL_1/0_Brenau_0_416_0_2_2_2_2

New Line.l(r:p1udm40354-p1udm40355) Units=km Length=0.00988026 bus1=p1udm40355.1.2 bus2=p1udm40354.1.2 switch=n enabled=y phases=2 Linecode=1P_UG_AL_1/0_Brenau_0_416_0_2_2_2_2

New Line.l(r:p1udm40355-p1udt12421lv) Units=km Length=0.00989417 bus1=p1udt12421lv.1.2 bus2=p1udm40355.1.2 switch=n enabled=y phases=2 Linecode=1P_UG_AL_4/0_Sweetbriar_0_416_0_2_2_2_2

New Line.l(r:p1udm41198-p1ulv18035) Units=km Length=0.0164629 bus1=p1udm41198.1.2 bus2=p1ulv18035.1.2 switch=n enabled=y phases=2 Linecode=1P_UG_AL_1/0_Brenau_0_416_0_2_2_2_2

New Line.l(r:p1udm41198-p1udt12743lv) Units=km Length=0.00807733 bus1=p1udt12743lv.1.2 bus2=p1udm41198.1.2 switch=n enabled=y phases=2 Linecode=1P_UG_AL_1/0_Brenau_0_416_0_2_2_2_2

New Line.l(r:p1udm41199-p1ulv47215) Units=km Length=0.012878 bus1=p1udm41199.1.2 bus2=p1ulv47215.1.2 switch=n enabled=y phases=2 Linecode=1P_UG_AL_1/0_Brenau_0_416_0_2_2_2_2

New Line.l(r:p1udm41199-p1udt12743lv) Units=km Length=0.00807243 bus1=p1udt12743lv.1.2 bus2=p1udm41199.1.2 switch=n enabled=y phases=2 Linecode=1P_UG_AL_1/0_Brenau_0_416_0_2_2_2_2

New Line.l(r:p1udt13683lv-p1ulv26990) Units=km Length=0.0171398 bus1=p1udt13683lv.1.2 bus2=p1ulv26990.1.2 switch=n enabled=y phases=2 Linecode=1P_UG_AL_1/0_Brenau_0_416_0_2_2_2_2

New Line.l(r:p1udm43627-p1ulv19974) Units=km Length=0.016942000000000002 bus1=p1udm43627.1.2 bus2=p1ulv19974.1.2 switch=n enabled=y phases=2 Linecode=1P_UG_AL_1/0_Brenau_0_416_0_2_2_2_2

New Line.l(r:p1udm43627-p1udt13683lv) Units=km Length=0.00970236 bus1=p1udt13683lv.1.2 bus2=p1udm43627.1.2 switch=n enabled=y phases=2 Linecode=1P_UG_AL_1/0_Brenau_0_416_0_2_2_2_2

New Line.l(r:p1udm44350-p1ulv20621) Units=km Length=0.0172353 bus1=p1udm44350.1.2 bus2=p1ulv20621.1.2 switch=n enabled=y phases=2 Linecode=1P_UG_AL_4/0_Sweetbriar_0_416_0_2_2_2_2

New Line.l(r:p1udm44350-p1udt13989lv) Units=km Length=0.0198585 bus1=p1udt13989lv.1.2 bus2=p1udm44350.1.2 switch=n enabled=y phases=2 Linecode=1P_UG_AL_4/0_Sweetbriar_0_416_0_2_2_2_2

New Line.l(r:p1udm44351-p1ulv39025) Units=km Length=0.017564300000000005 bus1=p1udm44351.1.2 bus2=p1ulv39025.1.2 switch=n enabled=y phases=2 Linecode=1P_UG_AL_1/0_Brenau_0_416_0_2_2_2_2

New Line.l(r:p1udm44351-p1udt13989lv) Units=km Length=0.0297989 bus1=p1udt13989lv.1.2 bus2=p1udm44351.1.2 switch=n enabled=y phases=2 Linecode=1P_UG_AL_1/0_Brenau_0_416_0_2_2_2_2

New Line.l(r:p1udt14259lv-p1ulv21275) Units=km Length=0.0164661 bus1=p1udt14259lv.1.2 bus2=p1ulv21275.1.2 switch=n enabled=y phases=2 Linecode=1P_UG_AL_1/0_Brenau_0_416_0_2_2_2_2

New Line.l(r:p1udt14259lv-p1ulv31376) Units=km Length=0.0174297 bus1=p1udt14259lv.1.2 bus2=p1ulv31376.1.2 switch=n enabled=y phases=2 Linecode=1P_UG_AL_1/0_Brenau_0_416_0_2_2_2_2

New Line.l(r:p1udm44999-p1ulv42153) Units=km Length=0.0197045 bus1=p1udm44999.1.2 bus2=p1ulv42153.1.2 switch=n enabled=y phases=2 Linecode=1P_UG_AL_1/0_Brenau_0_416_0_2_2_2_2

New Line.l(r:p1udm44999-p1udt14259lv) Units=km Length=0.00993202 bus1=p1udt14259lv.1.2 bus2=p1udm44999.1.2 switch=n enabled=y phases=2 Linecode=1P_UG_AL_1/0_Brenau_0_416_0_2_2_2_2

New Line.l(r:p1udt15316lv-p1ulv23804) Units=km Length=0.0177913 bus1=p1udt15316lv.1.2 bus2=p1ulv23804.1.2 switch=n enabled=y phases=2 Linecode=1P_UG_AL_1/0_Brenau_0_416_0_2_2_2_2

New Line.l(r:p1udt15316lv-p1ulv35897) Units=km Length=0.0203048 bus1=p1udt15316lv.1.2 bus2=p1ulv35897.1.2 switch=n enabled=y phases=2 Linecode=1P_UG_AL_1/0_Brenau_0_416_0_2_2_2_2

New Line.l(r:p1udm47690-p1ulv27632) Units=km Length=0.0174883 bus1=p1udm47690.1.2 bus2=p1ulv27632.1.2 switch=n enabled=y phases=2 Linecode=1P_UG_AL_4/0_Sweetbriar_0_416_0_2_2_2_2

New Line.l(r:p1udm47690-p1udt15316lv) Units=km Length=0.00857802 bus1=p1udt15316lv.1.2 bus2=p1udm47690.1.2 switch=n enabled=y phases=2 Linecode=1P_UG_AL_4/0_Sweetbriar_0_416_0_2_2_2_2

New Line.l(r:p1udm49362-p1ulv25709) Units=km Length=0.0136084 bus1=p1udm49362.1.2 bus2=p1ulv25709.1.2 switch=n enabled=y phases=2 Linecode=1P_UG_AL_4/0_Sweetbriar_0_416_0_2_2_2_2

New Line.l(r:p1udm49363-p1ulv30763) Units=km Length=0.016521500000000005 bus1=p1udm49363.1.2 bus2=p1ulv30763.1.2 switch=n enabled=y phases=2 Linecode=1P_UG_AL_1/0_Brenau_0_416_0_2_2_2_2

New Line.l(r:p1udm49362-p1udm49363) Units=km Length=0.00821825 bus1=p1udm49362.1.2 bus2=p1udm49363.1.2 switch=n enabled=y phases=2 Linecode=1P_UG_AL_1/0_Brenau_0_416_0_2_2_2_2

New Line.l(r:p1udm49362-p1udt16042lv) Units=km Length=0.00967424 bus1=p1udt16042lv.1.2 bus2=p1udm49362.1.2 switch=n enabled=y phases=2 Linecode=1P_UG_AL_4/0_Sweetbriar_0_416_0_2_2_2_2

New Line.l(r:p1udm49364-p1ulv49665) Units=km Length=0.0173822 bus1=p1udm49364.1.2 bus2=p1ulv49665.1.2 switch=n enabled=y phases=2 Linecode=1P_UG_AL_1/0_Brenau_0_416_0_2_2_2_2

New Line.l(r:p1udm49364-p1udt16042lv) Units=km Length=0.00966025 bus1=p1udt16042lv.1.2 bus2=p1udm49364.1.2 switch=n enabled=y phases=2 Linecode=1P_UG_AL_1/0_Brenau_0_416_0_2_2_2_2

New Line.l(r:p1udt17187lv-p1ulv47845) Units=km Length=0.0138221 bus1=p1udt17187lv.1.2 bus2=p1ulv47845.1.2 switch=n enabled=y phases=2 Linecode=1P_UG_AL_1/0_Brenau_0_416_0_2_2_2_2

New Line.l(r:p1udm51835-p1ulv28897) Units=km Length=0.0147634 bus1=p1udm51835.1.2 bus2=p1ulv28897.1.2 switch=n enabled=y phases=2 Linecode=1P_UG_AL_1/0_Brenau_0_416_0_2_2_2_2

New Line.l(r:p1udm51835-p1udt17187lv) Units=km Length=0.0100023 bus1=p1udt17187lv.1.2 bus2=p1udm51835.1.2 switch=n enabled=y phases=2 Linecode=1P_UG_AL_1/0_Brenau_0_416_0_2_2_2_2

New Line.l(r:p1udm51836-p1ulv32018) Units=km Length=0.0136892 bus1=p1udm51836.1.2 bus2=p1ulv32018.1.2 switch=n enabled=y phases=2 Linecode=1P_UG_AL_1/0_Brenau_0_416_0_2_2_2_2

New Line.l(r:p1udm51836-p1ulv65213) Units=km Length=0.0170658 bus1=p1udm51836.1.2 bus2=p1ulv65213.1.2 switch=n enabled=y phases=2 Linecode=1P_UG_AL_1/0_Brenau_0_416_0_2_2_2_2

New Line.l(r:p1udm51836-p1udt17187lv) Units=km Length=0.00999666 bus1=p1udt17187lv.1.2 bus2=p1udm51836.1.2 switch=n enabled=y phases=2 Linecode=1P_UG_AL_4/0_Sweetbriar_0_416_0_2_2_2_2

New Line.l(r:p1udt17601lv-p1ulv30128) Units=km Length=0.018471800000000003 bus1=p1udt17601lv.1.2 bus2=p1ulv30128.1.2 switch=n enabled=y phases=2 Linecode=1P_UG_AL_1/0_Brenau_0_416_0_2_2_2_2

New Line.l(r:p1udt17995lv-p1ulv31375) Units=km Length=0.0270241 bus1=p1udt17995lv.1.2 bus2=p1ulv31375.1.2 switch=n enabled=y phases=2 Linecode=1P_UG_AL_1/0_Brenau_0_416_0_2_2_2_2

New Line.l(r:p1udm53508-p1ulv39024) Units=km Length=0.0235644 bus1=p1udm53508.1.2 bus2=p1ulv39024.1.2 switch=n enabled=y phases=2 Linecode=1P_UG_AL_1/0_Brenau_0_416_0_2_2_2_2

New Line.l(r:p1udm53508-p1udt17995lv) Units=km Length=0.00681238 bus1=p1udt17995lv.1.2 bus2=p1udm53508.1.2 switch=n enabled=y phases=2 Linecode=1P_UG_AL_1/0_Brenau_0_416_0_2_2_2_2

New Line.l(r:p1udt18384lv-p1ulv32672) Units=km Length=0.017774 bus1=p1udt18384lv.1.2 bus2=p1ulv32672.1.2 switch=n enabled=y phases=2 Linecode=1P_UG_AL_4/0_Sweetbriar_0_416_0_2_2_2_2

New Line.l(r:p1udt18384lv-p1ulv48464) Units=km Length=0.0145659 bus1=p1udt18384lv.1.2 bus2=p1ulv48464.1.2 switch=n enabled=y phases=2 Linecode=1P_UG_AL_1/0_Brenau_0_416_0_2_2_2_2

New Line.l(r:p1udm54250-p1ulv42156) Units=km Length=0.0144462 bus1=p1udm54250.1.2 bus2=p1ulv42156.1.2 switch=n enabled=y phases=2 Linecode=1P_UG_AL_1/0_Brenau_0_416_0_2_2_2_2

New Line.l(r:p1udm54250-p1udt18384lv) Units=km Length=0.00999666 bus1=p1udt18384lv.1.2 bus2=p1udm54250.1.2 switch=n enabled=y phases=2 Linecode=1P_UG_AL_1/0_Brenau_0_416_0_2_2_2_2

New Line.l(r:p1udt18776lv-p1ulv64573) Units=km Length=0.0216018 bus1=p1udt18776lv.1.2 bus2=p1ulv64573.1.2 switch=n enabled=y phases=2 Linecode=1P_UG_AL_1/0_Brenau_0_416_0_2_2_2_2

New Line.l(r:p1udm54970-p1ulv33966) Units=km Length=0.0227901 bus1=p1udm54970.1.2 bus2=p1ulv33966.1.2 switch=n enabled=y phases=2 Linecode=1P_UG_AL_1/0_Brenau_0_416_0_2_2_2_2

New Line.l(r:p1udm54970-p1udt18776lv) Units=km Length=0.009207060000000001 bus1=p1udt18776lv.1.2 bus2=p1udm54970.1.2 switch=n enabled=y phases=2 Linecode=1P_UG_AL_1/0_Brenau_0_416_0_2_2_2_2

New Line.l(r:p1udm54972-p1ulv58936) Units=km Length=0.0154967 bus1=p1udm54972.1.2 bus2=p1ulv58936.1.2 switch=n enabled=y phases=2 Linecode=1P_UG_AL_1/0_Brenau_0_416_0_2_2_2_2

New Line.l(r:p1udm54971-p1ulv47219) Units=km Length=0.0128477 bus1=p1udm54971.1.2 bus2=p1ulv47219.1.2 switch=n enabled=y phases=2 Linecode=1P_UG_AL_1/0_Brenau_0_416_0_2_2_2_2

New Line.l(r:p1udm54971-p1udm54972) Units=km Length=0.009207060000000001 bus1=p1udm54972.1.2 bus2=p1udm54971.1.2 switch=n enabled=y phases=2 Linecode=1P_UG_AL_1/0_Brenau_0_416_0_2_2_2_2

New Line.l(r:p1udm54972-p1udt18776lv) Units=km Length=0.00921588 bus1=p1udt18776lv.1.2 bus2=p1udm54972.1.2 switch=n enabled=y phases=2 Linecode=1P_UG_AL_4/0_Sweetbriar_0_416_0_2_2_2_2

New Line.l(r:p1udt18777lv-p1ulv49664) Units=km Length=0.0160048 bus1=p1udt18777lv.1.2 bus2=p1ulv49664.1.2 switch=n enabled=y phases=2 Linecode=1P_UG_AL_1/0_Brenau_0_416_0_2_2_2_2

New Line.l(r:p1udm54974-p1ulv33977) Units=km Length=0.0177674 bus1=p1udm54974.1.2 bus2=p1ulv33977.1.2 switch=n enabled=y phases=2 Linecode=1P_UG_AL_1/0_Brenau_0_416_0_2_2_2_2

New Line.l(r:p1udm54974-p1udt18777lv) Units=km Length=0.00970236 bus1=p1udt18777lv.1.2 bus2=p1udm54974.1.2 switch=n enabled=y phases=2 Linecode=1P_UG_AL_1/0_Brenau_0_416_0_2_2_2_2

New Line.l(r:p1udt21233lv-p1ulv43423) Units=km Length=0.0154704 bus1=p1udt21233lv.1.2 bus2=p1ulv43423.1.2 switch=n enabled=y phases=2 Linecode=1P_UG_AL_1/0_Brenau_0_416_0_2_2_2_2

New Line.l(r:p1udt21924lv-p1ulv54746) Units=km Length=0.012835200000000001 bus1=p1udt21924lv.1.2 bus2=p1ulv54746.1.2 switch=n enabled=y phases=2 Linecode=1P_UG_AL_1/0_Brenau_0_416_0_2_2_2_2

New Line.l(r:p1udm60100-p1ulv46622) Units=km Length=0.0184429 bus1=p1udm60100.1.2 bus2=p1ulv46622.1.2 switch=n enabled=y phases=2 Linecode=1P_UG_AL_1/0_Brenau_0_416_0_2_2_2_2

New Line.l(r:p1udm60100-p1udt21924lv) Units=km Length=0.00999666 bus1=p1udt21924lv.1.2 bus2=p1udm60100.1.2 switch=n enabled=y phases=2 Linecode=1P_UG_AL_1/0_Brenau_0_416_0_2_2_2_2

New Line.l(r:p1udm60102-p1ulv61400) Units=km Length=0.0138742 bus1=p1udm60102.1.2 bus2=p1ulv61400.1.2 switch=n enabled=y phases=2 Linecode=1P_UG_AL_1/0_Brenau_0_416_0_2_2_2_2

New Line.l(r:p1udm60102-p1udt21924lv) Units=km Length=0.00999666 bus1=p1udt21924lv.1.2 bus2=p1udm60102.1.2 switch=n enabled=y phases=2 Linecode=1P_UG_AL_1/0_Brenau_0_416_0_2_2_2_2

New Line.l(r:p1udt22052lv-p1ulv47216) Units=km Length=0.0159396 bus1=p1udt22052lv.1.2 bus2=p1ulv47216.1.2 switch=n enabled=y phases=2 Linecode=1P_UG_AL_1/0_Brenau_0_416_0_2_2_2_2

New Line.l(r:p1udt22666lv-p1ulv50283) Units=km Length=0.0112893 bus1=p1udt22666lv.1.2 bus2=p1ulv50283.1.2 switch=n enabled=y phases=2 Linecode=1P_UG_AL_1/0_Brenau_0_416_0_2_2_2_2

New Line.l(r:p1udt23381lv-p1ulv54103) Units=km Length=0.0150817 bus1=p1udt23381lv.1.2 bus2=p1ulv54103.1.2 switch=n enabled=y phases=2 Linecode=1P_UG_AL_1/0_Brenau_0_416_0_2_2_2_2

New Line.l(r:p1udt24790lv-p1ulv62030) Units=km Length=0.0161431 bus1=p1udt24790lv.1.2 bus2=p1ulv62030.1.2 switch=n enabled=y phases=2 Linecode=1P_UG_AL_1/0_Brenau_0_416_0_2_2_2_2

New Line.l(r:p1udt4376-p1udt9241) Units=km Length=0.0481327 bus1=p1udt4376-p1udt9241xx.2 bus2=p1udt4376-p1udt9241x.2 switch=n enabled=y phases=1 Linecode=1P_UG_AL_#2_15_12_47_0_1_1_1_1

New Line.l(r:p1udt9241-p1udt9650) Units=km Length=0.0253186 bus1=p1udt9241-p1udt9650x.2 bus2=p1udt9241-p1udt9650xx.2 switch=n enabled=y phases=1 Linecode=1P_UG_AL_#2_15_12_47_0_1_1_1_1

New Line.l(r:p1udt2202-p1udt9241) Units=km Length=0.0578818 bus1=p1udt2202-p1udt9241x.2 bus2=p1udt2202-p1udt9241xx.2 switch=n enabled=y phases=1 Linecode=1P_UG_AL_#2_15_12_47_0_1_1_1_1

New Line.l(r:p1udt12421-p1udt2202) Units=km Length=0.0593284 bus1=p1udt12421-p1udt2202x.2 bus2=p1udt12421-p1udt2202xx.2 switch=n enabled=y phases=1 Linecode=1P_UG_AL_#2_15_12_47_0_1_1_1_1

New Line.l(r:p1udt10362-p1udt12421) Units=km Length=0.0395514 bus1=p1udt10362-p1udt12421x.2 bus2=p1udt10362-p1udt12421xx.2 switch=n enabled=y phases=1 Linecode=1P_UG_AL_#2_15_12_47_0_1_1_1_1

New Line.l(r:p1udt10362-p1udt9238) Units=km Length=0.0494456 bus1=p1udt10362-p1udt9238xx.2 bus2=p1udt10362-p1udt9238x.2 switch=n enabled=y phases=1 Linecode=1P_UG_AL_#2_15_12_47_0_1_1_1_1

New Line.l(r:p1udt7249-p1udt9238) Units=km Length=0.028864400000000002 bus1=p1udt7249-p1udt9238x.2 bus2=p1udt7249-p1udt9238xx.2 switch=n enabled=y phases=1 Linecode=1P_UG_AL_#2_15_12_47_0_1_1_1_1

New Line.l(r:p1udt7249-p1udt994) Units=km Length=0.0379681 bus1=p1udt7249-p1udt994xx.2 bus2=p1udt7249-p1udt994x.2 switch=n enabled=y phases=1 Linecode=1P_UG_AL_#2_15_12_47_0_1_1_1_1

New Line.l(r:p1udt22666-p1udt994) Units=km Length=0.0658818 bus1=p1udt22666-p1udt994xx.2 bus2=p1udt22666-p1udt994xxx.2 switch=n enabled=y phases=1 Linecode=1P_UG_AL_#2_15_12_47_0_1_1_1_1

New Line.l(r:p1udt18384-p1udt5890) Units=km Length=0.102823 bus1=p1udt18384-p1udt5890x.1 bus2=p1udt18384-p1udt5890xx.1 switch=n enabled=y phases=1 Linecode=1P_UG_AL_#2_15_12_47_0_1_1_1_1

New Line.l(r:p1udt18384-p1udt5385) Units=km Length=0.0399923 bus1=p1udt18384-p1udt5385xx.1 bus2=p1udt18384-p1udt5385x.1 switch=n enabled=y phases=1 Linecode=1P_UG_AL_#2_15_12_47_0_1_1_1_1

New Line.l(r:p1udt17187-p1udt5385) Units=km Length=0.0400005 bus1=p1udt17187-p1udt5385x.1 bus2=p1udt17187-p1udt5385xx.1 switch=n enabled=y phases=1 Linecode=1P_UG_AL_#2_15_12_47_0_1_1_1_1

New Line.l(r:p1udt17187-p1udt7673) Units=km Length=0.0400062 bus1=p1udt17187-p1udt7673xx.1 bus2=p1udt17187-p1udt7673x.1 switch=n enabled=y phases=1 Linecode=1P_UG_AL_#2_15_12_47_0_1_1_1_1

New Line.l(r:p1udt7673-p1udt9649) Units=km Length=0.02999 bus1=p1udt7673-p1udt9649xx.1 bus2=p1udt7673-p1udt9649x.1 switch=n enabled=y phases=1 Linecode=1P_UG_AL_#2_15_12_47_0_1_1_1_1

New Line.l(r:p1udt21924-p1udt9649) Units=km Length=0.019999 bus1=p1udt21924-p1udt9649x.1 bus2=p1udt21924-p1udt9649xx.1 switch=n enabled=y phases=1 Linecode=1P_UG_AL_#2_15_12_47_0_1_1_1_1

New Line.l(r:p1udt10363-p1udt21924) Units=km Length=0.0400005 bus1=p1udt10363-p1udt21924x.1 bus2=p1udt10363-p1udt21924xx.1 switch=n enabled=y phases=1 Linecode=1P_UG_AL_#2_15_12_47_0_1_1_1_1

New Line.l(r:p1udt10363-p1udt2785) Units=km Length=0.019999 bus1=p1udt10363-p1udt2785xx.1 bus2=p1udt10363-p1udt2785x.1 switch=n enabled=y phases=1 Linecode=1P_UG_AL_#2_15_12_47_0_1_1_1_1

New Line.l(r:p1udt17601-p1udt2785) Units=km Length=0.0498056 bus1=p1udt17601-p1udt2785xx.1 bus2=p1udt17601-p1udt2785xxx.1 switch=n enabled=y phases=1 Linecode=1P_UG_AL_#2_15_12_47_0_1_1_1_1

New Line.l(r:p1udt18776-p1udt23381) Units=km Length=0.0276388 bus1=p1udt18776-p1udt23381xx.3 bus2=p1udt18776-p1udt23381x.3 switch=n enabled=y phases=1 Linecode=1P_UG_AL_#2_15_12_47_0_1_1_1_1

New Line.l(r:p1udt23381-p1udt6358) Units=km Length=0.0353212 bus1=p1udt23381-p1udt6358xx.3 bus2=p1udt23381-p1udt6358x.3 switch=n enabled=y phases=1 Linecode=1P_UG_AL_#2_15_12_47_0_1_1_1_1

New Line.l(r:p1udt11739-p1udt6358) Units=km Length=0.0338093 bus1=p1udt11739-p1udt6358x.3 bus2=p1udt11739-p1udt6358xx.3 switch=n enabled=y phases=1 Linecode=1P_UG_AL_#2_15_12_47_0_1_1_1_1

New Line.l(r:p1udt11739-p1udt16042) Units=km Length=0.0289867 bus1=p1udt11739-p1udt16042xx.3 bus2=p1udt11739-p1udt16042x.3 switch=n enabled=y phases=1 Linecode=1P_UG_AL_#2_15_12_47_0_1_1_1_1

New Line.l(r:p1udt16042-p1udt18777) Units=km Length=0.0439458 bus1=p1udt16042-p1udt18777xx.3 bus2=p1udt16042-p1udt18777x.3 switch=n enabled=y phases=1 Linecode=1P_UG_AL_#2_15_12_47_0_1_1_1_1

New Line.l(r:p1udt18777-p1udt22052) Units=km Length=0.019404700000000004 bus1=p1udt18777-p1udt22052xx.3 bus2=p1udt18777-p1udt22052x.3 switch=n enabled=y phases=1 Linecode=1P_UG_AL_#2_15_12_47_0_1_1_1_1

New Line.l(r:p1udt1639-p1udt22052) Units=km Length=0.019404700000000004 bus1=p1udt1639-p1udt22052x.3 bus2=p1udt1639-p1udt22052xx.3 switch=n enabled=y phases=1 Linecode=1P_UG_AL_#2_15_12_47_0_1_1_1_1

New Line.l(r:p1udt13683-p1udt1639) Units=km Length=0.0291119 bus1=p1udt13683-p1udt1639x.3 bus2=p1udt13683-p1udt1639xx.3 switch=n enabled=y phases=1 Linecode=1P_UG_AL_#2_15_12_47_0_1_1_1_1

New Line.l(r:p1udt13683-p1udt394) Units=km Length=0.029098300000000004 bus1=p1udt13683-p1udt394xx.3 bus2=p1udt13683-p1udt394x.3 switch=n enabled=y phases=1 Linecode=1P_UG_AL_#2_15_12_47_0_1_1_1_1

New Line.l(r:p1udt12743-p1udt394) Units=km Length=0.0533341 bus1=p1udt12743-p1udt394x.3 bus2=p1udt12743-p1udt394xx.3 switch=n enabled=y phases=1 Linecode=1P_UG_AL_#2_15_12_47_0_1_1_1_1

New Line.l(r:p1udt17995-p1udt8483) Units=km Length=0.00681238 bus1=p1udt17995-p1udt8483xx.3 bus2=p1udt17995-p1udt8483x.3 switch=n enabled=y phases=1 Linecode=1P_UG_AL_#2_15_12_47_0_1_1_1_1

New Line.l(r:p1udt15316-p1udt8483) Units=km Length=0.0307955 bus1=p1udt15316-p1udt8483x.3 bus2=p1udt15316-p1udt8483xx.3 switch=n enabled=y phases=1 Linecode=1P_UG_AL_#2_15_12_47_0_1_1_1_1

New Line.l(r:p1udt15316-p1udt391) Units=km Length=0.0391343 bus1=p1udt15316-p1udt391xx.3 bus2=p1udt15316-p1udt391x.3 switch=n enabled=y phases=1 Linecode=1P_UG_AL_#2_15_12_47_0_1_1_1_1

New Line.l(r:p1udt21233-p1udt391) Units=km Length=0.0422442 bus1=p1udt21233-p1udt391x.3 bus2=p1udt21233-p1udt391xx.3 switch=n enabled=y phases=1 Linecode=1P_UG_AL_#2_15_12_47_0_1_1_1_1

New Line.l(r:p1udt11738-p1udt21233) Units=km Length=0.0470763 bus1=p1udt11738-p1udt21233x.3 bus2=p1udt11738-p1udt21233xx.3 switch=n enabled=y phases=1 Linecode=1P_UG_AL_#2_15_12_47_0_1_1_1_1

New Line.l(r:p1udt11738-p1udt12743) Units=km Length=0.0428064 bus1=p1udt11738-p1udt12743xx.3 bus2=p1udt11738-p1udt12743x.3 switch=n enabled=y phases=1 Linecode=1P_UG_AL_#2_15_12_47_0_1_1_1_1

New Line.l(r:p1udt12093-p1udt12743) Units=km Length=0.0323251 bus1=p1udt12093-p1udt12743x.3 bus2=p1udt12093-p1udt12743xx.3 switch=n enabled=y phases=1 Linecode=1P_UG_AL_#2_15_12_47_0_1_1_1_1

New Line.l(r:p1udt12093-p1udt17601) Units=km Length=0.0340612 bus1=p1udt12093-p1udt17601xx.3 bus2=p1udt12093-p1udt17601x.3 switch=n enabled=y phases=1 Linecode=1P_UG_AL_#2_15_12_47_0_1_1_1_1

New Line.l(r:p1udt22666-p1udt24790) Units=km Length=0.0184286 bus1=p1udt22666-p1udt24790xx.1 bus2=p1udt22666-p1udt24790xxx.1 switch=n enabled=y phases=1 Linecode=1P_UG_AL_#2_15_12_47_0_1_1_1_1

New Line.l(r:p1udt17601-p1udt393) Units=km Length=0.0196241 bus1=p1udt17601-p1udt393xx.1.2.3 bus2=p1udt17601-p1udt393x.1.2.3 switch=n enabled=y phases=3 Linecode=3P_UG_AL_4/0_25_12_47_0_3_3_3_3

New Line.l(r:p1udt11737-p1udt393) Units=km Length=0.0392399 bus1=p1udt11737-p1udt393x.1.2.3 bus2=p1udt11737-p1udt393xx.1.2.3 switch=n enabled=y phases=3 Linecode=3P_UG_AL_4/0_25_12_47_0_3_3_3_3

New Line.l(r:p1udt11737-p1udt22666) Units=km Length=0.0380527 bus1=p1udt11737-p1udt22666xx.1.2.3 bus2=p1udt11737-p1udt22666x.1.2.3 switch=n enabled=y phases=3 Linecode=3P_UG_AL_4/0_25_12_47_0_3_3_3_3

New Line.l(r:p1udt22666-p1udt4854) Units=km Length=0.0780181 bus1=p1udt22666-p1udt4854xx.1.2.3 bus2=p1udt22666-p1udt4854x.1.2.3 switch=n enabled=y phases=3 Linecode=3P_UG_AL_4/0_25_12_47_0_3_3_3_3

New Line.l(r:p1udt13989-p1udt4854) Units=km Length=0.00993202 bus1=p1udt13989-p1udt4854x.1.2.3 bus2=p1udt13989-p1udt4854xx.1.2.3 switch=n enabled=y phases=3 Linecode=3P_UG_AL_4/0_25_12_47_0_3_3_3_3

New Line.l(r:p1udt13989-p1udt14259) Units=km Length=0.0397171 bus1=p1udt13989-p1udt14259xx.1.2.3 bus2=p1udt13989-p1udt14259x.1.2.3 switch=n enabled=y phases=3 Linecode=3P_UG_AL_4/0_25_12_47_0_3_3_3_3

New Line.l(r:p1udt14259-p1udt2200) Units=km Length=0.0391199 bus1=p1udt14259-p1udt2200xx.1.2.3 bus2=p1udt14259-p1udt2200x.1.2.3 switch=n enabled=y phases=3 Linecode=3P_UG_AL_4/0_25_12_47_0_3_3_3_3

New Line.l(r:p1udt2200-p1udt22797) Units=km Length=0.335734 bus1=p1udt22797.1.2.3 bus2=p1udt2200.1.2.3 switch=n enabled=y phases=3 Linecode=3P_OH_AL_ACSR_4/0_Penguin_12_47_0_3_3_3_3

New Line.l(r:p1udt20362-p1udt22797) Units=km Length=0.118464 bus1=p1udt20362.1.2.3 bus2=p1udt22797.1.2.3 switch=n enabled=y phases=3 Linecode=3P_OH_AL_ACSR_4/0_Penguin_12_47_0_3_3_3_3

New Line.l(r:p1udt20362-p1uhs9_1247) Units=km Length=0.31155600000000006 bus1=p1udt20362-p1uhs9_1247x.1.2.3 bus2=p1udt20362-p1uhs9_1247x_b1_1.1.2.3 switch=n enabled=y phases=3 Linecode=3P_OH_AL_ACSR_4/0_Penguin_12_47_0_3_3_3_3

New Line.l(r:p1udt20362lv-p1ulv39637) Units=km Length=0.057539200000000006 bus1=p1udt20362lv.1.2.3 bus2=p1ulv39637.1.2.3 switch=n enabled=y phases=3 Linecode=3P_UG_AL_350kcmil_15_0_416_0_3_3_3_3

New Line.l(r:p1udt20362-p1umv16) Units=km Length=0.126213 bus1=p1udt20362.1.2.3 bus2=p1umv16.1.2.3 switch=n enabled=y phases=3 Linecode=3P_OH_AL_ACSR_4/0_Penguin_12_47_0_3_3_3_3

New Line.l(r:p1udt22797lv-p1ulv50923) Units=km Length=0.06144920000000001 bus1=p1udt22797lv.1.2.3 bus2=p1ulv50923.1.2.3 switch=n enabled=y phases=3 Linecode=3P_UG_AL_350kcmil_15_0_416_0_3_3_3_3

New Line.l(r:p1udt24902-p1umv16) Units=km Length=0.304713 bus1=p1udt24902-p1umv16x.1.2.3 bus2=p1udt24902.1.2.3 switch=n enabled=y phases=3 Linecode=3P_OH_AL_ACSR_1033kcmil_Curlew_12.47_1_3_3_3_3

New Line.padswitch(r:p1udt4376-p1udt9241)p1u_245817 Units=km Length=0.001 bus1=p1udt9241.2 bus2=p1udt4376-p1udt9241xx.2 switch=y enabled=y phases=1 Linecode=padswitch_1_1_1_1

New Line.padswitch(r:p1udt4376-p1udt9241)p1u_245818 Units=km Length=0.001 bus1=p1udt4376-p1udt9241x.2 bus2=p1udt4376.2 switch=y enabled=y phases=1 Linecode=padswitch_1_2_1_1_1

New Line.padswitch(r:p1udt9241-p1udt9650)p1u_245819 Units=km Length=0.001 bus1=p1udt9241.2 bus2=p1udt9241-p1udt9650x.2 switch=y enabled=y phases=1 Linecode=padswitch_1_2_1_0_1_1

New Line.padswitch(r:p1udt9241-p1udt9650)p1u_245820 Units=km Length=0.001 bus1=p1udt9241-p1udt9650xx.2 bus2=p1udt9650.2 switch=y enabled=y phases=1 Linecode=padswitch_1_1_1_1

New Line.padswitch(r:p1udt2202-p1udt9241)p1u_245821 Units=km Length=0.001 bus1=p1udt2202.2 bus2=p1udt2202-p1udt9241x.2 switch=y enabled=y phases=1 Linecode=padswitch_1_2_1_0_1_0_1

New Line.padswitch(r:p1udt2202-p1udt9241)p1u_245822 Units=km Length=0.001 bus1=p1udt2202-p1udt9241xx.2 bus2=p1udt9241.2 switch=y enabled=y phases=1 Linecode=padswitch_1_2_1_0_1_0_1

New Line.padswitch(r:p1udt12421-p1udt2202)p1u_245823 Units=km Length=0.001 bus1=p1udt12421.2 bus2=p1udt12421-p1udt2202x.2 switch=y enabled=y phases=1 Linecode=padswitch_1_2_1_0_1_0_1

New Line.padswitch(r:p1udt12421-p1udt2202)p1u_245824 Units=km Length=0.001 bus1=p1udt12421-p1udt2202xx.2 bus2=p1udt2202.2 switch=y enabled=y phases=1 Linecode=padswitch_1_2_1_0_1_0_1

New Line.padswitch(r:p1udt10362-p1udt12421)p1u_245825 Units=km Length=0.001 bus1=p1udt10362.2 bus2=p1udt10362-p1udt12421x.2 switch=y enabled=y phases=1 Linecode=padswitch_1_2_1_0_1_0_1

New Line.padswitch(r:p1udt10362-p1udt12421)p1u_245826 Units=km Length=0.001 bus1=p1udt10362-p1udt12421xx.2 bus2=p1udt12421.2 switch=y enabled=y phases=1 Linecode=padswitch_1_2_1_0_1_0_1

New Line.padswitch(r:p1udt10362-p1udt9238)p1u_245827 Units=km Length=0.001 bus1=p1udt9238.2 bus2=p1udt10362-p1udt9238xx.2 switch=y enabled=y phases=1 Linecode=padswitch_1_2_1_0_1_0_1

New Line.padswitch(r:p1udt10362-p1udt9238)p1u_245828 Units=km Length=0.001 bus1=p1udt10362-p1udt9238x.2 bus2=p1udt10362.2 switch=y enabled=y phases=1 Linecode=padswitch_1_2_1_0_1_0_1

New Line.padswitch(r:p1udt7249-p1udt9238)p1u_245829 Units=km Length=0.001 bus1=p1udt7249.2 bus2=p1udt7249-p1udt9238x.2 switch=y enabled=y phases=1 Linecode=padswitch_1_2_1_0_1_0_1_0

New Line.padswitch(r:p1udt7249-p1udt9238)p1u_245830 Units=km Length=0.001 bus1=p1udt7249-p1udt9238xx.2 bus2=p1udt9238.2 switch=y enabled=y phases=1 Linecode=padswitch_1_2_1_0_1_0_1

New Line.padswitch(r:p1udt7249-p1udt994)p1u_245831 Units=km Length=0.001 bus1=p1udt994.2 bus2=p1udt7249-p1udt994xx.2 switch=y enabled=y phases=1 Linecode=padswitch_1_1_1_1

New Line.padswitch(r:p1udt7249-p1udt994)p1u_245832 Units=km Length=0.001 bus1=p1udt7249-p1udt994x.2 bus2=p1udt7249.2 switch=y enabled=y phases=1 Linecode=padswitch_1_2_1_0_1_0_1

New Line.padswitch(r:p1udt22666-p1udt994)p1u_245833 Units=km Length=0.001 bus1=p1udt22666-p1udt994x.2 bus2=p1udt22666-p1udt994xx.2 switch=y enabled=y phases=1 Linecode=padswitch_1_1_1_1

New Line.padswitch(r:p1udt22666-p1udt994)p1u_245834 Units=km Length=0.001 bus1=p1udt22666-p1udt994xxx.2 bus2=p1udt994.2 switch=y enabled=y phases=1 Linecode=padswitch_1_1_1_1

New Line.padswitch(r:p1udt18384-p1udt5890)p1u_245835 Units=km Length=0.001 bus1=p1udt18384.1 bus2=p1udt18384-p1udt5890x.1 switch=y enabled=y phases=1 Linecode=padswitch_1_2_1_0_1_0_1

New Line.padswitch(r:p1udt18384-p1udt5890)p1u_245836 Units=km Length=0.001 bus1=p1udt18384-p1udt5890xx.1 bus2=p1udt5890.1 switch=y enabled=y phases=1 Linecode=padswitch_1_2_1_0_1_0_1_0

New Line.padswitch(r:p1udt18384-p1udt5385)p1u_245837 Units=km Length=0.001 bus1=p1udt5385.1 bus2=p1udt18384-p1udt5385xx.1 switch=y enabled=y phases=1 Linecode=padswitch_1_1_1_1

New Line.padswitch(r:p1udt18384-p1udt5385)p1u_245838 Units=km Length=0.001 bus1=p1udt18384-p1udt5385x.1 bus2=p1udt18384.1 switch=y enabled=y phases=1 Linecode=padswitch_1_2_1_0_1_0_1

New Line.padswitch(r:p1udt17187-p1udt5385)p1u_245839 Units=km Length=0.001 bus1=p1udt17187.1 bus2=p1udt17187-p1udt5385x.1 switch=y enabled=y phases=1 Linecode=padswitch_1_2_1_0_1_0_1

New Line.padswitch(r:p1udt17187-p1udt5385)p1u_245840 Units=km Length=0.001 bus1=p1udt17187-p1udt5385xx.1 bus2=p1udt5385.1 switch=y enabled=y phases=1 Linecode=padswitch_1_2_1_0_1_0_1

New Line.padswitch(r:p1udt17187-p1udt7673)p1u_245841 Units=km Length=0.001 bus1=p1udt7673.1 bus2=p1udt17187-p1udt7673xx.1 switch=y enabled=y phases=1 Linecode=padswitch_1_2_1_0_1_0_1

New Line.padswitch(r:p1udt17187-p1udt7673)p1u_245842 Units=km Length=0.001 bus1=p1udt17187-p1udt7673x.1 bus2=p1udt17187.1 switch=y enabled=y phases=1 Linecode=padswitch_1_2_1_0_1_0_1

New Line.padswitch(r:p1udt7673-p1udt9649)p1u_245843 Units=km Length=0.001 bus1=p1udt9649.1 bus2=p1udt7673-p1udt9649xx.1 switch=y enabled=y phases=1 Linecode=padswitch_1_2_1_0_1_0_1

New Line.padswitch(r:p1udt7673-p1udt9649)p1u_245844 Units=km Length=0.001 bus1=p1udt7673-p1udt9649x.1 bus2=p1udt7673.1 switch=y enabled=y phases=1 Linecode=padswitch_1_2_1_0_1_0_1

New Line.padswitch(r:p1udt21924-p1udt9649)p1u_245845 Units=km Length=0.001 bus1=p1udt21924.1 bus2=p1udt21924-p1udt9649x.1 switch=y enabled=y phases=1 Linecode=padswitch_1_2_1_0_1_0_1

New Line.padswitch(r:p1udt21924-p1udt9649)p1u_245846 Units=km Length=0.001 bus1=p1udt21924-p1udt9649xx.1 bus2=p1udt9649.1 switch=y enabled=y phases=1 Linecode=padswitch_1_2_1_0_1_0_1

New Line.padswitch(r:p1udt10363-p1udt21924)p1u_245847 Units=km Length=0.001 bus1=p1udt10363.1 bus2=p1udt10363-p1udt21924x.1 switch=y enabled=y phases=1 Linecode=padswitch_1_2_1_0_1_0_1

New Line.padswitch(r:p1udt10363-p1udt21924)p1u_245848 Units=km Length=0.001 bus1=p1udt10363-p1udt21924xx.1 bus2=p1udt21924.1 switch=y enabled=y phases=1 Linecode=padswitch_1_2_1_0_1_0_1

New Line.padswitch(r:p1udt10363-p1udt2785)p1u_245849 Units=km Length=0.001 bus1=p1udt2785.1 bus2=p1udt10363-p1udt2785xx.1 switch=y enabled=y phases=1 Linecode=padswitch_1_1_1_1

New Line.padswitch(r:p1udt10363-p1udt2785)p1u_245850 Units=km Length=0.001 bus1=p1udt10363-p1udt2785x.1 bus2=p1udt10363.1 switch=y enabled=y phases=1 Linecode=padswitch_1_2_1_0_1_0_1

New Line.padswitch(r:p1udt17601-p1udt2785)p1u_245851 Units=km Length=0.001 bus1=p1udt17601-p1udt2785x.1 bus2=p1udt17601-p1udt2785xx.1 switch=y enabled=y phases=1 Linecode=padswitch_1_2_1_0_1_0_1

New Line.padswitch(r:p1udt17601-p1udt2785)p1u_245852 Units=km Length=0.001 bus1=p1udt17601-p1udt2785xxx.1 bus2=p1udt2785.1 switch=y enabled=y phases=1 Linecode=padswitch_1_1_1_1

New Line.padswitch(r:p1udt18776-p1udt23381)p1u_245853 Units=km Length=0.001 bus1=p1udt23381.3 bus2=p1udt18776-p1udt23381xx.3 switch=y enabled=y phases=1 Linecode=padswitch_1_2_1_0_1_0_1

New Line.padswitch(r:p1udt18776-p1udt23381)p1u_245854 Units=km Length=0.001 bus1=p1udt18776-p1udt23381x.3 bus2=p1udt18776.3 switch=y enabled=y phases=1 Linecode=padswitch_1_1_1_1

New Line.padswitch(r:p1udt23381-p1udt6358)p1u_245855 Units=km Length=0.001 bus1=p1udt6358.3 bus2=p1udt23381-p1udt6358xx.3 switch=y enabled=y phases=1 Linecode=padswitch_1_1_1_1

New Line.padswitch(r:p1udt23381-p1udt6358)p1u_245856 Units=km Length=0.001 bus1=p1udt23381-p1udt6358x.3 bus2=p1udt23381.3 switch=y enabled=y phases=1 Linecode=padswitch_1_2_1_0_1_0_1

New Line.padswitch(r:p1udt11739-p1udt6358)p1u_245857 Units=km Length=0.001 bus1=p1udt11739.3 bus2=p1udt11739-p1udt6358x.3 switch=y enabled=y phases=1 Linecode=padswitch_1_2_1_0_1_0_1

New Line.padswitch(r:p1udt11739-p1udt6358)p1u_245858 Units=km Length=0.001 bus1=p1udt11739-p1udt6358xx.3 bus2=p1udt6358.3 switch=y enabled=y phases=1 Linecode=padswitch_1_2_1_0_1_0_1

New Line.padswitch(r:p1udt11739-p1udt16042)p1u_245859 Units=km Length=0.001 bus1=p1udt16042.3 bus2=p1udt11739-p1udt16042xx.3 switch=y enabled=y phases=1 Linecode=padswitch_1_2_1_0_1_0_1

New Line.padswitch(r:p1udt11739-p1udt16042)p1u_245860 Units=km Length=0.001 bus1=p1udt11739-p1udt16042x.3 bus2=p1udt11739.3 switch=y enabled=y phases=1 Linecode=padswitch_1_2_1_0_1_0_1

New Line.padswitch(r:p1udt16042-p1udt18777)p1u_245861 Units=km Length=0.001 bus1=p1udt18777.3 bus2=p1udt16042-p1udt18777xx.3 switch=y enabled=y phases=1 Linecode=padswitch_1_2_1_0_1_0_1

New Line.padswitch(r:p1udt16042-p1udt18777)p1u_245862 Units=km Length=0.001 bus1=p1udt16042-p1udt18777x.3 bus2=p1udt16042.3 switch=y enabled=y phases=1 Linecode=padswitch_1_2_1_0_1_0_1

New Line.padswitch(r:p1udt18777-p1udt22052)p1u_245863 Units=km Length=0.001 bus1=p1udt22052.3 bus2=p1udt18777-p1udt22052xx.3 switch=y enabled=y phases=1 Linecode=padswitch_1_2_1_0_1_0_1

New Line.padswitch(r:p1udt18777-p1udt22052)p1u_245864 Units=km Length=0.001 bus1=p1udt18777-p1udt22052x.3 bus2=p1udt18777.3 switch=y enabled=y phases=1 Linecode=padswitch_1_2_1_0_1_0_1

New Line.padswitch(r:p1udt1639-p1udt22052)p1u_245865 Units=km Length=0.001 bus1=p1udt1639.3 bus2=p1udt1639-p1udt22052x.3 switch=y enabled=y phases=1 Linecode=padswitch_1_2_1_0_1_0_1

New Line.padswitch(r:p1udt1639-p1udt22052)p1u_245866 Units=km Length=0.001 bus1=p1udt1639-p1udt22052xx.3 bus2=p1udt22052.3 switch=y enabled=y phases=1 Linecode=padswitch_1_2_1_0_1_0_1

New Line.padswitch(r:p1udt13683-p1udt1639)p1u_245867 Units=km Length=0.001 bus1=p1udt13683.3 bus2=p1udt13683-p1udt1639x.3 switch=y enabled=y phases=1 Linecode=padswitch_1_2_1_0_1_0_1

New Line.padswitch(r:p1udt13683-p1udt1639)p1u_245868 Units=km Length=0.001 bus1=p1udt13683-p1udt1639xx.3 bus2=p1udt1639.3 switch=y enabled=y phases=1 Linecode=padswitch_1_2_1_0_1_0_1

New Line.padswitch(r:p1udt13683-p1udt394)p1u_245869 Units=km Length=0.001 bus1=p1udt394.3 bus2=p1udt13683-p1udt394xx.3 switch=y enabled=y phases=1 Linecode=padswitch_1_2_1_0_1_0_1

New Line.padswitch(r:p1udt13683-p1udt394)p1u_245870 Units=km Length=0.001 bus1=p1udt13683-p1udt394x.3 bus2=p1udt13683.3 switch=y enabled=y phases=1 Linecode=padswitch_1_2_1_0_1_0_1

New Line.padswitch(r:p1udt12743-p1udt394)p1u_245871 Units=km Length=0.001 bus1=p1udt12743.3 bus2=p1udt12743-p1udt394x.3 switch=y enabled=y phases=1 Linecode=padswitch_1_2_1_0_1_0_1

New Line.padswitch(r:p1udt12743-p1udt394)p1u_245872 Units=km Length=0.001 bus1=p1udt12743-p1udt394xx.3 bus2=p1udt394.3 switch=y enabled=y phases=1 Linecode=padswitch_1_2_1_0_1_0_1

New Line.padswitch(r:p1udt17995-p1udt8483)p1u_245873 Units=km Length=0.001 bus1=p1udt8483.3 bus2=p1udt17995-p1udt8483xx.3 switch=y enabled=y phases=1 Linecode=padswitch_1_2_1_0_1_0_1

New Line.padswitch(r:p1udt17995-p1udt8483)p1u_245874 Units=km Length=0.001 bus1=p1udt17995-p1udt8483x.3 bus2=p1udt17995.3 switch=y enabled=y phases=1 Linecode=padswitch_1_1_1_1

New Line.padswitch(r:p1udt15316-p1udt8483)p1u_245875 Units=km Length=0.001 bus1=p1udt15316.3 bus2=p1udt15316-p1udt8483x.3 switch=y enabled=y phases=1 Linecode=padswitch_1_2_1_0_1_0_1

New Line.padswitch(r:p1udt15316-p1udt8483)p1u_245876 Units=km Length=0.001 bus1=p1udt15316-p1udt8483xx.3 bus2=p1udt8483.3 switch=y enabled=y phases=1 Linecode=padswitch_1_2_1_0_1_0_1

New Line.padswitch(r:p1udt15316-p1udt391)p1u_245877 Units=km Length=0.001 bus1=p1udt391.3 bus2=p1udt15316-p1udt391xx.3 switch=y enabled=y phases=1 Linecode=padswitch_1_2_1_0_1_0_1

New Line.padswitch(r:p1udt15316-p1udt391)p1u_245878 Units=km Length=0.001 bus1=p1udt15316-p1udt391x.3 bus2=p1udt15316.3 switch=y enabled=y phases=1 Linecode=padswitch_1_2_1_0_1_0_1

New Line.padswitch(r:p1udt21233-p1udt391)p1u_245879 Units=km Length=0.001 bus1=p1udt21233.3 bus2=p1udt21233-p1udt391x.3 switch=y enabled=y phases=1 Linecode=padswitch_1_2_1_0_1_0_1

New Line.padswitch(r:p1udt21233-p1udt391)p1u_245880 Units=km Length=0.001 bus1=p1udt21233-p1udt391xx.3 bus2=p1udt391.3 switch=y enabled=y phases=1 Linecode=padswitch_1_2_1_0_1_0_1

New Line.padswitch(r:p1udt11738-p1udt21233)p1u_245881 Units=km Length=0.001 bus1=p1udt11738.3 bus2=p1udt11738-p1udt21233x.3 switch=y enabled=y phases=1 Linecode=padswitch_1_2_1_0_1_0_1

New Line.padswitch(r:p1udt11738-p1udt21233)p1u_245882 Units=km Length=0.001 bus1=p1udt11738-p1udt21233xx.3 bus2=p1udt21233.3 switch=y enabled=y phases=1 Linecode=padswitch_1_2_1_0_1_0_1

New Line.padswitch(r:p1udt11738-p1udt12743)p1u_245883 Units=km Length=0.001 bus1=p1udt12743.3 bus2=p1udt11738-p1udt12743xx.3 switch=y enabled=y phases=1 Linecode=padswitch_1_2_1_0_1_0_1

New Line.padswitch(r:p1udt11738-p1udt12743)p1u_245884 Units=km Length=0.001 bus1=p1udt11738-p1udt12743x.3 bus2=p1udt11738.3 switch=y enabled=y phases=1 Linecode=padswitch_1_2_1_0_1_0_1

New Line.padswitch(r:p1udt12093-p1udt12743)p1u_245885 Units=km Length=0.001 bus1=p1udt12093.3 bus2=p1udt12093-p1udt12743x.3 switch=y enabled=y phases=1 Linecode=padswitch_1_2_1_0_1_0_1

New Line.padswitch(r:p1udt12093-p1udt12743)p1u_245886 Units=km Length=0.001 bus1=p1udt12093-p1udt12743xx.3 bus2=p1udt12743.3 switch=y enabled=y phases=1 Linecode=padswitch_1_2_1_0_1_0_1

New Line.padswitch(r:p1udt12093-p1udt17601)p1u_245887 Units=km Length=0.001 bus1=p1udt12093-p1udt17601xxx.3 bus2=p1udt12093-p1udt17601xx.3 switch=y enabled=y phases=1 Linecode=padswitch_1_2_1_0_1_0_1

New Line.padswitch(r:p1udt12093-p1udt17601)p1u_245888 Units=km Length=0.001 bus1=p1udt12093-p1udt17601x.3 bus2=p1udt12093.3 switch=y enabled=y phases=1 Linecode=padswitch_1_2_1_0_1_0_1

New Line.padswitch(r:p1udt22666-p1udt24790)p1u_245895 Units=km Length=0.001 bus1=p1udt22666-p1udt24790x.1 bus2=p1udt22666-p1udt24790xx.1 switch=y enabled=y phases=1 Linecode=padswitch_1_2_1_0_1_0_1

New Line.padswitch(r:p1udt22666-p1udt24790)p1u_245896 Units=km Length=0.001 bus1=p1udt22666-p1udt24790xxx.1 bus2=p1udt24790.1 switch=y enabled=y phases=1 Linecode=padswitch_1_1_1_1

New Line.padswitch(r:p1udt17601-p1udt393)p1u_245889 Units=km Length=0.001 bus1=p1udt393.1.2.3 bus2=p1udt17601-p1udt393xx.1.2.3 switch=y enabled=y phases=3 Linecode=padswitch_3_3_3_3

New Line.padswitch(r:p1udt17601-p1udt393)p1u_245890 Units=km Length=0.001 bus1=p1udt17601-p1udt393x.1.2.3 bus2=p1udt17601.1.2.3 switch=y enabled=y phases=3 Linecode=padswitch_3_3_3_3_3

New Line.padswitch(r:p1udt11737-p1udt393)p1u_245891 Units=km Length=0.001 bus1=p1udt11737.1.2.3 bus2=p1udt11737-p1udt393x.1.2.3 switch=y enabled=y phases=3 Linecode=padswitch_3_3_3_1_3_3

New Line.padswitch(r:p1udt11737-p1udt393)p1u_245892 Units=km Length=0.001 bus1=p1udt11737-p1udt393xx.1.2.3 bus2=p1udt393.1.2.3 switch=y enabled=y phases=3 Linecode=padswitch_3_3_3_1_3_1_3

New Line.padswitch(r:p1udt11737-p1udt22666)p1u_245893 Units=km Length=0.001 bus1=p1udt22666.1.2.3 bus2=p1udt11737-p1udt22666xx.1.2.3 switch=y enabled=y phases=3 Linecode=padswitch_3_3_3_1_3_1_3_1

New Line.padswitch(r:p1udt11737-p1udt22666)p1u_245894 Units=km Length=0.001 bus1=p1udt11737-p1udt22666x.1.2.3 bus2=p1udt11737.1.2.3 switch=y enabled=y phases=3 Linecode=padswitch_3_3_3_1_3_1_3_1

New Line.padswitch(r:p1udt22666-p1udt4854)p1u_245897 Units=km Length=0.001 bus1=p1udt4854.1.2.3 bus2=p1udt22666-p1udt4854xx.1.2.3 switch=y enabled=y phases=3 Linecode=padswitch_3_3_3_1_3_1_3_1

New Line.padswitch(r:p1udt22666-p1udt4854)p1u_245898 Units=km Length=0.001 bus1=p1udt22666-p1udt4854x.1.2.3 bus2=p1udt22666.1.2.3 switch=y enabled=y phases=3 Linecode=padswitch_3_3_3_1_3_1_3_1

New Line.padswitch(r:p1udt13989-p1udt4854)p1u_245899 Units=km Length=0.001 bus1=p1udt13989.1.2.3 bus2=p1udt13989-p1udt4854x.1.2.3 switch=y enabled=y phases=3 Linecode=padswitch_3_3_3_1_3_1_3_1

New Line.padswitch(r:p1udt13989-p1udt4854)p1u_245900 Units=km Length=0.001 bus1=p1udt13989-p1udt4854xx.1.2.3 bus2=p1udt4854.1.2.3 switch=y enabled=y phases=3 Linecode=padswitch_3_3_3_1_3_1_3_1

New Line.padswitch(r:p1udt13989-p1udt14259)p1u_245901 Units=km Length=0.001 bus1=p1udt14259.1.2.3 bus2=p1udt13989-p1udt14259xx.1.2.3 switch=y enabled=y phases=3 Linecode=padswitch_3_3_3_1_3_1_3_1

New Line.padswitch(r:p1udt13989-p1udt14259)p1u_245902 Units=km Length=0.001 bus1=p1udt13989-p1udt14259x.1.2.3 bus2=p1udt13989.1.2.3 switch=y enabled=y phases=3 Linecode=padswitch_3_3_3_1_3_1_3_1

New Line.padswitch(r:p1udt14259-p1udt2200)p1u_245903 Units=km Length=0.001 bus1=p1udt2200.1.2.3 bus2=p1udt14259-p1udt2200xx.1.2.3 switch=y enabled=y phases=3 Linecode=padswitch_3_3_3_1_3_1_3_1

New Line.padswitch(r:p1udt14259-p1udt2200)p1u_245904 Units=km Length=0.001 bus1=p1udt14259-p1udt2200x.1.2.3 bus2=p1udt14259.1.2.3 switch=y enabled=y phases=3 Linecode=padswitch_3_3_3_1_3_1_3_1

New Line.elbswitch(r:p1udt24902-p1umv16)p1u_265837 Units=km Length=0.001 bus1=p1umv16.1.2.3 bus2=p1udt24902-p1umv16x.1.2.3 switch=y enabled=n phases=3 Linecode=elbswitch_3_3_3_3

New Line.fuse(r:p1udt17601-p1udt2785)p1u_267720 Units=km Length=0.001 bus1=p1udt17601.1 bus2=p1udt17601-p1udt2785x.1 switch=n enabled=y phases=1 Linecode=fuse_1_1_1_1

New Fuse.Fuse_fuse(r:p1udt17601-p1udt2785)p1u_267720 monitoredobj=Line.fuse(r:p1udt17601-p1udt2785)p1u_267720 enabled=y ratedcurrent=100.0

New Line.fuse(r:p1udt12093-p1udt17601)p1u_267721 Units=km Length=0.001 bus1=p1udt17601.3 bus2=p1udt12093-p1udt17601xxx.3 switch=n enabled=y phases=1 Linecode=fuse_1_6_1_1_1

New Fuse.Fuse_fuse(r:p1udt12093-p1udt17601)p1u_267721 monitoredobj=Line.fuse(r:p1udt12093-p1udt17601)p1u_267721 enabled=y ratedcurrent=100.0

New Line.fuse(r:p1udt22666-p1udt994)p1u_268212 Units=km Length=0.001 bus1=p1udt22666.2 bus2=p1udt22666-p1udt994x.2 switch=n enabled=y phases=1 Linecode=fuse_1_6_1_4_1_1

New Fuse.Fuse_fuse(r:p1udt22666-p1udt994)p1u_268212 monitoredobj=Line.fuse(r:p1udt22666-p1udt994)p1u_268212 enabled=y ratedcurrent=100.0

New Line.fuse(r:p1udt22666-p1udt24790)p1u_268213 Units=km Length=0.001 bus1=p1udt22666.1 bus2=p1udt22666-p1udt24790x.1 switch=n enabled=y phases=1 Linecode=fuse_1_6_1_4_1_3_1

New Fuse.Fuse_fuse(r:p1udt22666-p1udt24790)p1u_268213 monitoredobj=Line.fuse(r:p1udt22666-p1udt24790)p1u_268213 enabled=y ratedcurrent=100.0

New Line.l(r:p1udt20362-p1uhs9_1247)_disconnect Units=km Length=0.001 bus1=p1udt20362-p1uhs9_1247x_b1_1.1.2.3 bus2=p1udt20362-p1uhs9_1247x_b2_1.1.2.3 switch=y enabled=y phases=3 Linecode=3P_OH_AL_ACSR_4/0_Penguin_12_47_0_3_3_3_3

New Line.l(r:p1udt20362-p1uhs9_1247)_cont Units=km Length=2.813004 bus1=p1udt20362-p1uhs9_1247x_b2_1.1.2.3 bus2=p1udt20362.1.2.3 switch=n enabled=y phases=3 Linecode=3P_OH_AL_ACSR_4/0_Penguin_12_47_0_3_3_3_3
