New Line.l(r:p1udt459lv-p1ulv11182) Units=km Length=0.016339600000000003 bus1=p1udt459lv.1.2 bus2=p1ulv11182.1.2 switch=n enabled=y phases=2 Linecode=1P_UG_AL_1/0_Brenau_0_416_0_2_2_2_2

New Line.l(r:p1udt459lv-p1ulv16825) Units=km Length=0.0152788 bus1=p1udt459lv.1.2 bus2=p1ulv16825.1.2 switch=n enabled=y phases=2 Linecode=1P_UG_AL_1/0_Brenau_0_416_0_2_2_2_2

New Line.l(r:p1udm1677-p1ulv464) Units=km Length=0.0157704 bus1=p1udm1677.1.2 bus2=p1ulv464.1.2 switch=n enabled=y phases=2 Linecode=1P_UG_AL_1/0_Brenau_0_416_0_2_2_2_2

New Line.l(r:p1udm1677-p1udt459lv) Units=km Length=0.00954611 bus1=p1udt459lv.1.2 bus2=p1udm1677.1.2 switch=n enabled=y phases=2 Linecode=1P_UG_AL_1/0_Brenau_0_416_0_2_2_2_2

New Line.l(r:p1udt460lv-p1ulv465) Units=km Length=0.0174463 bus1=p1udt460lv.1.2 bus2=p1ulv465.1.2 switch=n enabled=y phases=2 Linecode=1P_UG_AL_4/0_Sweetbriar_0_416_0_2_2_2_2

New Line.l(r:p1udt1056lv-p1ulv1078) Units=km Length=0.0162264 bus1=p1udt1056lv.1.2 bus2=p1ulv1078.1.2 switch=n enabled=y phases=2 Linecode=1P_UG_AL_1/0_Brenau_0_416_0_2_2_2_2

New Line.l(r:p1udm3858-p1ulv31448) Units=km Length=0.0167647 bus1=p1udm3858.1.2 bus2=p1ulv31448.1.2 switch=n enabled=y phases=2 Linecode=1P_UG_AL_1/0_Brenau_0_416_0_2_2_2_2

New Line.l(r:p1udm3858-p1ulv37219) Units=km Length=0.0180951 bus1=p1udm3858.1.2 bus2=p1ulv37219.1.2 switch=n enabled=y phases=2 Linecode=1P_UG_AL_1/0_Brenau_0_416_0_2_2_2_2

New Line.l(r:p1udm3858-p1udt1056lv) Units=km Length=0.00890394 bus1=p1udt1056lv.1.2 bus2=p1udm3858.1.2 switch=n enabled=y phases=2 Linecode=1P_UG_AL_4/0_Sweetbriar_0_416_0_2_2_2_2

New Line.l(r:p1udm3860-p1ulv40376) Units=km Length=0.017841900000000004 bus1=p1udm3860.1.2 bus2=p1ulv40376.1.2 switch=n enabled=y phases=2 Linecode=1P_UG_AL_1/0_Brenau_0_416_0_2_2_2_2

New Line.l(r:p1udm3860-p1udt1056lv) Units=km Length=0.0493279 bus1=p1udt1056lv.1.2 bus2=p1udm3860.1.2 switch=n enabled=y phases=2 Linecode=1P_UG_AL_1/0_Brenau_0_416_0_2_2_2_2

New Line.l(r:p1udt2252lv-p1ulv57214) Units=km Length=0.0167749 bus1=p1udt2252lv.1.2 bus2=p1ulv57214.1.2 switch=n enabled=y phases=2 Linecode=1P_UG_AL_1/0_Brenau_0_416_0_2_2_2_2

New Line.l(r:p1udm8160-p1ulv2379) Units=km Length=0.0193474 bus1=p1udm8160.1.2 bus2=p1ulv2379.1.2 switch=n enabled=y phases=2 Linecode=1P_UG_AL_1/0_Brenau_0_416_0_2_2_2_2

New Line.l(r:p1udm8161-p1ulv23225) Units=km Length=0.0186486 bus1=p1udm8161.1.2 bus2=p1ulv23225.1.2 switch=n enabled=y phases=2 Linecode=1P_UG_AL_1/0_Brenau_0_416_0_2_2_2_2

New Line.l(r:p1udm8160-p1udm8161) Units=km Length=0.019663 bus1=p1udm8160.1.2 bus2=p1udm8161.1.2 switch=n enabled=y phases=2 Linecode=1P_UG_AL_1/0_Brenau_0_416_0_2_2_2_2

New Line.l(r:p1udm8160-p1udt2252lv) Units=km Length=0.00983317 bus1=p1udt2252lv.1.2 bus2=p1udm8160.1.2 switch=n enabled=y phases=2 Linecode=1P_UG_AL_4/0_Sweetbriar_0_416_0_2_2_2_2

New Line.l(r:p1udm8162-p1ulv50995) Units=km Length=0.018993 bus1=p1udm8162.1.2 bus2=p1ulv50995.1.2 switch=n enabled=y phases=2 Linecode=1P_UG_AL_1/0_Brenau_0_416_0_2_2_2_2

New Line.l(r:p1udm8162-p1ulv60225) Units=km Length=0.0187924 bus1=p1udm8162.1.2 bus2=p1ulv60225.1.2 switch=n enabled=y phases=2 Linecode=1P_UG_AL_1/0_Brenau_0_416_0_2_2_2_2

New Line.l(r:p1udm8162-p1udt2252lv) Units=km Length=0.00983317 bus1=p1udt2252lv.1.2 bus2=p1udm8162.1.2 switch=n enabled=y phases=2 Linecode=1P_UG_AL_4/0_Sweetbriar_0_416_0_2_2_2_2

New Line.l(r:p1udt2256lv-p1ulv2383) Units=km Length=0.0173928 bus1=p1udt2256lv.1.2 bus2=p1ulv2383.1.2 switch=n enabled=y phases=2 Linecode=1P_UG_AL_1/0_Brenau_0_416_0_2_2_2_2

New Line.l(r:p1udm8174-p1ulv4883) Units=km Length=0.0175616 bus1=p1udm8174.1.2 bus2=p1ulv4883.1.2 switch=n enabled=y phases=2 Linecode=1P_UG_AL_1/0_Brenau_0_416_0_2_2_2_2

New Line.l(r:p1udm8174-p1udt2256lv) Units=km Length=0.00890174 bus1=p1udt2256lv.1.2 bus2=p1udm8174.1.2 switch=n enabled=y phases=2 Linecode=1P_UG_AL_1/0_Brenau_0_416_0_2_2_2_2

New Line.l(r:p1udm8175-p1ulv46687) Units=km Length=0.0181442 bus1=p1udm8175.1.2 bus2=p1ulv46687.1.2 switch=n enabled=y phases=2 Linecode=1P_UG_AL_1/0_Brenau_0_416_0_2_2_2_2

New Line.l(r:p1udm8176-p1ulv54159) Units=km Length=0.0183277 bus1=p1udm8176.1.2 bus2=p1ulv54159.1.2 switch=n enabled=y phases=2 Linecode=1P_UG_AL_4/0_Sweetbriar_0_416_0_2_2_2_2

New Line.l(r:p1udm8175-p1udm8176) Units=km Length=0.00889198 bus1=p1udm8175.1.2 bus2=p1udm8176.1.2 switch=n enabled=y phases=2 Linecode=1P_UG_AL_4/0_Sweetbriar_0_416_0_2_2_2_2

New Line.l(r:p1udm8175-p1udt2256lv) Units=km Length=0.00890174 bus1=p1udt2256lv.1.2 bus2=p1udm8175.1.2 switch=n enabled=y phases=2 Linecode=1P_UG_AL_4/0_Sweetbriar_0_416_0_2_2_2_2

New Line.l(r:p1udt3434lv-p1ulv3694) Units=km Length=0.027594200000000003 bus1=p1udt3434lv.1.2 bus2=p1ulv3694.1.2 switch=n enabled=y phases=2 Linecode=1P_UG_AL_1/0_Brenau_0_416_0_2_2_2_2

New Line.l(r:p1udt3434lv-p1ulv4910) Units=km Length=0.0246313 bus1=p1udt3434lv.1.2 bus2=p1ulv4910.1.2 switch=n enabled=y phases=2 Linecode=1P_UG_AL_1/0_Brenau_0_416_0_2_2_2_2

New Line.l(r:p1udt3434lv-p1ulv33431) Units=km Length=0.027481 bus1=p1udt3434lv.1.2 bus2=p1ulv33431.1.2 switch=n enabled=y phases=2 Linecode=1P_UG_AL_1/0_Brenau_0_416_0_2_2_2_2

New Line.l(r:p1udt3434lv-p1ulv51013) Units=km Length=0.0283078 bus1=p1udt3434lv.1.2 bus2=p1ulv51013.1.2 switch=n enabled=y phases=2 Linecode=1P_UG_AL_1/0_Brenau_0_416_0_2_2_2_2

New Line.l(r:p1udt3434lv-p1ulv62124) Units=km Length=0.0242245 bus1=p1udt3434lv.1.2 bus2=p1ulv62124.1.2 switch=n enabled=y phases=2 Linecode=1P_UG_AL_1/0_Brenau_0_416_0_2_2_2_2

New Line.l(r:p1udt4412lv-p1ulv61503) Units=km Length=0.0166297 bus1=p1udt4412lv.1.2 bus2=p1ulv61503.1.2 switch=n enabled=y phases=2 Linecode=1P_UG_AL_1/0_Brenau_0_416_0_2_2_2_2

New Line.l(r:p1udm15512-p1ulv4881) Units=km Length=0.0136614 bus1=p1udm15512.1.2 bus2=p1ulv4881.1.2 switch=n enabled=y phases=2 Linecode=1P_UG_AL_1/0_Brenau_0_416_0_2_2_2_2

New Line.l(r:p1udm15512-p1udt4412lv) Units=km Length=0.00902898 bus1=p1udt4412lv.1.2 bus2=p1udm15512.1.2 switch=n enabled=y phases=2 Linecode=1P_UG_AL_1/0_Brenau_0_416_0_2_2_2_2

New Line.l(r:p1udt5437lv-p1ulv18103) Units=km Length=0.0156407 bus1=p1udt5437lv.1.2 bus2=p1ulv18103.1.2 switch=n enabled=y phases=2 Linecode=1P_UG_AL_1/0_Brenau_0_416_0_2_2_2_2

New Line.l(r:p1udt5437lv-p1ulv27697) Units=km Length=0.0168014 bus1=p1udt5437lv.1.2 bus2=p1ulv27697.1.2 switch=n enabled=y phases=2 Linecode=1P_UG_AL_1/0_Brenau_0_416_0_2_2_2_2

New Line.l(r:p1udm18989-p1ulv46059) Units=km Length=0.0161088 bus1=p1udm18989.1.2 bus2=p1ulv46059.1.2 switch=n enabled=y phases=2 Linecode=1P_UG_AL_1/0_Brenau_0_416_0_2_2_2_2

New Line.l(r:p1udm18985-p1ulv6181) Units=km Length=0.0151802 bus1=p1udm18985.1.2 bus2=p1ulv6181.1.2 switch=n enabled=y phases=2 Linecode=1P_UG_AL_1/0_Brenau_0_416_0_2_2_2_2

New Line.l(r:p1udm18985-p1ulv23226) Units=km Length=0.0163134 bus1=p1udm18985.1.2 bus2=p1ulv23226.1.2 switch=n enabled=y phases=2 Linecode=1P_UG_AL_1/0_Brenau_0_416_0_2_2_2_2

New Line.l(r:p1udm18985-p1udm18989) Units=km Length=0.008 bus1=p1udm18989.1.2 bus2=p1udm18985.1.2 switch=n enabled=y phases=2 Linecode=1P_UG_AL_4/0_Sweetbriar_0_416_0_2_2_2_2

New Line.l(r:p1udm18989-p1udt5437lv) Units=km Length=0.00799801 bus1=p1udt5437lv.1.2 bus2=p1udm18989.1.2 switch=n enabled=y phases=2 Linecode=1P_UG_AL_4/0_Sweetbriar_0_416_0_2_2_2_2

New Line.l(r:p1udm18990-p1ulv52904) Units=km Length=0.0155486 bus1=p1udm18990.1.2 bus2=p1ulv52904.1.2 switch=n enabled=y phases=2 Linecode=1P_UG_AL_1/0_Brenau_0_416_0_2_2_2_2

New Line.l(r:p1udm18990-p1udt5437lv) Units=km Length=0.0458208 bus1=p1udt5437lv.1.2 bus2=p1udm18990.1.2 switch=n enabled=y phases=2 Linecode=1P_UG_AL_1/0_Brenau_0_416_0_2_2_2_2

New Line.l(r:p1udt5438lv-p1ulv14290) Units=km Length=0.0184614 bus1=p1udt5438lv.1.2 bus2=p1ulv14290.1.2 switch=n enabled=y phases=2 Linecode=1P_UG_AL_1/0_Brenau_0_416_0_2_2_2_2

New Line.l(r:p1udm18991-p1ulv6182) Units=km Length=0.0191447 bus1=p1udm18991.1.2 bus2=p1ulv6182.1.2 switch=n enabled=y phases=2 Linecode=1P_UG_AL_1/0_Brenau_0_416_0_2_2_2_2

New Line.l(r:p1udm18991-p1ulv27698) Units=km Length=0.0170333 bus1=p1udm18991.1.2 bus2=p1ulv27698.1.2 switch=n enabled=y phases=2 Linecode=1P_UG_AL_1/0_Brenau_0_416_0_2_2_2_2

New Line.l(r:p1udm18996-p1ulv51593) Units=km Length=0.018209400000000004 bus1=p1udm18996.1.2 bus2=p1ulv51593.1.2 switch=n enabled=y phases=2 Linecode=1P_UG_AL_1/0_Brenau_0_416_0_2_2_2_2

New Line.l(r:p1udm18991-p1udm18996) Units=km Length=0.00641611 bus1=p1udm18991.1.2 bus2=p1udm18996.1.2 switch=n enabled=y phases=2 Linecode=1P_UG_AL_1/0_Brenau_0_416_0_2_2_2_2

New Line.l(r:p1udm18991-p1udt5438lv) Units=km Length=0.00640376 bus1=p1udt5438lv.1.2 bus2=p1udm18991.1.2 switch=n enabled=y phases=2 Linecode=1P_UG_AL_4/0_Sweetbriar_0_416_0_2_2_2_2

New Line.l(r:p1udm18993-p1ulv21950) Units=km Length=0.019130100000000004 bus1=p1udm18993.1.2 bus2=p1ulv21950.1.2 switch=n enabled=y phases=2 Linecode=1P_UG_AL_1/0_Brenau_0_416_0_2_2_2_2

New Line.l(r:p1udm18993-p1ulv39095) Units=km Length=0.017412800000000003 bus1=p1udm18993.1.2 bus2=p1ulv39095.1.2 switch=n enabled=y phases=2 Linecode=1P_UG_AL_1/0_Brenau_0_416_0_2_2_2_2

New Line.l(r:p1udm18993-p1udt5438lv) Units=km Length=0.0176451 bus1=p1udt5438lv.1.2 bus2=p1udm18993.1.2 switch=n enabled=y phases=2 Linecode=1P_UG_AL_4/0_Sweetbriar_0_416_0_2_2_2_2

New Line.l(r:p1udm20681-p1ulv6861) Units=km Length=0.0175845 bus1=p1udm20681.1.2 bus2=p1ulv6861.1.2 switch=n enabled=y phases=2 Linecode=1P_UG_AL_1/0_Brenau_0_416_0_2_2_2_2

New Line.l(r:p1udm20684-p1ulv32766) Units=km Length=0.0147759 bus1=p1udm20684.1.2 bus2=p1ulv32766.1.2 switch=n enabled=y phases=2 Linecode=1P_UG_AL_4/0_Sweetbriar_0_416_0_2_2_2_2

New Line.l(r:p1udm20681-p1udm20684) Units=km Length=0.00798181 bus1=p1udm20681.1.2 bus2=p1udm20684.1.2 switch=n enabled=y phases=2 Linecode=1P_UG_AL_4/0_Sweetbriar_0_416_0_2_2_2_2

New Line.l(r:p1udm20681-p1udt5963lv) Units=km Length=0.00798655 bus1=p1udt5963lv.1.2 bus2=p1udm20681.1.2 switch=n enabled=y phases=2 Linecode=1P_UG_AL_4/0_Sweetbriar_0_416_0_2_2_2_2

New Line.l(r:p1udm20682-p1ulv29603) Units=km Length=0.0190266 bus1=p1udm20682.1.2 bus2=p1ulv29603.1.2 switch=n enabled=y phases=2 Linecode=1P_UG_AL_1/0_Brenau_0_416_0_2_2_2_2

New Line.l(r:p1udm20682-p1ulv42247) Units=km Length=0.0145573 bus1=p1udm20682.1.2 bus2=p1ulv42247.1.2 switch=n enabled=y phases=2 Linecode=1P_UG_AL_1/0_Brenau_0_416_0_2_2_2_2

New Line.l(r:p1udm20683-p1ulv30227) Units=km Length=0.0162634 bus1=p1udm20683.1.2 bus2=p1ulv30227.1.2 switch=n enabled=y phases=2 Linecode=1P_UG_AL_1/0_Brenau_0_416_0_2_2_2_2

New Line.l(r:p1udm20682-p1udm20683) Units=km Length=0.00686225 bus1=p1udm20682.1.2 bus2=p1udm20683.1.2 switch=n enabled=y phases=2 Linecode=1P_UG_AL_1/0_Brenau_0_416_0_2_2_2_2

New Line.l(r:p1udm20682-p1udt5963lv) Units=km Length=0.00686225 bus1=p1udt5963lv.1.2 bus2=p1udm20682.1.2 switch=n enabled=y phases=2 Linecode=1P_UG_AL_4/0_Sweetbriar_0_416_0_2_2_2_2

New Line.l(r:p1udt6414lv-p1ulv49141) Units=km Length=0.012934700000000002 bus1=p1udt6414lv.1.2 bus2=p1ulv49141.1.2 switch=n enabled=y phases=2 Linecode=1P_UG_AL_1/0_Brenau_0_416_0_2_2_2_2

New Line.l(r:p1udm22167-p1ulv49140) Units=km Length=0.0132409 bus1=p1udm22167.1.2 bus2=p1ulv49140.1.2 switch=n enabled=y phases=2 Linecode=1P_UG_AL_1/0_Brenau_0_416_0_2_2_2_2

New Line.l(r:p1udm22166-p1ulv35316) Units=km Length=0.0148675 bus1=p1udm22166.1.2 bus2=p1ulv35316.1.2 switch=n enabled=y phases=2 Linecode=1P_UG_AL_1/0_Brenau_0_416_0_2_2_2_2

New Line.l(r:p1udm22165-p1ulv7456) Units=km Length=0.0154376 bus1=p1udm22165.1.2 bus2=p1ulv7456.1.2 switch=n enabled=y phases=2 Linecode=1P_UG_AL_1/0_Brenau_0_416_0_2_2_2_2

New Line.l(r:p1udm22165-p1udm22166) Units=km Length=0.00842862 bus1=p1udm22166.1.2 bus2=p1udm22165.1.2 switch=n enabled=y phases=2 Linecode=1P_UG_AL_1/0_Brenau_0_416_0_2_2_2_2

New Line.l(r:p1udm22166-p1udm22167) Units=km Length=0.0373977 bus1=p1udm22167.1.2 bus2=p1udm22166.1.2 switch=n enabled=y phases=2 Linecode=1P_UG_AL_4/0_Sweetbriar_0_416_0_2_2_2_2

New Line.l(r:p1udm22167-p1udt6414lv) Units=km Length=0.00954741 bus1=p1udt6414lv.1.2 bus2=p1udm22167.1.2 switch=n enabled=y phases=2 Linecode=1P_UG_AL_4/0_Sweetbriar_0_416_0_2_2_2_2

New Line.l(r:p1udm22169-p1ulv57223) Units=km Length=0.0135999 bus1=p1udm22169.1.2 bus2=p1ulv57223.1.2 switch=n enabled=y phases=2 Linecode=1P_UG_AL_1/0_Brenau_0_416_0_2_2_2_2

New Line.l(r:p1udm22170-p1ulv58405) Units=km Length=0.014989 bus1=p1udm22170.1.2 bus2=p1ulv58405.1.2 switch=n enabled=y phases=2 Linecode=1P_UG_AL_1/0_Brenau_0_416_0_2_2_2_2

New Line.l(r:p1udm22169-p1udm22170) Units=km Length=0.00954382 bus1=p1udm22169.1.2 bus2=p1udm22170.1.2 switch=n enabled=y phases=2 Linecode=1P_UG_AL_1/0_Brenau_0_416_0_2_2_2_2

New Line.l(r:p1udm22169-p1udt6414lv) Units=km Length=0.0190762 bus1=p1udt6414lv.1.2 bus2=p1udm22169.1.2 switch=n enabled=y phases=2 Linecode=1P_UG_AL_4/0_Sweetbriar_0_416_0_2_2_2_2

New Line.l(r:p1udt6855lv-p1ulv20699) Units=km Length=0.0173349 bus1=p1udt6855lv.1.2 bus2=p1ulv20699.1.2 switch=n enabled=y phases=2 Linecode=1P_UG_AL_4/0_Sweetbriar_0_416_0_2_2_2_2

New Line.l(r:p1udm23621-p1ulv8069) Units=km Length=0.0176347 bus1=p1udm23621.1.2 bus2=p1ulv8069.1.2 switch=n enabled=y phases=2 Linecode=1P_UG_AL_1/0_Brenau_0_416_0_2_2_2_2

New Line.l(r:p1udm23625-p1ulv56599) Units=km Length=0.0170913 bus1=p1udm23625.1.2 bus2=p1ulv56599.1.2 switch=n enabled=y phases=2 Linecode=1P_UG_AL_1/0_Brenau_0_416_0_2_2_2_2

New Line.l(r:p1udm23621-p1udm23625) Units=km Length=0.00843446 bus1=p1udm23621.1.2 bus2=p1udm23625.1.2 switch=n enabled=y phases=2 Linecode=1P_UG_AL_1/0_Brenau_0_416_0_2_2_2_2

New Line.l(r:p1udm23621-p1udt6855lv) Units=km Length=0.00842551 bus1=p1udt6855lv.1.2 bus2=p1udm23621.1.2 switch=n enabled=y phases=2 Linecode=1P_UG_AL_4/0_Sweetbriar_0_416_0_2_2_2_2

New Line.l(r:p1udm23623-p1ulv25770) Units=km Length=0.0180726 bus1=p1udm23623.1.2 bus2=p1ulv25770.1.2 switch=n enabled=y phases=2 Linecode=1P_UG_AL_1/0_Brenau_0_416_0_2_2_2_2

New Line.l(r:p1udm23624-p1ulv35317) Units=km Length=0.0182209 bus1=p1udm23624.1.2 bus2=p1ulv35317.1.2 switch=n enabled=y phases=2 Linecode=1P_UG_AL_1/0_Brenau_0_416_0_2_2_2_2

New Line.l(r:p1udm23623-p1udm23624) Units=km Length=0.005856710000000001 bus1=p1udm23623.1.2 bus2=p1udm23624.1.2 switch=n enabled=y phases=2 Linecode=1P_UG_AL_1/0_Brenau_0_416_0_2_2_2_2

New Line.l(r:p1udm23623-p1udt6855lv) Units=km Length=0.00584411 bus1=p1udt6855lv.1.2 bus2=p1udm23623.1.2 switch=n enabled=y phases=2 Linecode=1P_UG_AL_4/0_Sweetbriar_0_416_0_2_2_2_2

New Line.l(r:p1udm25014-p1ulv8691) Units=km Length=0.0189593 bus1=p1udm25014.1.2 bus2=p1ulv8691.1.2 switch=n enabled=y phases=2 Linecode=1P_UG_AL_1/0_Brenau_0_416_0_2_2_2_2

New Line.l(r:p1udm25014-p1udt7296lv) Units=km Length=0.00983317 bus1=p1udt7296lv.1.2 bus2=p1udm25014.1.2 switch=n enabled=y phases=2 Linecode=1P_UG_AL_1/0_Brenau_0_416_0_2_2_2_2

New Line.l(r:p1udm25015-p1ulv21945) Units=km Length=0.0191649 bus1=p1udm25015.1.2 bus2=p1ulv21945.1.2 switch=n enabled=y phases=2 Linecode=1P_UG_AL_1/0_Brenau_0_416_0_2_2_2_2

New Line.l(r:p1udm25015-p1udt7296lv) Units=km Length=0.00982984 bus1=p1udt7296lv.1.2 bus2=p1udm25015.1.2 switch=n enabled=y phases=2 Linecode=1P_UG_AL_1/0_Brenau_0_416_0_2_2_2_2

New Line.l(r:p1udt7727lv-p1ulv9328) Units=km Length=0.023913400000000005 bus1=p1udt7727lv.1.2 bus2=p1ulv9328.1.2 switch=n enabled=y phases=2 Linecode=1P_UG_AL_1/0_Brenau_0_416_0_2_2_2_2

New Line.l(r:p1udt7727lv-p1ulv11816) Units=km Length=0.024537600000000003 bus1=p1udt7727lv.1.2 bus2=p1ulv11816.1.2 switch=n enabled=y phases=2 Linecode=1P_UG_AL_1/0_Brenau_0_416_0_2_2_2_2

New Line.l(r:p1udt7727lv-p1ulv16183) Units=km Length=0.0221107 bus1=p1udt7727lv.1.2 bus2=p1ulv16183.1.2 switch=n enabled=y phases=2 Linecode=1P_UG_AL_1/0_Brenau_0_416_0_2_2_2_2

New Line.l(r:p1udt7727lv-p1ulv27078) Units=km Length=0.0226769 bus1=p1udt7727lv.1.2 bus2=p1ulv27078.1.2 switch=n enabled=y phases=2 Linecode=1P_UG_AL_1/0_Brenau_0_416_0_2_2_2_2

New Line.l(r:p1udm26462-p1ulv9329) Units=km Length=0.0185801 bus1=p1udm26462.1.2 bus2=p1ulv9329.1.2 switch=n enabled=y phases=2 Linecode=1P_UG_AL_1/0_Brenau_0_416_0_2_2_2_2

New Line.l(r:p1udm26462-p1ulv17458) Units=km Length=0.0160937 bus1=p1udm26462.1.2 bus2=p1ulv17458.1.2 switch=n enabled=y phases=2 Linecode=1P_UG_AL_1/0_Brenau_0_416_0_2_2_2_2

New Line.l(r:p1udm26462-p1ulv23911) Units=km Length=0.0188956 bus1=p1udm26462.1.2 bus2=p1ulv23911.1.2 switch=n enabled=y phases=2 Linecode=1P_UG_AL_1/0_Brenau_0_416_0_2_2_2_2

New Line.l(r:p1udm26462-p1udt7728lv) Units=km Length=0.00872427 bus1=p1udt7728lv.1.2 bus2=p1udm26462.1.2 switch=n enabled=y phases=2 Linecode=1P_UG_AL_4/0_Sweetbriar_0_416_0_2_2_2_2

New Line.l(r:p1udm26465-p1ulv44816) Units=km Length=0.0154058 bus1=p1udm26465.1.2 bus2=p1ulv44816.1.2 switch=n enabled=y phases=2 Linecode=1P_UG_AL_1/0_Brenau_0_416_0_2_2_2_2

New Line.l(r:p1udm26465-p1ulv56010) Units=km Length=0.016272 bus1=p1udm26465.1.2 bus2=p1ulv56010.1.2 switch=n enabled=y phases=2 Linecode=1P_UG_AL_4/0_Sweetbriar_0_416_0_2_2_2_2

New Line.l(r:p1udm26465-p1udt7728lv) Units=km Length=0.00872427 bus1=p1udt7728lv.1.2 bus2=p1udm26465.1.2 switch=n enabled=y phases=2 Linecode=1P_UG_AL_4/0_Sweetbriar_0_416_0_2_2_2_2

New Line.l(r:p1udt8525lv-p1ulv13645) Units=km Length=0.0232435 bus1=p1udt8525lv.1.2 bus2=p1ulv13645.1.2 switch=n enabled=y phases=2 Linecode=1P_UG_AL_1/0_Brenau_0_416_0_2_2_2_2

New Line.l(r:p1udt8525lv-p1ulv32096) Units=km Length=0.0254 bus1=p1udt8525lv.1.2 bus2=p1ulv32096.1.2 switch=n enabled=y phases=2 Linecode=1P_UG_AL_1/0_Brenau_0_416_0_2_2_2_2

New Line.l(r:p1udt8525lv-p1ulv38465) Units=km Length=0.0246632 bus1=p1udt8525lv.1.2 bus2=p1ulv38465.1.2 switch=n enabled=y phases=2 Linecode=1P_UG_AL_1/0_Brenau_0_416_0_2_2_2_2

New Line.l(r:p1udt8525lv-p1ulv41581) Units=km Length=0.0257154 bus1=p1udt8525lv.1.2 bus2=p1ulv41581.1.2 switch=n enabled=y phases=2 Linecode=1P_UG_AL_1/0_Brenau_0_416_0_2_2_2_2

New Line.l(r:p1udm28950-p1ulv10550) Units=km Length=0.0172819 bus1=p1udm28950.1.2 bus2=p1ulv10550.1.2 switch=n enabled=y phases=2 Linecode=1P_UG_AL_1/0_Brenau_0_416_0_2_2_2_2

New Line.l(r:p1udm28950-p1udt8525lv) Units=km Length=0.0709893 bus1=p1udt8525lv.1.2 bus2=p1udm28950.1.2 switch=n enabled=y phases=2 Linecode=1P_UG_AL_1/0_Brenau_0_416_0_2_2_2_2

New Line.l(r:p1udm30070-p1ulv11154) Units=km Length=0.0167986 bus1=p1udm30070.1.2 bus2=p1ulv11154.1.2 switch=n enabled=y phases=2 Linecode=1P_UG_AL_2/0_Converse_0_416_0_2_2_2_2

New Line.l(r:p1udm30072-p1ulv45403) Units=km Length=0.014489500000000002 bus1=p1udm30072.1.2 bus2=p1ulv45403.1.2 switch=n enabled=y phases=2 Linecode=1P_UG_AL_1/0_Brenau_0_416_0_2_2_2_2

New Line.l(r:p1udm30070-p1udm30072) Units=km Length=0.00909594 bus1=p1udm30070.1.2 bus2=p1udm30072.1.2 switch=n enabled=y phases=2 Linecode=1P_UG_AL_1/0_Brenau_0_416_0_2_2_2_2

New Line.l(r:p1udm30070-p1udt8896lv) Units=km Length=0.00909189 bus1=p1udt8896lv.1.2 bus2=p1udm30070.1.2 switch=n enabled=y phases=2 Linecode=1P_UG_AL_4/0_Sweetbriar_0_416_0_2_2_2_2

New Line.l(r:p1udm30071-p1ulv44147) Units=km Length=0.017468 bus1=p1udm30071.1.2 bus2=p1ulv44147.1.2 switch=n enabled=y phases=2 Linecode=1P_UG_AL_1/0_Brenau_0_416_0_2_2_2_2

New Line.l(r:p1udm30071-p1udt8896lv) Units=km Length=0.0181831 bus1=p1udt8896lv.1.2 bus2=p1udm30071.1.2 switch=n enabled=y phases=2 Linecode=1P_UG_AL_1/0_Brenau_0_416_0_2_2_2_2

New Line.l(r:p1udt9683lv-p1ulv12428) Units=km Length=0.0181589 bus1=p1udt9683lv.1.2 bus2=p1ulv12428.1.2 switch=n enabled=y phases=2 Linecode=1P_UG_AL_1/0_Brenau_0_416_0_2_2_2_2

New Line.l(r:p1udm32480-p1ulv28342) Units=km Length=0.0178833 bus1=p1udm32480.1.2 bus2=p1ulv28342.1.2 switch=n enabled=y phases=2 Linecode=1P_UG_AL_1/0_Brenau_0_416_0_2_2_2_2

New Line.l(r:p1udm32479-p1ulv19419) Units=km Length=0.0172487 bus1=p1udm32479.1.2 bus2=p1ulv19419.1.2 switch=n enabled=y phases=2 Linecode=1P_UG_AL_1/0_Brenau_0_416_0_2_2_2_2

New Line.l(r:p1udm32479-p1ulv58403) Units=km Length=0.0178012 bus1=p1udm32479.1.2 bus2=p1ulv58403.1.2 switch=n enabled=y phases=2 Linecode=1P_UG_AL_1/0_Brenau_0_416_0_2_2_2_2

New Line.l(r:p1udm32479-p1udm32480) Units=km Length=0.00696259 bus1=p1udm32480.1.2 bus2=p1udm32479.1.2 switch=n enabled=y phases=2 Linecode=1P_UG_AL_4/0_Sweetbriar_0_416_0_2_2_2_2

New Line.l(r:p1udm32480-p1udt9683lv) Units=km Length=0.00696259 bus1=p1udt9683lv.1.2 bus2=p1udm32480.1.2 switch=n enabled=y phases=2 Linecode=1P_UG_AL_4/0_Sweetbriar_0_416_0_2_2_2_2

New Line.l(r:p1udm32482-p1ulv42808) Units=km Length=0.0176978 bus1=p1udm32482.1.2 bus2=p1ulv42808.1.2 switch=n enabled=y phases=2 Linecode=1P_UG_AL_1/0_Brenau_0_416_0_2_2_2_2

New Line.l(r:p1udm32481-p1ulv34676) Units=km Length=0.018079600000000005 bus1=p1udm32481.1.2 bus2=p1ulv34676.1.2 switch=n enabled=y phases=2 Linecode=1P_UG_AL_1/0_Brenau_0_416_0_2_2_2_2

New Line.l(r:p1udm32481-p1udm32482) Units=km Length=0.0090722 bus1=p1udm32482.1.2 bus2=p1udm32481.1.2 switch=n enabled=y phases=2 Linecode=1P_UG_AL_1/0_Brenau_0_416_0_2_2_2_2

New Line.l(r:p1udm32482-p1udt9683lv) Units=km Length=0.012678900000000002 bus1=p1udt9683lv.1.2 bus2=p1udm32482.1.2 switch=n enabled=y phases=2 Linecode=1P_UG_AL_4/0_Sweetbriar_0_416_0_2_2_2_2

New Line.l(r:p1udt10759lv-p1ulv31446) Units=km Length=0.0158161 bus1=p1udt10759lv.1.2 bus2=p1ulv31446.1.2 switch=n enabled=y phases=2 Linecode=1P_UG_AL_1/0_Brenau_0_416_0_2_2_2_2

New Line.l(r:p1udt10759lv-p1ulv65280) Units=km Length=0.016425 bus1=p1udt10759lv.1.2 bus2=p1ulv65280.1.2 switch=n enabled=y phases=2 Linecode=1P_UG_AL_1/0_Brenau_0_416_0_2_2_2_2

New Line.l(r:p1udm35641-p1ulv14289) Units=km Length=0.0150918 bus1=p1udm35641.1.2 bus2=p1ulv14289.1.2 switch=n enabled=y phases=2 Linecode=1P_UG_AL_4/0_Sweetbriar_0_416_0_2_2_2_2

New Line.l(r:p1udm35641-p1ulv30202) Units=km Length=0.0158295 bus1=p1udm35641.1.2 bus2=p1ulv30202.1.2 switch=n enabled=y phases=2 Linecode=1P_UG_AL_2/0_Converse_0_416_0_2_2_2_2

New Line.l(r:p1udm35641-p1udt10759lv) Units=km Length=0.0093598 bus1=p1udt10759lv.1.2 bus2=p1udm35641.1.2 switch=n enabled=y phases=2 Linecode=1P_UG_AL_4/0_Sweetbriar_0_416_0_2_2_2_2

New Line.l(r:p1udt11124lv-p1ulv23874) Units=km Length=0.0154766 bus1=p1udt11124lv.1.2 bus2=p1ulv23874.1.2 switch=n enabled=y phases=2 Linecode=1P_UG_AL_1/0_Brenau_0_416_0_2_2_2_2

New Line.l(r:p1udm36674-p1ulv14914) Units=km Length=0.0157137 bus1=p1udm36674.1.2 bus2=p1ulv14914.1.2 switch=n enabled=y phases=2 Linecode=1P_UG_AL_1/0_Brenau_0_416_0_2_2_2_2

New Line.l(r:p1udm36674-p1udt11124lv) Units=km Length=0.0076574 bus1=p1udt11124lv.1.2 bus2=p1udm36674.1.2 switch=n enabled=y phases=2 Linecode=1P_UG_AL_1/0_Brenau_0_416_0_2_2_2_2

New Line.l(r:p1udm36675-p1ulv16826) Units=km Length=0.0162384 bus1=p1udm36675.1.2 bus2=p1ulv16826.1.2 switch=n enabled=y phases=2 Linecode=1P_UG_AL_1/0_Brenau_0_416_0_2_2_2_2

New Line.l(r:p1udm36677-p1ulv59000) Units=km Length=0.016685300000000004 bus1=p1udm36677.1.2 bus2=p1ulv59000.1.2 switch=n enabled=y phases=2 Linecode=1P_UG_AL_1/0_Brenau_0_416_0_2_2_2_2

New Line.l(r:p1udm36675-p1udm36677) Units=km Length=0.00726245 bus1=p1udm36675.1.2 bus2=p1udm36677.1.2 switch=n enabled=y phases=2 Linecode=1P_UG_AL_1/0_Brenau_0_416_0_2_2_2_2

New Line.l(r:p1udm36675-p1udt11124lv) Units=km Length=0.007648530000000001 bus1=p1udt11124lv.1.2 bus2=p1udm36675.1.2 switch=n enabled=y phases=2 Linecode=1P_UG_AL_2/0_Converse_0_416_0_2_2_2_2

New Line.l(r:p1udm36678-p1ulv14915) Units=km Length=0.0153308 bus1=p1udm36678.1.2 bus2=p1ulv14915.1.2 switch=n enabled=y phases=2 Linecode=1P_UG_AL_1/0_Brenau_0_416_0_2_2_2_2

New Line.l(r:p1udm36678-p1udt11125lv) Units=km Length=0.0553619 bus1=p1udt11125lv.1.2 bus2=p1udm36678.1.2 switch=n enabled=y phases=2 Linecode=1P_UG_AL_1/0_Brenau_0_416_0_2_2_2_2

New Line.l(r:p1udm36679-p1ulv21346) Units=km Length=0.014139000000000002 bus1=p1udm36679.1.2 bus2=p1ulv21346.1.2 switch=n enabled=y phases=2 Linecode=1P_UG_AL_1/0_Brenau_0_416_0_2_2_2_2

New Line.l(r:p1udm36679-p1ulv31447) Units=km Length=0.019143300000000002 bus1=p1udm36679.1.2 bus2=p1ulv31447.1.2 switch=n enabled=y phases=2 Linecode=1P_UG_AL_1/0_Brenau_0_416_0_2_2_2_2

New Line.l(r:p1udm36679-p1ulv39713) Units=km Length=0.0144716 bus1=p1udm36679.1.2 bus2=p1ulv39713.1.2 switch=n enabled=y phases=2 Linecode=1P_UG_AL_1/0_Brenau_0_416_0_2_2_2_2

New Line.l(r:p1udm36679-p1udt11125lv) Units=km Length=0.00953857 bus1=p1udt11125lv.1.2 bus2=p1udm36679.1.2 switch=n enabled=y phases=2 Linecode=1P_UG_AL_4/0_Sweetbriar_0_416_0_2_2_2_2

New Line.l(r:p1udt11437lv-p1ulv15501) Units=km Length=0.0188913 bus1=p1udt11437lv.1.2 bus2=p1ulv15501.1.2 switch=n enabled=y phases=2 Linecode=1P_UG_AL_1/0_Brenau_0_416_0_2_2_2_2

New Line.l(r:p1udt11437lv-p1ulv58402) Units=km Length=0.0181087 bus1=p1udt11437lv.1.2 bus2=p1ulv58402.1.2 switch=n enabled=y phases=2 Linecode=1P_UG_AL_1/0_Brenau_0_416_0_2_2_2_2

New Line.l(r:p1udm37584-p1ulv28337) Units=km Length=0.0161902 bus1=p1udm37584.1.2 bus2=p1ulv28337.1.2 switch=n enabled=y phases=2 Linecode=1P_UG_AL_1/0_Brenau_0_416_0_2_2_2_2

New Line.l(r:p1udm37584-p1udt11437lv) Units=km Length=0.00881567 bus1=p1udt11437lv.1.2 bus2=p1udm37584.1.2 switch=n enabled=y phases=2 Linecode=1P_UG_AL_1/0_Brenau_0_416_0_2_2_2_2

New Line.l(r:p1udm37585-p1ulv52247) Units=km Length=0.0162787 bus1=p1udm37585.1.2 bus2=p1ulv52247.1.2 switch=n enabled=y phases=2 Linecode=1P_UG_AL_1/0_Brenau_0_416_0_2_2_2_2

New Line.l(r:p1udm37585-p1udt11437lv) Units=km Length=0.00881982 bus1=p1udt11437lv.1.2 bus2=p1udm37585.1.2 switch=n enabled=y phases=2 Linecode=1P_UG_AL_1/0_Brenau_0_416_0_2_2_2_2

New Line.l(r:p1udt11439lv-p1ulv57221) Units=km Length=0.0171249 bus1=p1udt11439lv.1.2 bus2=p1ulv57221.1.2 switch=n enabled=y phases=2 Linecode=1P_UG_AL_1/0_Brenau_0_416_0_2_2_2_2

New Line.l(r:p1udt11439lv-p1ulv64002) Units=km Length=0.0146656 bus1=p1udt11439lv.1.2 bus2=p1ulv64002.1.2 switch=n enabled=y phases=2 Linecode=1P_UG_AL_1/0_Brenau_0_416_0_2_2_2_2

New Line.l(r:p1udm37590-p1ulv15504) Units=km Length=0.0165535 bus1=p1udm37590.1.2 bus2=p1ulv15504.1.2 switch=n enabled=y phases=2 Linecode=1P_UG_AL_1/0_Brenau_0_416_0_2_2_2_2

New Line.l(r:p1udm37591-p1ulv33410) Units=km Length=0.014753 bus1=p1udm37591.1.2 bus2=p1ulv33410.1.2 switch=n enabled=y phases=2 Linecode=1P_UG_AL_1/0_Brenau_0_416_0_2_2_2_2

New Line.l(r:p1udm37590-p1udm37591) Units=km Length=0.0093598 bus1=p1udm37590.1.2 bus2=p1udm37591.1.2 switch=n enabled=y phases=2 Linecode=1P_UG_AL_1/0_Brenau_0_416_0_2_2_2_2

New Line.l(r:p1udm37590-p1udt11439lv) Units=km Length=0.009363300000000001 bus1=p1udt11439lv.1.2 bus2=p1udm37590.1.2 switch=n enabled=y phases=2 Linecode=1P_UG_AL_4/0_Sweetbriar_0_416_0_2_2_2_2

New Line.l(r:p1udm37593-p1ulv55377) Units=km Length=0.0140956 bus1=p1udm37593.1.2 bus2=p1ulv55377.1.2 switch=n enabled=y phases=2 Linecode=1P_UG_AL_1/0_Brenau_0_416_0_2_2_2_2

New Line.l(r:p1udm37592-p1ulv34711) Units=km Length=0.0191343 bus1=p1udm37592.1.2 bus2=p1ulv34711.1.2 switch=n enabled=y phases=2 Linecode=1P_UG_AL_1/0_Brenau_0_416_0_2_2_2_2

New Line.l(r:p1udm37592-p1udm37593) Units=km Length=0.0093598 bus1=p1udm37593.1.2 bus2=p1udm37592.1.2 switch=n enabled=y phases=2 Linecode=1P_UG_AL_1/0_Brenau_0_416_0_2_2_2_2

New Line.l(r:p1udm37593-p1udt11439lv) Units=km Length=0.009369170000000001 bus1=p1udt11439lv.1.2 bus2=p1udm37593.1.2 switch=n enabled=y phases=2 Linecode=1P_UG_AL_4/0_Sweetbriar_0_416_0_2_2_2_2

New Line.l(r:p1udt11440lv-p1ulv30827) Units=km Length=0.0176696 bus1=p1udt11440lv.1.2 bus2=p1ulv30827.1.2 switch=n enabled=y phases=2 Linecode=1P_UG_AL_4/0_Sweetbriar_0_416_0_2_2_2_2

New Line.l(r:p1udm37596-p1ulv15505) Units=km Length=0.0183901 bus1=p1udm37596.1.2 bus2=p1ulv15505.1.2 switch=n enabled=y phases=2 Linecode=1P_UG_AL_1/0_Brenau_0_416_0_2_2_2_2

New Line.l(r:p1udm37596-p1udt11440lv) Units=km Length=0.0113118 bus1=p1udt11440lv.1.2 bus2=p1udm37596.1.2 switch=n enabled=y phases=2 Linecode=1P_UG_AL_1/0_Brenau_0_416_0_2_2_2_2

New Line.l(r:p1udm37599-p1ulv49733) Units=km Length=0.0185918 bus1=p1udm37599.1.2 bus2=p1ulv49733.1.2 switch=n enabled=y phases=2 Linecode=1P_UG_AL_1/0_Brenau_0_416_0_2_2_2_2

New Line.l(r:p1udm37597-p1ulv27699) Units=km Length=0.0174407 bus1=p1udm37597.1.2 bus2=p1ulv27699.1.2 switch=n enabled=y phases=2 Linecode=1P_UG_AL_1/0_Brenau_0_416_0_2_2_2_2

New Line.l(r:p1udm37597-p1udm37599) Units=km Length=0.00606823 bus1=p1udm37599.1.2 bus2=p1udm37597.1.2 switch=n enabled=y phases=2 Linecode=1P_UG_AL_1/0_Brenau_0_416_0_2_2_2_2

New Line.l(r:p1udm37599-p1udt11440lv) Units=km Length=0.00625001 bus1=p1udt11440lv.1.2 bus2=p1udm37599.1.2 switch=n enabled=y phases=2 Linecode=1P_UG_AL_4/0_Sweetbriar_0_416_0_2_2_2_2

New Line.l(r:p1udt12135lv-p1ulv16827) Units=km Length=0.0163295 bus1=p1udt12135lv.1.2 bus2=p1ulv16827.1.2 switch=n enabled=y phases=2 Linecode=1P_UG_AL_1/0_Brenau_0_416_0_2_2_2_2

New Line.l(r:p1udt12473lv-p1ulv24546) Units=km Length=0.0154734 bus1=p1udt12473lv.1.2 bus2=p1ulv24546.1.2 switch=n enabled=y phases=2 Linecode=1P_UG_AL_1/0_Brenau_0_416_0_2_2_2_2

New Line.l(r:p1udm40483-p1ulv43531) Units=km Length=0.0164922 bus1=p1udm40483.1.2 bus2=p1ulv43531.1.2 switch=n enabled=y phases=2 Linecode=1P_UG_AL_1/0_Brenau_0_416_0_2_2_2_2

New Line.l(r:p1udm40481-p1ulv17459) Units=km Length=0.0173017 bus1=p1udm40481.1.2 bus2=p1ulv17459.1.2 switch=n enabled=y phases=2 Linecode=1P_UG_AL_1/0_Brenau_0_416_0_2_2_2_2

New Line.l(r:p1udm40481-p1udm40483) Units=km Length=0.0070274 bus1=p1udm40483.1.2 bus2=p1udm40481.1.2 switch=n enabled=y phases=2 Linecode=1P_UG_AL_1/0_Brenau_0_416_0_2_2_2_2

New Line.l(r:p1udm40483-p1udt12473lv) Units=km Length=0.0108908 bus1=p1udt12473lv.1.2 bus2=p1udm40483.1.2 switch=n enabled=y phases=2 Linecode=1P_UG_AL_4/0_Sweetbriar_0_416_0_2_2_2_2

New Line.l(r:p1udm40484-p1ulv48554) Units=km Length=0.0162622 bus1=p1udm40484.1.2 bus2=p1ulv48554.1.2 switch=n enabled=y phases=2 Linecode=1P_UG_AL_1/0_Brenau_0_416_0_2_2_2_2

New Line.l(r:p1udm40484-p1ulv64039) Units=km Length=0.0156132 bus1=p1udm40484.1.2 bus2=p1ulv64039.1.2 switch=n enabled=y phases=2 Linecode=1P_UG_AL_1/0_Brenau_0_416_0_2_2_2_2

New Line.l(r:p1udm40484-p1udt12473lv) Units=km Length=0.00831962 bus1=p1udt12473lv.1.2 bus2=p1udm40484.1.2 switch=n enabled=y phases=2 Linecode=1P_UG_AL_4/0_Sweetbriar_0_416_0_2_2_2_2

New Line.l(r:p1udm43012-p1ulv19421) Units=km Length=0.0151716 bus1=p1udm43012.1.2 bus2=p1ulv19421.1.2 switch=n enabled=y phases=2 Linecode=1P_UG_AL_1/0_Brenau_0_416_0_2_2_2_2

New Line.l(r:p1udm43013-p1ulv21949) Units=km Length=0.0171214 bus1=p1udm43013.1.2 bus2=p1ulv21949.1.2 switch=n enabled=y phases=2 Linecode=1P_UG_AL_1/0_Brenau_0_416_0_2_2_2_2

New Line.l(r:p1udm43012-p1udm43013) Units=km Length=0.00954832 bus1=p1udm43012.1.2 bus2=p1udm43013.1.2 switch=n enabled=y phases=2 Linecode=1P_UG_AL_1/0_Brenau_0_416_0_2_2_2_2

New Line.l(r:p1udm43012-p1udt13444lv) Units=km Length=0.0190847 bus1=p1udt13444lv.1.2 bus2=p1udm43012.1.2 switch=n enabled=y phases=2 Linecode=1P_UG_AL_4/0_Sweetbriar_0_416_0_2_2_2_2

New Line.l(r:p1udm43014-p1ulv46058) Units=km Length=0.0143774 bus1=p1udm43014.1.2 bus2=p1ulv46058.1.2 switch=n enabled=y phases=2 Linecode=1P_UG_AL_1/0_Brenau_0_416_0_2_2_2_2

New Line.l(r:p1udm43014-p1ulv49139) Units=km Length=0.0178131 bus1=p1udm43014.1.2 bus2=p1ulv49139.1.2 switch=n enabled=y phases=2 Linecode=1P_UG_AL_1/0_Brenau_0_416_0_2_2_2_2

New Line.l(r:p1udm43014-p1udt13444lv) Units=km Length=0.028633 bus1=p1udt13444lv.1.2 bus2=p1udm43014.1.2 switch=n enabled=y phases=2 Linecode=1P_UG_AL_4/0_Sweetbriar_0_416_0_2_2_2_2

New Line.l(r:p1udt14812lv-p1ulv22584) Units=km Length=0.013916000000000001 bus1=p1udt14812lv.1.2 bus2=p1ulv22584.1.2 switch=n enabled=y phases=2 Linecode=1P_UG_AL_1/0_Brenau_0_416_0_2_2_2_2

New Line.l(r:p1udm46421-p1ulv41601) Units=km Length=0.0120864 bus1=p1udm46421.1.2 bus2=p1ulv41601.1.2 switch=n enabled=y phases=2 Linecode=1P_UG_AL_1/0_Brenau_0_416_0_2_2_2_2

New Line.l(r:p1udm46421-p1udt14812lv) Units=km Length=0.0173971 bus1=p1udt14812lv.1.2 bus2=p1udm46421.1.2 switch=n enabled=y phases=2 Linecode=1P_UG_AL_1/0_Brenau_0_416_0_2_2_2_2

New Line.l(r:p1udt15343lv-p1ulv31445) Units=km Length=0.0172316 bus1=p1udt15343lv.1.2 bus2=p1ulv31445.1.2 switch=n enabled=y phases=2 Linecode=1P_UG_AL_1/0_Brenau_0_416_0_2_2_2_2

New Line.l(r:p1udm47754-p1ulv23873) Units=km Length=0.0163506 bus1=p1udm47754.1.2 bus2=p1ulv23873.1.2 switch=n enabled=y phases=2 Linecode=1P_UG_AL_1/0_Brenau_0_416_0_2_2_2_2

New Line.l(r:p1udm47754-p1udt15343lv) Units=km Length=0.00992263 bus1=p1udt15343lv.1.2 bus2=p1udm47754.1.2 switch=n enabled=y phases=2 Linecode=1P_UG_AL_1/0_Brenau_0_416_0_2_2_2_2

New Line.l(r:p1udt15831lv-p1ulv25150) Units=km Length=0.0181243 bus1=p1udt15831lv.1.2 bus2=p1ulv25150.1.2 switch=n enabled=y phases=2 Linecode=1P_UG_AL_1/0_Brenau_0_416_0_2_2_2_2

New Line.l(r:p1udt16760lv-p1ulv60822) Units=km Length=0.014619300000000002 bus1=p1udt16760lv.1.2 bus2=p1ulv60822.1.2 switch=n enabled=y phases=2 Linecode=1P_UG_AL_1/0_Brenau_0_416_0_2_2_2_2

New Line.l(r:p1udm50921-p1ulv27696) Units=km Length=0.016195600000000004 bus1=p1udm50921.1.2 bus2=p1ulv27696.1.2 switch=n enabled=y phases=2 Linecode=1P_UG_AL_4/0_Sweetbriar_0_416_0_2_2_2_2

New Line.l(r:p1udm50921-p1ulv37828) Units=km Length=0.0143383 bus1=p1udm50921.1.2 bus2=p1ulv37828.1.2 switch=n enabled=y phases=2 Linecode=1P_UG_AL_1/0_Brenau_0_416_0_2_2_2_2

New Line.l(r:p1udm50921-p1udt16760lv) Units=km Length=0.00953636 bus1=p1udt16760lv.1.2 bus2=p1udm50921.1.2 switch=n enabled=y phases=2 Linecode=1P_UG_AL_4/0_Sweetbriar_0_416_0_2_2_2_2

New Line.l(r:p1udm50923-p1ulv50998) Units=km Length=0.018184 bus1=p1udm50923.1.2 bus2=p1ulv50998.1.2 switch=n enabled=y phases=2 Linecode=1P_UG_AL_1/0_Brenau_0_416_0_2_2_2_2

New Line.l(r:p1udm50923-p1udt16760lv) Units=km Length=0.00954832 bus1=p1udt16760lv.1.2 bus2=p1udm50923.1.2 switch=n enabled=y phases=2 Linecode=1P_UG_AL_1/0_Brenau_0_416_0_2_2_2_2

New Line.l(r:p1udt16991lv-p1ulv28341) Units=km Length=0.0193984 bus1=p1udt16991lv.1.2 bus2=p1ulv28341.1.2 switch=n enabled=y phases=2 Linecode=1P_UG_AL_1/0_Brenau_0_416_0_2_2_2_2

New Line.l(r:p1udm51423-p1ulv44782) Units=km Length=0.0174599 bus1=p1udm51423.1.2 bus2=p1ulv44782.1.2 switch=n enabled=y phases=2 Linecode=1P_UG_AL_1/0_Brenau_0_416_0_2_2_2_2

New Line.l(r:p1udm51423-p1udt16991lv) Units=km Length=0.00698044 bus1=p1udt16991lv.1.2 bus2=p1udm51423.1.2 switch=n enabled=y phases=2 Linecode=1P_UG_AL_1/0_Brenau_0_416_0_2_2_2_2

New Line.l(r:p1udt17207lv-p1ulv46683) Units=km Length=0.0153185 bus1=p1udt17207lv.1.2 bus2=p1ulv46683.1.2 switch=n enabled=y phases=2 Linecode=1P_UG_AL_1/0_Brenau_0_416_0_2_2_2_2

New Line.l(r:p1udt17207lv-p1ulv52250) Units=km Length=0.0161069 bus1=p1udt17207lv.1.2 bus2=p1ulv52250.1.2 switch=n enabled=y phases=2 Linecode=1P_UG_AL_1/0_Brenau_0_416_0_2_2_2_2

New Line.l(r:p1udm51880-p1ulv28949) Units=km Length=0.0156455 bus1=p1udm51880.1.2 bus2=p1ulv28949.1.2 switch=n enabled=y phases=2 Linecode=1P_UG_AL_1/0_Brenau_0_416_0_2_2_2_2

New Line.l(r:p1udm51880-p1udt17207lv) Units=km Length=0.0093598 bus1=p1udt17207lv.1.2 bus2=p1udm51880.1.2 switch=n enabled=y phases=2 Linecode=1P_UG_AL_1/0_Brenau_0_416_0_2_2_2_2

New Line.l(r:p1udm51883-p1ulv55379) Units=km Length=0.0147485 bus1=p1udm51883.1.2 bus2=p1ulv55379.1.2 switch=n enabled=y phases=2 Linecode=1P_UG_AL_1/0_Brenau_0_416_0_2_2_2_2

New Line.l(r:p1udm51883-p1ulv57222) Units=km Length=0.0162093 bus1=p1udm51883.1.2 bus2=p1ulv57222.1.2 switch=n enabled=y phases=2 Linecode=1P_UG_AL_1/0_Brenau_0_416_0_2_2_2_2

New Line.l(r:p1udm51883-p1udt17207lv) Units=km Length=0.0093598 bus1=p1udt17207lv.1.2 bus2=p1udm51883.1.2 switch=n enabled=y phases=2 Linecode=1P_UG_AL_4/0_Sweetbriar_0_416_0_2_2_2_2

New Line.l(r:p1udt18024lv-p1ulv31449) Units=km Length=0.017976400000000003 bus1=p1udt18024lv.1.2 bus2=p1ulv31449.1.2 switch=n enabled=y phases=2 Linecode=1P_UG_AL_1/0_Brenau_0_416_0_2_2_2_2

New Line.l(r:p1udt18025lv-p1ulv31450) Units=km Length=0.0184218 bus1=p1udt18025lv.1.2 bus2=p1ulv31450.1.2 switch=n enabled=y phases=2 Linecode=1P_UG_AL_1/0_Brenau_0_416_0_2_2_2_2

New Line.l(r:p1udt18401lv-p1ulv32732) Units=km Length=0.0142722 bus1=p1udt18401lv.1.2 bus2=p1ulv32732.1.2 switch=n enabled=y phases=2 Linecode=1P_UG_AL_4/0_Sweetbriar_0_416_0_2_2_2_2

New Line.l(r:p1udt18401lv-p1ulv34043) Units=km Length=0.0172137 bus1=p1udt18401lv.1.2 bus2=p1ulv34043.1.2 switch=n enabled=y phases=2 Linecode=1P_UG_AL_4/0_Sweetbriar_0_416_0_2_2_2_2

New Line.l(r:p1udt19179lv-p1ulv35315) Units=km Length=0.0170322 bus1=p1udt19179lv.1.2 bus2=p1ulv35315.1.2 switch=n enabled=y phases=2 Linecode=1P_UG_AL_4/0_Sweetbriar_0_416_0_2_2_2_2

New Line.l(r:p1udt20378lv-p1ulv39710) Units=km Length=0.0163488 bus1=p1udt20378lv.1.2 bus2=p1ulv39710.1.2 switch=n enabled=y phases=2 Linecode=1P_UG_AL_1/0_Brenau_0_416_0_2_2_2_2

New Line.l(r:p1udt20378lv-p1ulv41578) Units=km Length=0.01637 bus1=p1udt20378lv.1.2 bus2=p1ulv41578.1.2 switch=n enabled=y phases=2 Linecode=1P_UG_AL_1/0_Brenau_0_416_0_2_2_2_2

New Line.l(r:p1udt20692lv-p1ulv43495) Units=km Length=0.0137912 bus1=p1udt20692lv.1.2 bus2=p1ulv43495.1.2 switch=n enabled=y phases=2 Linecode=1P_UG_AL_1/0_Brenau_0_416_0_2_2_2_2

New Line.l(r:p1udm58282-p1ulv41002) Units=km Length=0.0161857 bus1=p1udm58282.1.2 bus2=p1ulv41002.1.2 switch=n enabled=y phases=2 Linecode=1P_UG_AL_1/0_Brenau_0_416_0_2_2_2_2

New Line.l(r:p1udm58282-p1udt20692lv) Units=km Length=0.009025710000000001 bus1=p1udt20692lv.1.2 bus2=p1udm58282.1.2 switch=n enabled=y phases=2 Linecode=1P_UG_AL_1/0_Brenau_0_416_0_2_2_2_2

New Line.l(r:p1udt20964lv-p1ulv42213) Units=km Length=0.01777 bus1=p1udt20964lv.1.2 bus2=p1ulv42213.1.2 switch=n enabled=y phases=2 Linecode=1P_UG_AL_4/0_Sweetbriar_0_416_0_2_2_2_2

New Line.l(r:p1udt21271lv-p1ulv43530) Units=km Length=0.0153414 bus1=p1udt21271lv.1.2 bus2=p1ulv43530.1.2 switch=n enabled=y phases=2 Linecode=1P_UG_AL_1/0_Brenau_0_416_0_2_2_2_2

New Line.l(r:p1udt22324lv-p1ulv48523) Units=km Length=0.0190457 bus1=p1udt22324lv.1.2 bus2=p1ulv48523.1.2 switch=n enabled=y phases=2 Linecode=1P_UG_AL_1/0_Brenau_0_416_0_2_2_2_2

New Line.l(r:p1udt23620lv-p1ulv55417) Units=km Length=0.0163143 bus1=p1udt23620lv.1.2 bus2=p1ulv55417.1.2 switch=n enabled=y phases=2 Linecode=1P_UG_AL_1/0_Brenau_0_416_0_2_2_2_2

New Line.l(r:p1udt23621lv-p1ulv55418) Units=km Length=0.016791 bus1=p1udt23621lv.1.2 bus2=p1ulv55418.1.2 switch=n enabled=y phases=2 Linecode=1P_UG_AL_1/0_Brenau_0_416_0_2_2_2_2

New Line.l(r:p1udt11125-p1udt6414) Units=km Length=0.0370687 bus1=p1udt11125-p1udt6414x.3 bus2=p1udt11125-p1udt6414xx.3 switch=n enabled=y phases=1 Linecode=1P_UG_AL_#2_15_12_47_0_1_1_1_1

New Line.l(r:p1udt3434-p1udt7728) Units=km Length=0.0261868 bus1=p1udt3434-p1udt7728xx.3 bus2=p1udt3434-p1udt7728x.3 switch=n enabled=y phases=1 Linecode=1P_UG_AL_#2_15_12_47_0_1_1_1_1

New Line.l(r:p1udt21271-p1udt7728) Units=km Length=0.0261868 bus1=p1udt21271-p1udt7728x.3 bus2=p1udt21271-p1udt7728xx.3 switch=n enabled=y phases=1 Linecode=1P_UG_AL_#2_15_12_47_0_1_1_1_1

New Line.l(r:p1udt21271-p1udt23620) Units=km Length=0.0175527 bus1=p1udt21271-p1udt23620xx.3 bus2=p1udt21271-p1udt23620x.3 switch=n enabled=y phases=1 Linecode=1P_UG_AL_#2_15_12_47_0_1_1_1_1

New Line.l(r:p1udt14812-p1udt23620) Units=km Length=0.0330427 bus1=p1udt14812-p1udt23620x.3 bus2=p1udt14812-p1udt23620xx.3 switch=n enabled=y phases=1 Linecode=1P_UG_AL_#2_15_12_47_0_1_1_1_1

New Line.l(r:p1udt14812-p1udt5963) Units=km Length=0.0326168 bus1=p1udt14812-p1udt5963xx.3 bus2=p1udt14812-p1udt5963x.3 switch=n enabled=y phases=1 Linecode=1P_UG_AL_#2_15_12_47_0_1_1_1_1

New Line.l(r:p1udt12473-p1udt5963) Units=km Length=0.0568739 bus1=p1udt12473-p1udt5963x.3 bus2=p1udt12473-p1udt5963xx.3 switch=n enabled=y phases=1 Linecode=1P_UG_AL_#2_15_12_47_0_1_1_1_1

New Line.l(r:p1udt12473-p1udt459) Units=km Length=0.0261773 bus1=p1udt12473-p1udt459xx.3 bus2=p1udt12473-p1udt459x.3 switch=n enabled=y phases=1 Linecode=1P_UG_AL_#2_15_12_47_0_1_1_1_1

New Line.l(r:p1udt16760-p1udt459) Units=km Length=0.028633 bus1=p1udt16760-p1udt459x.3 bus2=p1udt16760-p1udt459xx.3 switch=n enabled=y phases=1 Linecode=1P_UG_AL_#2_15_12_47_0_1_1_1_1

New Line.l(r:p1udt13444-p1udt16760) Units=km Length=0.057254 bus1=p1udt13444-p1udt16760x.3 bus2=p1udt13444-p1udt16760xx.3 switch=n enabled=y phases=1 Linecode=1P_UG_AL_#2_15_12_47_0_1_1_1_1

New Line.l(r:p1udt13444-p1udt18401) Units=km Length=0.001 bus1=p1udt13444-p1udt18401x.3 bus2=p1udt13444-p1udt18401xx.3 switch=n enabled=y phases=1 Linecode=1P_UG_AL_#2_15_12_47_0_1_1_1_1

New Line.l(r:p1udt11125-p1udt13444) Units=km Length=0.0572563 bus1=p1udt11125-p1udt13444x.3 bus2=p1udt11125-p1udt13444xx.3 switch=n enabled=y phases=1 Linecode=1P_UG_AL_#2_15_12_47_0_1_1_1_1

New Line.l(r:p1udt11124-p1udt11125) Units=km Length=0.094308 bus1=p1udt11124-p1udt11125x.3 bus2=p1udt11124-p1udt11125xx.3 switch=n enabled=y phases=1 Linecode=1P_UG_AL_#2_15_12_47_0_1_1_1_1

New Line.l(r:p1udt11124-p1udt5437) Units=km Length=0.0236599 bus1=p1udt11124-p1udt5437xx.3 bus2=p1udt11124-p1udt5437x.3 switch=n enabled=y phases=1 Linecode=1P_UG_AL_#2_15_12_47_0_1_1_1_1

New Line.l(r:p1udt10759-p1udt5437) Units=km Length=0.0534501 bus1=p1udt10759-p1udt5437x.3 bus2=p1udt10759-p1udt5437xx.3 switch=n enabled=y phases=1 Linecode=1P_UG_AL_#2_15_12_47_0_1_1_1_1

New Line.l(r:p1udt10759-p1udt17207) Units=km Length=0.0280923 bus1=p1udt10759-p1udt17207xx.3 bus2=p1udt10759-p1udt17207x.3 switch=n enabled=y phases=1 Linecode=1P_UG_AL_#2_15_12_47_0_1_1_1_1

New Line.l(r:p1udt11439-p1udt17207) Units=km Length=0.0374521 bus1=p1udt11439-p1udt17207x.3 bus2=p1udt11439-p1udt17207xx.3 switch=n enabled=y phases=1 Linecode=1P_UG_AL_#2_15_12_47_0_1_1_1_1

New Line.l(r:p1udt11439-p1udt7727) Units=km Length=0.0374579 bus1=p1udt11439-p1udt7727xx.3 bus2=p1udt11439-p1udt7727x.3 switch=n enabled=y phases=1 Linecode=1P_UG_AL_#2_15_12_47_0_1_1_1_1

New Line.l(r:p1udt4412-p1udt7727) Units=km Length=0.027083700000000002 bus1=p1udt4412-p1udt7727xx.3 bus2=p1udt4412-p1udt7727xxx.3 switch=n enabled=y phases=1 Linecode=1P_UG_AL_#2_15_12_47_0_1_1_1_1

New Line.l(r:p1udt15343-p1udt23621) Units=km Length=0.0309335 bus1=p1udt15343-p1udt23621x.1 bus2=p1udt15343-p1udt23621xx.1 switch=n enabled=y phases=1 Linecode=1P_UG_AL_#2_15_12_47_0_1_1_1_1

New Line.l(r:p1udt15343-p1udt460) Units=km Length=0.0297901 bus1=p1udt15343-p1udt460xx.1 bus2=p1udt15343-p1udt460x.1 switch=n enabled=y phases=1 Linecode=1P_UG_AL_#2_15_12_47_0_1_1_1_1

New Line.l(r:p1udt19179-p1udt460) Units=km Length=0.0287641 bus1=p1udt19179-p1udt460x.1 bus2=p1udt19179-p1udt460xx.1 switch=n enabled=y phases=1 Linecode=1P_UG_AL_#2_15_12_47_0_1_1_1_1

New Line.l(r:p1udt19179-p1udt8525) Units=km Length=0.0401685 bus1=p1udt19179-p1udt8525x.1 bus2=p1udt19179-p1udt8525xx.1 switch=n enabled=y phases=1 Linecode=1P_UG_AL_#2_15_12_47_0_1_1_1_1

New Line.l(r:p1udt19179-p1udt2256) Units=km Length=0.0266976 bus1=p1udt19179-p1udt2256xx.1 bus2=p1udt19179-p1udt2256x.1 switch=n enabled=y phases=1 Linecode=1P_UG_AL_#2_15_12_47_0_1_1_1_1

New Line.l(r:p1udt1056-p1udt2256) Units=km Length=0.0532317 bus1=p1udt1056-p1udt2256x.1 bus2=p1udt1056-p1udt2256xx.1 switch=n enabled=y phases=1 Linecode=1P_UG_AL_#2_15_12_47_0_1_1_1_1

New Line.l(r:p1udt1056-p1udt8896) Units=km Length=0.062779 bus1=p1udt1056-p1udt8896xx.1 bus2=p1udt1056-p1udt8896x.1 switch=n enabled=y phases=1 Linecode=1P_UG_AL_#2_15_12_47_0_1_1_1_1

New Line.l(r:p1udt16991-p1udt18024) Units=km Length=0.00687841 bus1=p1udt16991-p1udt18024x.1 bus2=p1udt16991-p1udt18024xx.1 switch=n enabled=y phases=1 Linecode=1P_UG_AL_#2_15_12_47_0_1_1_1_1

New Line.l(r:p1udt16991-p1udt8896) Units=km Length=0.0802301 bus1=p1udt16991-p1udt8896xx.1 bus2=p1udt16991-p1udt8896x.1 switch=n enabled=y phases=1 Linecode=1P_UG_AL_#2_15_12_47_0_1_1_1_1

New Line.l(r:p1udt20964-p1udt8896) Units=km Length=0.0363709 bus1=p1udt20964-p1udt8896x.1 bus2=p1udt20964-p1udt8896xx.1 switch=n enabled=y phases=1 Linecode=1P_UG_AL_#2_15_12_47_0_1_1_1_1

New Line.l(r:p1udt15831-p1udt20964) Units=km Length=0.0266133 bus1=p1udt15831-p1udt20964x.1 bus2=p1udt15831-p1udt20964xx.1 switch=n enabled=y phases=1 Linecode=1P_UG_AL_#2_15_12_47_0_1_1_1_1

New Line.l(r:p1udt15831-p1udt6855) Units=km Length=0.033711 bus1=p1udt15831-p1udt6855xx.1 bus2=p1udt15831-p1udt6855x.1 switch=n enabled=y phases=1 Linecode=1P_UG_AL_#2_15_12_47_0_1_1_1_1

New Line.l(r:p1udt11440-p1udt6855) Units=km Length=0.0534197 bus1=p1udt11440-p1udt6855x.1 bus2=p1udt11440-p1udt6855xx.1 switch=n enabled=y phases=1 Linecode=1P_UG_AL_#2_15_12_47_0_1_1_1_1

New Line.l(r:p1udt11440-p1udt5438) Units=km Length=0.0420688 bus1=p1udt11440-p1udt5438xx.1 bus2=p1udt11440-p1udt5438x.1 switch=n enabled=y phases=1 Linecode=1P_UG_AL_#2_15_12_47_0_1_1_1_1

New Line.l(r:p1udt12135-p1udt5438) Units=km Length=0.0332526 bus1=p1udt12135-p1udt5438x.1 bus2=p1udt12135-p1udt5438xx.1 switch=n enabled=y phases=1 Linecode=1P_UG_AL_#2_15_12_47_0_1_1_1_1

New Line.l(r:p1udt12135-p1udt18025) Units=km Length=0.0143766 bus1=p1udt12135-p1udt18025xx.1 bus2=p1udt12135-p1udt18025x.1 switch=n enabled=y phases=1 Linecode=1P_UG_AL_#2_15_12_47_0_1_1_1_1

New Line.l(r:p1udt18025-p1udt9683) Units=km Length=0.0293805 bus1=p1udt18025-p1udt9683xx.1 bus2=p1udt18025-p1udt9683x.1 switch=n enabled=y phases=1 Linecode=1P_UG_AL_#2_15_12_47_0_1_1_1_1

New Line.l(r:p1udt11437-p1udt9683) Units=km Length=0.0396529 bus1=p1udt11437-p1udt9683x.1 bus2=p1udt11437-p1udt9683xx.1 switch=n enabled=y phases=1 Linecode=1P_UG_AL_#2_15_12_47_0_1_1_1_1

New Line.l(r:p1udt11437-p1udt20378) Units=km Length=0.0383254 bus1=p1udt11437-p1udt20378xx.1 bus2=p1udt11437-p1udt20378x.1 switch=n enabled=y phases=1 Linecode=1P_UG_AL_#2_15_12_47_0_1_1_1_1

New Line.l(r:p1udt20378-p1udt2252) Units=km Length=0.019663 bus1=p1udt20378-p1udt2252xx.1 bus2=p1udt20378-p1udt2252x.1 switch=n enabled=y phases=1 Linecode=1P_UG_AL_#2_15_12_47_0_1_1_1_1

New Line.l(r:p1udt2252-p1udt7296) Units=km Length=0.049172 bus1=p1udt2252-p1udt7296xx.1 bus2=p1udt2252-p1udt7296x.1 switch=n enabled=y phases=1 Linecode=1P_UG_AL_#2_15_12_47_0_1_1_1_1

New Line.l(r:p1udt22324-p1udt7296) Units=km Length=0.027817700000000004 bus1=p1udt22324-p1udt7296x.1 bus2=p1udt22324-p1udt7296xx.1 switch=n enabled=y phases=1 Linecode=1P_UG_AL_#2_15_12_47_0_1_1_1_1

New Line.l(r:p1udt20692-p1udt22324) Units=km Length=0.045047800000000006 bus1=p1udt20692-p1udt22324xx.1 bus2=p1udt20692-p1udt22324xxx.1 switch=n enabled=y phases=1 Linecode=1P_UG_AL_#2_15_12_47_0_1_1_1_1

New Line.l(r:p1udt20692-p1udt4412) Units=km Length=0.0361094 bus1=p1udt20692-p1udt4412x.1.2.3 bus2=p1udt20692-p1udt4412xx.1.2.3 switch=n enabled=y phases=3 Linecode=3P_UG_AL_4/0_25_12_47_0_3_3_3_3

New Line.l(r:p1udt20692-p1uhs9_1247) Units=km Length=0.0919851 bus1=p1udt20692-p1uhs9_1247x.1.2.3 bus2=p1udt20692-p1uhs9_1247x_b1_1.1.2.3 switch=n enabled=y phases=3 Linecode=3P_OH_AL_ACSR_4/0_Penguin_12_47_0_3_3_3_3

New Line.l(r:p1udt20692-p1udt21670) Units=km Length=0.101106 bus1=p1udt20692-p1udt21670x.1.2.3 bus2=p1udt20692.1.2.3 switch=n enabled=y phases=3 Linecode=3P_OH_AL_ACSR_1033kcmil_Curlew_12.47_1_3_3_3_3

New Line.padswitch(r:p1udt11125-p1udt6414)p1u_245953 Units=km Length=0.001 bus1=p1udt11125.3 bus2=p1udt11125-p1udt6414x.3 switch=y enabled=y phases=1 Linecode=padswitch_1_1_1_1

New Line.padswitch(r:p1udt11125-p1udt6414)p1u_245954 Units=km Length=0.001 bus1=p1udt11125-p1udt6414xx.3 bus2=p1udt6414.3 switch=y enabled=y phases=1 Linecode=padswitch_1_2_1_1_1

New Line.padswitch(r:p1udt3434-p1udt7728)p1u_245955 Units=km Length=0.001 bus1=p1udt7728.3 bus2=p1udt3434-p1udt7728xx.3 switch=y enabled=y phases=1 Linecode=padswitch_1_2_1_0_1_1

New Line.padswitch(r:p1udt3434-p1udt7728)p1u_245956 Units=km Length=0.001 bus1=p1udt3434-p1udt7728x.3 bus2=p1udt3434.3 switch=y enabled=y phases=1 Linecode=padswitch_1_1_1_1

New Line.padswitch(r:p1udt21271-p1udt7728)p1u_245957 Units=km Length=0.001 bus1=p1udt21271.3 bus2=p1udt21271-p1udt7728x.3 switch=y enabled=y phases=1 Linecode=padswitch_1_2_1_0_1_0_1

New Line.padswitch(r:p1udt21271-p1udt7728)p1u_245958 Units=km Length=0.001 bus1=p1udt21271-p1udt7728xx.3 bus2=p1udt7728.3 switch=y enabled=y phases=1 Linecode=padswitch_1_2_1_0_1_0_1

New Line.padswitch(r:p1udt21271-p1udt23620)p1u_245959 Units=km Length=0.001 bus1=p1udt23620.3 bus2=p1udt21271-p1udt23620xx.3 switch=y enabled=y phases=1 Linecode=padswitch_1_2_1_0_1_0_1

New Line.padswitch(r:p1udt21271-p1udt23620)p1u_245960 Units=km Length=0.001 bus1=p1udt21271-p1udt23620x.3 bus2=p1udt21271.3 switch=y enabled=y phases=1 Linecode=padswitch_1_2_1_0_1_0_1

New Line.padswitch(r:p1udt14812-p1udt23620)p1u_245961 Units=km Length=0.001 bus1=p1udt14812.3 bus2=p1udt14812-p1udt23620x.3 switch=y enabled=y phases=1 Linecode=padswitch_1_2_1_0_1_0_1

New Line.padswitch(r:p1udt14812-p1udt23620)p1u_245962 Units=km Length=0.001 bus1=p1udt14812-p1udt23620xx.3 bus2=p1udt23620.3 switch=y enabled=y phases=1 Linecode=padswitch_1_2_1_0_1_0_1

New Line.padswitch(r:p1udt14812-p1udt5963)p1u_245963 Units=km Length=0.001 bus1=p1udt5963.3 bus2=p1udt14812-p1udt5963xx.3 switch=y enabled=y phases=1 Linecode=padswitch_1_2_1_0_1_0_1

New Line.padswitch(r:p1udt14812-p1udt5963)p1u_245964 Units=km Length=0.001 bus1=p1udt14812-p1udt5963x.3 bus2=p1udt14812.3 switch=y enabled=y phases=1 Linecode=padswitch_1_2_1_0_1_0_1

New Line.padswitch(r:p1udt12473-p1udt5963)p1u_245965 Units=km Length=0.001 bus1=p1udt12473.3 bus2=p1udt12473-p1udt5963x.3 switch=y enabled=y phases=1 Linecode=padswitch_1_2_1_0_1_0_1

New Line.padswitch(r:p1udt12473-p1udt5963)p1u_245966 Units=km Length=0.001 bus1=p1udt12473-p1udt5963xx.3 bus2=p1udt5963.3 switch=y enabled=y phases=1 Linecode=padswitch_1_2_1_0_1_0_1

New Line.padswitch(r:p1udt12473-p1udt459)p1u_245967 Units=km Length=0.001 bus1=p1udt459.3 bus2=p1udt12473-p1udt459xx.3 switch=y enabled=y phases=1 Linecode=padswitch_1_1_1_1

New Line.padswitch(r:p1udt12473-p1udt459)p1u_245968 Units=km Length=0.001 bus1=p1udt12473-p1udt459x.3 bus2=p1udt12473.3 switch=y enabled=y phases=1 Linecode=padswitch_1_2_1_0_1_0_1

New Line.padswitch(r:p1udt16760-p1udt459)p1u_245969 Units=km Length=0.001 bus1=p1udt16760.3 bus2=p1udt16760-p1udt459x.3 switch=y enabled=y phases=1 Linecode=padswitch_1_2_1_0_1_0_1

New Line.padswitch(r:p1udt16760-p1udt459)p1u_245970 Units=km Length=0.001 bus1=p1udt16760-p1udt459xx.3 bus2=p1udt459.3 switch=y enabled=y phases=1 Linecode=padswitch_1_1_1_1

New Line.padswitch(r:p1udt13444-p1udt16760)p1u_245971 Units=km Length=0.001 bus1=p1udt13444.3 bus2=p1udt13444-p1udt16760x.3 switch=y enabled=y phases=1 Linecode=padswitch_1_2_1_0_1_0_1_0

New Line.padswitch(r:p1udt13444-p1udt16760)p1u_245972 Units=km Length=0.001 bus1=p1udt13444-p1udt16760xx.3 bus2=p1udt16760.3 switch=y enabled=y phases=1 Linecode=padswitch_1_2_1_0_1_0_1

New Line.padswitch(r:p1udt13444-p1udt18401)p1u_245973 Units=km Length=0.001 bus1=p1udt13444.3 bus2=p1udt13444-p1udt18401x.3 switch=y enabled=y phases=1 Linecode=padswitch_1_2_1_0_1_0_1_0

New Line.padswitch(r:p1udt13444-p1udt18401)p1u_245974 Units=km Length=0.001 bus1=p1udt13444-p1udt18401xx.3 bus2=p1udt18401.3 switch=y enabled=y phases=1 Linecode=padswitch_1_2_1_0_1_0_1_0

New Line.padswitch(r:p1udt11125-p1udt13444)p1u_245975 Units=km Length=0.001 bus1=p1udt11125.3 bus2=p1udt11125-p1udt13444x.3 switch=y enabled=y phases=1 Linecode=padswitch_1_1_1_1

New Line.padswitch(r:p1udt11125-p1udt13444)p1u_245976 Units=km Length=0.001 bus1=p1udt11125-p1udt13444xx.3 bus2=p1udt13444.3 switch=y enabled=y phases=1 Linecode=padswitch_1_2_1_0_1_0_1_0

New Line.padswitch(r:p1udt11124-p1udt11125)p1u_245977 Units=km Length=0.001 bus1=p1udt11124.3 bus2=p1udt11124-p1udt11125x.3 switch=y enabled=y phases=1 Linecode=padswitch_1_2_1_0_1_0_1

New Line.padswitch(r:p1udt11124-p1udt11125)p1u_245978 Units=km Length=0.001 bus1=p1udt11124-p1udt11125xx.3 bus2=p1udt11125.3 switch=y enabled=y phases=1 Linecode=padswitch_1_1_1_1

New Line.padswitch(r:p1udt11124-p1udt5437)p1u_245979 Units=km Length=0.001 bus1=p1udt5437.3 bus2=p1udt11124-p1udt5437xx.3 switch=y enabled=y phases=1 Linecode=padswitch_1_2_1_0_1_0_1

New Line.padswitch(r:p1udt11124-p1udt5437)p1u_245980 Units=km Length=0.001 bus1=p1udt11124-p1udt5437x.3 bus2=p1udt11124.3 switch=y enabled=y phases=1 Linecode=padswitch_1_2_1_0_1_0_1

New Line.padswitch(r:p1udt10759-p1udt5437)p1u_245981 Units=km Length=0.001 bus1=p1udt10759.3 bus2=p1udt10759-p1udt5437x.3 switch=y enabled=y phases=1 Linecode=padswitch_1_2_1_0_1_0_1

New Line.padswitch(r:p1udt10759-p1udt5437)p1u_245982 Units=km Length=0.001 bus1=p1udt10759-p1udt5437xx.3 bus2=p1udt5437.3 switch=y enabled=y phases=1 Linecode=padswitch_1_2_1_0_1_0_1

New Line.padswitch(r:p1udt10759-p1udt17207)p1u_245983 Units=km Length=0.001 bus1=p1udt17207.3 bus2=p1udt10759-p1udt17207xx.3 switch=y enabled=y phases=1 Linecode=padswitch_1_2_1_0_1_0_1

New Line.padswitch(r:p1udt10759-p1udt17207)p1u_245984 Units=km Length=0.001 bus1=p1udt10759-p1udt17207x.3 bus2=p1udt10759.3 switch=y enabled=y phases=1 Linecode=padswitch_1_2_1_0_1_0_1

New Line.padswitch(r:p1udt11439-p1udt17207)p1u_245985 Units=km Length=0.001 bus1=p1udt11439.3 bus2=p1udt11439-p1udt17207x.3 switch=y enabled=y phases=1 Linecode=padswitch_1_2_1_0_1_0_1

New Line.padswitch(r:p1udt11439-p1udt17207)p1u_245986 Units=km Length=0.001 bus1=p1udt11439-p1udt17207xx.3 bus2=p1udt17207.3 switch=y enabled=y phases=1 Linecode=padswitch_1_2_1_0_1_0_1

New Line.padswitch(r:p1udt11439-p1udt7727)p1u_245987 Units=km Length=0.001 bus1=p1udt7727.3 bus2=p1udt11439-p1udt7727xx.3 switch=y enabled=y phases=1 Linecode=padswitch_1_2_1_0_1_0_1

New Line.padswitch(r:p1udt11439-p1udt7727)p1u_245988 Units=km Length=0.001 bus1=p1udt11439-p1udt7727x.3 bus2=p1udt11439.3 switch=y enabled=y phases=1 Linecode=padswitch_1_2_1_0_1_0_1

New Line.padswitch(r:p1udt4412-p1udt7727)p1u_245989 Units=km Length=0.001 bus1=p1udt4412-p1udt7727x.3 bus2=p1udt4412-p1udt7727xx.3 switch=y enabled=y phases=1 Linecode=padswitch_1_2_1_0_1_0_1

New Line.padswitch(r:p1udt4412-p1udt7727)p1u_245990 Units=km Length=0.001 bus1=p1udt4412-p1udt7727xxx.3 bus2=p1udt7727.3 switch=y enabled=y phases=1 Linecode=padswitch_1_2_1_0_1_0_1

New Line.padswitch(r:p1udt15343-p1udt23621)p1u_245993 Units=km Length=0.001 bus1=p1udt15343.1 bus2=p1udt15343-p1udt23621x.1 switch=y enabled=y phases=1 Linecode=padswitch_1_2_1_0_1_0_1

New Line.padswitch(r:p1udt15343-p1udt23621)p1u_245994 Units=km Length=0.001 bus1=p1udt15343-p1udt23621xx.1 bus2=p1udt23621.1 switch=y enabled=y phases=1 Linecode=padswitch_1_1_1_1

New Line.padswitch(r:p1udt15343-p1udt460)p1u_245995 Units=km Length=0.001 bus1=p1udt460.1 bus2=p1udt15343-p1udt460xx.1 switch=y enabled=y phases=1 Linecode=padswitch_1_2_1_0_1_0_1

New Line.padswitch(r:p1udt15343-p1udt460)p1u_245996 Units=km Length=0.001 bus1=p1udt15343-p1udt460x.1 bus2=p1udt15343.1 switch=y enabled=y phases=1 Linecode=padswitch_1_2_1_0_1_0_1

New Line.padswitch(r:p1udt19179-p1udt460)p1u_245997 Units=km Length=0.001 bus1=p1udt19179.1 bus2=p1udt19179-p1udt460x.1 switch=y enabled=y phases=1 Linecode=padswitch_1_2_1_0_1_0_1

New Line.padswitch(r:p1udt19179-p1udt460)p1u_245998 Units=km Length=0.001 bus1=p1udt19179-p1udt460xx.1 bus2=p1udt460.1 switch=y enabled=y phases=1 Linecode=padswitch_1_2_1_0_1_0_1

New Line.padswitch(r:p1udt19179-p1udt8525)p1u_245999 Units=km Length=0.001 bus1=p1udt19179.1 bus2=p1udt19179-p1udt8525x.1 switch=y enabled=y phases=1 Linecode=padswitch_1_2_1_0_1_0_1

New Line.padswitch(r:p1udt19179-p1udt8525)p1u_246000 Units=km Length=0.001 bus1=p1udt19179-p1udt8525xx.1 bus2=p1udt8525.1 switch=y enabled=y phases=1 Linecode=padswitch_1_1_1_1

New Line.padswitch(r:p1udt19179-p1udt2256)p1u_246001 Units=km Length=0.001 bus1=p1udt2256.1 bus2=p1udt19179-p1udt2256xx.1 switch=y enabled=y phases=1 Linecode=padswitch_1_2_1_0_1_0_1

New Line.padswitch(r:p1udt19179-p1udt2256)p1u_246002 Units=km Length=0.001 bus1=p1udt19179-p1udt2256x.1 bus2=p1udt19179.1 switch=y enabled=y phases=1 Linecode=padswitch_1_2_1_0_1_0_1

New Line.padswitch(r:p1udt1056-p1udt2256)p1u_246003 Units=km Length=0.001 bus1=p1udt1056.1 bus2=p1udt1056-p1udt2256x.1 switch=y enabled=y phases=1 Linecode=padswitch_1_2_1_0_1_0_1

New Line.padswitch(r:p1udt1056-p1udt2256)p1u_246004 Units=km Length=0.001 bus1=p1udt1056-p1udt2256xx.1 bus2=p1udt2256.1 switch=y enabled=y phases=1 Linecode=padswitch_1_2_1_0_1_0_1

New Line.padswitch(r:p1udt1056-p1udt8896)p1u_246005 Units=km Length=0.001 bus1=p1udt8896.1 bus2=p1udt1056-p1udt8896xx.1 switch=y enabled=y phases=1 Linecode=padswitch_1_2_1_0_1_0_1

New Line.padswitch(r:p1udt1056-p1udt8896)p1u_246006 Units=km Length=0.001 bus1=p1udt1056-p1udt8896x.1 bus2=p1udt1056.1 switch=y enabled=y phases=1 Linecode=padswitch_1_2_1_0_1_0_1

New Line.padswitch(r:p1udt16991-p1udt18024)p1u_246007 Units=km Length=0.001 bus1=p1udt16991.1 bus2=p1udt16991-p1udt18024x.1 switch=y enabled=y phases=1 Linecode=padswitch_1_2_1_0_1_0_1

New Line.padswitch(r:p1udt16991-p1udt18024)p1u_246008 Units=km Length=0.001 bus1=p1udt16991-p1udt18024xx.1 bus2=p1udt18024.1 switch=y enabled=y phases=1 Linecode=padswitch_1_2_1_0_1_0_1

New Line.padswitch(r:p1udt16991-p1udt8896)p1u_246009 Units=km Length=0.001 bus1=p1udt8896.1 bus2=p1udt16991-p1udt8896xx.1 switch=y enabled=y phases=1 Linecode=padswitch_1_2_1_0_1_0_1

New Line.padswitch(r:p1udt16991-p1udt8896)p1u_246010 Units=km Length=0.001 bus1=p1udt16991-p1udt8896x.1 bus2=p1udt16991.1 switch=y enabled=y phases=1 Linecode=padswitch_1_2_1_0_1_0_1

New Line.padswitch(r:p1udt20964-p1udt8896)p1u_246011 Units=km Length=0.001 bus1=p1udt20964.1 bus2=p1udt20964-p1udt8896x.1 switch=y enabled=y phases=1 Linecode=padswitch_1_2_1_0_1_0_1

New Line.padswitch(r:p1udt20964-p1udt8896)p1u_246012 Units=km Length=0.001 bus1=p1udt20964-p1udt8896xx.1 bus2=p1udt8896.1 switch=y enabled=y phases=1 Linecode=padswitch_1_2_1_0_1_0_1

New Line.padswitch(r:p1udt15831-p1udt20964)p1u_246013 Units=km Length=0.001 bus1=p1udt15831.1 bus2=p1udt15831-p1udt20964x.1 switch=y enabled=y phases=1 Linecode=padswitch_1_2_1_0_1_0_1_0

New Line.padswitch(r:p1udt15831-p1udt20964)p1u_246014 Units=km Length=0.001 bus1=p1udt15831-p1udt20964xx.1 bus2=p1udt20964.1 switch=y enabled=y phases=1 Linecode=padswitch_1_2_1_0_1_0_1

New Line.padswitch(r:p1udt15831-p1udt6855)p1u_246015 Units=km Length=0.001 bus1=p1udt6855.1 bus2=p1udt15831-p1udt6855xx.1 switch=y enabled=y phases=1 Linecode=padswitch_1_2_1_0_1_0_1_0

New Line.padswitch(r:p1udt15831-p1udt6855)p1u_246016 Units=km Length=0.001 bus1=p1udt15831-p1udt6855x.1 bus2=p1udt15831.1 switch=y enabled=y phases=1 Linecode=padswitch_1_2_1_0_1_0_1

New Line.padswitch(r:p1udt11440-p1udt6855)p1u_246017 Units=km Length=0.001 bus1=p1udt11440.1 bus2=p1udt11440-p1udt6855x.1 switch=y enabled=y phases=1 Linecode=padswitch_1_2_1_0_1_0_1

New Line.padswitch(r:p1udt11440-p1udt6855)p1u_246018 Units=km Length=0.001 bus1=p1udt11440-p1udt6855xx.1 bus2=p1udt6855.1 switch=y enabled=y phases=1 Linecode=padswitch_1_2_1_0_1_0_1_0

New Line.padswitch(r:p1udt11440-p1udt5438)p1u_246019 Units=km Length=0.001 bus1=p1udt5438.1 bus2=p1udt11440-p1udt5438xx.1 switch=y enabled=y phases=1 Linecode=padswitch_1_2_1_0_1_0_1

New Line.padswitch(r:p1udt11440-p1udt5438)p1u_246020 Units=km Length=0.001 bus1=p1udt11440-p1udt5438x.1 bus2=p1udt11440.1 switch=y enabled=y phases=1 Linecode=padswitch_1_2_1_0_1_0_1

New Line.padswitch(r:p1udt12135-p1udt5438)p1u_246021 Units=km Length=0.001 bus1=p1udt12135.1 bus2=p1udt12135-p1udt5438x.1 switch=y enabled=y phases=1 Linecode=padswitch_1_2_1_0_1_0_1

New Line.padswitch(r:p1udt12135-p1udt5438)p1u_246022 Units=km Length=0.001 bus1=p1udt12135-p1udt5438xx.1 bus2=p1udt5438.1 switch=y enabled=y phases=1 Linecode=padswitch_1_2_1_0_1_0_1

New Line.padswitch(r:p1udt12135-p1udt18025)p1u_246023 Units=km Length=0.001 bus1=p1udt18025.1 bus2=p1udt12135-p1udt18025xx.1 switch=y enabled=y phases=1 Linecode=padswitch_1_1_1_1

New Line.padswitch(r:p1udt12135-p1udt18025)p1u_246024 Units=km Length=0.001 bus1=p1udt12135-p1udt18025x.1 bus2=p1udt12135.1 switch=y enabled=y phases=1 Linecode=padswitch_1_2_1_0_1_0_1

New Line.padswitch(r:p1udt18025-p1udt9683)p1u_246025 Units=km Length=0.001 bus1=p1udt9683.1 bus2=p1udt18025-p1udt9683xx.1 switch=y enabled=y phases=1 Linecode=padswitch_1_2_1_0_1_0_1

New Line.padswitch(r:p1udt18025-p1udt9683)p1u_246026 Units=km Length=0.001 bus1=p1udt18025-p1udt9683x.1 bus2=p1udt18025.1 switch=y enabled=y phases=1 Linecode=padswitch_1_1_1_1

New Line.padswitch(r:p1udt11437-p1udt9683)p1u_246027 Units=km Length=0.001 bus1=p1udt11437.1 bus2=p1udt11437-p1udt9683x.1 switch=y enabled=y phases=1 Linecode=padswitch_1_2_1_0_1_0_1

New Line.padswitch(r:p1udt11437-p1udt9683)p1u_246028 Units=km Length=0.001 bus1=p1udt11437-p1udt9683xx.1 bus2=p1udt9683.1 switch=y enabled=y phases=1 Linecode=padswitch_1_2_1_0_1_0_1

New Line.padswitch(r:p1udt11437-p1udt20378)p1u_246029 Units=km Length=0.001 bus1=p1udt20378.1 bus2=p1udt11437-p1udt20378xx.1 switch=y enabled=y phases=1 Linecode=padswitch_1_2_1_0_1_0_1

New Line.padswitch(r:p1udt11437-p1udt20378)p1u_246030 Units=km Length=0.001 bus1=p1udt11437-p1udt20378x.1 bus2=p1udt11437.1 switch=y enabled=y phases=1 Linecode=padswitch_1_2_1_0_1_0_1

New Line.padswitch(r:p1udt20378-p1udt2252)p1u_246031 Units=km Length=0.001 bus1=p1udt2252.1 bus2=p1udt20378-p1udt2252xx.1 switch=y enabled=y phases=1 Linecode=padswitch_1_2_1_0_1_0_1

New Line.padswitch(r:p1udt20378-p1udt2252)p1u_246032 Units=km Length=0.001 bus1=p1udt20378-p1udt2252x.1 bus2=p1udt20378.1 switch=y enabled=y phases=1 Linecode=padswitch_1_2_1_0_1_0_1

New Line.padswitch(r:p1udt2252-p1udt7296)p1u_246033 Units=km Length=0.001 bus1=p1udt7296.1 bus2=p1udt2252-p1udt7296xx.1 switch=y enabled=y phases=1 Linecode=padswitch_1_2_1_0_1_0_1

New Line.padswitch(r:p1udt2252-p1udt7296)p1u_246034 Units=km Length=0.001 bus1=p1udt2252-p1udt7296x.1 bus2=p1udt2252.1 switch=y enabled=y phases=1 Linecode=padswitch_1_2_1_0_1_0_1

New Line.padswitch(r:p1udt22324-p1udt7296)p1u_246035 Units=km Length=0.001 bus1=p1udt22324.1 bus2=p1udt22324-p1udt7296x.1 switch=y enabled=y phases=1 Linecode=padswitch_1_1_1_1

New Line.padswitch(r:p1udt22324-p1udt7296)p1u_246036 Units=km Length=0.001 bus1=p1udt22324-p1udt7296xx.1 bus2=p1udt7296.1 switch=y enabled=y phases=1 Linecode=padswitch_1_2_1_0_1_0_1

New Line.padswitch(r:p1udt20692-p1udt22324)p1u_246037 Units=km Length=0.001 bus1=p1udt20692-p1udt22324x.1 bus2=p1udt20692-p1udt22324xx.1 switch=y enabled=y phases=1 Linecode=padswitch_1_1_1_1

New Line.padswitch(r:p1udt20692-p1udt22324)p1u_246038 Units=km Length=0.001 bus1=p1udt20692-p1udt22324xxx.1 bus2=p1udt22324.1 switch=y enabled=y phases=1 Linecode=padswitch_1_1_1_1

New Line.padswitch(r:p1udt20692-p1udt4412)p1u_245991 Units=km Length=0.001 bus1=p1udt20692.1.2.3 bus2=p1udt20692-p1udt4412x.1.2.3 switch=y enabled=y phases=3 Linecode=padswitch_3_3_3_3

New Line.padswitch(r:p1udt20692-p1udt4412)p1u_245992 Units=km Length=0.001 bus1=p1udt20692-p1udt4412xx.1.2.3 bus2=p1udt4412.1.2.3 switch=y enabled=y phases=3 Linecode=padswitch_3_3_3_3_3

New Line.fuse(r:p1udt4412-p1udt7727)p1u_266428 Units=km Length=0.001 bus1=p1udt4412.3 bus2=p1udt4412-p1udt7727x.3 switch=n enabled=y phases=1 Linecode=fuse_1_1_1_1

New Fuse.Fuse_fuse(r:p1udt4412-p1udt7727)p1u_266428 monitoredobj=Line.fuse(r:p1udt4412-p1udt7727)p1u_266428 enabled=y ratedcurrent=100.0

New Line.fuse(r:p1udt20692-p1udt22324)p1u_268033 Units=km Length=0.001 bus1=p1udt20692.1 bus2=p1udt20692-p1udt22324x.1 switch=n enabled=y phases=1 Linecode=fuse_1_6_1_1_1

New Fuse.Fuse_fuse(r:p1udt20692-p1udt22324)p1u_268033 monitoredobj=Line.fuse(r:p1udt20692-p1udt22324)p1u_268033 enabled=y ratedcurrent=100.0

New Line.l(r:p1udt20692-p1uhs9_1247)_disconnect Units=km Length=0.001 bus1=p1udt20692-p1uhs9_1247x_b1_1.1.2.3 bus2=p1udt20692-p1uhs9_1247x_b2_1.1.2.3 switch=y enabled=y phases=3 Linecode=3P_OH_AL_ACSR_4/0_Penguin_12_47_0_3_3_3_3

New Line.l(r:p1udt20692-p1uhs9_1247)_cont Units=km Length=0.8368659 bus1=p1udt20692-p1uhs9_1247x_b2_1.1.2.3 bus2=p1udt20692.1.2.3 switch=n enabled=y phases=3 Linecode=3P_OH_AL_ACSR_4/0_Penguin_12_47_0_3_3_3_3
