New Line.l(r:p1udt5477lv-p1ulv6233) Units=km Length=0.0145897 bus1=p1udt5477lv.1.2 bus2=p1ulv6233.1.2 switch=n enabled=y phases=2 Linecode=1P_OH_AL_2/0_Rucina_0_416_0_2_2_2_2

New Line.l(r:p1udm19131-p1ulv48565) Units=km Length=0.00482827 bus1=p1udm19131.1.2 bus2=p1ulv48565.1.2 switch=n enabled=y phases=2 Linecode=1P_OH_AL_2/0_Rucina_0_416_0_2_2_2_2

New Line.l(r:p1udm19131-p1udt5477lv) Units=km Length=0.0188627 bus1=p1udt5477lv.1.2 bus2=p1udm19131.1.2 switch=n enabled=y phases=2 Linecode=1P_OH_AL_2/0_Rucina_0_416_0_2_2_2_2

New Line.l(r:p1udt6438lv-p1ulv7492) Units=km Length=0.0045143 bus1=p1udt6438lv.1.2 bus2=p1ulv7492.1.2 switch=n enabled=y phases=2 Linecode=1P_OH_AL_2/0_Rucina_0_416_0_2_2_2_2

New Line.l(r:p1udm22235-p1ulv63430) Units=km Length=0.00878376 bus1=p1udm22235.1.2 bus2=p1ulv63430.1.2 switch=n enabled=y phases=2 Linecode=1P_OH_AL_2/0_Rucina_0_416_0_2_2_2_2

New Line.l(r:p1udm22235-p1udt6438lv) Units=km Length=0.0992459 bus1=p1udt6438lv.1.2 bus2=p1udm22235.1.2 switch=n enabled=y phases=2 Linecode=1P_OH_AL_4/0_Zuzara_0_416_0_2_2_2_2

New Line.l(r:p1udm22236-p1ulv64051) Units=km Length=0.0030511000000000006 bus1=p1udm22236.1.2 bus2=p1ulv64051.1.2 switch=n enabled=y phases=2 Linecode=1P_OH_AL_4_Periwinkle_0_416_0_2_2_2_2

New Line.l(r:p1udm22236-p1udt6438lv) Units=km Length=0.0155389 bus1=p1udt6438lv.1.2 bus2=p1udm22236.1.2 switch=n enabled=y phases=2 Linecode=1P_OH_AL_2/0_Rucina_0_416_0_2_2_2_2

New Line.l(r:p1udm34706-p1ulv13693) Units=km Length=0.00847567 bus1=p1udm34706.1.2 bus2=p1ulv13693.1.2 switch=n enabled=y phases=2 Linecode=1P_OH_AL_2/0_Rucina_0_416_0_2_2_2_2

New Line.l(r:p1udm34706-p1udt10422lv) Units=km Length=0.0311857 bus1=p1udt10422lv.1.2 bus2=p1udm34706.1.2 switch=n enabled=y phases=2 Linecode=1P_OH_AL_4/0_Zuzara_0_416_0_2_2_2_2

New Line.l(r:p1udm34707-p1ulv50390) Units=km Length=0.0257639 bus1=p1udm34707.1.2 bus2=p1ulv50390.1.2 switch=n enabled=y phases=2 Linecode=1P_OH_AL_2/0_Rucina_0_416_0_2_2_2_2

New Line.l(r:p1udm34707-p1udt10422lv) Units=km Length=0.019078900000000003 bus1=p1udt10422lv.1.2 bus2=p1udm34707.1.2 switch=n enabled=y phases=2 Linecode=1P_OH_AL_2/0_Rucina_0_416_0_2_2_2_2

New Line.l(r:p1udt12807lv-p1ulv18141) Units=km Length=0.00615228 bus1=p1udt12807lv.1.2 bus2=p1ulv18141.1.2 switch=n enabled=y phases=2 Linecode=1P_OH_AL_2/0_Rucina_0_416_0_2_2_2_2

New Line.l(r:p1udm41341-p1ulv22600) Units=km Length=0.009319 bus1=p1udm41341.1.2 bus2=p1ulv22600.1.2 switch=n enabled=y phases=2 Linecode=1P_OH_AL_2/0_Rucina_0_416_0_2_2_2_2

New Line.l(r:p1udm41341-p1udt12807lv) Units=km Length=0.044302 bus1=p1udt12807lv.1.2 bus2=p1udm41341.1.2 switch=n enabled=y phases=2 Linecode=1P_OH_AL_4/0_Zuzara_0_416_0_2_2_2_2

New Line.l(r:p1udm41342-p1ulv51643) Units=km Length=0.0022382600000000006 bus1=p1udm41342.1.2 bus2=p1ulv51643.1.2 switch=n enabled=y phases=2 Linecode=1P_OH_AL_4_Periwinkle_0_416_0_2_2_2_2

New Line.l(r:p1udm41342-p1udt12807lv) Units=km Length=0.0536069 bus1=p1udt12807lv.1.2 bus2=p1udm41342.1.2 switch=n enabled=y phases=2 Linecode=1P_OH_AL_4/0_Zuzara_0_416_0_2_2_2_2

New Line.l(r:p1udt13465lv-p1ulv19471) Units=km Length=0.00656794 bus1=p1udt13465lv.1.2 bus2=p1ulv19471.1.2 switch=n enabled=y phases=2 Linecode=1P_OH_AL_2/0_Rucina_0_416_0_2_2_2_2

New Line.l(r:p1udm45819-p1ulv21982) Units=km Length=0.016541 bus1=p1udm45819.1.2 bus2=p1ulv21982.1.2 switch=n enabled=y phases=2 Linecode=1P_OH_AL_2/0_Rucina_0_416_0_2_2_2_2

New Line.l(r:p1udm45819-p1udt14573lv) Units=km Length=0.0190283 bus1=p1udt14573lv.1.2 bus2=p1udm45819.1.2 switch=n enabled=y phases=2 Linecode=1P_OH_AL_2/0_Rucina_0_416_0_2_2_2_2

New Line.l(r:p1udm45820-p1ulv55433) Units=km Length=0.00547669 bus1=p1udm45820.1.2 bus2=p1ulv55433.1.2 switch=n enabled=y phases=2 Linecode=1P_OH_AL_2/0_Rucina_0_416_0_2_2_2_2

New Line.l(r:p1udm45820-p1udt14573lv) Units=km Length=0.010967 bus1=p1udt14573lv.1.2 bus2=p1udm45820.1.2 switch=n enabled=y phases=2 Linecode=1P_OH_AL_2/0_Rucina_0_416_0_2_2_2_2

New Line.l(r:p1udm48341-p1ulv24556) Units=km Length=0.00486966 bus1=p1udm48341.1.2 bus2=p1ulv24556.1.2 switch=n enabled=y phases=2 Linecode=1P_OH_AL_2/0_Rucina_0_416_0_2_2_2_2

New Line.l(r:p1udm48341-p1udt15591lv) Units=km Length=0.05205320000000001 bus1=p1udt15591lv.1.2 bus2=p1udm48341.1.2 switch=n enabled=y phases=2 Linecode=1P_OH_AL_4/0_Zuzara_0_416_0_2_2_2_2

New Line.l(r:p1udm48342-p1ulv49781) Units=km Length=0.00672293 bus1=p1udm48342.1.2 bus2=p1ulv49781.1.2 switch=n enabled=y phases=2 Linecode=1P_OH_AL_2/0_Rucina_0_416_0_2_2_2_2

New Line.l(r:p1udm48342-p1udt15591lv) Units=km Length=0.0295507 bus1=p1udt15591lv.1.2 bus2=p1udm48342.1.2 switch=n enabled=y phases=2 Linecode=1P_OH_AL_4/0_Zuzara_0_416_0_2_2_2_2

New Line.l(r:p1udm50941-p1ulv27726) Units=km Length=0.0061313800000000005 bus1=p1udm50941.1.2 bus2=p1ulv27726.1.2 switch=n enabled=y phases=2 Linecode=1P_OH_AL_2/0_Rucina_0_416_0_2_2_2_2

New Line.l(r:p1udm50941-p1udt16768lv) Units=km Length=0.0761638 bus1=p1udt16768lv.1.2 bus2=p1udm50941.1.2 switch=n enabled=y phases=2 Linecode=1P_OH_AL_4/0_Zuzara_0_416_0_2_2_2_2

New Line.l(r:p1udm50942-p1ulv54192) Units=km Length=0.0219272 bus1=p1udm50942.1.2 bus2=p1ulv54192.1.2 switch=n enabled=y phases=2 Linecode=1P_OH_AL_2/0_Rucina_0_416_0_2_2_2_2

New Line.l(r:p1udm50942-p1udt16768lv) Units=km Length=0.0162911 bus1=p1udt16768lv.1.2 bus2=p1udm50942.1.2 switch=n enabled=y phases=2 Linecode=1P_OH_AL_2/0_Rucina_0_416_0_2_2_2_2

New Line.l(r:p1udt18627lv-p1ulv33446) Units=km Length=0.018441400000000004 bus1=p1udt18627lv.1.2 bus2=p1ulv33446.1.2 switch=n enabled=y phases=2 Linecode=1P_OH_AL_2/0_Rucina_0_416_0_2_2_2_2

New Line.l(r:p1udt19564lv-p1ulv36618) Units=km Length=0.0101093 bus1=p1udt19564lv.1.2 bus2=p1ulv36618.1.2 switch=n enabled=y phases=2 Linecode=1P_OH_AL_2/0_Rucina_0_416_0_2_2_2_2

New Line.l(r:p1udt19738lv-p1ulv37256) Units=km Length=0.0179297 bus1=p1udt19738lv.1.2 bus2=p1ulv37256.1.2 switch=n enabled=y phases=2 Linecode=1P_OH_AL_2/0_Rucina_0_416_0_2_2_2_2

New Line.l(r:p1udt21114lv-p1ulv42866) Units=km Length=0.0038165 bus1=p1udt21114lv.1.2 bus2=p1ulv42866.1.2 switch=n enabled=y phases=2 Linecode=1P_OH_AL_4_Periwinkle_0_416_0_2_2_2_2

New Line.l(r:p1udt23400lv-p1ulv54191) Units=km Length=0.004575550000000001 bus1=p1udt23400lv.1.2 bus2=p1ulv54191.1.2 switch=n enabled=y phases=2 Linecode=1P_OH_AL_2/0_Rucina_0_416_0_2_2_2_2

New Line.l(r:p1udt25123lv-p1ulv64036) Units=km Length=0.010526 bus1=p1udt25123lv.1.2 bus2=p1ulv64036.1.2 switch=n enabled=y phases=2 Linecode=1P_OH_AL_2/0_Rucina_0_416_0_2_2_2_2

New Line.l(r:p1udt21114-p1udt9700) Units=km Length=0.0741352 bus1=p1udt21114-p1udt9700x.2 bus2=p1udt21114.2 switch=n enabled=y phases=1 Linecode=1P_OH_AL_ACSR_#2_Sparrow_12_47_0_1_1_1_1

New Line.l(r:p1udt16768-p1udt19738) Units=km Length=0.03541860000000001 bus1=p1udt16768-p1udt19738x.1 bus2=p1udt16768.1 switch=n enabled=y phases=1 Linecode=1P_OH_AL_ACSR_#2_Sparrow_12_47_0_1_1_1_1

New Line.l(r:p1udt12162-p1udt18627) Units=km Length=0.183906 bus1=p1udt12162-p1udt18627x.2 bus2=p1udt18627.2 switch=n enabled=y phases=1 Linecode=1P_OH_AL_ACSR_#2_Sparrow_12_47_0_1_1_1_1

New Line.l(r:p1udt23400-p1udt25019) Units=km Length=0.0547232 bus1=p1udt23400-p1udt25019x.2 bus2=p1udt23400.2 switch=n enabled=y phases=1 Linecode=1P_OH_AL_ACSR_#2_Sparrow_12_47_0_1_1_1_1

New Line.l(r:p1udt15591-p1udt9307) Units=km Length=0.0180386 bus1=p1udt15591-p1udt9307x.2 bus2=p1udt15591.2 switch=n enabled=y phases=1 Linecode=1P_OH_AL_ACSR_#2_Sparrow_12_47_0_1_1_1_1

New Line.l(r:p1udt12807-p1udt25205) Units=km Length=0.0714713 bus1=p1udt12807-p1udt25205x.3 bus2=p1udt12807.3 switch=n enabled=y phases=1 Linecode=1P_OH_AL_ACSR_#2_Sparrow_12_47_0_1_1_1_1

New Line.l(r:p1udt25206-p1udt2871) Units=km Length=0.0714871 bus1=p1udt25206.1.2.3 bus2=p1udt2871.1.2.3 switch=n enabled=y phases=3 Linecode=3P_OH_AL_ACSR_4/0_Penguin_12_47_0_3_3_3_3

New Line.l(r:p1udt23401-p1udt5477) Units=km Length=0.170988 bus1=p1udt23401.1.2.3 bus2=p1udt5477.1.2.3 switch=n enabled=y phases=3 Linecode=3P_OH_AL_ACSR_4/0_Penguin_12_47_0_3_3_3_3

New Line.l(r:p1udt23401-p1udt9700) Units=km Length=0.442348 bus1=p1udt9700.1.2.3 bus2=p1udt23401.1.2.3 switch=n enabled=y phases=3 Linecode=3P_OH_AL_ACSR_4/0_Penguin_12_47_0_3_3_3_3

New Line.l(r:p1udt10422-p1udt9700) Units=km Length=0.141874 bus1=p1udt10422.1.2.3 bus2=p1udt9700.1.2.3 switch=n enabled=y phases=3 Linecode=3P_OH_AL_ACSR_4/0_Penguin_12_47_0_3_3_3_3

New Line.l(r:p1udt10422-p1udt23757) Units=km Length=0.042560400000000005 bus1=p1udt23757.1.2.3 bus2=p1udt10422.1.2.3 switch=n enabled=y phases=3 Linecode=3P_OH_AL_ACSR_4/0_Penguin_12_47_0_3_3_3_3

New Line.l(r:p1udt11468-p1udt23179) Units=km Length=0.0730483 bus1=p1udt23179.1.2.3 bus2=p1udt11468.1.2.3 switch=n enabled=y phases=3 Linecode=3P_OH_AL_ACSR_4/0_Penguin_12_47_0_3_3_3_3

New Line.l(r:p1udt23179-p1udt24205) Units=km Length=0.0511393 bus1=p1udt24205.1.2.3 bus2=p1udt23179.1.2.3 switch=n enabled=y phases=3 Linecode=3P_OH_AL_ACSR_4/0_Penguin_12_47_0_3_3_3_3

New Line.l(r:p1udt24205-p1udt8135) Units=km Length=0.658128 bus1=p1udt8135.1.2.3 bus2=p1udt24205.1.2.3 switch=n enabled=y phases=3 Linecode=3P_OH_AL_ACSR_4/0_Penguin_12_47_0_3_3_3_3

New Line.l(r:p1udt2869-p1udt8135) Units=km Length=0.09044020000000001 bus1=p1udt2869.1.2.3 bus2=p1udt8135.1.2.3 switch=n enabled=y phases=3 Linecode=3P_OH_AL_ACSR_4/0_Penguin_12_47_0_3_3_3_3

New Line.l(r:p1udt22075-p1udt2869) Units=km Length=0.0383882 bus1=p1udt22075.1.2.3 bus2=p1udt2869.1.2.3 switch=n enabled=y phases=3 Linecode=3P_OH_AL_ACSR_4/0_Penguin_12_47_0_3_3_3_3

New Line.l(r:p1udt18232-p1udt22075) Units=km Length=0.0791136 bus1=p1udt22075.1.2.3 bus2=p1udt18232.1.2.3 switch=n enabled=y phases=3 Linecode=3P_OH_AL_ACSR_4/0_Penguin_12_47_0_3_3_3_3

New Line.l(r:p1udt22075-p1udt23757) Units=km Length=0.0721052 bus1=p1udt23757.1.2.3 bus2=p1udt22075.1.2.3 switch=n enabled=y phases=3 Linecode=3P_OH_AL_ACSR_4/0_Penguin_12_47_0_3_3_3_3

New Line.l(r:p1udt12477-p1udt23757) Units=km Length=0.0641629 bus1=p1udt12477.1.2.3 bus2=p1udt23757.1.2.3 switch=n enabled=y phases=3 Linecode=3P_OH_AL_ACSR_4/0_Penguin_12_47_0_3_3_3_3

New Line.l(r:p1udt12477-p1udt25206) Units=km Length=0.09391430000000002 bus1=p1udt25206.1.2.3 bus2=p1udt12477.1.2.3 switch=n enabled=y phases=3 Linecode=3P_OH_AL_ACSR_4/0_Penguin_12_47_0_3_3_3_3

New Line.l(r:p1udt23051-p1udt25206) Units=km Length=0.0861371 bus1=p1udt23051.1.2.3 bus2=p1udt25206.1.2.3 switch=n enabled=y phases=3 Linecode=3P_OH_AL_ACSR_4/0_Penguin_12_47_0_3_3_3_3

New Line.l(r:p1udt11815-p1udt23051) Units=km Length=0.0668237 bus1=p1udt11815.1.2.3 bus2=p1udt23051.1.2.3 switch=n enabled=y phases=3 Linecode=3P_OH_AL_ACSR_4/0_Penguin_12_47_0_3_3_3_3

New Line.l(r:p1udt11815-p1udt25123) Units=km Length=0.113536 bus1=p1udt25123.1.2.3 bus2=p1udt25123_b1_1.1.2.3 switch=n enabled=y phases=3 Linecode=3P_OH_AL_ACSR_4/0_Penguin_12_47_0_3_3_3_3

New Line.l(r:p1udt25123-p1uhs9_1247) Units=km Length=0.184327 bus1=p1udt25123-p1uhs9_1247x.1.2.3 bus2=p1udt25123-p1uhs9_1247x_b1_1.1.2.3 switch=n enabled=y phases=3 Linecode=3P_OH_AL_ACSR_4/0_Penguin_12_47_0_3_3_3_3

New Line.l(r:p1udt11815lv-p1ulv16201) Units=km Length=0.0139654 bus1=p1udt11815lv.1.2.3 bus2=p1ulv16201.1.2.3 switch=n enabled=y phases=3 Linecode=3P_UG_AL_350kcmil_15_0_416_0_3_3_3_3

New Line.l(r:p1udt23051lv-p1ulv52297) Units=km Length=0.00797123 bus1=p1udt23051lv.1.2.3 bus2=p1ulv52297.1.2.3 switch=n enabled=y phases=3 Linecode=3P_UG_AL_350kcmil_15_0_416_0_3_3_3_3

New Line.l(r:p1udm61588-p1ulv53551) Units=km Length=0.00781072 bus1=p1udm61588.1.2.3 bus2=p1ulv53551.1.2.3 switch=n enabled=y phases=3 Linecode=3P_UG_AL_350kcmil_15_0_416_0_3_3_3_3

New Line.l(r:p1udm61588-p1udt23051lv) Units=km Length=0.0205832 bus1=p1udt23051lv.1.2.3 bus2=p1udm61588.1.2.3 switch=n enabled=y phases=3 Linecode=3P_UG_AL_350kcmil_15_0_416_0_3_3_3_3

New Line.l(r:p1udt25206lv-p1ulv64676) Units=km Length=0.00684342 bus1=p1udt25206lv.1.2.3 bus2=p1ulv64676.1.2.3 switch=n enabled=y phases=3 Linecode=3P_UG_AL_350kcmil_15_0_416_0_3_3_3_3

New Line.l(r:p1udt2871lv-p1ulv3069) Units=km Length=0.008819210000000001 bus1=p1udt2871lv.1.2.3 bus2=p1ulv3069.1.2.3 switch=n enabled=y phases=3 Linecode=3P_UG_AL_350kcmil_15_0_416_0_3_3_3_3

New Line.l(r:p1udt3948lv-p1ulv4310) Units=km Length=0.00816927 bus1=p1udt3948lv.1.2.3 bus2=p1ulv4310.1.2.3 switch=n enabled=y phases=3 Linecode=3P_UG_AL_350kcmil_15_0_416_0_3_3_3_3

New Line.l(r:p1udt24716lv-p1ulv61516) Units=km Length=0.00917719 bus1=p1udt24716lv.1.2.3 bus2=p1ulv61516.1.2.3 switch=n enabled=y phases=3 Linecode=3P_UG_AL_350kcmil_15_0_416_0_3_3_3_3

New Line.l(r:p1udt22460lv-p1ulv49170) Units=km Length=0.00934696 bus1=p1udt22460lv.1.2.3 bus2=p1ulv49170.1.2.3 switch=n enabled=y phases=3 Linecode=3P_UG_AL_350kcmil_15_0_416_0_3_3_3_3

New Line.l(r:p1udt19008lv-p1ulv34719) Units=km Length=0.0073713 bus1=p1udt19008lv.1.2.3 bus2=p1ulv34719.1.2.3 switch=n enabled=y phases=3 Linecode=3P_UG_AL_350kcmil_15_0_416_0_3_3_3_3

New Line.l(r:p1udt23290lv-p1ulv53571) Units=km Length=0.0115476 bus1=p1udt23290lv.1.2.3 bus2=p1ulv53571.1.2.3 switch=n enabled=y phases=3 Linecode=3P_UG_AL_350kcmil_15_0_416_0_3_3_3_3

New Line.l(r:p1udt17851lv-p1ulv30875) Units=km Length=0.0167132 bus1=p1udt17851lv.1.2.3 bus2=p1ulv30875.1.2.3 switch=n enabled=y phases=3 Linecode=3P_UG_AL_350kcmil_15_0_416_0_3_3_3_3

New Line.l(r:p1udt14819lv-p1ulv22601) Units=km Length=0.0054317 bus1=p1udt14819lv.1.2.3 bus2=p1ulv22601.1.2.3 switch=n enabled=y phases=3 Linecode=3P_UG_AL_350kcmil_15_0_416_0_3_3_3_3

New Line.l(r:p1udt14819-p1udt17851) Units=km Length=0.0870421 bus1=p1udt17851.1.2.3 bus2=p1udt14819.1.2.3 switch=n enabled=y phases=3 Linecode=3P_OH_AL_ACSR_4/0_Penguin_12_47_0_3_3_3_3

New Line.l(r:p1udt17851-p1udt23290) Units=km Length=0.0828431 bus1=p1udt23290.1.2.3 bus2=p1udt17851.1.2.3 switch=n enabled=y phases=3 Linecode=3P_OH_AL_ACSR_4/0_Penguin_12_47_0_3_3_3_3

New Line.l(r:p1udt19008-p1udt23290) Units=km Length=0.0641817 bus1=p1udt19008.1.2.3 bus2=p1udt23290.1.2.3 switch=n enabled=y phases=3 Linecode=3P_OH_AL_ACSR_4/0_Penguin_12_47_0_3_3_3_3

New Line.l(r:p1udt19008-p1udt22460) Units=km Length=0.0376504 bus1=p1udt22460.1.2.3 bus2=p1udt19008.1.2.3 switch=n enabled=y phases=3 Linecode=3P_OH_AL_ACSR_4/0_Penguin_12_47_0_3_3_3_3

New Line.l(r:p1udt19739lv-p1ulv37257) Units=km Length=0.0113911 bus1=p1udt19739lv.1.2.3 bus2=p1ulv37257.1.2.3 switch=n enabled=y phases=3 Linecode=3P_UG_AL_350kcmil_15_0_416_0_3_3_3_3

New Line.l(r:p1udt19739-p1udt22460) Units=km Length=0.0543053 bus1=p1udt22460.1.2.3 bus2=p1udt19739.1.2.3 switch=n enabled=y phases=3 Linecode=3P_OH_AL_ACSR_4/0_Penguin_12_47_0_3_3_3_3

New Line.l(r:p1udt22460-p1udt24716) Units=km Length=0.0589102 bus1=p1udt24716.1.2.3 bus2=p1udt22460.1.2.3 switch=n enabled=y phases=3 Linecode=3P_OH_AL_ACSR_4/0_Penguin_12_47_0_3_3_3_3

New Line.l(r:p1udt24716-p1udt3948) Units=km Length=0.064643 bus1=p1udt3948.1.2.3 bus2=p1udt24716.1.2.3 switch=n enabled=y phases=3 Linecode=3P_OH_AL_ACSR_4/0_Penguin_12_47_0_3_3_3_3

New Line.l(r:p1udt2871-p1udt3948) Units=km Length=0.030412100000000004 bus1=p1udt2871.1.2.3 bus2=p1udt3948.1.2.3 switch=n enabled=y phases=3 Linecode=3P_OH_AL_ACSR_4/0_Penguin_12_47_0_3_3_3_3

New Line.l(r:p1udt10053lv-p1ulv13061) Units=km Length=0.0123282 bus1=p1udt10053lv.1.2.3 bus2=p1ulv13061.1.2.3 switch=n enabled=y phases=3 Linecode=3P_UG_AL_350kcmil_15_0_416_0_3_3_3_3

New Line.l(r:p1udt20390lv-p1ulv39763) Units=km Length=0.0179383 bus1=p1udt20390lv.1.2.3 bus2=p1ulv39763.1.2.3 switch=n enabled=y phases=3 Linecode=3P_UG_AL_350kcmil_15_0_416_0_3_3_3_3

New Line.l(r:p1udt21531lv-p1ulv44825) Units=km Length=0.00718539 bus1=p1udt21531lv.1.2.3 bus2=p1ulv44825.1.2.3 switch=n enabled=y phases=3 Linecode=3P_UG_AL_350kcmil_15_0_416_0_3_3_3_3

New Line.l(r:p1udt22943lv-p1ulv51646) Units=km Length=0.00701833 bus1=p1udt22943lv.1.2.3 bus2=p1ulv51646.1.2.3 switch=n enabled=y phases=3 Linecode=3P_UG_AL_350kcmil_15_0_416_0_3_3_3_3

New Line.l(r:p1udt22942lv-p1ulv51645) Units=km Length=0.0107337 bus1=p1udt22942lv.1.2.3 bus2=p1ulv51645.1.2.3 switch=n enabled=y phases=3 Linecode=3P_UG_AL_350kcmil_15_0_416_0_3_3_3_3

New Line.l(r:p1udt22687lv-p1ulv50389) Units=km Length=0.007131690000000001 bus1=p1udt22687lv.1.2.3 bus2=p1ulv50389.1.2.3 switch=n enabled=y phases=3 Linecode=3P_UG_AL_350kcmil_15_0_416_0_3_3_3_3

New Line.l(r:p1udt23049lv-p1ulv52294) Units=km Length=0.00727374 bus1=p1udt23049lv.1.2.3 bus2=p1ulv52294.1.2.3 switch=n enabled=y phases=3 Linecode=3P_UG_AL_350kcmil_15_0_416_0_3_3_3_3

New Line.l(r:p1udt22687-p1udt23049) Units=km Length=0.0539103 bus1=p1udt22687.1.2.3 bus2=p1udt23049.1.2.3 switch=n enabled=y phases=3 Linecode=3P_OH_AL_ACSR_4/0_Penguin_12_47_0_3_3_3_3

New Line.l(r:p1udt22687-p1udt22942) Units=km Length=0.0954977 bus1=p1udt22942.1.2.3 bus2=p1udt22687.1.2.3 switch=n enabled=y phases=3 Linecode=3P_OH_AL_ACSR_4/0_Penguin_12_47_0_3_3_3_3

New Line.l(r:p1udt22942-p1udt22943) Units=km Length=0.0404308 bus1=p1udt22943.1.2.3 bus2=p1udt22942.1.2.3 switch=n enabled=y phases=3 Linecode=3P_OH_AL_ACSR_4/0_Penguin_12_47_0_3_3_3_3

New Line.l(r:p1udt24916lv-p1ulv62789) Units=km Length=0.0114616 bus1=p1udt24916lv.1.2.3 bus2=p1ulv62789.1.2.3 switch=n enabled=y phases=3 Linecode=3P_UG_AL_350kcmil_15_0_416_0_3_3_3_3

New Line.l(r:p1udt8136lv-p1ulv9967) Units=km Length=0.0100487 bus1=p1udt8136lv.1.2.3 bus2=p1ulv9967.1.2.3 switch=n enabled=y phases=3 Linecode=3P_UG_AL_350kcmil_15_0_416_0_3_3_3_3

New Line.l(r:p1udt14574lv-p1ulv21983) Units=km Length=0.0108474 bus1=p1udt14574lv.1.2.3 bus2=p1ulv21983.1.2.3 switch=n enabled=y phases=3 Linecode=3P_UG_AL_350kcmil_15_0_416_0_3_3_3_3

New Line.l(r:p1udt14574-p1udt8136) Units=km Length=0.0238013 bus1=p1udt8136.1.2.3 bus2=p1udt14574.1.2.3 switch=n enabled=y phases=3 Linecode=3P_OH_AL_ACSR_4/0_Penguin_12_47_0_3_3_3_3

New Line.l(r:p1udt24916-p1udt8136) Units=km Length=0.0324792 bus1=p1udt24916.1.2.3 bus2=p1udt8136.1.2.3 switch=n enabled=y phases=3 Linecode=3P_OH_AL_ACSR_4/0_Penguin_12_47_0_3_3_3_3

New Line.l(r:p1udt22943-p1udt24916) Units=km Length=0.0647497 bus1=p1udt22943.1.2.3 bus2=p1udt24916.1.2.3 switch=n enabled=y phases=3 Linecode=3P_OH_AL_ACSR_4/0_Penguin_12_47_0_3_3_3_3

New Line.l(r:p1udt21531-p1udt22943) Units=km Length=0.0570024 bus1=p1udt21531.1.2.3 bus2=p1udt22943.1.2.3 switch=n enabled=y phases=3 Linecode=3P_OH_AL_ACSR_4/0_Penguin_12_47_0_3_3_3_3

New Line.l(r:p1udt20390-p1udt21531) Units=km Length=0.057007100000000005 bus1=p1udt20390.1.2.3 bus2=p1udt21531.1.2.3 switch=n enabled=y phases=3 Linecode=3P_OH_AL_ACSR_4/0_Penguin_12_47_0_3_3_3_3

New Line.l(r:p1udt10053-p1udt20390) Units=km Length=0.037763700000000004 bus1=p1udt10053.1.2.3 bus2=p1udt20390.1.2.3 switch=n enabled=y phases=3 Linecode=3P_OH_AL_ACSR_4/0_Penguin_12_47_0_3_3_3_3

New Line.l(r:p1udt10053-p1udt2871) Units=km Length=0.0823884 bus1=p1udt2871.1.2.3 bus2=p1udt10053.1.2.3 switch=n enabled=y phases=3 Linecode=3P_OH_AL_ACSR_4/0_Penguin_12_47_0_3_3_3_3

New Line.l(r:p1udt12477lv-p1ulv17466) Units=km Length=0.00896427 bus1=p1udt12477lv.1.2.3 bus2=p1ulv17466.1.2.3 switch=n enabled=y phases=3 Linecode=3P_UG_AL_350kcmil_15_0_416_0_3_3_3_3

New Line.l(r:p1udt23050lv-p1ulv52296) Units=km Length=0.0110641 bus1=p1udt23050lv.1.2.3 bus2=p1ulv52296.1.2.3 switch=n enabled=y phases=3 Linecode=3P_UG_AL_350kcmil_15_0_416_0_3_3_3_3

New Line.l(r:p1udt17440lv-p1ulv29617) Units=km Length=0.008986580000000001 bus1=p1udt17440lv.1.2.3 bus2=p1ulv29617.1.2.3 switch=n enabled=y phases=3 Linecode=3P_UG_AL_350kcmil_15_0_416_0_3_3_3_3

New Line.l(r:p1udt17440-p1udt23050) Units=km Length=0.05161000000000001 bus1=p1udt23050.1.2.3 bus2=p1udt17440.1.2.3 switch=n enabled=y phases=3 Linecode=3P_OH_AL_ACSR_4/0_Penguin_12_47_0_3_3_3_3

New Line.l(r:p1udt12477-p1udt23050) Units=km Length=0.0485028 bus1=p1udt12477.1.2.3 bus2=p1udt23050.1.2.3 switch=n enabled=y phases=3 Linecode=3P_OH_AL_ACSR_4/0_Penguin_12_47_0_3_3_3_3

New Line.l(r:p1udt23757lv-p1ulv56022) Units=km Length=0.0144675 bus1=p1udt23757lv.1.2.3 bus2=p1ulv56022.1.2.3 switch=n enabled=y phases=3 Linecode=3P_UG_AL_350kcmil_15_0_416_0_3_3_3_3

New Line.l(r:p1udt9700lv-p1ulv12468) Units=km Length=0.0106054 bus1=p1udt9700lv.1.2.3 bus2=p1ulv12468.1.2.3 switch=n enabled=y phases=3 Linecode=3P_UG_AL_350kcmil_15_0_416_0_3_3_3_3

New Line.l(r:p1udt23401lv-p1ulv54193) Units=km Length=0.0107641 bus1=p1udt23401lv.1.2.3 bus2=p1ulv54193.1.2.3 switch=n enabled=y phases=3 Linecode=3P_UG_AL_350kcmil_15_0_416_0_3_3_3_3

New Line.l(r:p1udt1094lv-p1ulv1118) Units=km Length=0.0124657 bus1=p1udt1094lv.1.2.3 bus2=p1ulv1118.1.2.3 switch=n enabled=y phases=3 Linecode=3P_UG_AL_350kcmil_15_0_416_0_3_3_3_3

New Line.l(r:p1udt12162lv-p1ulv16874) Units=km Length=0.0166107 bus1=p1udt12162lv.1.2.3 bus2=p1ulv16874.1.2.3 switch=n enabled=y phases=3 Linecode=3P_UG_AL_350kcmil_15_0_416_0_3_3_3_3

New Line.l(r:p1udt14041lv-p1ulv20738) Units=km Length=0.0131888 bus1=p1udt14041lv.1.2.3 bus2=p1ulv20738.1.2.3 switch=n enabled=y phases=3 Linecode=3P_UG_AL_350kcmil_15_0_416_0_3_3_3_3

New Line.l(r:p1udt14041-p1udt19738) Units=km Length=0.0733615 bus1=p1udt19738.1.2.3 bus2=p1udt14041.1.2.3 switch=n enabled=y phases=3 Linecode=3P_OH_AL_ACSR_4/0_Penguin_12_47_0_3_3_3_3

New Line.l(r:p1udt14573-p1udt19738) Units=km Length=0.163516 bus1=p1udt14573.1.2.3 bus2=p1udt19738.1.2.3 switch=n enabled=y phases=3 Linecode=3P_OH_AL_ACSR_4/0_Penguin_12_47_0_3_3_3_3

New Line.l(r:p1udt12162-p1udt14573) Units=km Length=0.0464721 bus1=p1udt12162.1.2.3 bus2=p1udt14573.1.2.3 switch=n enabled=y phases=3 Linecode=3P_OH_AL_ACSR_4/0_Penguin_12_47_0_3_3_3_3

New Line.l(r:p1udt1094-p1udt12162) Units=km Length=0.126977 bus1=p1udt1094.1.2.3 bus2=p1udt12162.1.2.3 switch=n enabled=y phases=3 Linecode=3P_OH_AL_ACSR_4/0_Penguin_12_47_0_3_3_3_3

New Line.l(r:p1udt1094-p1udt5477) Units=km Length=0.118046 bus1=p1udt5477.1.2.3 bus2=p1udt1094.1.2.3 switch=n enabled=y phases=3 Linecode=3P_OH_AL_ACSR_4/0_Penguin_12_47_0_3_3_3_3

New Line.l(r:p1udt8926lv-p1ulv11199) Units=km Length=0.0126644 bus1=p1udt8926lv.1.2.3 bus2=p1ulv11199.1.2.3 switch=n enabled=y phases=3 Linecode=3P_UG_AL_350kcmil_15_0_416_0_3_3_3_3

New Line.l(r:p1udt5477-p1udt8926) Units=km Length=0.001 bus1=p1udt5477.1.2.3 bus2=p1udt8926.1.2.3 switch=n enabled=y phases=3 Linecode=3P_OH_AL_ACSR_4/0_Penguin_12_47_0_3_3_3_3

New Line.l(r:p1udt21112lv-p1ulv42864) Units=km Length=0.0129073 bus1=p1udt21112lv.1.2.3 bus2=p1ulv42864.1.2.3 switch=n enabled=y phases=3 Linecode=3P_UG_AL_350kcmil_15_0_416_0_3_3_3_3

New Line.l(r:p1udt23516lv-p1ulv54845) Units=km Length=0.00618943 bus1=p1udt23516lv.1.2.3 bus2=p1ulv54845.1.2.3 switch=n enabled=y phases=3 Linecode=3P_UG_AL_350kcmil_15_0_416_0_3_3_3_3

New Line.l(r:p1udt7736lv-p1ulv9340) Units=km Length=0.00626489 bus1=p1udt7736lv.1.2.3 bus2=p1ulv9340.1.2.3 switch=n enabled=y phases=3 Linecode=3P_UG_AL_350kcmil_15_0_416_0_3_3_3_3

New Line.l(r:p1udt24506lv-p1ulv60283) Units=km Length=0.0110627 bus1=p1udt24506lv.1.2.3 bus2=p1ulv60283.1.2.3 switch=n enabled=y phases=3 Linecode=3P_UG_AL_350kcmil_15_0_416_0_3_3_3_3

New Line.l(r:p1udt18037lv-p1ulv31495) Units=km Length=0.00379306 bus1=p1udt18037lv.1.2.3 bus2=p1ulv31495.1.2.3 switch=n enabled=y phases=3 Linecode=3P_UG_AL_350kcmil_15_0_416_0_3_3_3_3

New Line.l(r:p1udt18037-p1udt24506) Units=km Length=0.0434859 bus1=p1udt24506.1.2.3 bus2=p1udt18037.1.2.3 switch=n enabled=y phases=3 Linecode=3P_OH_AL_ACSR_4/0_Penguin_12_47_0_3_3_3_3

New Line.l(r:p1udt24506-p1udt7736) Units=km Length=0.0345142 bus1=p1udt7736.1.2.3 bus2=p1udt24506.1.2.3 switch=n enabled=y phases=3 Linecode=3P_OH_AL_ACSR_4/0_Penguin_12_47_0_3_3_3_3

New Line.l(r:p1udt23516-p1udt7736) Units=km Length=0.08133930000000002 bus1=p1udt23516.1.2.3 bus2=p1udt7736.1.2.3 switch=n enabled=y phases=3 Linecode=3P_OH_AL_ACSR_4/0_Penguin_12_47_0_3_3_3_3

New Line.l(r:p1udt21112-p1udt23516) Units=km Length=0.0648683 bus1=p1udt21112.1.2.3 bus2=p1udt23516.1.2.3 switch=n enabled=y phases=3 Linecode=3P_OH_AL_ACSR_4/0_Penguin_12_47_0_3_3_3_3

New Line.l(r:p1udt24398lv-p1ulv59644) Units=km Length=0.0125508 bus1=p1udt24398lv.1.2.3 bus2=p1ulv59644.1.2.3 switch=n enabled=y phases=3 Linecode=3P_UG_AL_350kcmil_15_0_416_0_3_3_3_3

New Line.l(r:p1udt22459lv-p1ulv49169) Units=km Length=0.00648224 bus1=p1udt22459lv.1.2.3 bus2=p1ulv49169.1.2.3 switch=n enabled=y phases=3 Linecode=3P_UG_AL_350kcmil_15_0_416_0_3_3_3_3

New Line.l(r:p1udt25019lv-p1ulv63431) Units=km Length=0.0108102 bus1=p1udt25019lv.1.2.3 bus2=p1ulv63431.1.2.3 switch=n enabled=y phases=3 Linecode=3P_UG_AL_350kcmil_15_0_416_0_3_3_3_3

New Line.l(r:p1udt18036lv-p1ulv31494) Units=km Length=0.0094435 bus1=p1udt18036lv.1.2.3 bus2=p1ulv31494.1.2.3 switch=n enabled=y phases=3 Linecode=3P_UG_AL_350kcmil_15_0_416_0_3_3_3_3

New Line.l(r:p1udt13742lv-p1ulv20097) Units=km Length=0.0121657 bus1=p1udt13742lv.1.2.3 bus2=p1ulv20097.1.2.3 switch=n enabled=y phases=3 Linecode=3P_UG_AL_350kcmil_15_0_416_0_3_3_3_3

New Line.l(r:p1udt13742-p1udt18036) Units=km Length=0.0426884 bus1=p1udt18036.1.2.3 bus2=p1udt13742.1.2.3 switch=n enabled=y phases=3 Linecode=3P_OH_AL_ACSR_4/0_Penguin_12_47_0_3_3_3_3

New Line.l(r:p1udt18036-p1udt25019) Units=km Length=0.0272336 bus1=p1udt25019.1.2.3 bus2=p1udt18036.1.2.3 switch=n enabled=y phases=3 Linecode=3P_OH_AL_ACSR_4/0_Penguin_12_47_0_3_3_3_3

New Line.l(r:p1udt22459-p1udt25019) Units=km Length=0.127184 bus1=p1udt22459.1.2.3 bus2=p1udt25019.1.2.3 switch=n enabled=y phases=3 Linecode=3P_OH_AL_ACSR_4/0_Penguin_12_47_0_3_3_3_3

New Line.l(r:p1udt22459-p1udt24398) Units=km Length=0.10985400000000001 bus1=p1udt24398.1.2.3 bus2=p1udt22459.1.2.3 switch=n enabled=y phases=3 Linecode=3P_OH_AL_ACSR_4/0_Penguin_12_47_0_3_3_3_3

New Line.l(r:p1udt21112-p1udt24398) Units=km Length=0.123754 bus1=p1udt21112.1.2.3 bus2=p1udt24398.1.2.3 switch=n enabled=y phases=3 Linecode=3P_OH_AL_ACSR_4/0_Penguin_12_47_0_3_3_3_3

New Line.l(r:p1udt21112-p1udt5477) Units=km Length=0.221499 bus1=p1udt5477.1.2.3 bus2=p1udt21112.1.2.3 switch=n enabled=y phases=3 Linecode=3P_OH_AL_ACSR_4/0_Penguin_12_47_0_3_3_3_3

New Line.l(r:p1udt509lv-p1ulv516) Units=km Length=0.0123416 bus1=p1udt509lv.1.2.3 bus2=p1ulv516.1.2.3 switch=n enabled=y phases=3 Linecode=3P_UG_AL_350kcmil_15_0_416_0_3_3_3_3

New Line.l(r:p1udt509lv-p1ulv21984) Units=km Length=0.0152351 bus1=p1udt509lv.1.2.3 bus2=p1ulv21984.1.2.3 switch=n enabled=y phases=3 Linecode=3P_UG_AL_350kcmil_15_0_416_0_3_3_3_3

New Line.l(r:p1udt10423lv-p1ulv13694) Units=km Length=0.0155559 bus1=p1udt10423lv.1.2.3 bus2=p1ulv13694.1.2.3 switch=n enabled=y phases=3 Linecode=3P_UG_AL_350kcmil_15_0_416_0_3_3_3_3

New Line.l(r:p1udt2870lv-p1ulv3068) Units=km Length=0.0117528 bus1=p1udt2870lv.1.2.3 bus2=p1ulv3068.1.2.3 switch=n enabled=y phases=3 Linecode=3P_UG_AL_350kcmil_15_0_416_0_3_3_3_3

New Line.l(r:p1udt9699lv-p1ulv12467) Units=km Length=0.0168448 bus1=p1udt9699lv.1.2.3 bus2=p1ulv12467.1.2.3 switch=n enabled=y phases=3 Linecode=3P_UG_AL_350kcmil_15_0_416_0_3_3_3_3

New Line.l(r:p1udt17852lv-p1ulv30876) Units=km Length=0.0129992 bus1=p1udt17852lv.1.2.3 bus2=p1ulv30876.1.2.3 switch=n enabled=y phases=3 Linecode=3P_UG_AL_350kcmil_15_0_416_0_3_3_3_3

New Line.l(r:p1udt13465-p1udt17852) Units=km Length=0.0765384 bus1=p1udt13465.1.2.3 bus2=p1udt17852.1.2.3 switch=n enabled=y phases=3 Linecode=3P_OH_AL_ACSR_4/0_Penguin_12_47_0_3_3_3_3

New Line.l(r:p1udt13465-p1udt9699) Units=km Length=0.0779028 bus1=p1udt9699.1.2.3 bus2=p1udt13465.1.2.3 switch=n enabled=y phases=3 Linecode=3P_OH_AL_ACSR_4/0_Penguin_12_47_0_3_3_3_3

New Line.l(r:p1udt2870-p1udt9699) Units=km Length=0.0269213 bus1=p1udt2870.1.2.3 bus2=p1udt9699.1.2.3 switch=n enabled=y phases=3 Linecode=3P_OH_AL_ACSR_4/0_Penguin_12_47_0_3_3_3_3

New Line.l(r:p1udt10423-p1udt2870) Units=km Length=0.0296987 bus1=p1udt10423.1.2.3 bus2=p1udt2870.1.2.3 switch=n enabled=y phases=3 Linecode=3P_OH_AL_ACSR_4/0_Penguin_12_47_0_3_3_3_3

New Line.l(r:p1udt10423-p1udt509) Units=km Length=0.09650580000000002 bus1=p1udt509.1.2.3 bus2=p1udt10423.1.2.3 switch=n enabled=y phases=3 Linecode=3P_OH_AL_ACSR_4/0_Penguin_12_47_0_3_3_3_3

New Line.l(r:p1udt19564-p1udt509) Units=km Length=0.0164534 bus1=p1udt19564.1.2.3 bus2=p1udt509.1.2.3 switch=n enabled=y phases=3 Linecode=3P_OH_AL_ACSR_4/0_Penguin_12_47_0_3_3_3_3

New Line.l(r:p1udt19564-p1udt23401) Units=km Length=0.50861 bus1=p1udt23401.1.2.3 bus2=p1udt19564.1.2.3 switch=n enabled=y phases=3 Linecode=3P_OH_AL_ACSR_4/0_Penguin_12_47_0_3_3_3_3

New Line.l(r:p1udt22075lv-p1ulv47323) Units=km Length=0.013118000000000001 bus1=p1udt22075lv.1.2.3 bus2=p1ulv47323.1.2.3 switch=n enabled=y phases=3 Linecode=3P_UG_AL_350kcmil_15_0_416_0_3_3_3_3

New Line.l(r:p1udt2869lv-p1ulv63432) Units=km Length=0.0111273 bus1=p1udt2869lv.1.2.3 bus2=p1ulv63432.1.2.3 switch=n enabled=y phases=3 Linecode=3P_UG_AL_350kcmil_15_0_416_0_3_3_3_3

New Line.l(r:p1udm10212-p1ulv3067) Units=km Length=0.0128785 bus1=p1udm10212.1.2.3 bus2=p1ulv3067.1.2.3 switch=n enabled=y phases=3 Linecode=3P_UG_AL_350kcmil_15_0_416_0_3_3_3_3

New Line.l(r:p1udm10212-p1udt2869lv) Units=km Length=0.03722960000000001 bus1=p1udt2869lv.1.2.3 bus2=p1udm10212.1.2.3 switch=n enabled=y phases=3 Linecode=3P_UG_AL_350kcmil_15_0_416_0_3_3_3_3

New Line.l(r:p1udm10213-p1ulv4309) Units=km Length=0.00621499 bus1=p1udm10213.1.2.3 bus2=p1ulv4309.1.2.3 switch=n enabled=y phases=3 Linecode=3P_UG_AL_350kcmil_15_0_416_0_3_3_3_3

New Line.l(r:p1udm10214-p1ulv52295) Units=km Length=0.0101676 bus1=p1udm10214.1.2.3 bus2=p1ulv52295.1.2.3 switch=n enabled=y phases=3 Linecode=3P_UG_AL_350kcmil_15_0_416_0_3_3_3_3

New Line.l(r:p1udm10213-p1udm10214) Units=km Length=0.0201517 bus1=p1udm10213.1.2.3 bus2=p1udm10214.1.2.3 switch=n enabled=y phases=3 Linecode=3P_UG_AL_350kcmil_15_0_416_0_3_3_3_3

New Line.l(r:p1udm10213-p1udt2869lv) Units=km Length=0.0227475 bus1=p1udt2869lv.1.2.3 bus2=p1udm10213.1.2.3 switch=n enabled=y phases=3 Linecode=3P_UG_AL_750kcmil_25_0_416_0_3_3_3_3

New Line.l(r:p1udt8135lv-p1ulv9966) Units=km Length=0.0123451 bus1=p1udt8135lv.1.2.3 bus2=p1ulv9966.1.2.3 switch=n enabled=y phases=3 Linecode=3P_UG_AL_350kcmil_15_0_416_0_3_3_3_3

New Line.l(r:p1udt11469lv-p1ulv15557) Units=km Length=0.013872900000000002 bus1=p1udt11469lv.1.2.3 bus2=p1ulv15557.1.2.3 switch=n enabled=y phases=3 Linecode=3P_UG_AL_350kcmil_15_0_416_0_3_3_3_3

New Line.l(r:p1udt11469-p1udt8135) Units=km Length=0.05258940000000001 bus1=p1udt8135.1.2.3 bus2=p1udt11469.1.2.3 switch=n enabled=y phases=3 Linecode=3P_OH_AL_ACSR_4/0_Penguin_12_47_0_3_3_3_3

New Line.l(r:p1udt21113lv-p1ulv42865) Units=km Length=0.00989919 bus1=p1udt21113lv.1.2.3 bus2=p1ulv42865.1.2.3 switch=n enabled=y phases=3 Linecode=3P_UG_AL_350kcmil_15_0_416_0_3_3_3_3

New Line.l(r:p1udm58485-p1ulv41622) Units=km Length=0.0100236 bus1=p1udm58485.1.2.3 bus2=p1ulv41622.1.2.3 switch=n enabled=y phases=3 Linecode=3P_UG_AL_350kcmil_15_0_416_0_3_3_3_3

New Line.l(r:p1udm58485-p1udt20834lv) Units=km Length=0.007124700000000001 bus1=p1udt20834lv.1.2.3 bus2=p1udm58485.1.2.3 switch=n enabled=y phases=3 Linecode=3P_UG_AL_350kcmil_15_0_416_0_3_3_3_3

New Line.l(r:p1udm58486-p1ulv48564) Units=km Length=0.0113195 bus1=p1udm58486.1.2.3 bus2=p1ulv48564.1.2.3 switch=n enabled=y phases=3 Linecode=3P_UG_AL_350kcmil_15_0_416_0_3_3_3_3

New Line.l(r:p1udm58486-p1udt20834lv) Units=km Length=0.00710444 bus1=p1udt20834lv.1.2.3 bus2=p1udm58486.1.2.3 switch=n enabled=y phases=3 Linecode=3P_UG_AL_350kcmil_15_0_416_0_3_3_3_3

New Line.l(r:p1udt20834-p1udt21113) Units=km Length=0.0331159 bus1=p1udt21113.1.2.3 bus2=p1udt20834.1.2.3 switch=n enabled=y phases=3 Linecode=3P_OH_AL_ACSR_4/0_Penguin_12_47_0_3_3_3_3

New Line.l(r:p1udt21113-p1udt8135) Units=km Length=0.0853187 bus1=p1udt8135.1.2.3 bus2=p1udt21113.1.2.3 switch=n enabled=y phases=3 Linecode=3P_OH_AL_ACSR_4/0_Penguin_12_47_0_3_3_3_3

New Line.l(r:p1udt24205lv-p1ulv58439) Units=km Length=0.0115007 bus1=p1udt24205lv.1.2.3 bus2=p1ulv58439.1.2.3 switch=n enabled=y phases=3 Linecode=3P_UG_AL_350kcmil_15_0_416_0_3_3_3_3

New Line.l(r:p1udt23179lv-p1ulv52950) Units=km Length=0.0135209 bus1=p1udt23179lv.1.2.3 bus2=p1ulv52950.1.2.3 switch=n enabled=y phases=3 Linecode=3P_UG_AL_350kcmil_15_0_416_0_3_3_3_3

New Line.l(r:p1udt11468lv-p1ulv15556) Units=km Length=0.0133449 bus1=p1udt11468lv.1.2.3 bus2=p1ulv15556.1.2.3 switch=n enabled=y phases=3 Linecode=3P_UG_AL_350kcmil_15_0_416_0_3_3_3_3

New Line.l(r:p1udt9307lv-p1ulv11830) Units=km Length=0.00966205 bus1=p1udt9307lv.1.2.3 bus2=p1ulv11830.1.2.3 switch=n enabled=y phases=3 Linecode=3P_UG_AL_350kcmil_15_0_416_0_3_3_3_3

New Line.l(r:p1udt24204lv-p1ulv58438) Units=km Length=0.00985332 bus1=p1udt24204lv.1.2.3 bus2=p1ulv58438.1.2.3 switch=n enabled=y phases=3 Linecode=3P_UG_AL_350kcmil_15_0_416_0_3_3_3_3

New Line.l(r:p1udm17274-p1ulv5562) Units=km Length=0.00992113 bus1=p1udm17274.1.2.3 bus2=p1ulv5562.1.2.3 switch=n enabled=y phases=3 Linecode=3P_UG_AL_350kcmil_15_0_416_0_3_3_3_3

New Line.l(r:p1udm17274-p1udt4943lv) Units=km Length=0.0397208 bus1=p1udt4943lv.1.2.3 bus2=p1udm17274.1.2.3 switch=n enabled=y phases=3 Linecode=3P_UG_AL_350kcmil_15_0_416_0_3_3_3_3

New Line.l(r:p1udm17275-p1ulv7491) Units=km Length=0.00814618 bus1=p1udm17275.1.2.3 bus2=p1ulv7491.1.2.3 switch=n enabled=y phases=3 Linecode=3P_UG_AL_350kcmil_15_0_416_0_3_3_3_3

New Line.l(r:p1udm17276-p1ulv20096) Units=km Length=0.012822900000000002 bus1=p1udm17276.1.2.3 bus2=p1ulv20096.1.2.3 switch=n enabled=y phases=3 Linecode=3P_UG_AL_350kcmil_15_0_416_0_3_3_3_3

New Line.l(r:p1udm17275-p1udm17276) Units=km Length=0.0198581 bus1=p1udm17275.1.2.3 bus2=p1udm17276.1.2.3 switch=n enabled=y phases=3 Linecode=3P_UG_AL_350kcmil_15_0_416_0_3_3_3_3

New Line.l(r:p1udm17275-p1udt4943lv) Units=km Length=0.0198538 bus1=p1udt4943lv.1.2.3 bus2=p1udm17275.1.2.3 switch=n enabled=y phases=3 Linecode=3P_UG_AL_750kcmil_25_0_416_0_3_3_3_3

New Line.l(r:p1udt25205lv-p1ulv64675) Units=km Length=0.00977002 bus1=p1udt25205lv.1.2.3 bus2=p1ulv64675.1.2.3 switch=n enabled=y phases=3 Linecode=3P_UG_AL_350kcmil_15_0_416_0_3_3_3_3

New Line.l(r:p1udt25205-p1udt4943) Units=km Length=0.106657 bus1=p1udt4943.1.2.3 bus2=p1udt25205.1.2.3 switch=n enabled=y phases=3 Linecode=3P_OH_AL_ACSR_4/0_Penguin_12_47_0_3_3_3_3

New Line.l(r:p1udt4943-p1udt6438) Units=km Length=0.11439 bus1=p1udt6438.1.2.3 bus2=p1udt4943.1.2.3 switch=n enabled=y phases=3 Linecode=3P_OH_AL_ACSR_4/0_Penguin_12_47_0_3_3_3_3

New Line.l(r:p1udt23515lv-p1ulv54844) Units=km Length=0.00874714 bus1=p1udt23515lv.1.2.3 bus2=p1ulv54844.1.2.3 switch=n enabled=y phases=3 Linecode=3P_UG_AL_350kcmil_15_0_416_0_3_3_3_3

New Line.l(r:p1udt23515-p1udt6438) Units=km Length=0.0866755 bus1=p1udt6438.1.2.3 bus2=p1udt23515.1.2.3 switch=n enabled=y phases=3 Linecode=3P_OH_AL_ACSR_4/0_Penguin_12_47_0_3_3_3_3

New Line.l(r:p1udt24204-p1udt6438) Units=km Length=0.0337679 bus1=p1udt24204.1.2.3 bus2=p1udt6438.1.2.3 switch=n enabled=y phases=3 Linecode=3P_OH_AL_ACSR_4/0_Penguin_12_47_0_3_3_3_3

New Line.l(r:p1udt23399lv-p1ulv54190) Units=km Length=0.00494297 bus1=p1udt23399lv.1.2.3 bus2=p1ulv54190.1.2.3 switch=n enabled=y phases=3 Linecode=3P_UG_AL_350kcmil_15_0_416_0_3_3_3_3

New Line.l(r:p1udt12161lv-p1ulv16873) Units=km Length=0.0122222 bus1=p1udt12161lv.1.2.3 bus2=p1ulv16873.1.2.3 switch=n enabled=y phases=3 Linecode=3P_UG_AL_350kcmil_15_0_416_0_3_3_3_3

New Line.l(r:p1udm39621-p1ulv60855) Units=km Length=0.0127008 bus1=p1udm39621.1.2.3 bus2=p1ulv60855.1.2.3 switch=n enabled=y phases=3 Linecode=3P_UG_AL_350kcmil_15_0_416_0_3_3_3_3

New Line.l(r:p1udm39621-p1udt12161lv) Units=km Length=0.00500405 bus1=p1udt12161lv.1.2.3 bus2=p1udm39621.1.2.3 switch=n enabled=y phases=3 Linecode=3P_UG_AL_350kcmil_15_0_416_0_3_3_3_3

New Line.l(r:p1udt12161-p1udt23399) Units=km Length=0.0749844 bus1=p1udt23399.1.2.3 bus2=p1udt12161.1.2.3 switch=n enabled=y phases=3 Linecode=3P_OH_AL_ACSR_4/0_Penguin_12_47_0_3_3_3_3

New Line.l(r:p1udt17439lv-p1ulv31493) Units=km Length=0.0100364 bus1=p1udt17439lv.1.2.3 bus2=p1ulv31493.1.2.3 switch=n enabled=y phases=3 Linecode=3P_UG_AL_350kcmil_15_0_416_0_3_3_3_3

New Line.l(r:p1udm52376-p1ulv29616) Units=km Length=0.00509495 bus1=p1udm52376.1.2.3 bus2=p1ulv29616.1.2.3 switch=n enabled=y phases=3 Linecode=3P_UG_AL_350kcmil_15_0_416_0_3_3_3_3

New Line.l(r:p1udm52376-p1udt17439lv) Units=km Length=0.00600451 bus1=p1udt17439lv.1.2.3 bus2=p1udm52376.1.2.3 switch=n enabled=y phases=3 Linecode=3P_UG_AL_350kcmil_15_0_416_0_3_3_3_3

New Line.l(r:p1udt17438lv-p1ulv29615) Units=km Length=0.00962312 bus1=p1udt17438lv.1.2.3 bus2=p1ulv29615.1.2.3 switch=n enabled=y phases=3 Linecode=3P_UG_AL_350kcmil_15_0_416_0_3_3_3_3

New Line.l(r:p1udt17438-p1udt17439) Units=km Length=0.0377537 bus1=p1udt17439.1.2.3 bus2=p1udt17438.1.2.3 switch=n enabled=y phases=3 Linecode=3P_OH_AL_ACSR_4/0_Penguin_12_47_0_3_3_3_3

New Line.l(r:p1udt17439-p1udt23399) Units=km Length=0.0841729 bus1=p1udt23399.1.2.3 bus2=p1udt17439.1.2.3 switch=n enabled=y phases=3 Linecode=3P_OH_AL_ACSR_4/0_Penguin_12_47_0_3_3_3_3

New Line.l(r:p1udt23399-p1udt24204) Units=km Length=0.0360862 bus1=p1udt24204.1.2.3 bus2=p1udt23399.1.2.3 switch=n enabled=y phases=3 Linecode=3P_OH_AL_ACSR_4/0_Penguin_12_47_0_3_3_3_3

New Line.l(r:p1udt24204-p1udt9307) Units=km Length=0.0474393 bus1=p1udt9307.1.2.3 bus2=p1udt24204.1.2.3 switch=n enabled=y phases=3 Linecode=3P_OH_AL_ACSR_4/0_Penguin_12_47_0_3_3_3_3

New Line.l(r:p1udt11468-p1udt9307) Units=km Length=0.118994 bus1=p1udt11468.1.2.3 bus2=p1udt9307.1.2.3 switch=n enabled=y phases=3 Linecode=3P_OH_AL_ACSR_4/0_Penguin_12_47_0_3_3_3_3

New Line.l(r:p1udt18232lv-p1ulv32126) Units=km Length=0.0115402 bus1=p1udt18232lv.1.2.3 bus2=p1ulv32126.1.2.3 switch=n enabled=y phases=3 Linecode=3P_UG_AL_350kcmil_15_0_416_0_3_3_3_3

New Line.l(r:p1udt18232lv-p1ulv57270) Units=km Length=0.0141606 bus1=p1udt18232lv.1.2.3 bus2=p1ulv57270.1.2.3 switch=n enabled=y phases=3 Linecode=3P_UG_AL_350kcmil_15_0_416_0_3_3_3_3

New Line.l(r:p1udt15099lv-p1ulv23276) Units=km Length=0.0103214 bus1=p1udt15099lv.1.2.3 bus2=p1ulv23276.1.2.3 switch=n enabled=y phases=3 Linecode=3P_UG_AL_350kcmil_15_0_416_0_3_3_3_3

New Line.l(r:p1udt18416lv-p1ulv32783) Units=km Length=0.011438600000000002 bus1=p1udt18416lv.1.2.3 bus2=p1ulv32783.1.2.3 switch=n enabled=y phases=3 Linecode=3P_UG_AL_350kcmil_15_0_416_0_3_3_3_3

New Line.l(r:p1udt13148lv-p1ulv18813) Units=km Length=0.0197986 bus1=p1udt13148lv.1.2.3 bus2=p1ulv18813.1.2.3 switch=n enabled=y phases=3 Linecode=3P_UG_AL_350kcmil_15_0_416_0_3_3_3_3

New Line.l(r:p1udt13148-p1udt18416) Units=km Length=0.0208326 bus1=p1udt18416.1.2.3 bus2=p1udt13148.1.2.3 switch=n enabled=y phases=3 Linecode=3P_OH_AL_ACSR_4/0_Penguin_12_47_0_3_3_3_3

New Line.l(r:p1udt15099-p1udt18416) Units=km Length=0.043794 bus1=p1udt15099.1.2.3 bus2=p1udt18416.1.2.3 switch=n enabled=y phases=3 Linecode=3P_OH_AL_ACSR_4/0_Penguin_12_47_0_3_3_3_3

New Line.l(r:p1udt15099-p1udt18232) Units=km Length=0.0551679 bus1=p1udt18232.1.2.3 bus2=p1udt15099.1.2.3 switch=n enabled=y phases=3 Linecode=3P_OH_AL_ACSR_4/0_Penguin_12_47_0_3_3_3_3

New Line.l(r:p1udt20552lv-p1ulv40415) Units=km Length=0.0089758 bus1=p1udt20552lv.1.2.3 bus2=p1ulv40415.1.2.3 switch=n enabled=y phases=3 Linecode=3P_UG_AL_350kcmil_15_0_416_0_3_3_3_3

New Line.l(r:p1udt24715lv-p1ulv61515) Units=km Length=0.0107508 bus1=p1udt24715lv.1.2.3 bus2=p1ulv61515.1.2.3 switch=n enabled=y phases=3 Linecode=3P_UG_AL_350kcmil_15_0_416_0_3_3_3_3

New Line.l(r:p1udt15592lv-p1ulv24557) Units=km Length=0.0158735 bus1=p1udt15592lv.1.2.3 bus2=p1ulv24557.1.2.3 switch=n enabled=y phases=3 Linecode=3P_UG_AL_350kcmil_15_0_416_0_3_3_3_3

New Line.l(r:p1udt15592lv-p1ulv27092) Units=km Length=0.0125208 bus1=p1udt15592lv.1.2.3 bus2=p1ulv27092.1.2.3 switch=n enabled=y phases=3 Linecode=3P_UG_AL_350kcmil_15_0_416_0_3_3_3_3

New Line.l(r:p1udm48345-p1ulv65323) Units=km Length=0.0141479 bus1=p1udm48345.1.2.3 bus2=p1ulv65323.1.2.3 switch=n enabled=y phases=3 Linecode=3P_UG_AL_350kcmil_15_0_416_0_3_3_3_3

New Line.l(r:p1udm48345-p1udt15592lv) Units=km Length=0.0136958 bus1=p1udt15592lv.1.2.3 bus2=p1udm48345.1.2.3 switch=n enabled=y phases=3 Linecode=3P_UG_AL_350kcmil_15_0_416_0_3_3_3_3

New Line.l(r:p1udt15592-p1udt24715) Units=km Length=0.11460500000000001 bus1=p1udt24715.1.2.3 bus2=p1udt15592.1.2.3 switch=n enabled=y phases=3 Linecode=3P_OH_AL_ACSR_4/0_Penguin_12_47_0_3_3_3_3

New Line.l(r:p1udt17850lv-p1ulv30874) Units=km Length=0.012658100000000002 bus1=p1udt17850lv.1.2.3 bus2=p1ulv30874.1.2.3 switch=n enabled=y phases=3 Linecode=3P_UG_AL_350kcmil_15_0_416_0_3_3_3_3

New Line.l(r:p1udm53216-p1ulv64053) Units=km Length=0.00842699 bus1=p1udm53216.1.2.3 bus2=p1ulv64053.1.2.3 switch=n enabled=y phases=3 Linecode=3P_UG_AL_350kcmil_15_0_416_0_3_3_3_3

New Line.l(r:p1udm53216-p1udt17850lv) Units=km Length=0.0164594 bus1=p1udt17850lv.1.2.3 bus2=p1udm53216.1.2.3 switch=n enabled=y phases=3 Linecode=3P_UG_AL_350kcmil_15_0_416_0_3_3_3_3

New Line.l(r:p1udt16327lv-p1ulv26443) Units=km Length=0.015390800000000001 bus1=p1udt16327lv.1.2.3 bus2=p1ulv26443.1.2.3 switch=n enabled=y phases=3 Linecode=3P_UG_AL_350kcmil_15_0_416_0_3_3_3_3

New Line.l(r:p1udm49985-p1ulv47952) Units=km Length=0.012361 bus1=p1udm49985.1.2.3 bus2=p1ulv47952.1.2.3 switch=n enabled=y phases=3 Linecode=3P_UG_AL_350kcmil_15_0_416_0_3_3_3_3

New Line.l(r:p1udm49985-p1udt16327lv) Units=km Length=0.0150046 bus1=p1udt16327lv.1.2.3 bus2=p1udm49985.1.2.3 switch=n enabled=y phases=3 Linecode=3P_UG_AL_350kcmil_15_0_416_0_3_3_3_3

New Line.l(r:p1udt8134lv-p1ulv9965) Units=km Length=0.013852500000000002 bus1=p1udt8134lv.1.2.3 bus2=p1ulv9965.1.2.3 switch=n enabled=y phases=3 Linecode=3P_UG_AL_350kcmil_15_0_416_0_3_3_3_3

New Line.l(r:p1udt8925lv-p1ulv11198) Units=km Length=0.0156334 bus1=p1udt8925lv.1.2.3 bus2=p1ulv11198.1.2.3 switch=n enabled=y phases=3 Linecode=3P_UG_AL_350kcmil_15_0_416_0_3_3_3_3

New Line.l(r:p1udm30167-p1ulv18142) Units=km Length=0.010939400000000002 bus1=p1udm30167.1.2.3 bus2=p1ulv18142.1.2.3 switch=n enabled=y phases=3 Linecode=3P_UG_AL_350kcmil_15_0_416_0_3_3_3_3

New Line.l(r:p1udm30167-p1udt8925lv) Units=km Length=0.0142237 bus1=p1udt8925lv.1.2.3 bus2=p1udm30167.1.2.3 switch=n enabled=y phases=3 Linecode=3P_UG_AL_350kcmil_15_0_416_0_3_3_3_3

New Line.l(r:p1udt11467lv-p1ulv15555) Units=km Length=0.0134928 bus1=p1udt11467lv.1.2.3 bus2=p1ulv15555.1.2.3 switch=n enabled=y phases=3 Linecode=3P_UG_AL_350kcmil_15_0_416_0_3_3_3_3

New Line.l(r:p1udt11467lv-p1ulv57269) Units=km Length=0.011787 bus1=p1udt11467lv.1.2.3 bus2=p1ulv57269.1.2.3 switch=n enabled=y phases=3 Linecode=3P_UG_AL_350kcmil_15_0_416_0_3_3_3_3

New Line.l(r:p1udt11467-p1udt8925) Units=km Length=0.0358576 bus1=p1udt8925.1.2.3 bus2=p1udt11467.1.2.3 switch=n enabled=y phases=3 Linecode=3P_OH_AL_ACSR_4/0_Penguin_12_47_0_3_3_3_3

New Line.l(r:p1udt8134-p1udt8925) Units=km Length=0.0501482 bus1=p1udt8134.1.2.3 bus2=p1udt8925.1.2.3 switch=n enabled=y phases=3 Linecode=3P_OH_AL_ACSR_4/0_Penguin_12_47_0_3_3_3_3

New Line.l(r:p1udt16327-p1udt8134) Units=km Length=0.0307147 bus1=p1udt16327.1.2.3 bus2=p1udt8134.1.2.3 switch=n enabled=y phases=3 Linecode=3P_OH_AL_ACSR_4/0_Penguin_12_47_0_3_3_3_3

New Line.l(r:p1udt16327-p1udt17850) Units=km Length=0.0479275 bus1=p1udt17850.1.2.3 bus2=p1udt16327.1.2.3 switch=n enabled=y phases=3 Linecode=3P_OH_AL_ACSR_4/0_Penguin_12_47_0_3_3_3_3

New Line.l(r:p1udt17850-p1udt24715) Units=km Length=0.0837248 bus1=p1udt24715.1.2.3 bus2=p1udt17850.1.2.3 switch=n enabled=y phases=3 Linecode=3P_OH_AL_ACSR_4/0_Penguin_12_47_0_3_3_3_3

New Line.l(r:p1udt20552-p1udt24715) Units=km Length=0.07301190000000002 bus1=p1udt20552.1.2.3 bus2=p1udt24715.1.2.3 switch=n enabled=y phases=3 Linecode=3P_OH_AL_ACSR_4/0_Penguin_12_47_0_3_3_3_3

New Line.l(r:p1udt18232-p1udt20552) Units=km Length=0.0442608 bus1=p1udt18232.1.2.3 bus2=p1udt20552.1.2.3 switch=n enabled=y phases=3 Linecode=3P_OH_AL_ACSR_4/0_Penguin_12_47_0_3_3_3_3

New Line.l(r:p1udt17213lv-p1ulv28966) Units=km Length=0.005814140000000001 bus1=p1udt17213lv.1.2.3 bus2=p1ulv28966.1.2.3 switch=n enabled=y phases=3 Linecode=3P_UG_AL_750kcmil_25_0_416_0_3_3_3_3

New Line.l(r:p1udt17213-p1udt25123) Units=km Length=0.557545 bus1=p1udt25123.1.2.3 bus2=p1udt17213.1.2.3 switch=n enabled=y phases=3 Linecode=3P_OH_AL_ACSR_4/0_Penguin_12_47_0_3_3_3_3

New Line.l(r:p1udt16997-p1udt25123) Units=km Length=0.216471 bus1=p1udt16997-p1udt25123x.1.2.3 bus2=p1udt25123.1.2.3 switch=n enabled=y phases=3 Linecode=3P_OH_AL_ACSR_1033kcmil_Curlew_12.47_1_3_3_3_3

New Line.l(r:p1udt11469-p1udt13148) Units=km Length=0.06410440000000002 bus1=p1udt11469-p1udt13148x.1.2.3 bus2=p1udt13148.1.2.3 switch=n enabled=y phases=3 Linecode=3P_OH_AL_ACSR_1033kcmil_Curlew_12.47_1_3_3_3_3

New Line.l(r:p1udt19008-p1udt8136) Units=km Length=0.104718 bus1=p1udt19008-p1udt8136x.1.2.3 bus2=p1udt19008.1.2.3 switch=n enabled=y phases=3 Linecode=3P_OH_AL_ACSR_1033kcmil_Curlew_12.47_1_3_3_3_3

New Line.l(r:p1udt14819-p1udt23049) Units=km Length=0.0598322 bus1=p1udt14819-p1udt23049x.1.2.3 bus2=p1udt23049.1.2.3 switch=n enabled=y phases=3 Linecode=3P_OH_AL_ACSR_1033kcmil_Curlew_12.47_1_3_3_3_3

New Line.l(r:p1udt18037-p1udt22459) Units=km Length=0.0930063 bus1=p1udt18037-p1udt22459x.1.2.3 bus2=p1udt18037.1.2.3 switch=n enabled=y phases=3 Linecode=3P_OH_AL_ACSR_1033kcmil_Curlew_12.47_1_3_3_3_3

New Line.elbswitch(r:p1udt11469-p1udt13148)p1u_265934 Units=km Length=0.001 bus1=p1udt11469.1.2.3 bus2=p1udt11469-p1udt13148x.1.2.3 switch=y enabled=n phases=3 Linecode=elbswitch_3_3_3_3

New Line.elbswitch(r:p1udt19008-p1udt8136)p1u_265963 Units=km Length=0.001 bus1=p1udt8136.1.2.3 bus2=p1udt19008-p1udt8136x.1.2.3 switch=y enabled=n phases=3 Linecode=elbswitch_3_3_3_3

New Line.elbswitch(r:p1udt14819-p1udt23049)p1u_265964 Units=km Length=0.001 bus1=p1udt14819.1.2.3 bus2=p1udt14819-p1udt23049x.1.2.3 switch=y enabled=n phases=3 Linecode=elbswitch_3_3_3_3

New Line.elbswitch(r:p1udt18037-p1udt22459)p1u_265969 Units=km Length=0.001 bus1=p1udt22459.1.2.3 bus2=p1udt18037-p1udt22459x.1.2.3 switch=y enabled=n phases=3 Linecode=elbswitch_3_3_3_3

New Line.fuse(r:p1udt15591-p1udt9307)p1u_266889 Units=km Length=0.001 bus1=p1udt9307.2 bus2=p1udt15591-p1udt9307x.2 switch=n enabled=y phases=1 Linecode=fuse_1_1_1_1

New Fuse.Fuse_fuse(r:p1udt15591-p1udt9307)p1u_266889 monitoredobj=Line.fuse(r:p1udt15591-p1udt9307)p1u_266889 enabled=y ratedcurrent=100.0

New Line.fuse(r:p1udt21114-p1udt9700)p1u_266936 Units=km Length=0.001 bus1=p1udt9700.2 bus2=p1udt21114-p1udt9700x.2 switch=n enabled=y phases=1 Linecode=fuse_1_1_1_1

New Fuse.Fuse_fuse(r:p1udt21114-p1udt9700)p1u_266936 monitoredobj=Line.fuse(r:p1udt21114-p1udt9700)p1u_266936 enabled=y ratedcurrent=100.0

New Line.fuse(r:p1udt12162-p1udt18627)p1u_267172 Units=km Length=0.001 bus1=p1udt12162.2 bus2=p1udt12162-p1udt18627x.2 switch=n enabled=y phases=1 Linecode=fuse_1_1_1_1

New Fuse.Fuse_fuse(r:p1udt12162-p1udt18627)p1u_267172 monitoredobj=Line.fuse(r:p1udt12162-p1udt18627)p1u_267172 enabled=y ratedcurrent=100.0

New Line.fuse(r:p1udt16768-p1udt19738)p1u_267928 Units=km Length=0.001 bus1=p1udt19738.1 bus2=p1udt16768-p1udt19738x.1 switch=n enabled=y phases=1 Linecode=fuse_1_1_1_1

New Fuse.Fuse_fuse(r:p1udt16768-p1udt19738)p1u_267928 monitoredobj=Line.fuse(r:p1udt16768-p1udt19738)p1u_267928 enabled=y ratedcurrent=100.0

New Line.fuse(r:p1udt23400-p1udt25019)p1u_268481 Units=km Length=0.001 bus1=p1udt25019.2 bus2=p1udt23400-p1udt25019x.2 switch=n enabled=y phases=1 Linecode=fuse_1_1_1_1

New Fuse.Fuse_fuse(r:p1udt23400-p1udt25019)p1u_268481 monitoredobj=Line.fuse(r:p1udt23400-p1udt25019)p1u_268481 enabled=y ratedcurrent=100.0

New Line.fuse(r:p1udt12807-p1udt25205)p1u_268498 Units=km Length=0.001 bus1=p1udt25205.3 bus2=p1udt12807-p1udt25205x.3 switch=n enabled=y phases=1 Linecode=fuse_1_6_1_1_1

New Fuse.Fuse_fuse(r:p1udt12807-p1udt25205)p1u_268498 monitoredobj=Line.fuse(r:p1udt12807-p1udt25205)p1u_268498 enabled=y ratedcurrent=100.0

New Line.l(r:p1udt11815-p1udt25123)_disconnect Units=km Length=0.001 bus1=p1udt25123_b1_1.1.2.3 bus2=p1udt25123_b2_1.1.2.3 switch=y enabled=y phases=3 Linecode=3P_OH_AL_ACSR_4/0_Penguin_12_47_0_3_3_3_3

New Line.l(r:p1udt11815-p1udt25123)_cont Units=km Length=1.030824 bus1=p1udt25123_b2_1.1.2.3 bus2=p1udt11815.1.2.3 switch=n enabled=y phases=3 Linecode=3P_OH_AL_ACSR_4/0_Penguin_12_47_0_3_3_3_3

New Line.l(r:p1udt25123-p1uhs9_1247)_disconnect Units=km Length=0.001 bus1=p1udt25123-p1uhs9_1247x_b1_1.1.2.3 bus2=p1udt25123-p1uhs9_1247x_b2_1.1.2.3 switch=y enabled=y phases=3 Linecode=3P_OH_AL_ACSR_4/0_Penguin_12_47_0_3_3_3_3

New Line.l(r:p1udt25123-p1uhs9_1247)_cont Units=km Length=1.667943 bus1=p1udt25123-p1uhs9_1247x_b2_1.1.2.3 bus2=p1udt25123.1.2.3 switch=n enabled=y phases=3 Linecode=3P_OH_AL_ACSR_4/0_Penguin_12_47_0_3_3_3_3
