New Capacitor.p1uc57 Bus1=p1udt8852 phases=3 Kv=12.47 conn=Wye Kvar=300.0

New CapControl.p1uc57 Capacitor=p1uc57 Element=Line.padswitch(r:p1udt1638-p1udt8852)p1u_245240 Terminal=1 delay=100.0 Type=voltage Vmin=120.5 Vmax=125.0 Ptratio=59.99631547328862 Ctratio=100.0
