New Line.l(r:p1udm5965-p1ulv1699) Units=km Length=0.00759711 bus1=p1udm5965.1.2 bus2=p1ulv1699.1.2 switch=n enabled=y phases=2 Linecode=1P_OH_AL_2/0_Rucina_0_416_0_2_2_2_2

New Line.l(r:p1udm5965-p1udt1630lv) Units=km Length=0.0250215 bus1=p1udt1630lv.1.2 bus2=p1udm5965.1.2 switch=n enabled=y phases=2 Linecode=1P_OH_AL_2/0_Rucina_0_416_0_2_2_2_2

New Line.l(r:p1udm5966-p1ulv33961) Units=km Length=0.005905930000000001 bus1=p1udm5966.1.2 bus2=p1ulv33961.1.2 switch=n enabled=y phases=2 Linecode=1P_OH_AL_2/0_Rucina_0_416_0_2_2_2_2

New Line.l(r:p1udm5967-p1ulv64575) Units=km Length=0.00469976 bus1=p1udm5967.1.2 bus2=p1ulv64575.1.2 switch=n enabled=y phases=2 Linecode=1P_UG_AL_1/0_Brenau_0_416_0_2_2_2_2

New Line.l(r:p1udm5966-p1udm5967) Units=km Length=0.0598462 bus1=p1udm5966.1.2 bus2=p1udm5967.1.2 switch=n enabled=y phases=2 Linecode=1P_OH_AL_4/0_Zuzara_0_416_0_2_2_2_2

New Line.l(r:p1udm5966-p1udt1630lv) Units=km Length=0.0137536 bus1=p1udt1630lv.1.2 bus2=p1udm5966.1.2 switch=n enabled=y phases=2 Linecode=1P_OH_AL_2/0_Rucina_0_416_0_2_2_2_2

New Line.l(r:p1udt7242lv-p1ulv8617) Units=km Length=0.00625412 bus1=p1udt7242lv.1.2 bus2=p1ulv8617.1.2 switch=n enabled=y phases=2 Linecode=1P_UG_AL_1/0_Brenau_0_416_0_2_2_2_2

New Line.l(r:p1udt8522lv-p1ulv10543) Units=km Length=0.00616292 bus1=p1udt8522lv.1.2 bus2=p1ulv10543.1.2 switch=n enabled=y phases=2 Linecode=1P_UG_AL_1/0_Brenau_0_416_0_2_2_2_2

New Line.l(r:p1udm28943-p1ulv27043) Units=km Length=0.00366989 bus1=p1udm28943.1.2 bus2=p1ulv27043.1.2 switch=n enabled=y phases=2 Linecode=1P_UG_AL_1/0_Brenau_0_416_0_2_2_2_2

New Line.l(r:p1udm28943-p1udt8522lv) Units=km Length=0.00859308 bus1=p1udt8522lv.1.2 bus2=p1udm28943.1.2 switch=n enabled=y phases=2 Linecode=1P_UG_AL_1/0_Brenau_0_416_0_2_2_2_2

New Line.l(r:p1udt8523lv-p1ulv10544) Units=km Length=0.00529077 bus1=p1udt8523lv.1.2 bus2=p1ulv10544.1.2 switch=n enabled=y phases=2 Linecode=1P_UG_AL_2/0_Converse_0_416_0_2_2_2_2

New Line.l(r:p1udt10753lv-p1ulv14279) Units=km Length=0.00418043 bus1=p1udt10753lv.1.2 bus2=p1ulv14279.1.2 switch=n enabled=y phases=2 Linecode=1P_UG_AL_4/0_Sweetbriar_0_416_0_2_2_2_2

New Line.l(r:p1udt16063lv-p1ulv25764) Units=km Length=0.00590872 bus1=p1udt16063lv.1.2 bus2=p1ulv25764.1.2 switch=n enabled=y phases=2 Linecode=1P_UG_AL_1/0_Brenau_0_416_0_2_2_2_2

New Line.l(r:p1udt22560lv-p1ulv49723) Units=km Length=0.00559446 bus1=p1udt22560lv.1.2 bus2=p1ulv49723.1.2 switch=n enabled=y phases=2 Linecode=1P_UG_AL_1/0_Brenau_0_416_0_2_2_2_2

New Line.l(r:p1udt24087lv-p1ulv57797) Units=km Length=0.00503477 bus1=p1udt24087lv.1.2 bus2=p1ulv57797.1.2 switch=n enabled=y phases=2 Linecode=1P_UG_AL_4/0_Sweetbriar_0_416_0_2_2_2_2

New Line.l(r:p1udt24697lv-p1ulv65204) Units=km Length=0.00528766 bus1=p1udt24697lv.1.2 bus2=p1ulv65204.1.2 switch=n enabled=y phases=2 Linecode=1P_OH_AL_2/0_Rucina_0_416_0_2_2_2_2

New Line.l(r:p1udm63463-p1ulv61388) Units=km Length=0.0079684 bus1=p1udm63463.1.2 bus2=p1ulv61388.1.2 switch=n enabled=y phases=2 Linecode=1P_OH_AL_2/0_Rucina_0_416_0_2_2_2_2

New Line.l(r:p1udm63463-p1udt24697lv) Units=km Length=0.0186184 bus1=p1udt24697lv.1.2 bus2=p1udm63463.1.2 switch=n enabled=y phases=2 Linecode=1P_OH_AL_2/0_Rucina_0_416_0_2_2_2_2

New Line.l(r:p1udt24902lv-p1ulv62678) Units=km Length=0.0107775 bus1=p1udt24902lv.1.2 bus2=p1ulv62678.1.2 switch=n enabled=y phases=2 Linecode=1P_OH_AL_2/0_Rucina_0_416_0_2_2_2_2

New Line.l(r:p1udt25281lv-p1ulv65203) Units=km Length=0.00412354 bus1=p1udt25281lv.1.2 bus2=p1ulv65203.1.2 switch=n enabled=y phases=2 Linecode=1P_UG_AL_1/0_Brenau_0_416_0_2_2_2_2

New Line.l(r:p1udt18772-p1udt24697) Units=km Length=0.0186184 bus1=p1udt18772-p1udt24697x.3 bus2=p1udt24697.3 switch=n enabled=y phases=1 Linecode=1P_OH_AL_ACSR_#2_Sparrow_12_47_0_1_1_1_1

New Line.l(r:p1udt1630-p1udt20515) Units=km Length=0.0250215 bus1=p1udt1630-p1udt20515x.1 bus2=p1udt1630.1 switch=n enabled=y phases=1 Linecode=1P_OH_AL_ACSR_#2_Sparrow_12_47_0_1_1_1_1

New Line.l(r:p1udt22185-p1udt3858) Units=km Length=0.14084100000000002 bus1=p1udt22185.1.2.3 bus2=p1udt3858.1.2.3 switch=n enabled=y phases=3 Linecode=3P_OH_AL_ACSR_4/0_Penguin_12_47_0_3_3_3_3

New Line.l(r:p1udt22185-p1umv19) Units=km Length=0.514933 bus1=p1umv19.1.2.3 bus2=p1udt22185.1.2.3 switch=n enabled=y phases=3 Linecode=3P_OH_AL_ACSR_4/0_Penguin_12_47_0_3_3_3_3

New Line.l(r:p1udt24902-p1umv19) Units=km Length=0.635546 bus1=p1umv19.1.2.3 bus2=p1udt24902.1.2.3 switch=n enabled=y phases=3 Linecode=3P_OH_AL_ACSR_4/0_Penguin_12_47_0_3_3_3_3

New Line.l(r:p1udt4409-p1umv19) Units=km Length=0.11283499999999999 bus1=p1udt4409.1.2.3 bus2=p1udt4409_b1_1.1.2.3 switch=n enabled=y phases=3 Linecode=3P_OH_AL_ACSR_4/0_Penguin_12_47_0_3_3_3_3

New Line.l(r:p1udt22066-p1udt8523) Units=km Length=0.0856088 bus1=p1udt22066-p1udt8523xx.1.2.3 bus2=p1udt22066-p1udt8523x.1.2.3 switch=n enabled=y phases=3 Linecode=3P_UG_AL_4/0_25_12_47_0_3_3_3_3

New Line.l(r:p1udt12781-p1udt8523) Units=km Length=0.027065600000000002 bus1=p1udt12781-p1udt8523x.1.2.3 bus2=p1udt12781-p1udt8523xx.1.2.3 switch=n enabled=y phases=3 Linecode=3P_UG_AL_4/0_25_12_47_0_3_3_3_3

New Line.l(r:p1udt12781-p1udt16063) Units=km Length=0.019456800000000003 bus1=p1udt12781-p1udt16063xx.1.2.3 bus2=p1udt12781-p1udt16063x.1.2.3 switch=n enabled=y phases=3 Linecode=3P_UG_AL_4/0_25_12_47_0_3_3_3_3

New Line.l(r:p1udt15826-p1udt16063) Units=km Length=0.0277343 bus1=p1udt15826-p1udt16063x.1.2.3 bus2=p1udt15826-p1udt16063xx.1.2.3 switch=n enabled=y phases=3 Linecode=3P_UG_AL_4/0_25_12_47_0_3_3_3_3

New Line.l(r:p1udt15826-p1udt8522) Units=km Length=0.11886400000000001 bus1=p1udt15826-p1udt8522xx.1.2.3 bus2=p1udt15826-p1udt8522x.1.2.3 switch=n enabled=y phases=3 Linecode=3P_UG_AL_4/0_25_12_47_0_3_3_3_3

New Line.l(r:p1udt18021-p1udt8522) Units=km Length=0.0379351 bus1=p1udt18021-p1udt8522x.1.2.3 bus2=p1udt18021-p1udt8522xx.1.2.3 switch=n enabled=y phases=3 Linecode=3P_UG_AL_4/0_25_12_47_0_3_3_3_3

New Line.l(r:p1udt18021-p1udt4409) Units=km Length=0.628747 bus1=p1udt4409.1.2.3 bus2=p1udt18021.1.2.3 switch=n enabled=y phases=3 Linecode=3P_OH_AL_ACSR_4/0_Penguin_12_47_0_3_3_3_3

New Line.l(r:p1udt4409-p1uhs9_1247) Units=km Length=0.151948 bus1=p1udt4409-p1uhs9_1247x.1.2.3 bus2=p1udt4409-p1uhs9_1247x_b1_1.1.2.3 switch=n enabled=y phases=3 Linecode=3P_OH_AL_ACSR_4/0_Penguin_12_47_0_3_3_3_3

New Line.l(r:p1udt4409lv-p1ulv4876) Units=km Length=0.0107104 bus1=p1udt4409lv.1.2.3 bus2=p1ulv4876.1.2.3 switch=n enabled=y phases=3 Linecode=3P_UG_AL_350kcmil_15_0_416_0_3_3_3_3

New Line.l(r:p1udt22185lv-p1ulv47834) Units=km Length=0.0141474 bus1=p1udt22185lv.1.2.3 bus2=p1ulv47834.1.2.3 switch=n enabled=y phases=3 Linecode=3P_UG_AL_750kcmil_25_0_416_0_3_3_3_3

New Line.l(r:p1udt3858lv-p1ulv4203) Units=km Length=0.0126493 bus1=p1udt3858lv.1.2.3 bus2=p1ulv4203.1.2.3 switch=n enabled=y phases=3 Linecode=3P_UG_AL_750kcmil_25_0_416_0_3_3_3_3

New Line.l(r:p1udt3858-p1umv12) Units=km Length=0.14091 bus1=p1udt3858.1.2.3 bus2=p1umv12.1.2.3 switch=n enabled=y phases=3 Linecode=3P_OH_AL_ACSR_4/0_Penguin_12_47_0_3_3_3_3

New Line.l(r:p1udt4850lv-p1ulv5442) Units=km Length=0.0146796 bus1=p1udt4850lv.1.2.3 bus2=p1ulv5442.1.2.3 switch=n enabled=y phases=3 Linecode=3P_UG_AL_750kcmil_25_0_416_0_3_3_3_3

New Line.l(r:p1udt22185-p1udt4850) Units=km Length=0.299419 bus1=p1udt22185.1.2.3 bus2=p1udt4850.1.2.3 switch=n enabled=y phases=3 Linecode=3P_OH_AL_ACSR_4/0_Penguin_12_47_0_3_3_3_3

New Line.l(r:p1udt24902-p1umv3) Units=km Length=0.310349 bus1=p1udt24902.1.2.3 bus2=p1umv3.1.2.3 switch=n enabled=y phases=3 Linecode=3P_OH_AL_ACSR_4/0_Penguin_12_47_0_3_3_3_3

New Line.l(r:p1udt15312lv-p1ulv23793) Units=km Length=0.0221411 bus1=p1udt15312lv.1.2.3 bus2=p1ulv23793.1.2.3 switch=n enabled=y phases=3 Linecode=3P_UG_AL_350kcmil_15_0_416_0_3_3_3_3

New Line.l(r:p1udt15312-p1udt24902) Units=km Length=0.17495500000000003 bus1=p1udt24902.1.2.3 bus2=p1udt15312.1.2.3 switch=n enabled=y phases=3 Linecode=3P_OH_AL_ACSR_4/0_Penguin_12_47_0_3_3_3_3

New Line.l(r:p1udt18021lv-p1ulv31439) Units=km Length=0.0132992 bus1=p1udt18021lv.1.2.3 bus2=p1ulv31439.1.2.3 switch=n enabled=y phases=3 Linecode=3P_UG_AL_350kcmil_15_0_416_0_3_3_3_3

New Line.l(r:p1udt15826lv-p1ulv25136) Units=km Length=0.0157148 bus1=p1udt15826lv.1.2.3 bus2=p1ulv25136.1.2.3 switch=n enabled=y phases=3 Linecode=3P_UG_AL_350kcmil_15_0_416_0_3_3_3_3

New Line.l(r:p1udt12781lv-p1ulv18096) Units=km Length=0.0128227 bus1=p1udt12781lv.1.2.3 bus2=p1ulv18096.1.2.3 switch=n enabled=y phases=3 Linecode=3P_UG_AL_350kcmil_15_0_416_0_3_3_3_3

New Line.l(r:p1udt22066lv-p1ulv47278) Units=km Length=0.0171093 bus1=p1udt22066lv.1.2.3 bus2=p1ulv47278.1.2.3 switch=n enabled=y phases=3 Linecode=3P_UG_AL_350kcmil_15_0_416_0_3_3_3_3

New Line.l(r:p1udt14023lv-p1ulv20690) Units=km Length=0.0120894 bus1=p1udt14023lv.1.2.3 bus2=p1ulv20690.1.2.3 switch=n enabled=y phases=3 Linecode=3P_UG_AL_350kcmil_15_0_416_0_3_3_3_3

New Line.l(r:p1udt16540lv-p1ulv27044) Units=km Length=0.0134928 bus1=p1udt16540lv.1.2.3 bus2=p1ulv27044.1.2.3 switch=n enabled=y phases=3 Linecode=3P_UG_AL_350kcmil_15_0_416_0_3_3_3_3

New Line.l(r:p1udt12131lv-p1ulv16817) Units=km Length=0.0148436 bus1=p1udt12131lv.1.2.3 bus2=p1ulv16817.1.2.3 switch=n enabled=y phases=3 Linecode=3P_UG_AL_350kcmil_15_0_416_0_3_3_3_3

New Line.l(r:p1udt2828lv-p1ulv3021) Units=km Length=0.0144728 bus1=p1udt2828lv.1.2.3 bus2=p1ulv3021.1.2.3 switch=n enabled=y phases=3 Linecode=3P_UG_AL_350kcmil_15_0_416_0_3_3_3_3

New Line.l(r:p1udt12131-p1udt2828) Units=km Length=0.0433005 bus1=p1udt12131-p1udt2828x.1.2.3 bus2=p1udt12131-p1udt2828xx.1.2.3 switch=n enabled=y phases=3 Linecode=3P_UG_AL_4/0_25_12_47_0_3_3_3_3

New Line.l(r:p1udt12131-p1udt22560) Units=km Length=0.008000810000000002 bus1=p1udt12131-p1udt22560xx.1.2.3 bus2=p1udt12131-p1udt22560x.1.2.3 switch=n enabled=y phases=3 Linecode=3P_UG_AL_4/0_25_12_47_0_3_3_3_3

New Line.l(r:p1udt23035lv-p1ulv52170) Units=km Length=0.0171093 bus1=p1udt23035lv.1.2.3 bus2=p1ulv52170.1.2.3 switch=n enabled=y phases=3 Linecode=3P_UG_AL_350kcmil_15_0_416_0_3_3_3_3

New Line.l(r:p1udt9641lv-p1ulv12359) Units=km Length=0.0167205 bus1=p1udt9641lv.1.2.3 bus2=p1ulv12359.1.2.3 switch=n enabled=y phases=3 Linecode=3P_UG_AL_350kcmil_15_0_416_0_3_3_3_3

New Line.l(r:p1udt25281-p1udt9641) Units=km Length=0.009158030000000001 bus1=p1udt25281-p1udt9641x.1.2.3 bus2=p1udt25281-p1udt9641xx.1.2.3 switch=n enabled=y phases=3 Linecode=3P_UG_AL_4/0_25_12_47_0_3_3_3_3

New Line.l(r:p1udt23035-p1udt25281) Units=km Length=0.0954748 bus1=p1udt23035-p1udt25281x.1.2.3 bus2=p1udt23035-p1udt25281xx.1.2.3 switch=n enabled=y phases=3 Linecode=3P_UG_AL_4/0_25_12_47_0_3_3_3_3

New Line.l(r:p1udt22560-p1udt23035) Units=km Length=0.17966000000000001 bus1=p1udt22560-p1udt23035x.1.2.3 bus2=p1udt22560-p1udt23035xx.1.2.3 switch=n enabled=y phases=3 Linecode=3P_UG_AL_4/0_25_12_47_0_3_3_3_3

New Line.l(r:p1udt16540-p1udt22560) Units=km Length=0.108843 bus1=p1udt16540.1.2.3 bus2=p1udt22560.1.2.3 switch=n enabled=y phases=3 Linecode=3P_OH_AL_ACSR_4/0_Penguin_12_47_0_3_3_3_3

New Line.l(r:p1udt16540-p1udt24087) Units=km Length=0.0290085 bus1=p1udt24087.1.2.3 bus2=p1udt16540.1.2.3 switch=n enabled=y phases=3 Linecode=3P_OH_AL_ACSR_4/0_Penguin_12_47_0_3_3_3_3

New Line.l(r:p1udt14023-p1udt24087) Units=km Length=0.0272327 bus1=p1udt14023-p1udt24087x.1.2.3 bus2=p1udt14023-p1udt24087xx.1.2.3 switch=n enabled=y phases=3 Linecode=3P_UG_AL_4/0_25_12_47_0_3_3_3_3

New Line.l(r:p1udt14023-p1udt22066) Units=km Length=0.0631602 bus1=p1udt14023-p1udt22066xx.1.2.3 bus2=p1udt14023-p1udt22066x.1.2.3 switch=n enabled=y phases=3 Linecode=3P_UG_AL_4/0_25_12_47_0_3_3_3_3

New Line.l(r:p1udt14531lv-p1ulv21876) Units=km Length=0.0134415 bus1=p1udt14531lv.1.2.3 bus2=p1ulv21876.1.2.3 switch=n enabled=y phases=3 Linecode=3P_UG_AL_350kcmil_15_0_416_0_3_3_3_3

New Line.l(r:p1udt9231lv-p1ulv11703) Units=km Length=0.0151413 bus1=p1udt9231lv.1.2.3 bus2=p1ulv11703.1.2.3 switch=n enabled=y phases=3 Linecode=3P_UG_AL_350kcmil_15_0_416_0_3_3_3_3

New Line.l(r:p1udt13405lv-p1ulv19334) Units=km Length=0.0132925 bus1=p1udt13405lv.1.2.3 bus2=p1ulv19334.1.2.3 switch=n enabled=y phases=3 Linecode=3P_UG_AL_350kcmil_15_0_416_0_3_3_3_3

New Line.l(r:p1udt22051lv-p1ulv47206) Units=km Length=0.012921 bus1=p1udt22051lv.1.2.3 bus2=p1ulv47206.1.2.3 switch=n enabled=y phases=3 Linecode=3P_UG_AL_350kcmil_15_0_416_0_3_3_3_3

New Line.l(r:p1udt19523lv-p1ulv36513) Units=km Length=0.0115322 bus1=p1udt19523lv.1.2.3 bus2=p1ulv36513.1.2.3 switch=n enabled=y phases=3 Linecode=3P_UG_AL_350kcmil_15_0_416_0_3_3_3_3

New Line.l(r:p1udt19702lv-p1ulv37138) Units=km Length=0.0277835 bus1=p1udt19702lv.1.2.3 bus2=p1ulv37138.1.2.3 switch=n enabled=y phases=3 Linecode=3P_UG_AL_350kcmil_15_0_416_0_3_3_3_3

New Line.l(r:p1udt19523-p1udt19702) Units=km Length=0.0931932 bus1=p1udt19523.1.2.3 bus2=p1udt19702.1.2.3 switch=n enabled=y phases=3 Linecode=3P_OH_AL_ACSR_4/0_Penguin_12_47_0_3_3_3_3

New Line.l(r:p1udt20363lv-p1ulv39638) Units=km Length=0.0199063 bus1=p1udt20363lv.1.2.3 bus2=p1ulv39638.1.2.3 switch=n enabled=y phases=3 Linecode=3P_UG_AL_350kcmil_15_0_416_0_3_3_3_3

New Line.l(r:p1udt19523-p1udt20363) Units=km Length=0.37321800000000005 bus1=p1udt19523.1.2.3 bus2=p1udt20363.1.2.3 switch=n enabled=y phases=3 Linecode=3P_OH_AL_ACSR_4/0_Penguin_12_47_0_3_3_3_3

New Line.l(r:p1udt19523-p1udt22051) Units=km Length=0.0826033 bus1=p1udt19523-p1udt22051xx.1.2.3 bus2=p1udt19523-p1udt22051x.1.2.3 switch=n enabled=y phases=3 Linecode=3P_UG_AL_4/0_25_12_47_0_3_3_3_3

New Line.l(r:p1udt22051-p1udt7242) Units=km Length=0.03773730000000001 bus1=p1udt22051-p1udt7242xx.1.2.3 bus2=p1udt22051-p1udt7242x.1.2.3 switch=n enabled=y phases=3 Linecode=3P_UG_AL_4/0_25_12_47_0_3_3_3_3

New Line.l(r:p1udt23951lv-p1ulv57140) Units=km Length=0.0123601 bus1=p1udt23951lv.1.2.3 bus2=p1ulv57140.1.2.3 switch=n enabled=y phases=3 Linecode=3P_UG_AL_350kcmil_15_0_416_0_3_3_3_3

New Line.l(r:p1udt18772lv-p1ulv33962) Units=km Length=0.0170389 bus1=p1udt18772lv.1.2.3 bus2=p1ulv33962.1.2.3 switch=n enabled=y phases=3 Linecode=3P_UG_AL_350kcmil_15_0_416_0_3_3_3_3

New Line.l(r:p1udt18772-p1udt23951) Units=km Length=0.0417409 bus1=p1udt23951.1.2.3 bus2=p1udt18772.1.2.3 switch=n enabled=y phases=3 Linecode=3P_OH_AL_ACSR_4/0_Penguin_12_47_0_3_3_3_3

New Line.l(r:p1udt23951-p1udt7242) Units=km Length=0.0416295 bus1=p1udt23951-p1udt7242xx.1.2.3 bus2=p1udt23951-p1udt7242x.1.2.3 switch=n enabled=y phases=3 Linecode=3P_UG_AL_4/0_25_12_47_0_3_3_3_3

New Line.l(r:p1udt13405-p1udt7242) Units=km Length=0.0773792 bus1=p1udt13405-p1udt7242x.1.2.3 bus2=p1udt13405-p1udt7242xx.1.2.3 switch=n enabled=y phases=3 Linecode=3P_UG_AL_4/0_25_12_47_0_3_3_3_3

New Line.l(r:p1udt13405-p1udt9231) Units=km Length=0.0791435 bus1=p1udt9231.1.2.3 bus2=p1udt13405.1.2.3 switch=n enabled=y phases=3 Linecode=3P_OH_AL_ACSR_4/0_Penguin_12_47_0_3_3_3_3

New Line.l(r:p1udt20515lv-p1ulv40294) Units=km Length=0.015668 bus1=p1udt20515lv.1.2.3 bus2=p1ulv40294.1.2.3 switch=n enabled=y phases=3 Linecode=3P_UG_AL_350kcmil_15_0_416_0_3_3_3_3

New Line.l(r:p1udt20515-p1udt9231) Units=km Length=0.0251595 bus1=p1udt9231.1.2.3 bus2=p1udt20515.1.2.3 switch=n enabled=y phases=3 Linecode=3P_OH_AL_ACSR_4/0_Penguin_12_47_0_3_3_3_3

New Line.l(r:p1udt14531-p1udt9231) Units=km Length=0.11381 bus1=p1udt14531.1.2.3 bus2=p1udt9231.1.2.3 switch=n enabled=y phases=3 Linecode=3P_OH_AL_ACSR_4/0_Penguin_12_47_0_3_3_3_3

New Line.l(r:p1udt14531-p1udt22066) Units=km Length=0.221495 bus1=p1udt14531-p1udt22066xx.1.2.3 bus2=p1udt14531-p1udt22066x.1.2.3 switch=n enabled=y phases=3 Linecode=3P_UG_AL_4/0_25_12_47_0_3_3_3_3

New Line.l(r:p1udt18399lv-p1ulv32722) Units=km Length=0.0118933 bus1=p1udt18399lv.1.2.3 bus2=p1ulv32722.1.2.3 switch=n enabled=y phases=3 Linecode=3P_UG_AL_350kcmil_15_0_416_0_3_3_3_3

New Line.l(r:p1udt20059lv-p1ulv38459) Units=km Length=0.0161259 bus1=p1udt20059lv.1.2.3 bus2=p1ulv38459.1.2.3 switch=n enabled=y phases=3 Linecode=3P_UG_AL_350kcmil_15_0_416_0_3_3_3_3

New Line.l(r:p1udt14293lv-p1ulv33404) Units=km Length=0.01611 bus1=p1udt14293lv.1.2.3 bus2=p1ulv33404.1.2.3 switch=n enabled=y phases=3 Linecode=3P_UG_AL_350kcmil_15_0_416_0_3_3_3_3

New Line.l(r:p1udm45078-p1ulv21336) Units=km Length=0.013295 bus1=p1udm45078.1.2.3 bus2=p1ulv21336.1.2.3 switch=n enabled=y phases=3 Linecode=3P_UG_AL_350kcmil_15_0_416_0_3_3_3_3

New Line.l(r:p1udm45078-p1udt14293lv) Units=km Length=0.006286060000000001 bus1=p1udt14293lv.1.2.3 bus2=p1udm45078.1.2.3 switch=n enabled=y phases=3 Linecode=3P_UG_AL_350kcmil_15_0_416_0_3_3_3_3

New Line.l(r:p1udt10753-p1udt14293) Units=km Length=0.03320390000000001 bus1=p1udt10753.1.2.3 bus2=p1udt14293.1.2.3 switch=n enabled=y phases=3 Linecode=3P_OH_AL_ACSR_4/0_Penguin_12_47_0_3_3_3_3

New Line.l(r:p1udt10753-p1udt20059) Units=km Length=0.0949505 bus1=p1udt10753-p1udt20059xx.1.2.3 bus2=p1udt10753-p1udt20059x.1.2.3 switch=n enabled=y phases=3 Linecode=3P_UG_AL_4/0_25_12_47_0_3_3_3_3

New Line.l(r:p1udt18399-p1udt20059) Units=km Length=0.0373172 bus1=p1udt18399-p1udt20059x.1.2.3 bus2=p1udt18399-p1udt20059xx.1.2.3 switch=n enabled=y phases=3 Linecode=3P_UG_AL_4/0_25_12_47_0_3_3_3_3

New Line.l(r:p1udt18399-p1udt8522) Units=km Length=0.11041 bus1=p1udt18399-p1udt8522xx.1.2.3 bus2=p1udt18399-p1udt8522x.1.2.3 switch=n enabled=y phases=3 Linecode=3P_UG_AL_4/0_25_12_47_0_3_3_3_3

New Line.l(r:p1udt14293-p1udt24087) Units=km Length=0.0946502 bus1=p1udt14293-p1udt24087x.1.2.3 bus2=p1udt24087.1.2.3 switch=n enabled=y phases=3 Linecode=3P_OH_AL_ACSR_1033kcmil_Curlew_12.47_1_3_3_3_3

New Line.l(r:p1udt14531-p1udt2828) Units=km Length=0.0838341 bus1=p1udt14531-p1udt2828x.1.2.3 bus2=p1udt14531-p1udt2828xx.1.2.3 switch=n enabled=y phases=3 Linecode=3P_OH_AL_ACSR_1033kcmil_Curlew_12.47_1_3_3_3_3

New Line.l(r:p1udt23951-p1udt9641) Units=km Length=0.0920993 bus1=p1udt23951-p1udt9641xx.1.2.3 bus2=p1udt23951-p1udt9641x.1.2.3 switch=n enabled=y phases=3 Linecode=3P_OH_AL_ACSR_1033kcmil_Curlew_12.47_1_3_3_3_3

New Line.padswitch(r:p1udt22066-p1udt8523)p1u_245392 Units=km Length=0.001 bus1=p1udt8523.1.2.3 bus2=p1udt22066-p1udt8523xx.1.2.3 switch=y enabled=y phases=3 Linecode=padswitch_3_3_3_3

New Line.padswitch(r:p1udt22066-p1udt8523)p1u_245393 Units=km Length=0.001 bus1=p1udt22066-p1udt8523x.1.2.3 bus2=p1udt22066.1.2.3 switch=y enabled=y phases=3 Linecode=padswitch_3_3_3_3_3

New Line.padswitch(r:p1udt12781-p1udt8523)p1u_245394 Units=km Length=0.001 bus1=p1udt12781.1.2.3 bus2=p1udt12781-p1udt8523x.1.2.3 switch=y enabled=y phases=3 Linecode=padswitch_3_3_3_1_3_3

New Line.padswitch(r:p1udt12781-p1udt8523)p1u_245395 Units=km Length=0.001 bus1=p1udt12781-p1udt8523xx.1.2.3 bus2=p1udt8523.1.2.3 switch=y enabled=y phases=3 Linecode=padswitch_3_3_3_1_3_1_3

New Line.padswitch(r:p1udt12781-p1udt16063)p1u_245396 Units=km Length=0.001 bus1=p1udt16063.1.2.3 bus2=p1udt12781-p1udt16063xx.1.2.3 switch=y enabled=y phases=3 Linecode=padswitch_3_3_3_1_3_1_3_1

New Line.padswitch(r:p1udt12781-p1udt16063)p1u_245397 Units=km Length=0.001 bus1=p1udt12781-p1udt16063x.1.2.3 bus2=p1udt12781.1.2.3 switch=y enabled=y phases=3 Linecode=padswitch_3_3_3_1_3_1_3_1

New Line.padswitch(r:p1udt15826-p1udt16063)p1u_245398 Units=km Length=0.001 bus1=p1udt15826.1.2.3 bus2=p1udt15826-p1udt16063x.1.2.3 switch=y enabled=y phases=3 Linecode=padswitch_3_3_3_1_3_1_3_1

New Line.padswitch(r:p1udt15826-p1udt16063)p1u_245399 Units=km Length=0.001 bus1=p1udt15826-p1udt16063xx.1.2.3 bus2=p1udt16063.1.2.3 switch=y enabled=y phases=3 Linecode=padswitch_3_3_3_1_3_1_3_1

New Line.padswitch(r:p1udt15826-p1udt8522)p1u_245400 Units=km Length=0.001 bus1=p1udt8522.1.2.3 bus2=p1udt15826-p1udt8522xx.1.2.3 switch=y enabled=y phases=3 Linecode=padswitch_3_3_3_1_3_1_3_1

New Line.padswitch(r:p1udt15826-p1udt8522)p1u_245401 Units=km Length=0.001 bus1=p1udt15826-p1udt8522x.1.2.3 bus2=p1udt15826.1.2.3 switch=y enabled=y phases=3 Linecode=padswitch_3_3_3_1_3_1_3_1

New Line.padswitch(r:p1udt18021-p1udt8522)p1u_245408 Units=km Length=0.001 bus1=p1udt18021.1.2.3 bus2=p1udt18021-p1udt8522x.1.2.3 switch=y enabled=y phases=3 Linecode=padswitch_3_3_3_3

New Line.padswitch(r:p1udt18021-p1udt8522)p1u_245409 Units=km Length=0.001 bus1=p1udt18021-p1udt8522xx.1.2.3 bus2=p1udt8522.1.2.3 switch=y enabled=y phases=3 Linecode=padswitch_3_3_3_1_3_1_3_1

New Line.padswitch(r:p1udt12131-p1udt2828)p1u_245368 Units=km Length=0.001 bus1=p1udt12131.1.2.3 bus2=p1udt12131-p1udt2828x.1.2.3 switch=y enabled=y phases=3 Linecode=padswitch_3_3_3_1_3_1_3_1

New Line.padswitch(r:p1udt12131-p1udt2828)p1u_245369 Units=km Length=0.001 bus1=p1udt12131-p1udt2828xx.1.2.3 bus2=p1udt2828.1.2.3 switch=y enabled=y phases=3 Linecode=padswitch_3_3_3_1_3_1_3_1

New Line.padswitch(r:p1udt12131-p1udt22560)p1u_245370 Units=km Length=0.001 bus1=p1udt22560.1.2.3 bus2=p1udt12131-p1udt22560xx.1.2.3 switch=y enabled=y phases=3 Linecode=padswitch_3_3_3_1_3_1_3_1

New Line.padswitch(r:p1udt12131-p1udt22560)p1u_245371 Units=km Length=0.001 bus1=p1udt12131-p1udt22560x.1.2.3 bus2=p1udt12131.1.2.3 switch=y enabled=y phases=3 Linecode=padswitch_3_3_3_1_3_1_3_1

New Line.padswitch(r:p1udt25281-p1udt9641)p1u_245372 Units=km Length=0.001 bus1=p1udt25281.1.2.3 bus2=p1udt25281-p1udt9641x.1.2.3 switch=y enabled=y phases=3 Linecode=padswitch_3_3_3_1_3_1_3_1

New Line.padswitch(r:p1udt25281-p1udt9641)p1u_245373 Units=km Length=0.001 bus1=p1udt25281-p1udt9641xx.1.2.3 bus2=p1udt9641.1.2.3 switch=y enabled=y phases=3 Linecode=padswitch_3_3_3_1_3_1_3_1

New Line.padswitch(r:p1udt23035-p1udt25281)p1u_245374 Units=km Length=0.001 bus1=p1udt23035.1.2.3 bus2=p1udt23035-p1udt25281x.1.2.3 switch=y enabled=y phases=3 Linecode=padswitch_3_3_3_1_3_1_3_1

New Line.padswitch(r:p1udt23035-p1udt25281)p1u_245375 Units=km Length=0.001 bus1=p1udt23035-p1udt25281xx.1.2.3 bus2=p1udt25281.1.2.3 switch=y enabled=y phases=3 Linecode=padswitch_3_3_3_1_3_1_3_1

New Line.padswitch(r:p1udt22560-p1udt23035)p1u_245376 Units=km Length=0.001 bus1=p1udt22560.1.2.3 bus2=p1udt22560-p1udt23035x.1.2.3 switch=y enabled=y phases=3 Linecode=padswitch_3_3_3_1_3_1_3_1

New Line.padswitch(r:p1udt22560-p1udt23035)p1u_245377 Units=km Length=0.001 bus1=p1udt22560-p1udt23035xx.1.2.3 bus2=p1udt23035.1.2.3 switch=y enabled=y phases=3 Linecode=padswitch_3_3_3_1_3_1_3_1

New Line.padswitch(r:p1udt14023-p1udt24087)p1u_245378 Units=km Length=0.001 bus1=p1udt14023.1.2.3 bus2=p1udt14023-p1udt24087x.1.2.3 switch=y enabled=y phases=3 Linecode=padswitch_3_3_3_1_3_1_3_1

New Line.padswitch(r:p1udt14023-p1udt24087)p1u_245379 Units=km Length=0.001 bus1=p1udt14023-p1udt24087xx.1.2.3 bus2=p1udt24087.1.2.3 switch=y enabled=y phases=3 Linecode=padswitch_3_3_3_1_3_1_3_1

New Line.padswitch(r:p1udt14023-p1udt22066)p1u_245380 Units=km Length=0.001 bus1=p1udt22066.1.2.3 bus2=p1udt14023-p1udt22066xx.1.2.3 switch=y enabled=y phases=3 Linecode=padswitch_3_3_3_1_3_1_3_1

New Line.padswitch(r:p1udt14023-p1udt22066)p1u_245381 Units=km Length=0.001 bus1=p1udt14023-p1udt22066x.1.2.3 bus2=p1udt14023.1.2.3 switch=y enabled=y phases=3 Linecode=padswitch_3_3_3_1_3_1_3_1

New Line.padswitch(r:p1udt19523-p1udt22051)p1u_245382 Units=km Length=0.001 bus1=p1udt22051.1.2.3 bus2=p1udt19523-p1udt22051xx.1.2.3 switch=y enabled=y phases=3 Linecode=padswitch_3_3_3_3

New Line.padswitch(r:p1udt19523-p1udt22051)p1u_245383 Units=km Length=0.001 bus1=p1udt19523-p1udt22051x.1.2.3 bus2=p1udt19523.1.2.3 switch=y enabled=y phases=3 Linecode=padswitch_3_3_3_1_3_1_3_1

New Line.padswitch(r:p1udt22051-p1udt7242)p1u_245384 Units=km Length=0.001 bus1=p1udt7242.1.2.3 bus2=p1udt22051-p1udt7242xx.1.2.3 switch=y enabled=y phases=3 Linecode=padswitch_3_3_3_1_3_1_3_1

New Line.padswitch(r:p1udt22051-p1udt7242)p1u_245385 Units=km Length=0.001 bus1=p1udt22051-p1udt7242x.1.2.3 bus2=p1udt22051.1.2.3 switch=y enabled=y phases=3 Linecode=padswitch_3_3_3_3

New Line.padswitch(r:p1udt23951-p1udt7242)p1u_245386 Units=km Length=0.001 bus1=p1udt7242.1.2.3 bus2=p1udt23951-p1udt7242xx.1.2.3 switch=y enabled=y phases=3 Linecode=padswitch_3_3_3_1_3_1_3_1

New Line.padswitch(r:p1udt23951-p1udt7242)p1u_245387 Units=km Length=0.001 bus1=p1udt23951-p1udt7242x.1.2.3 bus2=p1udt23951.1.2.3 switch=y enabled=y phases=3 Linecode=padswitch_3_3_3_1_3_1_3_1

New Line.padswitch(r:p1udt13405-p1udt7242)p1u_245388 Units=km Length=0.001 bus1=p1udt13405.1.2.3 bus2=p1udt13405-p1udt7242x.1.2.3 switch=y enabled=y phases=3 Linecode=padswitch_3_3_3_1_3_1_3_1

New Line.padswitch(r:p1udt13405-p1udt7242)p1u_245389 Units=km Length=0.001 bus1=p1udt13405-p1udt7242xx.1.2.3 bus2=p1udt7242.1.2.3 switch=y enabled=y phases=3 Linecode=padswitch_3_3_3_1_3_1_3_1

New Line.padswitch(r:p1udt14531-p1udt22066)p1u_245390 Units=km Length=0.001 bus1=p1udt22066.1.2.3 bus2=p1udt14531-p1udt22066xx.1.2.3 switch=y enabled=y phases=3 Linecode=padswitch_3_3_3_1_3_1_3_1

New Line.padswitch(r:p1udt14531-p1udt22066)p1u_245391 Units=km Length=0.001 bus1=p1udt14531-p1udt22066x.1.2.3 bus2=p1udt14531.1.2.3 switch=y enabled=y phases=3 Linecode=padswitch_3_3_3_1_3_1_3_1

New Line.padswitch(r:p1udt10753-p1udt20059)p1u_245402 Units=km Length=0.001 bus1=p1udt20059.1.2.3 bus2=p1udt10753-p1udt20059xx.1.2.3 switch=y enabled=y phases=3 Linecode=padswitch_3_3_3_1_3_1_3_1

New Line.padswitch(r:p1udt10753-p1udt20059)p1u_245403 Units=km Length=0.001 bus1=p1udt10753-p1udt20059x.1.2.3 bus2=p1udt10753.1.2.3 switch=y enabled=y phases=3 Linecode=padswitch_3_3_3_1_3_1_3_1

New Line.padswitch(r:p1udt18399-p1udt20059)p1u_245404 Units=km Length=0.001 bus1=p1udt18399.1.2.3 bus2=p1udt18399-p1udt20059x.1.2.3 switch=y enabled=y phases=3 Linecode=padswitch_3_3_3_1_3_1_3_1

New Line.padswitch(r:p1udt18399-p1udt20059)p1u_245405 Units=km Length=0.001 bus1=p1udt18399-p1udt20059xx.1.2.3 bus2=p1udt20059.1.2.3 switch=y enabled=y phases=3 Linecode=padswitch_3_3_3_1_3_1_3_1

New Line.padswitch(r:p1udt18399-p1udt8522)p1u_245406 Units=km Length=0.001 bus1=p1udt8522.1.2.3 bus2=p1udt18399-p1udt8522xx.1.2.3 switch=y enabled=y phases=3 Linecode=padswitch_3_3_3_1_3_1_3_1

New Line.padswitch(r:p1udt18399-p1udt8522)p1u_245407 Units=km Length=0.001 bus1=p1udt18399-p1udt8522x.1.2.3 bus2=p1udt18399.1.2.3 switch=y enabled=y phases=3 Linecode=padswitch_3_3_3_1_3_1_3_1

New Line.elbswitch(r:p1udt14293-p1udt24087)p1u_265917 Units=km Length=0.001 bus1=p1udt14293.1.2.3 bus2=p1udt14293-p1udt24087x.1.2.3 switch=y enabled=n phases=3 Linecode=elbswitch_3_3_3_3

New Line.padswitch(r:p1udt14531-p1udt2828)p1u_265970 Units=km Length=0.001 bus1=p1udt14531.1.2.3 bus2=p1udt14531-p1udt2828x.1.2.3 switch=y enabled=n phases=3 Linecode=padswitch_3_3_3_3

New Line.padswitch(r:p1udt14531-p1udt2828)p1u_265971 Units=km Length=0.001 bus1=p1udt14531-p1udt2828xx.1.2.3 bus2=p1udt2828.1.2.3 switch=y enabled=n phases=3 Linecode=padswitch_3_3_3_1_3_1_3_1

New Line.padswitch(r:p1udt23951-p1udt9641)p1u_265972 Units=km Length=0.001 bus1=p1udt9641.1.2.3 bus2=p1udt23951-p1udt9641xx.1.2.3 switch=y enabled=n phases=3 Linecode=padswitch_3_3_3_1_3_1_3_1

New Line.padswitch(r:p1udt23951-p1udt9641)p1u_265973 Units=km Length=0.001 bus1=p1udt23951-p1udt9641x.1.2.3 bus2=p1udt23951.1.2.3 switch=y enabled=n phases=3 Linecode=padswitch_3_3_3_1_3_3

New Line.fuse(r:p1udt18772-p1udt24697)p1u_267831 Units=km Length=0.001 bus1=p1udt18772.3 bus2=p1udt18772-p1udt24697x.3 switch=n enabled=y phases=1 Linecode=fuse_1_1_1_1

New Fuse.Fuse_fuse(r:p1udt18772-p1udt24697)p1u_267831 monitoredobj=Line.fuse(r:p1udt18772-p1udt24697)p1u_267831 enabled=y ratedcurrent=100.0

New Line.fuse(r:p1udt1630-p1udt20515)p1u_268024 Units=km Length=0.001 bus1=p1udt20515.1 bus2=p1udt1630-p1udt20515x.1 switch=n enabled=y phases=1 Linecode=fuse_1_1_1_1

New Fuse.Fuse_fuse(r:p1udt1630-p1udt20515)p1u_268024 monitoredobj=Line.fuse(r:p1udt1630-p1udt20515)p1u_268024 enabled=y ratedcurrent=100.0

New Line.l(r:p1udt4409-p1umv19)_disconnect Units=km Length=0.001 bus1=p1udt4409_b1_1.1.2.3 bus2=p1udt4409_b2_1.1.2.3 switch=y enabled=y phases=3 Linecode=3P_OH_AL_ACSR_4/0_Penguin_12_47_0_3_3_3_3

New Line.l(r:p1udt4409-p1umv19)_cont Units=km Length=1.0245149999999998 bus1=p1udt4409_b2_1.1.2.3 bus2=p1umv19.1.2.3 switch=n enabled=y phases=3 Linecode=3P_OH_AL_ACSR_4/0_Penguin_12_47_0_3_3_3_3

New Line.l(r:p1udt4409-p1uhs9_1247)_disconnect Units=km Length=0.001 bus1=p1udt4409-p1uhs9_1247x_b1_1.1.2.3 bus2=p1udt4409-p1uhs9_1247x_b2_1.1.2.3 switch=y enabled=y phases=3 Linecode=3P_OH_AL_ACSR_4/0_Penguin_12_47_0_3_3_3_3

New Line.l(r:p1udt4409-p1uhs9_1247)_cont Units=km Length=1.376532 bus1=p1udt4409-p1uhs9_1247x_b2_1.1.2.3 bus2=p1udt4409.1.2.3 switch=n enabled=y phases=3 Linecode=3P_OH_AL_ACSR_4/0_Penguin_12_47_0_3_3_3_3
