New RegControl.sb7_p2uhs0_1247_reg_213 transformer=sb7_p2uhs0_1247_trans_213 winding=2 ptratio=60.0 band=1.9919999999999998 vreg = 123.60000000000001

New RegControl.sb7_p2uhs0_1247_reg_212 transformer=sb7_p2uhs0_1247_trans_212 winding=2 ptratio=60.0 band=1.9919999999999998 vreg = 123.60000000000001
