New Capacitor.p2uc10 Bus1=p2udt333 phases=3 Kv=12.47 conn=Wye Kvar=300.0

New CapControl.p2uc10 Capacitor=p2uc10 Element=Line.l(r:p2udt333-p2udt6379) Terminal=1 delay=100.0 Type=voltage Vmin=120.5 Vmax=125.0 Ptratio=59.99631547328862 Ctratio=100.0
