New Line.l(r:p2udt333lv-p2ulv23236) Units=km Length=0.0208241 bus1=p2udt333lv.1.2 bus2=p2ulv23236.1.2 switch=n enabled=y phases=2 Linecode=1P_OH_AL_2/0_Rucina_0_416_0_2_2_2_2

New Line.l(r:p2udm1216-p2ulv342) Units=km Length=0.018691500000000003 bus1=p2udm1216.1.2 bus2=p2ulv342.1.2 switch=n enabled=y phases=2 Linecode=1P_OH_AL_2/0_Rucina_0_416_0_2_2_2_2

New Line.l(r:p2udm1216-p2ulv2256) Units=km Length=0.0183449 bus1=p2udm1216.1.2 bus2=p2ulv2256.1.2 switch=n enabled=y phases=2 Linecode=1P_OH_AL_2/0_Rucina_0_416_0_2_2_2_2

New Line.l(r:p2udm1216-p2udt333lv) Units=km Length=0.015961 bus1=p2udt333lv.1.2 bus2=p2udm1216.1.2 switch=n enabled=y phases=2 Linecode=1P_OH_AL_2/0_Rucina_0_416_0_2_2_2_2

New Line.l(r:p2udm1217-p2ulv1049) Units=km Length=0.019202000000000004 bus1=p2udm1217.1.2 bus2=p2ulv1049.1.2 switch=n enabled=y phases=2 Linecode=1P_OH_AL_2/0_Rucina_0_416_0_2_2_2_2

New Line.l(r:p2udm1217-p2udt333lv) Units=km Length=0.015961 bus1=p2udt333lv.1.2 bus2=p2udm1217.1.2 switch=n enabled=y phases=2 Linecode=1P_OH_AL_2/0_Rucina_0_416_0_2_2_2_2

New Line.l(r:p2udm1220-p2ulv343) Units=km Length=0.0146738 bus1=p2udm1220.1.2 bus2=p2ulv343.1.2 switch=n enabled=y phases=2 Linecode=1P_UG_AL_1/0_Brenau_0_416_0_2_2_2_2

New Line.l(r:p2udm1222-p2ulv3248) Units=km Length=0.0153806 bus1=p2udm1222.1.2 bus2=p2ulv3248.1.2 switch=n enabled=y phases=2 Linecode=1P_UG_AL_1/0_Brenau_0_416_0_2_2_2_2

New Line.l(r:p2udm1220-p2udm1222) Units=km Length=0.00652948 bus1=p2udm1220.1.2 bus2=p2udm1222.1.2 switch=n enabled=y phases=2 Linecode=1P_UG_AL_1/0_Brenau_0_416_0_2_2_2_2

New Line.l(r:p2udm1220-p2udt334lv) Units=km Length=0.006518140000000001 bus1=p2udt334lv.1.2 bus2=p2udm1220.1.2 switch=n enabled=y phases=2 Linecode=1P_UG_AL_4/0_Sweetbriar_0_416_0_2_2_2_2

New Line.l(r:p2udm1221-p2ulv1050) Units=km Length=0.0158097 bus1=p2udm1221.1.2 bus2=p2ulv1050.1.2 switch=n enabled=y phases=2 Linecode=1P_UG_AL_1/0_Brenau_0_416_0_2_2_2_2

New Line.l(r:p2udm1221-p2ulv11811) Units=km Length=0.017898 bus1=p2udm1221.1.2 bus2=p2ulv11811.1.2 switch=n enabled=y phases=2 Linecode=1P_UG_AL_1/0_Brenau_0_416_0_2_2_2_2

New Line.l(r:p2udm1221-p2udt334lv) Units=km Length=0.0085537 bus1=p2udt334lv.1.2 bus2=p2udm1221.1.2 switch=n enabled=y phases=2 Linecode=1P_UG_AL_4/0_Sweetbriar_0_416_0_2_2_2_2

New Line.l(r:p2udt534lv-p2ulv564) Units=km Length=0.027333800000000002 bus1=p2udt534lv.1.2 bus2=p2ulv564.1.2 switch=n enabled=y phases=2 Linecode=1P_OH_AL_4/0_Zuzara_0_416_0_2_2_2_2

New Line.l(r:p2udt534lv-p2ulv10863) Units=km Length=0.027333800000000002 bus1=p2udt534lv.1.2 bus2=p2ulv10863.1.2 switch=n enabled=y phases=2 Linecode=1P_OH_AL_4/0_Zuzara_0_416_0_2_2_2_2

New Line.l(r:p2udt539lv-p2ulv15959) Units=km Length=0.019038 bus1=p2udt539lv.1.2 bus2=p2ulv15959.1.2 switch=n enabled=y phases=2 Linecode=1P_UG_AL_1/0_Brenau_0_416_0_2_2_2_2

New Line.l(r:p2udm1992-p2ulv570) Units=km Length=0.0178819 bus1=p2udm1992.1.2 bus2=p2ulv570.1.2 switch=n enabled=y phases=2 Linecode=1P_UG_AL_1/0_Brenau_0_416_0_2_2_2_2

New Line.l(r:p2udm1992-p2udt539lv) Units=km Length=0.014824800000000003 bus1=p2udt539lv.1.2 bus2=p2udm1992.1.2 switch=n enabled=y phases=2 Linecode=1P_UG_AL_1/0_Brenau_0_416_0_2_2_2_2

New Line.l(r:p2udm1994-p2ulv7841) Units=km Length=0.0180273 bus1=p2udm1994.1.2 bus2=p2ulv7841.1.2 switch=n enabled=y phases=2 Linecode=1P_UG_AL_1/0_Brenau_0_416_0_2_2_2_2

New Line.l(r:p2udm1993-p2ulv5181) Units=km Length=0.0191346 bus1=p2udm1993.1.2 bus2=p2ulv5181.1.2 switch=n enabled=y phases=2 Linecode=1P_UG_AL_1/0_Brenau_0_416_0_2_2_2_2

New Line.l(r:p2udm1993-p2udm1994) Units=km Length=0.0071507 bus1=p2udm1994.1.2 bus2=p2udm1993.1.2 switch=n enabled=y phases=2 Linecode=1P_UG_AL_1/0_Brenau_0_416_0_2_2_2_2

New Line.l(r:p2udm1994-p2udt539lv) Units=km Length=0.00786878 bus1=p2udt539lv.1.2 bus2=p2udm1994.1.2 switch=n enabled=y phases=2 Linecode=1P_UG_AL_2/0_Converse_0_416_0_2_2_2_2

New Line.l(r:p2udm1996-p2ulv571) Units=km Length=0.016039400000000002 bus1=p2udm1996.1.2 bus2=p2ulv571.1.2 switch=n enabled=y phases=2 Linecode=1P_UG_AL_1/0_Brenau_0_416_0_2_2_2_2

New Line.l(r:p2udm1997-p2ulv4206) Units=km Length=0.0175294 bus1=p2udm1997.1.2 bus2=p2ulv4206.1.2 switch=n enabled=y phases=2 Linecode=1P_UG_AL_1/0_Brenau_0_416_0_2_2_2_2

New Line.l(r:p2udm1996-p2udm1997) Units=km Length=0.00993018 bus1=p2udm1996.1.2 bus2=p2udm1997.1.2 switch=n enabled=y phases=2 Linecode=1P_UG_AL_1/0_Brenau_0_416_0_2_2_2_2

New Line.l(r:p2udm1996-p2udt540lv) Units=km Length=0.00993903 bus1=p2udt540lv.1.2 bus2=p2udm1996.1.2 switch=n enabled=y phases=2 Linecode=1P_UG_AL_1/0_Brenau_0_416_0_2_2_2_2

New Line.l(r:p2udm1998-p2ulv18912) Units=km Length=0.0165857 bus1=p2udm1998.1.2 bus2=p2ulv18912.1.2 switch=n enabled=y phases=2 Linecode=1P_UG_AL_4/0_Sweetbriar_0_416_0_2_2_2_2

New Line.l(r:p2udm1999-p2ulv20936) Units=km Length=0.0176466 bus1=p2udm1999.1.2 bus2=p2ulv20936.1.2 switch=n enabled=y phases=2 Linecode=1P_UG_AL_1/0_Brenau_0_416_0_2_2_2_2

New Line.l(r:p2udm1998-p2udm1999) Units=km Length=0.0195063 bus1=p2udm1998.1.2 bus2=p2udm1999.1.2 switch=n enabled=y phases=2 Linecode=1P_UG_AL_1/0_Brenau_0_416_0_2_2_2_2

New Line.l(r:p2udm1998-p2udt540lv) Units=km Length=0.00993903 bus1=p2udt540lv.1.2 bus2=p2udm1998.1.2 switch=n enabled=y phases=2 Linecode=1P_UG_AL_4/0_Sweetbriar_0_416_0_2_2_2_2

New Line.l(r:p2udt541lv-p2ulv8538) Units=km Length=0.014637 bus1=p2udt541lv.1.2 bus2=p2ulv8538.1.2 switch=n enabled=y phases=2 Linecode=1P_UG_AL_1/0_Brenau_0_416_0_2_2_2_2

New Line.l(r:p2udm2003-p2ulv12523) Units=km Length=0.0170381 bus1=p2udm2003.1.2 bus2=p2ulv12523.1.2 switch=n enabled=y phases=2 Linecode=1P_UG_AL_1/0_Brenau_0_416_0_2_2_2_2

New Line.l(r:p2udm2001-p2ulv791) Units=km Length=0.0148114 bus1=p2udm2001.1.2 bus2=p2ulv791.1.2 switch=n enabled=y phases=2 Linecode=1P_UG_AL_1/0_Brenau_0_416_0_2_2_2_2

New Line.l(r:p2udm2001-p2ulv12768) Units=km Length=0.0179151 bus1=p2udm2001.1.2 bus2=p2ulv12768.1.2 switch=n enabled=y phases=2 Linecode=1P_UG_AL_1/0_Brenau_0_416_0_2_2_2_2

New Line.l(r:p2udm2001-p2udm2003) Units=km Length=0.0146622 bus1=p2udm2003.1.2 bus2=p2udm2001.1.2 switch=n enabled=y phases=2 Linecode=1P_UG_AL_4/0_Sweetbriar_0_416_0_2_2_2_2

New Line.l(r:p2udm2003-p2udt541lv) Units=km Length=0.007668540000000001 bus1=p2udt541lv.1.2 bus2=p2udm2003.1.2 switch=n enabled=y phases=2 Linecode=1P_UG_AL_4/0_Sweetbriar_0_416_0_2_2_2_2

New Line.l(r:p2udm2006-p2ulv22559) Units=km Length=0.0177919 bus1=p2udm2006.1.2 bus2=p2ulv22559.1.2 switch=n enabled=y phases=2 Linecode=1P_UG_AL_1/0_Brenau_0_416_0_2_2_2_2

New Line.l(r:p2udm2000-p2ulv572) Units=km Length=0.0163559 bus1=p2udm2000.1.2 bus2=p2ulv572.1.2 switch=n enabled=y phases=2 Linecode=1P_UG_AL_1/0_Brenau_0_416_0_2_2_2_2

New Line.l(r:p2udm2005-p2ulv16660) Units=km Length=0.0151378 bus1=p2udm2005.1.2 bus2=p2ulv16660.1.2 switch=n enabled=y phases=2 Linecode=1P_UG_AL_1/0_Brenau_0_416_0_2_2_2_2

New Line.l(r:p2udm2000-p2udm2005) Units=km Length=0.00830152 bus1=p2udm2000.1.2 bus2=p2udm2005.1.2 switch=n enabled=y phases=2 Linecode=1P_UG_AL_1/0_Brenau_0_416_0_2_2_2_2

New Line.l(r:p2udm2000-p2udm2006) Units=km Length=0.0146667 bus1=p2udm2006.1.2 bus2=p2udm2000.1.2 switch=n enabled=y phases=2 Linecode=1P_UG_AL_1/0_Brenau_0_416_0_2_2_2_2

New Line.l(r:p2udm2006-p2udt541lv) Units=km Length=0.00635132 bus1=p2udt541lv.1.2 bus2=p2udm2006.1.2 switch=n enabled=y phases=2 Linecode=1P_UG_AL_4/0_Sweetbriar_0_416_0_2_2_2_2

New Line.l(r:p2udt542lv-p2ulv7103) Units=km Length=0.0330836 bus1=p2udt542lv.1.2 bus2=p2ulv7103.1.2 switch=n enabled=y phases=2 Linecode=1P_UG_AL_1/0_Brenau_0_416_0_2_2_2_2

New Line.l(r:p2udt542lv-p2ulv12524) Units=km Length=0.0150269 bus1=p2udt542lv.1.2 bus2=p2ulv12524.1.2 switch=n enabled=y phases=2 Linecode=1P_UG_AL_1/0_Brenau_0_416_0_2_2_2_2

New Line.l(r:p2udm2007-p2ulv573) Units=km Length=0.0167768 bus1=p2udm2007.1.2 bus2=p2ulv573.1.2 switch=n enabled=y phases=2 Linecode=1P_UG_AL_1/0_Brenau_0_416_0_2_2_2_2

New Line.l(r:p2udm2013-p2ulv15724) Units=km Length=0.0172484 bus1=p2udm2013.1.2 bus2=p2ulv15724.1.2 switch=n enabled=y phases=2 Linecode=1P_UG_AL_1/0_Brenau_0_416_0_2_2_2_2

New Line.l(r:p2udm2007-p2udm2013) Units=km Length=0.00791046 bus1=p2udm2007.1.2 bus2=p2udm2013.1.2 switch=n enabled=y phases=2 Linecode=1P_UG_AL_1/0_Brenau_0_416_0_2_2_2_2

New Line.l(r:p2udm2007-p2udt542lv) Units=km Length=0.00791693 bus1=p2udt542lv.1.2 bus2=p2udm2007.1.2 switch=n enabled=y phases=2 Linecode=1P_UG_AL_4/0_Sweetbriar_0_416_0_2_2_2_2

New Line.l(r:p2udm2010-p2ulv10867) Units=km Length=0.01689 bus1=p2udm2010.1.2 bus2=p2ulv10867.1.2 switch=n enabled=y phases=2 Linecode=1P_UG_AL_1/0_Brenau_0_416_0_2_2_2_2

New Line.l(r:p2udm2010-p2ulv11345) Units=km Length=0.0184772 bus1=p2udm2010.1.2 bus2=p2ulv11345.1.2 switch=n enabled=y phases=2 Linecode=1P_UG_AL_1/0_Brenau_0_416_0_2_2_2_2

New Line.l(r:p2udm2008-p2ulv1051) Units=km Length=0.0176301 bus1=p2udm2008.1.2 bus2=p2ulv1051.1.2 switch=n enabled=y phases=2 Linecode=1P_UG_AL_1/0_Brenau_0_416_0_2_2_2_2

New Line.l(r:p2udm2008-p2udm2010) Units=km Length=0.0112768 bus1=p2udm2010.1.2 bus2=p2udm2008.1.2 switch=n enabled=y phases=2 Linecode=1P_UG_AL_1/0_Brenau_0_416_0_2_2_2_2

New Line.l(r:p2udm2010-p2udt542lv) Units=km Length=0.0118827 bus1=p2udt542lv.1.2 bus2=p2udm2010.1.2 switch=n enabled=y phases=2 Linecode=1P_UG_AL_4/0_Sweetbriar_0_416_0_2_2_2_2

New Line.l(r:p2udt739lv-p2ulv14588) Units=km Length=0.0168546 bus1=p2udt739lv.1.2 bus2=p2ulv14588.1.2 switch=n enabled=y phases=2 Linecode=1P_UG_AL_4/0_Sweetbriar_0_416_0_2_2_2_2

New Line.l(r:p2udt739lv-p2ulv15498) Units=km Length=0.0167631 bus1=p2udt739lv.1.2 bus2=p2ulv15498.1.2 switch=n enabled=y phases=2 Linecode=1P_UG_AL_1/0_Brenau_0_416_0_2_2_2_2

New Line.l(r:p2udm2727-p2ulv788) Units=km Length=0.017257 bus1=p2udm2727.1.2 bus2=p2ulv788.1.2 switch=n enabled=y phases=2 Linecode=1P_UG_AL_1/0_Brenau_0_416_0_2_2_2_2

New Line.l(r:p2udm2727-p2udt739lv) Units=km Length=0.018893 bus1=p2udt739lv.1.2 bus2=p2udm2727.1.2 switch=n enabled=y phases=2 Linecode=1P_UG_AL_1/0_Brenau_0_416_0_2_2_2_2

New Line.l(r:p2udm2728-p2ulv12520) Units=km Length=0.016573600000000004 bus1=p2udm2728.1.2 bus2=p2ulv12520.1.2 switch=n enabled=y phases=2 Linecode=1P_UG_AL_1/0_Brenau_0_416_0_2_2_2_2

New Line.l(r:p2udm2728-p2udt739lv) Units=km Length=0.00944247 bus1=p2udt739lv.1.2 bus2=p2udm2728.1.2 switch=n enabled=y phases=2 Linecode=1P_UG_AL_1/0_Brenau_0_416_0_2_2_2_2

New Line.l(r:p2udt740lv-p2ulv5182) Units=km Length=0.0157285 bus1=p2udt740lv.1.2 bus2=p2ulv5182.1.2 switch=n enabled=y phases=2 Linecode=1P_UG_AL_1/0_Brenau_0_416_0_2_2_2_2

New Line.l(r:p2udt740lv-p2ulv7581) Units=km Length=0.0150677 bus1=p2udt740lv.1.2 bus2=p2ulv7581.1.2 switch=n enabled=y phases=2 Linecode=1P_UG_AL_1/0_Brenau_0_416_0_2_2_2_2

New Line.l(r:p2udm2731-p2ulv789) Units=km Length=0.0156146 bus1=p2udm2731.1.2 bus2=p2ulv789.1.2 switch=n enabled=y phases=2 Linecode=1P_UG_AL_1/0_Brenau_0_416_0_2_2_2_2

New Line.l(r:p2udm2735-p2ulv15723) Units=km Length=0.0155704 bus1=p2udm2735.1.2 bus2=p2ulv15723.1.2 switch=n enabled=y phases=2 Linecode=1P_UG_AL_1/0_Brenau_0_416_0_2_2_2_2

New Line.l(r:p2udm2734-p2ulv7842) Units=km Length=0.0159941 bus1=p2udm2734.1.2 bus2=p2ulv7842.1.2 switch=n enabled=y phases=2 Linecode=1P_UG_AL_1/0_Brenau_0_416_0_2_2_2_2

New Line.l(r:p2udm2734-p2udm2735) Units=km Length=0.00754006 bus1=p2udm2735.1.2 bus2=p2udm2734.1.2 switch=n enabled=y phases=2 Linecode=1P_UG_AL_1/0_Brenau_0_416_0_2_2_2_2

New Line.l(r:p2udm2731-p2udm2735) Units=km Length=0.00926646 bus1=p2udm2731.1.2 bus2=p2udm2735.1.2 switch=n enabled=y phases=2 Linecode=1P_UG_AL_2/0_Converse_0_416_0_2_2_2_2

New Line.l(r:p2udm2731-p2udt740lv) Units=km Length=0.00925672 bus1=p2udt740lv.1.2 bus2=p2udm2731.1.2 switch=n enabled=y phases=2 Linecode=1P_UG_AL_4/0_Sweetbriar_0_416_0_2_2_2_2

New Line.l(r:p2udm2737-p2ulv21412) Units=km Length=0.0159751 bus1=p2udm2737.1.2 bus2=p2ulv21412.1.2 switch=n enabled=y phases=2 Linecode=1P_UG_AL_1/0_Brenau_0_416_0_2_2_2_2

New Line.l(r:p2udm2736-p2ulv18257) Units=km Length=0.0161673 bus1=p2udm2736.1.2 bus2=p2ulv18257.1.2 switch=n enabled=y phases=2 Linecode=1P_UG_AL_1/0_Brenau_0_416_0_2_2_2_2

New Line.l(r:p2udm2736-p2udm2737) Units=km Length=0.00993903 bus1=p2udm2737.1.2 bus2=p2udm2736.1.2 switch=n enabled=y phases=2 Linecode=1P_UG_AL_1/0_Brenau_0_416_0_2_2_2_2

New Line.l(r:p2udm2737-p2udt740lv) Units=km Length=0.0132693 bus1=p2udt740lv.1.2 bus2=p2udm2737.1.2 switch=n enabled=y phases=2 Linecode=1P_UG_AL_2/0_Converse_0_416_0_2_2_2_2

New Line.l(r:p2udt741lv-p2ulv790) Units=km Length=0.0191412 bus1=p2udt741lv.1.2 bus2=p2ulv790.1.2 switch=n enabled=y phases=2 Linecode=1P_UG_AL_1/0_Brenau_0_416_0_2_2_2_2

New Line.l(r:p2udt741lv-p2ulv22771) Units=km Length=0.0180667 bus1=p2udt741lv.1.2 bus2=p2ulv22771.1.2 switch=n enabled=y phases=2 Linecode=1P_UG_AL_1/0_Brenau_0_416_0_2_2_2_2

New Line.l(r:p2udm2739-p2ulv4453) Units=km Length=0.0197706 bus1=p2udm2739.1.2 bus2=p2ulv4453.1.2 switch=n enabled=y phases=2 Linecode=1P_UG_AL_1/0_Brenau_0_416_0_2_2_2_2

New Line.l(r:p2udm2739-p2ulv6849) Units=km Length=0.0186409 bus1=p2udm2739.1.2 bus2=p2ulv6849.1.2 switch=n enabled=y phases=2 Linecode=1P_UG_AL_1/0_Brenau_0_416_0_2_2_2_2

New Line.l(r:p2udm2739-p2udt741lv) Units=km Length=0.00925775 bus1=p2udt741lv.1.2 bus2=p2udm2739.1.2 switch=n enabled=y phases=2 Linecode=1P_UG_AL_2/0_Converse_0_416_0_2_2_2_2

New Line.l(r:p2udm2740-p2ulv4939) Units=km Length=0.0199622 bus1=p2udm2740.1.2 bus2=p2ulv4939.1.2 switch=n enabled=y phases=2 Linecode=1P_UG_AL_1/0_Brenau_0_416_0_2_2_2_2

New Line.l(r:p2udm2742-p2ulv22558) Units=km Length=0.0185867 bus1=p2udm2742.1.2 bus2=p2ulv22558.1.2 switch=n enabled=y phases=2 Linecode=1P_UG_AL_1/0_Brenau_0_416_0_2_2_2_2

New Line.l(r:p2udm2740-p2udm2742) Units=km Length=0.00926666 bus1=p2udm2740.1.2 bus2=p2udm2742.1.2 switch=n enabled=y phases=2 Linecode=1P_UG_AL_1/0_Brenau_0_416_0_2_2_2_2

New Line.l(r:p2udm2740-p2udt741lv) Units=km Length=0.00925775 bus1=p2udt741lv.1.2 bus2=p2udm2740.1.2 switch=n enabled=y phases=2 Linecode=1P_UG_AL_2/0_Converse_0_416_0_2_2_2_2

New Line.l(r:p2udt974lv-p2ulv1047) Units=km Length=0.0151659 bus1=p2udt974lv.1.2 bus2=p2ulv1047.1.2 switch=n enabled=y phases=2 Linecode=1P_OH_AL_2/0_Rucina_0_416_0_2_2_2_2

New Line.l(r:p2udm3585-p2ulv10627) Units=km Length=0.0156344 bus1=p2udm3585.1.2 bus2=p2ulv10627.1.2 switch=n enabled=y phases=2 Linecode=1P_OH_AL_2/0_Rucina_0_416_0_2_2_2_2

New Line.l(r:p2udm3585-p2udt974lv) Units=km Length=0.0148051 bus1=p2udt974lv.1.2 bus2=p2udm3585.1.2 switch=n enabled=y phases=2 Linecode=1P_OH_AL_2/0_Rucina_0_416_0_2_2_2_2

New Line.l(r:p2udm3586-p2ulv12521) Units=km Length=0.014768000000000002 bus1=p2udm3586.1.2 bus2=p2ulv12521.1.2 switch=n enabled=y phases=2 Linecode=1P_OH_AL_2/0_Rucina_0_416_0_2_2_2_2

New Line.l(r:p2udm3586-p2udt974lv) Units=km Length=0.0114911 bus1=p2udt974lv.1.2 bus2=p2udm3586.1.2 switch=n enabled=y phases=2 Linecode=1P_OH_AL_2/0_Rucina_0_416_0_2_2_2_2

New Line.l(r:p2udt975lv-p2ulv1048) Units=km Length=0.0116272 bus1=p2udt975lv.1.2 bus2=p2ulv1048.1.2 switch=n enabled=y phases=2 Linecode=1P_OH_AL_2/0_Rucina_0_416_0_2_2_2_2

New Line.l(r:p2udt975lv-p2ulv8967) Units=km Length=0.0128597 bus1=p2udt975lv.1.2 bus2=p2ulv8967.1.2 switch=n enabled=y phases=2 Linecode=1P_OH_AL_2/0_Rucina_0_416_0_2_2_2_2

New Line.l(r:p2udm3589-p2ulv10150) Units=km Length=0.0165675 bus1=p2udm3589.1.2 bus2=p2ulv10150.1.2 switch=n enabled=y phases=2 Linecode=1P_OH_AL_2/0_Rucina_0_416_0_2_2_2_2

New Line.l(r:p2udm3589-p2udt975lv) Units=km Length=0.0149402 bus1=p2udt975lv.1.2 bus2=p2udm3589.1.2 switch=n enabled=y phases=2 Linecode=1P_OH_AL_2/0_Rucina_0_416_0_2_2_2_2

New Line.l(r:p2udm3590-p2ulv13493) Units=km Length=0.019730600000000004 bus1=p2udm3590.1.2 bus2=p2ulv13493.1.2 switch=n enabled=y phases=2 Linecode=1P_UG_AL_1/0_Brenau_0_416_0_2_2_2_2

New Line.l(r:p2udm3590-p2udt975lv) Units=km Length=0.0669338 bus1=p2udt975lv.1.2 bus2=p2udm3590.1.2 switch=n enabled=y phases=2 Linecode=1P_OH_AL_4/0_Zuzara_0_416_0_2_2_2_2

New Line.l(r:p2udt1179lv-p2ulv7102) Units=km Length=0.014801 bus1=p2udt1179lv.1.2 bus2=p2ulv7102.1.2 switch=n enabled=y phases=2 Linecode=1P_UG_AL_1/0_Brenau_0_416_0_2_2_2_2

New Line.l(r:p2udm4330-p2ulv1291) Units=km Length=0.0129245 bus1=p2udm4330.1.2 bus2=p2ulv1291.1.2 switch=n enabled=y phases=2 Linecode=1P_UG_AL_1/0_Brenau_0_416_0_2_2_2_2

New Line.l(r:p2udm4331-p2ulv1557) Units=km Length=0.0137145 bus1=p2udm4331.1.2 bus2=p2ulv1557.1.2 switch=n enabled=y phases=2 Linecode=1P_UG_AL_1/0_Brenau_0_416_0_2_2_2_2

New Line.l(r:p2udm4330-p2udm4331) Units=km Length=0.0318875 bus1=p2udm4330.1.2 bus2=p2udm4331.1.2 switch=n enabled=y phases=2 Linecode=1P_UG_AL_1/0_Brenau_0_416_0_2_2_2_2

New Line.l(r:p2udm4330-p2udt1179lv) Units=km Length=0.0141434 bus1=p2udt1179lv.1.2 bus2=p2udm4330.1.2 switch=n enabled=y phases=2 Linecode=1P_UG_AL_4/0_Sweetbriar_0_416_0_2_2_2_2

New Line.l(r:p2udm4332-p2ulv5396) Units=km Length=0.0166816 bus1=p2udm4332.1.2 bus2=p2ulv5396.1.2 switch=n enabled=y phases=2 Linecode=1P_UG_AL_1/0_Brenau_0_416_0_2_2_2_2

New Line.l(r:p2udm4332-p2ulv17376) Units=km Length=0.017596 bus1=p2udm4332.1.2 bus2=p2ulv17376.1.2 switch=n enabled=y phases=2 Linecode=1P_UG_AL_1/0_Brenau_0_416_0_2_2_2_2

New Line.l(r:p2udm4334-p2ulv8753) Units=km Length=0.0159432 bus1=p2udm4334.1.2 bus2=p2ulv8753.1.2 switch=n enabled=y phases=2 Linecode=1P_UG_AL_1/0_Brenau_0_416_0_2_2_2_2

New Line.l(r:p2udm4332-p2udm4334) Units=km Length=0.00949293 bus1=p2udm4332.1.2 bus2=p2udm4334.1.2 switch=n enabled=y phases=2 Linecode=1P_UG_AL_1/0_Brenau_0_416_0_2_2_2_2

New Line.l(r:p2udm4332-p2udt1179lv) Units=km Length=0.0171104 bus1=p2udt1179lv.1.2 bus2=p2udm4332.1.2 switch=n enabled=y phases=2 Linecode=1P_UG_AL_4/0_Sweetbriar_0_416_0_2_2_2_2

New Line.l(r:p2udt1401lv-p2ulv1548) Units=km Length=0.0269879 bus1=p2udt1401lv.1.2 bus2=p2ulv1548.1.2 switch=n enabled=y phases=2 Linecode=1P_OH_AL_2/0_Rucina_0_416_0_2_2_2_2

New Line.l(r:p2udt1401lv-p2ulv10372) Units=km Length=0.0269879 bus1=p2udt1401lv.1.2 bus2=p2ulv10372.1.2 switch=n enabled=y phases=2 Linecode=1P_OH_AL_2/0_Rucina_0_416_0_2_2_2_2

New Line.l(r:p2udt1402lv-p2ulv16918) Units=km Length=0.0184595 bus1=p2udt1402lv.1.2 bus2=p2ulv16918.1.2 switch=n enabled=y phases=2 Linecode=1P_UG_AL_1/0_Brenau_0_416_0_2_2_2_2

New Line.l(r:p2udm5134-p2ulv1549) Units=km Length=0.0963105 bus1=p2udm5134.1.2 bus2=p2ulv1549.1.2 switch=n enabled=y phases=2 Linecode=1P_UG_AL_1/0_Brenau_0_416_0_2_2_2_2

New Line.l(r:p2udm5134-p2udt1402lv) Units=km Length=0.00572448 bus1=p2udt1402lv.1.2 bus2=p2udm5134.1.2 switch=n enabled=y phases=2 Linecode=1P_UG_AL_1/0_Brenau_0_416_0_2_2_2_2

New Line.l(r:p2udm5136-p2ulv13240) Units=km Length=0.0163138 bus1=p2udm5136.1.2 bus2=p2ulv13240.1.2 switch=n enabled=y phases=2 Linecode=1P_UG_AL_1/0_Brenau_0_416_0_2_2_2_2

New Line.l(r:p2udm5135-p2ulv3460) Units=km Length=0.0169772 bus1=p2udm5135.1.2 bus2=p2ulv3460.1.2 switch=n enabled=y phases=2 Linecode=1P_UG_AL_1/0_Brenau_0_416_0_2_2_2_2

New Line.l(r:p2udm5135-p2udm5136) Units=km Length=0.0113113 bus1=p2udm5136.1.2 bus2=p2udm5135.1.2 switch=n enabled=y phases=2 Linecode=1P_UG_AL_1/0_Brenau_0_416_0_2_2_2_2

New Line.l(r:p2udm5136-p2udt1402lv) Units=km Length=0.00572448 bus1=p2udt1402lv.1.2 bus2=p2udm5136.1.2 switch=n enabled=y phases=2 Linecode=1P_UG_AL_4/0_Sweetbriar_0_416_0_2_2_2_2

New Line.l(r:p2udt1406lv-p2ulv1770) Units=km Length=0.0161999 bus1=p2udt1406lv.1.2 bus2=p2ulv1770.1.2 switch=n enabled=y phases=2 Linecode=1P_UG_AL_1/0_Brenau_0_416_0_2_2_2_2

New Line.l(r:p2udt1406lv-p2ulv19144) Units=km Length=0.0172664 bus1=p2udt1406lv.1.2 bus2=p2ulv19144.1.2 switch=n enabled=y phases=2 Linecode=1P_UG_AL_1/0_Brenau_0_416_0_2_2_2_2

New Line.l(r:p2udm5153-p2ulv11119) Units=km Length=0.0158046 bus1=p2udm5153.1.2 bus2=p2ulv11119.1.2 switch=n enabled=y phases=2 Linecode=1P_UG_AL_1/0_Brenau_0_416_0_2_2_2_2

New Line.l(r:p2udm5151-p2ulv1553) Units=km Length=0.0169257 bus1=p2udm5151.1.2 bus2=p2ulv1553.1.2 switch=n enabled=y phases=2 Linecode=1P_UG_AL_1/0_Brenau_0_416_0_2_2_2_2

New Line.l(r:p2udm5151-p2udm5153) Units=km Length=0.009793190000000002 bus1=p2udm5153.1.2 bus2=p2udm5151.1.2 switch=n enabled=y phases=2 Linecode=1P_UG_AL_1/0_Brenau_0_416_0_2_2_2_2

New Line.l(r:p2udm5153-p2udt1406lv) Units=km Length=0.00979294 bus1=p2udt1406lv.1.2 bus2=p2udm5153.1.2 switch=n enabled=y phases=2 Linecode=1P_UG_AL_4/0_Sweetbriar_0_416_0_2_2_2_2

New Line.l(r:p2udm5154-p2ulv12055) Units=km Length=0.0153698 bus1=p2udm5154.1.2 bus2=p2ulv12055.1.2 switch=n enabled=y phases=2 Linecode=1P_UG_AL_1/0_Brenau_0_416_0_2_2_2_2

New Line.l(r:p2udm5155-p2ulv12281) Units=km Length=0.0166244 bus1=p2udm5155.1.2 bus2=p2ulv12281.1.2 switch=n enabled=y phases=2 Linecode=1P_UG_AL_1/0_Brenau_0_416_0_2_2_2_2

New Line.l(r:p2udm5154-p2udm5155) Units=km Length=0.009793190000000002 bus1=p2udm5154.1.2 bus2=p2udm5155.1.2 switch=n enabled=y phases=2 Linecode=1P_UG_AL_1/0_Brenau_0_416_0_2_2_2_2

New Line.l(r:p2udm5154-p2udt1406lv) Units=km Length=0.00980294 bus1=p2udt1406lv.1.2 bus2=p2udm5154.1.2 switch=n enabled=y phases=2 Linecode=1P_UG_AL_4/0_Sweetbriar_0_416_0_2_2_2_2

New Line.l(r:p2udt1407lv-p2ulv1554) Units=km Length=0.0190651 bus1=p2udt1407lv.1.2 bus2=p2ulv1554.1.2 switch=n enabled=y phases=2 Linecode=1P_UG_AL_1/0_Brenau_0_416_0_2_2_2_2

New Line.l(r:p2udt1407lv-p2ulv14350) Units=km Length=0.0190295 bus1=p2udt1407lv.1.2 bus2=p2ulv14350.1.2 switch=n enabled=y phases=2 Linecode=1P_UG_AL_1/0_Brenau_0_416_0_2_2_2_2

New Line.l(r:p2udm5158-p2ulv9658) Units=km Length=0.0197136 bus1=p2udm5158.1.2 bus2=p2ulv9658.1.2 switch=n enabled=y phases=2 Linecode=1P_UG_AL_1/0_Brenau_0_416_0_2_2_2_2

New Line.l(r:p2udm5158-p2ulv18258) Units=km Length=0.0191116 bus1=p2udm5158.1.2 bus2=p2ulv18258.1.2 switch=n enabled=y phases=2 Linecode=1P_UG_AL_1/0_Brenau_0_416_0_2_2_2_2

New Line.l(r:p2udm5158-p2udt1407lv) Units=km Length=0.00942257 bus1=p2udt1407lv.1.2 bus2=p2udm5158.1.2 switch=n enabled=y phases=2 Linecode=1P_UG_AL_2/0_Converse_0_416_0_2_2_2_2

New Line.l(r:p2udm5162-p2ulv2506) Units=km Length=0.0153209 bus1=p2udm5162.1.2 bus2=p2ulv2506.1.2 switch=n enabled=y phases=2 Linecode=1P_UG_AL_1/0_Brenau_0_416_0_2_2_2_2

New Line.l(r:p2udm5161-p2ulv1555) Units=km Length=0.0145031 bus1=p2udm5161.1.2 bus2=p2ulv1555.1.2 switch=n enabled=y phases=2 Linecode=1P_UG_AL_1/0_Brenau_0_416_0_2_2_2_2

New Line.l(r:p2udm5161-p2ulv11120) Units=km Length=0.0205702 bus1=p2udm5161.1.2 bus2=p2ulv11120.1.2 switch=n enabled=y phases=2 Linecode=1P_UG_AL_1/0_Brenau_0_416_0_2_2_2_2

New Line.l(r:p2udm5161-p2udm5162) Units=km Length=0.006008060000000001 bus1=p2udm5162.1.2 bus2=p2udm5161.1.2 switch=n enabled=y phases=2 Linecode=1P_UG_AL_1/0_Brenau_0_416_0_2_2_2_2

New Line.l(r:p2udm5162-p2udt1408lv) Units=km Length=0.030117500000000002 bus1=p2udt1408lv.1.2 bus2=p2udm5162.1.2 switch=n enabled=y phases=2 Linecode=1P_UG_AL_4/0_Sweetbriar_0_416_0_2_2_2_2

New Line.l(r:p2udm5165-p2ulv14812) Units=km Length=0.0164615 bus1=p2udm5165.1.2 bus2=p2ulv14812.1.2 switch=n enabled=y phases=2 Linecode=1P_UG_AL_1/0_Brenau_0_416_0_2_2_2_2

New Line.l(r:p2udm5163-p2ulv9447) Units=km Length=0.0172369 bus1=p2udm5163.1.2 bus2=p2ulv9447.1.2 switch=n enabled=y phases=2 Linecode=1P_UG_AL_1/0_Brenau_0_416_0_2_2_2_2

New Line.l(r:p2udm5163-p2udm5165) Units=km Length=0.00936483 bus1=p2udm5165.1.2 bus2=p2udm5163.1.2 switch=n enabled=y phases=2 Linecode=1P_UG_AL_1/0_Brenau_0_416_0_2_2_2_2

New Line.l(r:p2udm5165-p2udt1408lv) Units=km Length=0.052486 bus1=p2udt1408lv.1.2 bus2=p2udm5165.1.2 switch=n enabled=y phases=2 Linecode=1P_UG_AL_4/0_Sweetbriar_0_416_0_2_2_2_2

New Line.l(r:p2udt1409lv-p2ulv2507) Units=km Length=0.0168957 bus1=p2udt1409lv.1.2 bus2=p2ulv2507.1.2 switch=n enabled=y phases=2 Linecode=1P_UG_AL_1/0_Brenau_0_416_0_2_2_2_2

New Line.l(r:p2udm5166-p2ulv1556) Units=km Length=0.0153961 bus1=p2udm5166.1.2 bus2=p2ulv1556.1.2 switch=n enabled=y phases=2 Linecode=1P_UG_AL_1/0_Brenau_0_416_0_2_2_2_2

New Line.l(r:p2udm5166-p2ulv2770) Units=km Length=0.0168657 bus1=p2udm5166.1.2 bus2=p2ulv2770.1.2 switch=n enabled=y phases=2 Linecode=1P_UG_AL_1/0_Brenau_0_416_0_2_2_2_2

New Line.l(r:p2udm5166-p2ulv9448) Units=km Length=0.018048 bus1=p2udm5166.1.2 bus2=p2ulv9448.1.2 switch=n enabled=y phases=2 Linecode=1P_UG_AL_1/0_Brenau_0_416_0_2_2_2_2

New Line.l(r:p2udm5166-p2udt1409lv) Units=km Length=0.0072782 bus1=p2udt1409lv.1.2 bus2=p2udm5166.1.2 switch=n enabled=y phases=2 Linecode=1P_UG_AL_4/0_Sweetbriar_0_416_0_2_2_2_2

New Line.l(r:p2udm5170-p2ulv12769) Units=km Length=0.0161897 bus1=p2udm5170.1.2 bus2=p2ulv12769.1.2 switch=n enabled=y phases=2 Linecode=1P_UG_AL_1/0_Brenau_0_416_0_2_2_2_2

New Line.l(r:p2udm5170-p2udt1409lv) Units=km Length=0.00727025 bus1=p2udt1409lv.1.2 bus2=p2udm5170.1.2 switch=n enabled=y phases=2 Linecode=1P_UG_AL_1/0_Brenau_0_416_0_2_2_2_2

New Line.l(r:p2udt1586lv-p2ulv1767) Units=km Length=0.001 bus1=p2udt1586lv.1.2 bus2=p2ulv1767.1.2 switch=n enabled=y phases=2 Linecode=1P_OH_AL_4_Periwinkle_0_416_0_2_2_2_2

New Line.l(r:p2udt1589lv-p2ulv4204) Units=km Length=0.0156475 bus1=p2udt1589lv.1.2 bus2=p2ulv4204.1.2 switch=n enabled=y phases=2 Linecode=1P_UG_AL_1/0_Brenau_0_416_0_2_2_2_2

New Line.l(r:p2udm5781-p2ulv1771) Units=km Length=0.0168452 bus1=p2udm5781.1.2 bus2=p2ulv1771.1.2 switch=n enabled=y phases=2 Linecode=1P_UG_AL_1/0_Brenau_0_416_0_2_2_2_2

New Line.l(r:p2udm5781-p2ulv10626) Units=km Length=0.0164651 bus1=p2udm5781.1.2 bus2=p2ulv10626.1.2 switch=n enabled=y phases=2 Linecode=1P_UG_AL_1/0_Brenau_0_416_0_2_2_2_2

New Line.l(r:p2udm5785-p2ulv14147) Units=km Length=0.0165839 bus1=p2udm5785.1.2 bus2=p2ulv14147.1.2 switch=n enabled=y phases=2 Linecode=1P_UG_AL_1/0_Brenau_0_416_0_2_2_2_2

New Line.l(r:p2udm5781-p2udm5785) Units=km Length=0.009793190000000002 bus1=p2udm5781.1.2 bus2=p2udm5785.1.2 switch=n enabled=y phases=2 Linecode=1P_UG_AL_1/0_Brenau_0_416_0_2_2_2_2

New Line.l(r:p2udm5781-p2udt1589lv) Units=km Length=0.00979294 bus1=p2udt1589lv.1.2 bus2=p2udm5781.1.2 switch=n enabled=y phases=2 Linecode=1P_UG_AL_4/0_Sweetbriar_0_416_0_2_2_2_2

New Line.l(r:p2udm5786-p2ulv23426) Units=km Length=0.0152114 bus1=p2udm5786.1.2 bus2=p2ulv23426.1.2 switch=n enabled=y phases=2 Linecode=1P_UG_AL_1/0_Brenau_0_416_0_2_2_2_2

New Line.l(r:p2udm5782-p2ulv3247) Units=km Length=0.0174083 bus1=p2udm5782.1.2 bus2=p2ulv3247.1.2 switch=n enabled=y phases=2 Linecode=1P_UG_AL_1/0_Brenau_0_416_0_2_2_2_2

New Line.l(r:p2udm5782-p2udm5786) Units=km Length=0.009793190000000002 bus1=p2udm5786.1.2 bus2=p2udm5782.1.2 switch=n enabled=y phases=2 Linecode=1P_UG_AL_1/0_Brenau_0_416_0_2_2_2_2

New Line.l(r:p2udm5786-p2udt1589lv) Units=km Length=0.00979294 bus1=p2udt1589lv.1.2 bus2=p2udm5786.1.2 switch=n enabled=y phases=2 Linecode=1P_UG_AL_4/0_Sweetbriar_0_416_0_2_2_2_2

New Line.l(r:p2udt1590lv-p2ulv1772) Units=km Length=0.0200752 bus1=p2udt1590lv.1.2 bus2=p2ulv1772.1.2 switch=n enabled=y phases=2 Linecode=1P_UG_AL_1/0_Brenau_0_416_0_2_2_2_2

New Line.l(r:p2udm5788-p2ulv13238) Units=km Length=0.0184779 bus1=p2udm5788.1.2 bus2=p2ulv13238.1.2 switch=n enabled=y phases=2 Linecode=1P_UG_AL_1/0_Brenau_0_416_0_2_2_2_2

New Line.l(r:p2udm5788-p2ulv16218) Units=km Length=0.0177088 bus1=p2udm5788.1.2 bus2=p2ulv16218.1.2 switch=n enabled=y phases=2 Linecode=1P_UG_AL_1/0_Brenau_0_416_0_2_2_2_2

New Line.l(r:p2udm5788-p2udt1590lv) Units=km Length=0.0140657 bus1=p2udt1590lv.1.2 bus2=p2udm5788.1.2 switch=n enabled=y phases=2 Linecode=1P_UG_AL_4/0_Sweetbriar_0_416_0_2_2_2_2

New Line.l(r:p2udm5790-p2ulv17374) Units=km Length=0.0180621 bus1=p2udm5790.1.2 bus2=p2ulv17374.1.2 switch=n enabled=y phases=2 Linecode=1P_UG_AL_1/0_Brenau_0_416_0_2_2_2_2

New Line.l(r:p2udm5790-p2udt1590lv) Units=km Length=0.0743978 bus1=p2udt1590lv.1.2 bus2=p2udm5790.1.2 switch=n enabled=y phases=2 Linecode=1P_UG_AL_1/0_Brenau_0_416_0_2_2_2_2

New Line.l(r:p2udt1591lv-p2ulv7343) Units=km Length=0.0172609 bus1=p2udt1591lv.1.2 bus2=p2ulv7343.1.2 switch=n enabled=y phases=2 Linecode=1P_UG_AL_1/0_Brenau_0_416_0_2_2_2_2

New Line.l(r:p2udm5791-p2ulv1773) Units=km Length=0.016137 bus1=p2udm5791.1.2 bus2=p2ulv1773.1.2 switch=n enabled=y phases=2 Linecode=1P_UG_AL_1/0_Brenau_0_416_0_2_2_2_2

New Line.l(r:p2udm5791-p2ulv17375) Units=km Length=0.018174 bus1=p2udm5791.1.2 bus2=p2ulv17375.1.2 switch=n enabled=y phases=2 Linecode=1P_UG_AL_1/0_Brenau_0_416_0_2_2_2_2

New Line.l(r:p2udm5793-p2ulv3459) Units=km Length=0.0180382 bus1=p2udm5793.1.2 bus2=p2ulv3459.1.2 switch=n enabled=y phases=2 Linecode=1P_UG_AL_1/0_Brenau_0_416_0_2_2_2_2

New Line.l(r:p2udm5793-p2ulv9213) Units=km Length=0.0176665 bus1=p2udm5793.1.2 bus2=p2ulv9213.1.2 switch=n enabled=y phases=2 Linecode=1P_UG_AL_1/0_Brenau_0_416_0_2_2_2_2

New Line.l(r:p2udm5791-p2udm5793) Units=km Length=0.0146559 bus1=p2udm5791.1.2 bus2=p2udm5793.1.2 switch=n enabled=y phases=2 Linecode=1P_UG_AL_1/0_Brenau_0_416_0_2_2_2_2

New Line.l(r:p2udm5791-p2udt1591lv) Units=km Length=0.0075208 bus1=p2udt1591lv.1.2 bus2=p2udm5791.1.2 switch=n enabled=y phases=2 Linecode=1P_UG_AL_4/0_Sweetbriar_0_416_0_2_2_2_2

New Line.l(r:p2udm5792-p2ulv2505) Units=km Length=0.0196007 bus1=p2udm5792.1.2 bus2=p2ulv2505.1.2 switch=n enabled=y phases=2 Linecode=1P_UG_AL_1/0_Brenau_0_416_0_2_2_2_2

New Line.l(r:p2udm5792-p2ulv3713) Units=km Length=0.0148571 bus1=p2udm5792.1.2 bus2=p2ulv3713.1.2 switch=n enabled=y phases=2 Linecode=1P_UG_AL_1/0_Brenau_0_416_0_2_2_2_2

New Line.l(r:p2udm5798-p2ulv23878) Units=km Length=0.014697900000000002 bus1=p2udm5798.1.2 bus2=p2ulv23878.1.2 switch=n enabled=y phases=2 Linecode=1P_UG_AL_1/0_Brenau_0_416_0_2_2_2_2

New Line.l(r:p2udm5792-p2udm5798) Units=km Length=0.0167835 bus1=p2udm5792.1.2 bus2=p2udm5798.1.2 switch=n enabled=y phases=2 Linecode=1P_UG_AL_1/0_Brenau_0_416_0_2_2_2_2

New Line.l(r:p2udm5792-p2udt1591lv) Units=km Length=0.0194877 bus1=p2udt1591lv.1.2 bus2=p2udm5792.1.2 switch=n enabled=y phases=2 Linecode=1P_UG_AL_4/0_Sweetbriar_0_416_0_2_2_2_2

New Line.l(r:p2udt1972lv-p2ulv23235) Units=km Length=0.0191213 bus1=p2udt1972lv.1.2 bus2=p2ulv23235.1.2 switch=n enabled=y phases=2 Linecode=1P_UG_AL_1/0_Brenau_0_416_0_2_2_2_2

New Line.l(r:p2udm7136-p2ulv2255) Units=km Length=0.0178346 bus1=p2udm7136.1.2 bus2=p2ulv2255.1.2 switch=n enabled=y phases=2 Linecode=1P_UG_AL_1/0_Brenau_0_416_0_2_2_2_2

New Line.l(r:p2udm7137-p2ulv3014) Units=km Length=0.0177729 bus1=p2udm7137.1.2 bus2=p2ulv3014.1.2 switch=n enabled=y phases=2 Linecode=1P_UG_AL_1/0_Brenau_0_416_0_2_2_2_2

New Line.l(r:p2udm7137-p2ulv12282) Units=km Length=0.0185742 bus1=p2udm7137.1.2 bus2=p2ulv12282.1.2 switch=n enabled=y phases=2 Linecode=1P_UG_AL_1/0_Brenau_0_416_0_2_2_2_2

New Line.l(r:p2udm7136-p2udm7137) Units=km Length=0.00941257 bus1=p2udm7136.1.2 bus2=p2udm7137.1.2 switch=n enabled=y phases=2 Linecode=1P_UG_AL_4/0_Sweetbriar_0_416_0_2_2_2_2

New Line.l(r:p2udm7136-p2udt1972lv) Units=km Length=0.00984492 bus1=p2udt1972lv.1.2 bus2=p2udm7136.1.2 switch=n enabled=y phases=2 Linecode=1P_UG_AL_4/0_Sweetbriar_0_416_0_2_2_2_2

New Line.l(r:p2udm7138-p2ulv7342) Units=km Length=0.0175791 bus1=p2udm7138.1.2 bus2=p2ulv7342.1.2 switch=n enabled=y phases=2 Linecode=1P_UG_AL_1/0_Brenau_0_416_0_2_2_2_2

New Line.l(r:p2udm7140-p2ulv13721) Units=km Length=0.0168421 bus1=p2udm7140.1.2 bus2=p2ulv13721.1.2 switch=n enabled=y phases=2 Linecode=1P_UG_AL_1/0_Brenau_0_416_0_2_2_2_2

New Line.l(r:p2udm7138-p2udm7140) Units=km Length=0.00814801 bus1=p2udm7138.1.2 bus2=p2udm7140.1.2 switch=n enabled=y phases=2 Linecode=1P_UG_AL_1/0_Brenau_0_416_0_2_2_2_2

New Line.l(r:p2udm7138-p2udt1972lv) Units=km Length=0.00985489 bus1=p2udt1972lv.1.2 bus2=p2udm7138.1.2 switch=n enabled=y phases=2 Linecode=1P_UG_AL_4/0_Sweetbriar_0_416_0_2_2_2_2

New Line.l(r:p2udt1973lv-p2ulv2257) Units=km Length=0.0148344 bus1=p2udt1973lv.1.2 bus2=p2ulv2257.1.2 switch=n enabled=y phases=2 Linecode=1P_UG_AL_1/0_Brenau_0_416_0_2_2_2_2

New Line.l(r:p2udt1973lv-p2ulv8969) Units=km Length=0.017414 bus1=p2udt1973lv.1.2 bus2=p2ulv8969.1.2 switch=n enabled=y phases=2 Linecode=1P_UG_AL_1/0_Brenau_0_416_0_2_2_2_2

New Line.l(r:p2udm7143-p2ulv2769) Units=km Length=0.018596800000000004 bus1=p2udm7143.1.2 bus2=p2ulv2769.1.2 switch=n enabled=y phases=2 Linecode=1P_UG_AL_1/0_Brenau_0_416_0_2_2_2_2

New Line.l(r:p2udm7143-p2udt1973lv) Units=km Length=0.00878169 bus1=p2udt1973lv.1.2 bus2=p2udm7143.1.2 switch=n enabled=y phases=2 Linecode=1P_UG_AL_1/0_Brenau_0_416_0_2_2_2_2

New Line.l(r:p2udm7144-p2ulv8752) Units=km Length=0.0140047 bus1=p2udm7144.1.2 bus2=p2ulv8752.1.2 switch=n enabled=y phases=2 Linecode=1P_UG_AL_1/0_Brenau_0_416_0_2_2_2_2

New Line.l(r:p2udm7144-p2udt1973lv) Units=km Length=0.008784830000000002 bus1=p2udt1973lv.1.2 bus2=p2udm7144.1.2 switch=n enabled=y phases=2 Linecode=1P_UG_AL_1/0_Brenau_0_416_0_2_2_2_2

New Line.l(r:p2udt2514lv-p2ulv3010) Units=km Length=0.0659817 bus1=p2udt2514lv.1.2 bus2=p2ulv3010.1.2 switch=n enabled=y phases=2 Linecode=1P_OH_AL_4/0_Zuzara_0_416_0_2_2_2_2

New Line.l(r:p2udt2793lv-p2ulv3455) Units=km Length=0.0108468 bus1=p2udt2793lv.1.2 bus2=p2ulv3455.1.2 switch=n enabled=y phases=2 Linecode=1P_OH_AL_2/0_Rucina_0_416_0_2_2_2_2

New Line.l(r:p2udt2793lv-p2ulv6124) Units=km Length=0.0108468 bus1=p2udt2793lv.1.2 bus2=p2ulv6124.1.2 switch=n enabled=y phases=2 Linecode=1P_OH_AL_2/0_Rucina_0_416_0_2_2_2_2

New Line.l(r:p2udt2795lv-p2ulv3712) Units=km Length=0.0229057 bus1=p2udt2795lv.1.2 bus2=p2ulv3712.1.2 switch=n enabled=y phases=2 Linecode=1P_UG_AL_1/0_Brenau_0_416_0_2_2_2_2

New Line.l(r:p2udt2795lv-p2ulv8316) Units=km Length=0.0187049 bus1=p2udt2795lv.1.2 bus2=p2ulv8316.1.2 switch=n enabled=y phases=2 Linecode=1P_UG_AL_1/0_Brenau_0_416_0_2_2_2_2

New Line.l(r:p2udm9855-p2ulv3458) Units=km Length=0.0192999 bus1=p2udm9855.1.2 bus2=p2ulv3458.1.2 switch=n enabled=y phases=2 Linecode=1P_UG_AL_1/0_Brenau_0_416_0_2_2_2_2

New Line.l(r:p2udm9855-p2udt2795lv) Units=km Length=0.00941234 bus1=p2udt2795lv.1.2 bus2=p2udm9855.1.2 switch=n enabled=y phases=2 Linecode=1P_UG_AL_1/0_Brenau_0_416_0_2_2_2_2

New Line.l(r:p2udm9857-p2ulv6848) Units=km Length=0.0181219 bus1=p2udm9857.1.2 bus2=p2ulv6848.1.2 switch=n enabled=y phases=2 Linecode=1P_UG_AL_1/0_Brenau_0_416_0_2_2_2_2

New Line.l(r:p2udm9857-p2udt2795lv) Units=km Length=0.0188249 bus1=p2udt2795lv.1.2 bus2=p2udm9857.1.2 switch=n enabled=y phases=2 Linecode=1P_UG_AL_1/0_Brenau_0_416_0_2_2_2_2

New Line.l(r:p2udt3120lv-p2ulv6847) Units=km Length=0.0159031 bus1=p2udt3120lv.1.2 bus2=p2ulv6847.1.2 switch=n enabled=y phases=2 Linecode=1P_UG_AL_1/0_Brenau_0_416_0_2_2_2_2

New Line.l(r:p2udm10944-p2ulv3957) Units=km Length=0.014793 bus1=p2udm10944.1.2 bus2=p2ulv3957.1.2 switch=n enabled=y phases=2 Linecode=1P_UG_AL_1/0_Brenau_0_416_0_2_2_2_2

New Line.l(r:p2udm10944-p2ulv4452) Units=km Length=0.017224 bus1=p2udm10944.1.2 bus2=p2ulv4452.1.2 switch=n enabled=y phases=2 Linecode=1P_UG_AL_1/0_Brenau_0_416_0_2_2_2_2

New Line.l(r:p2udm10944-p2udt3120lv) Units=km Length=0.009793190000000002 bus1=p2udt3120lv.1.2 bus2=p2udm10944.1.2 switch=n enabled=y phases=2 Linecode=1P_UG_AL_4/0_Sweetbriar_0_416_0_2_2_2_2

New Line.l(r:p2udm10947-p2ulv15499) Units=km Length=0.0154231 bus1=p2udm10947.1.2 bus2=p2ulv15499.1.2 switch=n enabled=y phases=2 Linecode=1P_UG_AL_1/0_Brenau_0_416_0_2_2_2_2

New Line.l(r:p2udm10947-p2udt3120lv) Units=km Length=0.0293791 bus1=p2udt3120lv.1.2 bus2=p2udm10947.1.2 switch=n enabled=y phases=2 Linecode=1P_UG_AL_1/0_Brenau_0_416_0_2_2_2_2

New Line.l(r:p2udt3259lv-p2ulv4205) Units=km Length=0.026216100000000003 bus1=p2udt3259lv.1.2 bus2=p2ulv4205.1.2 switch=n enabled=y phases=2 Linecode=1P_UG_AL_1/0_Brenau_0_416_0_2_2_2_2

New Line.l(r:p2udt3259lv-p2ulv7341) Units=km Length=0.0250834 bus1=p2udt3259lv.1.2 bus2=p2ulv7341.1.2 switch=n enabled=y phases=2 Linecode=1P_UG_AL_1/0_Brenau_0_416_0_2_2_2_2

New Line.l(r:p2udt3259lv-p2ulv9657) Units=km Length=0.0279366 bus1=p2udt3259lv.1.2 bus2=p2ulv9657.1.2 switch=n enabled=y phases=2 Linecode=1P_UG_AL_1/0_Brenau_0_416_0_2_2_2_2

New Line.l(r:p2udt3259lv-p2ulv14148) Units=km Length=0.0266294 bus1=p2udt3259lv.1.2 bus2=p2ulv14148.1.2 switch=n enabled=y phases=2 Linecode=1P_UG_AL_1/0_Brenau_0_416_0_2_2_2_2

New Line.l(r:p2udt3259lv-p2ulv16916) Units=km Length=0.027984 bus1=p2udt3259lv.1.2 bus2=p2ulv16916.1.2 switch=n enabled=y phases=2 Linecode=1P_UG_AL_1/0_Brenau_0_416_0_2_2_2_2

New Line.l(r:p2udt3259lv-p2ulv18911) Units=km Length=0.024932 bus1=p2udt3259lv.1.2 bus2=p2ulv18911.1.2 switch=n enabled=y phases=2 Linecode=1P_UG_AL_1/0_Brenau_0_416_0_2_2_2_2

New Line.l(r:p2udt3260lv-p2ulv15501) Units=km Length=0.0197714 bus1=p2udt3260lv.1.2 bus2=p2ulv15501.1.2 switch=n enabled=y phases=2 Linecode=1P_UG_AL_1/0_Brenau_0_416_0_2_2_2_2

New Line.l(r:p2udm11359-p2ulv4207) Units=km Length=0.0184555 bus1=p2udm11359.1.2 bus2=p2ulv4207.1.2 switch=n enabled=y phases=2 Linecode=1P_UG_AL_1/0_Brenau_0_416_0_2_2_2_2

New Line.l(r:p2udm11359-p2ulv12522) Units=km Length=0.018097 bus1=p2udm11359.1.2 bus2=p2ulv12522.1.2 switch=n enabled=y phases=2 Linecode=1P_UG_AL_1/0_Brenau_0_416_0_2_2_2_2

New Line.l(r:p2udm11359-p2udt3260lv) Units=km Length=0.00925775 bus1=p2udt3260lv.1.2 bus2=p2udm11359.1.2 switch=n enabled=y phases=2 Linecode=1P_UG_AL_4/0_Sweetbriar_0_416_0_2_2_2_2

New Line.l(r:p2udm11360-p2ulv5183) Units=km Length=0.019475800000000005 bus1=p2udm11360.1.2 bus2=p2ulv5183.1.2 switch=n enabled=y phases=2 Linecode=1P_UG_AL_1/0_Brenau_0_416_0_2_2_2_2

New Line.l(r:p2udm11360-p2udt3260lv) Units=km Length=0.00898952 bus1=p2udt3260lv.1.2 bus2=p2udm11360.1.2 switch=n enabled=y phases=2 Linecode=1P_UG_AL_1/0_Brenau_0_416_0_2_2_2_2

New Line.l(r:p2udm11833-p2ulv4454) Units=km Length=0.0183083 bus1=p2udm11833.1.2 bus2=p2ulv4454.1.2 switch=n enabled=y phases=2 Linecode=1P_UG_AL_1/0_Brenau_0_416_0_2_2_2_2

New Line.l(r:p2udm11833-p2ulv5656) Units=km Length=0.0128348 bus1=p2udm11833.1.2 bus2=p2ulv5656.1.2 switch=n enabled=y phases=2 Linecode=1P_UG_AL_1/0_Brenau_0_416_0_2_2_2_2

New Line.l(r:p2udm11833-p2ulv18472) Units=km Length=0.0183864 bus1=p2udm11833.1.2 bus2=p2ulv18472.1.2 switch=n enabled=y phases=2 Linecode=1P_UG_AL_1/0_Brenau_0_416_0_2_2_2_2

New Line.l(r:p2udm11833-p2udt3409lv) Units=km Length=0.0119082 bus1=p2udt3409lv.1.2 bus2=p2udm11833.1.2 switch=n enabled=y phases=2 Linecode=1P_UG_AL_4/0_Sweetbriar_0_416_0_2_2_2_2

New Line.l(r:p2udm11836-p2ulv23632) Units=km Length=0.0165411 bus1=p2udm11836.1.2 bus2=p2ulv23632.1.2 switch=n enabled=y phases=2 Linecode=1P_UG_AL_1/0_Brenau_0_416_0_2_2_2_2

New Line.l(r:p2udm11836-p2udt3409lv) Units=km Length=0.0432894 bus1=p2udt3409lv.1.2 bus2=p2udm11836.1.2 switch=n enabled=y phases=2 Linecode=1P_UG_AL_1/0_Brenau_0_416_0_2_2_2_2

New Line.l(r:p2udt3682lv-p2ulv14810) Units=km Length=0.0203279 bus1=p2udt3682lv.1.2 bus2=p2ulv14810.1.2 switch=n enabled=y phases=2 Linecode=1P_UG_AL_1/0_Brenau_0_416_0_2_2_2_2

New Line.l(r:p2udm12676-p2ulv4938) Units=km Length=0.0197477 bus1=p2udm12676.1.2 bus2=p2ulv4938.1.2 switch=n enabled=y phases=2 Linecode=1P_UG_AL_1/0_Brenau_0_416_0_2_2_2_2

New Line.l(r:p2udm12676-p2ulv21851) Units=km Length=0.0167593 bus1=p2udm12676.1.2 bus2=p2ulv21851.1.2 switch=n enabled=y phases=2 Linecode=1P_UG_AL_1/0_Brenau_0_416_0_2_2_2_2

New Line.l(r:p2udm12678-p2ulv10866) Units=km Length=0.0169698 bus1=p2udm12678.1.2 bus2=p2ulv10866.1.2 switch=n enabled=y phases=2 Linecode=1P_UG_AL_1/0_Brenau_0_416_0_2_2_2_2

New Line.l(r:p2udm12676-p2udm12678) Units=km Length=0.00899511 bus1=p2udm12676.1.2 bus2=p2udm12678.1.2 switch=n enabled=y phases=2 Linecode=1P_UG_AL_1/0_Brenau_0_416_0_2_2_2_2

New Line.l(r:p2udm12676-p2udt3682lv) Units=km Length=0.00977763 bus1=p2udt3682lv.1.2 bus2=p2udm12676.1.2 switch=n enabled=y phases=2 Linecode=1P_UG_AL_4/0_Sweetbriar_0_416_0_2_2_2_2

New Line.l(r:p2udm12677-p2ulv8537) Units=km Length=0.0197036 bus1=p2udm12677.1.2 bus2=p2ulv8537.1.2 switch=n enabled=y phases=2 Linecode=1P_UG_AL_1/0_Brenau_0_416_0_2_2_2_2

New Line.l(r:p2udm12677-p2ulv13239) Units=km Length=0.0182693 bus1=p2udm12677.1.2 bus2=p2ulv13239.1.2 switch=n enabled=y phases=2 Linecode=1P_UG_AL_1/0_Brenau_0_416_0_2_2_2_2

New Line.l(r:p2udm12677-p2udt3682lv) Units=km Length=0.0184684 bus1=p2udt3682lv.1.2 bus2=p2udm12677.1.2 switch=n enabled=y phases=2 Linecode=1P_UG_AL_4/0_Sweetbriar_0_416_0_2_2_2_2

New Line.l(r:p2udt3683lv-p2ulv14811) Units=km Length=0.0186257 bus1=p2udt3683lv.1.2 bus2=p2ulv14811.1.2 switch=n enabled=y phases=2 Linecode=1P_OH_AL_2/0_Rucina_0_416_0_2_2_2_2

New Line.l(r:p2udm12682-p2ulv4940) Units=km Length=0.0210451 bus1=p2udm12682.1.2 bus2=p2ulv4940.1.2 switch=n enabled=y phases=2 Linecode=1P_OH_AL_2/0_Rucina_0_416_0_2_2_2_2

New Line.l(r:p2udm12682-p2udt3683lv) Units=km Length=0.0382681 bus1=p2udt3683lv.1.2 bus2=p2udm12682.1.2 switch=n enabled=y phases=2 Linecode=1P_OH_AL_4/0_Zuzara_0_416_0_2_2_2_2

New Line.l(r:p2udm12683-p2ulv8968) Units=km Length=0.021228 bus1=p2udm12683.1.2 bus2=p2ulv8968.1.2 switch=n enabled=y phases=2 Linecode=1P_OH_AL_2/0_Rucina_0_416_0_2_2_2_2

New Line.l(r:p2udm12683-p2ulv19389) Units=km Length=0.019518400000000005 bus1=p2udm12683.1.2 bus2=p2ulv19389.1.2 switch=n enabled=y phases=2 Linecode=1P_OH_AL_2/0_Rucina_0_416_0_2_2_2_2

New Line.l(r:p2udm12685-p2ulv15274) Units=km Length=0.0187978 bus1=p2udm12685.1.2 bus2=p2ulv15274.1.2 switch=n enabled=y phases=2 Linecode=1P_OH_AL_2/0_Rucina_0_416_0_2_2_2_2

New Line.l(r:p2udm12683-p2udm12685) Units=km Length=0.0111263 bus1=p2udm12683.1.2 bus2=p2udm12685.1.2 switch=n enabled=y phases=2 Linecode=1P_OH_AL_2/0_Rucina_0_416_0_2_2_2_2

New Line.l(r:p2udm12683-p2udt3683lv) Units=km Length=0.0111263 bus1=p2udt3683lv.1.2 bus2=p2udm12683.1.2 switch=n enabled=y phases=2 Linecode=1P_OH_AL_2/0_Rucina_0_416_0_2_2_2_2

New Line.l(r:p2udt3817lv-p2ulv5184) Units=km Length=0.0173779 bus1=p2udt3817lv.1.2 bus2=p2ulv5184.1.2 switch=n enabled=y phases=2 Linecode=1P_UG_AL_1/0_Brenau_0_416_0_2_2_2_2

New Line.l(r:p2udt4347lv-p2ulv9445) Units=km Length=0.015430500000000002 bus1=p2udt4347lv.1.2 bus2=p2ulv9445.1.2 switch=n enabled=y phases=2 Linecode=1P_UG_AL_1/0_Brenau_0_416_0_2_2_2_2

New Line.l(r:p2udm14591-p2ulv6126) Units=km Length=0.0166089 bus1=p2udm14591.1.2 bus2=p2ulv6126.1.2 switch=n enabled=y phases=2 Linecode=1P_UG_AL_1/0_Brenau_0_416_0_2_2_2_2

New Line.l(r:p2udm14591-p2ulv17586) Units=km Length=0.0151026 bus1=p2udm14591.1.2 bus2=p2ulv17586.1.2 switch=n enabled=y phases=2 Linecode=1P_UG_AL_1/0_Brenau_0_416_0_2_2_2_2

New Line.l(r:p2udm14591-p2udt4347lv) Units=km Length=0.00945052 bus1=p2udt4347lv.1.2 bus2=p2udm14591.1.2 switch=n enabled=y phases=2 Linecode=1P_UG_AL_2/0_Converse_0_416_0_2_2_2_2

New Line.l(r:p2udm14593-p2ulv13720) Units=km Length=0.0168789 bus1=p2udm14593.1.2 bus2=p2ulv13720.1.2 switch=n enabled=y phases=2 Linecode=1P_UG_AL_1/0_Brenau_0_416_0_2_2_2_2

New Line.l(r:p2udm14593-p2udt4347lv) Units=km Length=0.00944247 bus1=p2udt4347lv.1.2 bus2=p2udm14593.1.2 switch=n enabled=y phases=2 Linecode=1P_UG_AL_1/0_Brenau_0_416_0_2_2_2_2

New Line.l(r:p2udt4348lv-p2ulv10377) Units=km Length=0.0158203 bus1=p2udt4348lv.1.2 bus2=p2ulv10377.1.2 switch=n enabled=y phases=2 Linecode=1P_UG_AL_1/0_Brenau_0_416_0_2_2_2_2

New Line.l(r:p2udm14595-p2ulv6127) Units=km Length=0.0161874 bus1=p2udm14595.1.2 bus2=p2ulv6127.1.2 switch=n enabled=y phases=2 Linecode=1P_UG_AL_1/0_Brenau_0_416_0_2_2_2_2

New Line.l(r:p2udm14595-p2udt4348lv) Units=km Length=0.00945231 bus1=p2udt4348lv.1.2 bus2=p2udm14595.1.2 switch=n enabled=y phases=2 Linecode=1P_UG_AL_1/0_Brenau_0_416_0_2_2_2_2

New Line.l(r:p2udt4349lv-p2ulv6128) Units=km Length=0.0170979 bus1=p2udt4349lv.1.2 bus2=p2ulv6128.1.2 switch=n enabled=y phases=2 Linecode=1P_UG_AL_1/0_Brenau_0_416_0_2_2_2_2

New Line.l(r:p2udt4349lv-p2ulv18470) Units=km Length=0.0169585 bus1=p2udt4349lv.1.2 bus2=p2ulv18470.1.2 switch=n enabled=y phases=2 Linecode=1P_UG_AL_1/0_Brenau_0_416_0_2_2_2_2

New Line.l(r:p2udm14599-p2ulv18471) Units=km Length=0.0156612 bus1=p2udm14599.1.2 bus2=p2ulv18471.1.2 switch=n enabled=y phases=2 Linecode=1P_UG_AL_1/0_Brenau_0_416_0_2_2_2_2

New Line.l(r:p2udm14599-p2ulv20517) Units=km Length=0.0161158 bus1=p2udm14599.1.2 bus2=p2ulv20517.1.2 switch=n enabled=y phases=2 Linecode=1P_UG_AL_1/0_Brenau_0_416_0_2_2_2_2

New Line.l(r:p2udm14599-p2udt4349lv) Units=km Length=0.0195861 bus1=p2udt4349lv.1.2 bus2=p2udm14599.1.2 switch=n enabled=y phases=2 Linecode=1P_UG_AL_4/0_Sweetbriar_0_416_0_2_2_2_2

New Line.l(r:p2udm14601-p2ulv20734) Units=km Length=0.0155959 bus1=p2udm14601.1.2 bus2=p2ulv20734.1.2 switch=n enabled=y phases=2 Linecode=1P_UG_AL_1/0_Brenau_0_416_0_2_2_2_2

New Line.l(r:p2udm14601-p2ulv21154) Units=km Length=0.0160966 bus1=p2udm14601.1.2 bus2=p2ulv21154.1.2 switch=n enabled=y phases=2 Linecode=1P_UG_AL_1/0_Brenau_0_416_0_2_2_2_2

New Line.l(r:p2udm14601-p2udt4349lv) Units=km Length=0.00980319 bus1=p2udt4349lv.1.2 bus2=p2udm14601.1.2 switch=n enabled=y phases=2 Linecode=1P_UG_AL_4/0_Sweetbriar_0_416_0_2_2_2_2

New Line.l(r:p2udt4350lv-p2ulv6129) Units=km Length=0.0200917 bus1=p2udt4350lv.1.2 bus2=p2ulv6129.1.2 switch=n enabled=y phases=2 Linecode=1P_OH_AL_2/0_Rucina_0_416_0_2_2_2_2

New Line.l(r:p2udt4350lv-p2ulv7101) Units=km Length=0.019831000000000005 bus1=p2udt4350lv.1.2 bus2=p2ulv7101.1.2 switch=n enabled=y phases=2 Linecode=1P_OH_AL_2/0_Rucina_0_416_0_2_2_2_2

New Line.l(r:p2udt4350lv-p2ulv15273) Units=km Length=0.0190522 bus1=p2udt4350lv.1.2 bus2=p2ulv15273.1.2 switch=n enabled=y phases=2 Linecode=1P_OH_AL_2/0_Rucina_0_416_0_2_2_2_2

New Line.l(r:p2udm14606-p2ulv23630) Units=km Length=0.0189764 bus1=p2udm14606.1.2 bus2=p2ulv23630.1.2 switch=n enabled=y phases=2 Linecode=1P_OH_AL_2/0_Rucina_0_416_0_2_2_2_2

New Line.l(r:p2udm14606-p2udt4350lv) Units=km Length=0.0115888 bus1=p2udt4350lv.1.2 bus2=p2udm14606.1.2 switch=n enabled=y phases=2 Linecode=1P_OH_AL_2/0_Rucina_0_416_0_2_2_2_2

New Line.l(r:p2udt4484lv-p2ulv6399) Units=km Length=0.0156593 bus1=p2udt4484lv.1.2 bus2=p2ulv6399.1.2 switch=n enabled=y phases=2 Linecode=1P_OH_AL_2/0_Rucina_0_416_0_2_2_2_2

New Line.l(r:p2udt4484lv-p2ulv11813) Units=km Length=0.0162106 bus1=p2udt4484lv.1.2 bus2=p2ulv11813.1.2 switch=n enabled=y phases=2 Linecode=1P_OH_AL_2/0_Rucina_0_416_0_2_2_2_2

New Line.l(r:p2udt4484lv-p2ulv21155) Units=km Length=0.0174116 bus1=p2udt4484lv.1.2 bus2=p2ulv21155.1.2 switch=n enabled=y phases=2 Linecode=1P_OH_AL_2/0_Rucina_0_416_0_2_2_2_2

New Line.l(r:p2udm14955-p2ulv16661) Units=km Length=0.0174684 bus1=p2udm14955.1.2 bus2=p2ulv16661.1.2 switch=n enabled=y phases=2 Linecode=1P_OH_AL_2/0_Rucina_0_416_0_2_2_2_2

New Line.l(r:p2udm14955-p2udt4484lv) Units=km Length=0.017532100000000002 bus1=p2udt4484lv.1.2 bus2=p2udm14955.1.2 switch=n enabled=y phases=2 Linecode=1P_OH_AL_2/0_Rucina_0_416_0_2_2_2_2

New Line.l(r:p2udm14957-p2ulv22089) Units=km Length=0.0184813 bus1=p2udm14957.1.2 bus2=p2ulv22089.1.2 switch=n enabled=y phases=2 Linecode=1P_UG_AL_1/0_Brenau_0_416_0_2_2_2_2

New Line.l(r:p2udm14957-p2udt4484lv) Units=km Length=0.0175295 bus1=p2udt4484lv.1.2 bus2=p2udm14957.1.2 switch=n enabled=y phases=2 Linecode=1P_OH_AL_2/0_Rucina_0_416_0_2_2_2_2

New Line.l(r:p2udt4606lv-p2ulv10628) Units=km Length=0.0151577 bus1=p2udt4606lv.1.2 bus2=p2ulv10628.1.2 switch=n enabled=y phases=2 Linecode=1P_UG_AL_1/0_Brenau_0_416_0_2_2_2_2

New Line.l(r:p2udm15289-p2ulv6636) Units=km Length=0.0133665 bus1=p2udm15289.1.2 bus2=p2ulv6636.1.2 switch=n enabled=y phases=2 Linecode=1P_UG_AL_1/0_Brenau_0_416_0_2_2_2_2

New Line.l(r:p2udm15289-p2udt4606lv) Units=km Length=0.0092877 bus1=p2udt4606lv.1.2 bus2=p2udm15289.1.2 switch=n enabled=y phases=2 Linecode=1P_UG_AL_1/0_Brenau_0_416_0_2_2_2_2

New Line.l(r:p2udm16630-p2ulv10378) Units=km Length=0.0173706 bus1=p2udm16630.1.2 bus2=p2ulv10378.1.2 switch=n enabled=y phases=2 Linecode=1P_UG_AL_2/0_Converse_0_416_0_2_2_2_2

New Line.l(r:p2udm16628-p2ulv7843) Units=km Length=0.0149208 bus1=p2udm16628.1.2 bus2=p2ulv7843.1.2 switch=n enabled=y phases=2 Linecode=1P_UG_AL_1/0_Brenau_0_416_0_2_2_2_2

New Line.l(r:p2udm16628-p2ulv8080) Units=km Length=0.017394 bus1=p2udm16628.1.2 bus2=p2ulv8080.1.2 switch=n enabled=y phases=2 Linecode=1P_UG_AL_1/0_Brenau_0_416_0_2_2_2_2

New Line.l(r:p2udm16628-p2udm16630) Units=km Length=0.0144846 bus1=p2udm16630.1.2 bus2=p2udm16628.1.2 switch=n enabled=y phases=2 Linecode=1P_UG_AL_4/0_Sweetbriar_0_416_0_2_2_2_2

New Line.l(r:p2udm16630-p2udt5118lv) Units=km Length=0.005748260000000001 bus1=p2udt5118lv.1.2 bus2=p2udm16630.1.2 switch=n enabled=y phases=2 Linecode=1P_UG_AL_4/0_Sweetbriar_0_416_0_2_2_2_2

New Line.l(r:p2udm16631-p2ulv11812) Units=km Length=0.0139505 bus1=p2udm16631.1.2 bus2=p2ulv11812.1.2 switch=n enabled=y phases=2 Linecode=1P_UG_AL_1/0_Brenau_0_416_0_2_2_2_2

New Line.l(r:p2udm16631-p2ulv24108) Units=km Length=0.0173495 bus1=p2udm16631.1.2 bus2=p2ulv24108.1.2 switch=n enabled=y phases=2 Linecode=1P_UG_AL_1/0_Brenau_0_416_0_2_2_2_2

New Line.l(r:p2udm16631-p2udt5118lv) Units=km Length=0.0160063 bus1=p2udt5118lv.1.2 bus2=p2udm16631.1.2 switch=n enabled=y phases=2 Linecode=1P_UG_AL_4/0_Sweetbriar_0_416_0_2_2_2_2

New Line.l(r:p2udt5319lv-p2ulv8315) Units=km Length=0.0164967 bus1=p2udt5319lv.1.2 bus2=p2ulv8315.1.2 switch=n enabled=y phases=2 Linecode=1P_OH_AL_2/0_Rucina_0_416_0_2_2_2_2

New Line.l(r:p2udm17120-p2ulv8536) Units=km Length=0.0172429 bus1=p2udm17120.1.2 bus2=p2ulv8536.1.2 switch=n enabled=y phases=2 Linecode=1P_OH_AL_2/0_Rucina_0_416_0_2_2_2_2

New Line.l(r:p2udm17120-p2udt5319lv) Units=km Length=0.00983911 bus1=p2udt5319lv.1.2 bus2=p2udm17120.1.2 switch=n enabled=y phases=2 Linecode=1P_OH_AL_2/0_Rucina_0_416_0_2_2_2_2

New Line.l(r:p2udt5466lv-p2ulv8751) Units=km Length=0.0191984 bus1=p2udt5466lv.1.2 bus2=p2ulv8751.1.2 switch=n enabled=y phases=2 Linecode=1P_UG_AL_1/0_Brenau_0_416_0_2_2_2_2

New Line.l(r:p2udm17482-p2ulv18910) Units=km Length=0.018174 bus1=p2udm17482.1.2 bus2=p2ulv18910.1.2 switch=n enabled=y phases=2 Linecode=1P_UG_AL_1/0_Brenau_0_416_0_2_2_2_2

New Line.l(r:p2udm17482-p2udt5466lv) Units=km Length=0.00943706 bus1=p2udt5466lv.1.2 bus2=p2udm17482.1.2 switch=n enabled=y phases=2 Linecode=1P_UG_AL_1/0_Brenau_0_416_0_2_2_2_2

New Line.l(r:p2udm17727-p2ulv19631) Units=km Length=0.0169406 bus1=p2udm17727.1.2 bus2=p2ulv19631.1.2 switch=n enabled=y phases=2 Linecode=1P_UG_AL_1/0_Brenau_0_416_0_2_2_2_2

New Line.l(r:p2udm17726-p2ulv12280) Units=km Length=0.016378 bus1=p2udm17726.1.2 bus2=p2ulv12280.1.2 switch=n enabled=y phases=2 Linecode=1P_UG_AL_1/0_Brenau_0_416_0_2_2_2_2

New Line.l(r:p2udm17726-p2udm17727) Units=km Length=0.007401890000000001 bus1=p2udm17727.1.2 bus2=p2udm17726.1.2 switch=n enabled=y phases=2 Linecode=1P_UG_AL_1/0_Brenau_0_416_0_2_2_2_2

New Line.l(r:p2udm17727-p2udt5560lv) Units=km Length=0.007401890000000001 bus1=p2udt5560lv.1.2 bus2=p2udm17727.1.2 switch=n enabled=y phases=2 Linecode=1P_UG_AL_2/0_Converse_0_416_0_2_2_2_2

New Line.l(r:p2udm17728-p2ulv21409) Units=km Length=0.014694 bus1=p2udm17728.1.2 bus2=p2ulv21409.1.2 switch=n enabled=y phases=2 Linecode=1P_UG_AL_1/0_Brenau_0_416_0_2_2_2_2

New Line.l(r:p2udm17725-p2ulv8966) Units=km Length=0.014868 bus1=p2udm17725.1.2 bus2=p2ulv8966.1.2 switch=n enabled=y phases=2 Linecode=1P_UG_AL_1/0_Brenau_0_416_0_2_2_2_2

New Line.l(r:p2udm17725-p2udm17728) Units=km Length=0.00764267 bus1=p2udm17728.1.2 bus2=p2udm17725.1.2 switch=n enabled=y phases=2 Linecode=1P_UG_AL_1/0_Brenau_0_416_0_2_2_2_2

New Line.l(r:p2udm17728-p2udt5560lv) Units=km Length=0.0076459300000000004 bus1=p2udt5560lv.1.2 bus2=p2udm17728.1.2 switch=n enabled=y phases=2 Linecode=1P_UG_AL_4/0_Sweetbriar_0_416_0_2_2_2_2

New Line.l(r:p2udt5738lv-p2ulv20065) Units=km Length=0.017164600000000002 bus1=p2udt5738lv.1.2 bus2=p2ulv20065.1.2 switch=n enabled=y phases=2 Linecode=1P_UG_AL_1/0_Brenau_0_416_0_2_2_2_2

New Line.l(r:p2udm18169-p2ulv9446) Units=km Length=0.017281 bus1=p2udm18169.1.2 bus2=p2ulv9446.1.2 switch=n enabled=y phases=2 Linecode=1P_UG_AL_1/0_Brenau_0_416_0_2_2_2_2

New Line.l(r:p2udm18169-p2udt5738lv) Units=km Length=0.0179545 bus1=p2udt5738lv.1.2 bus2=p2udm18169.1.2 switch=n enabled=y phases=2 Linecode=1P_UG_AL_1/0_Brenau_0_416_0_2_2_2_2

New Line.l(r:p2udm18171-p2ulv16917) Units=km Length=0.0159017 bus1=p2udm18171.1.2 bus2=p2ulv16917.1.2 switch=n enabled=y phases=2 Linecode=1P_UG_AL_1/0_Brenau_0_416_0_2_2_2_2

New Line.l(r:p2udm18170-p2ulv11580) Units=km Length=0.0157714 bus1=p2udm18170.1.2 bus2=p2ulv11580.1.2 switch=n enabled=y phases=2 Linecode=1P_UG_AL_1/0_Brenau_0_416_0_2_2_2_2

New Line.l(r:p2udm18170-p2udm18171) Units=km Length=0.0219405 bus1=p2udm18171.1.2 bus2=p2udm18170.1.2 switch=n enabled=y phases=2 Linecode=1P_UG_AL_1/0_Brenau_0_416_0_2_2_2_2

New Line.l(r:p2udm18171-p2udt5738lv) Units=km Length=0.00688675 bus1=p2udt5738lv.1.2 bus2=p2udm18171.1.2 switch=n enabled=y phases=2 Linecode=1P_UG_AL_2/0_Converse_0_416_0_2_2_2_2

New Line.l(r:p2udt5906lv-p2ulv9904) Units=km Length=0.0126506 bus1=p2udt5906lv.1.2 bus2=p2ulv9904.1.2 switch=n enabled=y phases=2 Linecode=1P_UG_AL_1/0_Brenau_0_416_0_2_2_2_2

New Line.l(r:p2udm18547-p2ulv15048) Units=km Length=0.0164309 bus1=p2udm18547.1.2 bus2=p2ulv15048.1.2 switch=n enabled=y phases=2 Linecode=1P_UG_AL_1/0_Brenau_0_416_0_2_2_2_2

New Line.l(r:p2udm18547-p2udt5906lv) Units=km Length=0.00976402 bus1=p2udt5906lv.1.2 bus2=p2udm18547.1.2 switch=n enabled=y phases=2 Linecode=1P_UG_AL_1/0_Brenau_0_416_0_2_2_2_2

New Line.l(r:p2udt5994lv-p2ulv10149) Units=km Length=0.0162478 bus1=p2udt5994lv.1.2 bus2=p2ulv10149.1.2 switch=n enabled=y phases=2 Linecode=1P_UG_AL_1/0_Brenau_0_416_0_2_2_2_2

New Line.l(r:p2udt6072lv-p2ulv10376) Units=km Length=0.015472 bus1=p2udt6072lv.1.2 bus2=p2ulv10376.1.2 switch=n enabled=y phases=2 Linecode=1P_UG_AL_1/0_Brenau_0_416_0_2_2_2_2

New Line.l(r:p2udt6072lv-p2ulv16659) Units=km Length=0.015215500000000002 bus1=p2udt6072lv.1.2 bus2=p2ulv16659.1.2 switch=n enabled=y phases=2 Linecode=1P_UG_AL_1/0_Brenau_0_416_0_2_2_2_2

New Line.l(r:p2udm18927-p2ulv13236) Units=km Length=0.0161738 bus1=p2udm18927.1.2 bus2=p2ulv13236.1.2 switch=n enabled=y phases=2 Linecode=1P_UG_AL_1/0_Brenau_0_416_0_2_2_2_2

New Line.l(r:p2udm18927-p2udt6072lv) Units=km Length=0.009280010000000002 bus1=p2udt6072lv.1.2 bus2=p2udm18927.1.2 switch=n enabled=y phases=2 Linecode=1P_UG_AL_1/0_Brenau_0_416_0_2_2_2_2

New Line.l(r:p2udm18929-p2ulv20064) Units=km Length=0.0164598 bus1=p2udm18929.1.2 bus2=p2ulv20064.1.2 switch=n enabled=y phases=2 Linecode=1P_UG_AL_1/0_Brenau_0_416_0_2_2_2_2

New Line.l(r:p2udm18929-p2udt6072lv) Units=km Length=0.00844597 bus1=p2udt6072lv.1.2 bus2=p2udm18929.1.2 switch=n enabled=y phases=2 Linecode=1P_UG_AL_1/0_Brenau_0_416_0_2_2_2_2

New Line.l(r:p2udt6160lv-p2ulv14586) Units=km Length=0.0163615 bus1=p2udt6160lv.1.2 bus2=p2ulv14586.1.2 switch=n enabled=y phases=2 Linecode=1P_UG_AL_1/0_Brenau_0_416_0_2_2_2_2

New Line.l(r:p2udm19125-p2ulv10624) Units=km Length=0.0161078 bus1=p2udm19125.1.2 bus2=p2ulv10624.1.2 switch=n enabled=y phases=2 Linecode=1P_UG_AL_1/0_Brenau_0_416_0_2_2_2_2

New Line.l(r:p2udm19130-p2ulv19632) Units=km Length=0.0149463 bus1=p2udm19130.1.2 bus2=p2ulv19632.1.2 switch=n enabled=y phases=2 Linecode=1P_UG_AL_1/0_Brenau_0_416_0_2_2_2_2

New Line.l(r:p2udm19126-p2ulv12766) Units=km Length=0.0150212 bus1=p2udm19126.1.2 bus2=p2ulv12766.1.2 switch=n enabled=y phases=2 Linecode=1P_UG_AL_1/0_Brenau_0_416_0_2_2_2_2

New Line.l(r:p2udm19129-p2ulv17372) Units=km Length=0.0158433 bus1=p2udm19129.1.2 bus2=p2ulv17372.1.2 switch=n enabled=y phases=2 Linecode=1P_UG_AL_1/0_Brenau_0_416_0_2_2_2_2

New Line.l(r:p2udm19126-p2udm19129) Units=km Length=0.00835223 bus1=p2udm19126.1.2 bus2=p2udm19129.1.2 switch=n enabled=y phases=2 Linecode=1P_UG_AL_1/0_Brenau_0_416_0_2_2_2_2

New Line.l(r:p2udm19126-p2udm19130) Units=km Length=0.00692546 bus1=p2udm19130.1.2 bus2=p2udm19126.1.2 switch=n enabled=y phases=2 Linecode=1P_UG_AL_4/0_Sweetbriar_0_416_0_2_2_2_2

New Line.l(r:p2udm19125-p2udm19130) Units=km Length=0.00692226 bus1=p2udm19125.1.2 bus2=p2udm19130.1.2 switch=n enabled=y phases=2 Linecode=1P_UG_AL_4/0_Sweetbriar_0_416_0_2_2_2_2

New Line.l(r:p2udm19125-p2udt6160lv) Units=km Length=0.00692546 bus1=p2udt6160lv.1.2 bus2=p2udm19125.1.2 switch=n enabled=y phases=2 Linecode=1P_UG_AL_4/0_Sweetbriar_0_416_0_2_2_2_2

New Line.l(r:p2udm19128-p2ulv16216) Units=km Length=0.0186104 bus1=p2udm19128.1.2 bus2=p2ulv16216.1.2 switch=n enabled=y phases=2 Linecode=1P_UG_AL_1/0_Brenau_0_416_0_2_2_2_2

New Line.l(r:p2udm19128-p2udt6160lv) Units=km Length=0.0608557 bus1=p2udt6160lv.1.2 bus2=p2udm19128.1.2 switch=n enabled=y phases=2 Linecode=1P_UG_AL_1/0_Brenau_0_416_0_2_2_2_2

New Line.l(r:p2udt6379lv-p2ulv11344) Units=km Length=0.0177584 bus1=p2udt6379lv.1.2 bus2=p2ulv11344.1.2 switch=n enabled=y phases=2 Linecode=1P_OH_AL_2/0_Rucina_0_416_0_2_2_2_2

New Line.l(r:p2udt6708lv-p2ulv12515) Units=km Length=0.035801 bus1=p2udt6708lv.1.2 bus2=p2ulv12515.1.2 switch=n enabled=y phases=2 Linecode=1P_OH_AL_4/0_Zuzara_0_416_0_2_2_2_2

New Line.l(r:p2udt6708lv-p2ulv23233) Units=km Length=0.035801 bus1=p2udt6708lv.1.2 bus2=p2ulv23233.1.2 switch=n enabled=y phases=2 Linecode=1P_OH_AL_4/0_Zuzara_0_416_0_2_2_2_2

New Line.l(r:p2udt6840lv-p2ulv13009) Units=km Length=0.01154 bus1=p2udt6840lv.1.2 bus2=p2ulv13009.1.2 switch=n enabled=y phases=2 Linecode=1P_UG_AL_1/0_Brenau_0_416_0_2_2_2_2

New Line.l(r:p2udm20501-p2ulv21410) Units=km Length=0.0156402 bus1=p2udm20501.1.2 bus2=p2ulv21410.1.2 switch=n enabled=y phases=2 Linecode=1P_UG_AL_1/0_Brenau_0_416_0_2_2_2_2

New Line.l(r:p2udm20501-p2udt6840lv) Units=km Length=0.0380224 bus1=p2udt6840lv.1.2 bus2=p2udm20501.1.2 switch=n enabled=y phases=2 Linecode=1P_UG_AL_1/0_Brenau_0_416_0_2_2_2_2

New Line.l(r:p2udt6841lv-p2ulv14149) Units=km Length=0.0147201 bus1=p2udt6841lv.1.2 bus2=p2ulv14149.1.2 switch=n enabled=y phases=2 Linecode=1P_UG_AL_1/0_Brenau_0_416_0_2_2_2_2

New Line.l(r:p2udm20502-p2ulv13010) Units=km Length=0.0187792 bus1=p2udm20502.1.2 bus2=p2ulv13010.1.2 switch=n enabled=y phases=2 Linecode=1P_UG_AL_1/0_Brenau_0_416_0_2_2_2_2

New Line.l(r:p2udm20505-p2ulv23011) Units=km Length=0.0169049 bus1=p2udm20505.1.2 bus2=p2ulv23011.1.2 switch=n enabled=y phases=2 Linecode=1P_UG_AL_1/0_Brenau_0_416_0_2_2_2_2

New Line.l(r:p2udm20502-p2udm20505) Units=km Length=0.00789649 bus1=p2udm20502.1.2 bus2=p2udm20505.1.2 switch=n enabled=y phases=2 Linecode=1P_UG_AL_1/0_Brenau_0_416_0_2_2_2_2

New Line.l(r:p2udm20502-p2udt6841lv) Units=km Length=0.00845319 bus1=p2udt6841lv.1.2 bus2=p2udm20502.1.2 switch=n enabled=y phases=2 Linecode=1P_UG_AL_2/0_Converse_0_416_0_2_2_2_2

New Line.l(r:p2udm20503-p2ulv13918) Units=km Length=0.0169315 bus1=p2udm20503.1.2 bus2=p2ulv13918.1.2 switch=n enabled=y phases=2 Linecode=1P_UG_AL_1/0_Brenau_0_416_0_2_2_2_2

New Line.l(r:p2udm20503-p2udt6841lv) Units=km Length=0.00968979 bus1=p2udt6841lv.1.2 bus2=p2udm20503.1.2 switch=n enabled=y phases=2 Linecode=1P_UG_AL_1/0_Brenau_0_416_0_2_2_2_2

New Line.l(r:p2udt7234lv-p2ulv14589) Units=km Length=0.0188292 bus1=p2udt7234lv.1.2 bus2=p2ulv14589.1.2 switch=n enabled=y phases=2 Linecode=1P_OH_AL_2/0_Rucina_0_416_0_2_2_2_2

New Line.l(r:p2udt7432lv-p2ulv15500) Units=km Length=0.016494000000000005 bus1=p2udt7432lv.1.2 bus2=p2ulv15500.1.2 switch=n enabled=y phases=2 Linecode=1P_OH_AL_2/0_Rucina_0_416_0_2_2_2_2

New Line.l(r:p2udt7763lv-p2ulv16912) Units=km Length=0.001 bus1=p2udt7763lv.1.2 bus2=p2ulv16912.1.2 switch=n enabled=y phases=2 Linecode=1P_OH_AL_4_Periwinkle_0_416_0_2_2_2_2

New Line.l(r:p2udt8551lv-p2ulv21411) Units=km Length=0.0124868 bus1=p2udt8551lv.1.2 bus2=p2ulv21411.1.2 switch=n enabled=y phases=2 Linecode=1P_UG_AL_1/0_Brenau_0_416_0_2_2_2_2

New Line.l(r:p2udt2793-p2udt6708) Units=km Length=0.06912430000000001 bus1=p2udt2793-p2udt6708x.1 bus2=p2udt2793.1 switch=n enabled=y phases=1 Linecode=1P_OH_AL_ACSR_#2_Sparrow_12_47_0_1_1_1_1

New Line.l(r:p2udt5560-p2udt6160) Units=km Length=0.0305772 bus1=p2udt5560-p2udt6160xx.3 bus2=p2udt5560-p2udt6160x.3 switch=n enabled=y phases=1 Linecode=1P_UG_AL_#2_15_12_47_0_1_1_1_1

New Line.l(r:p2udt6072-p2udt6160) Units=km Length=0.0543696 bus1=p2udt6072-p2udt6160x.3 bus2=p2udt6072-p2udt6160xx.3 switch=n enabled=y phases=1 Linecode=1P_UG_AL_#2_15_12_47_0_1_1_1_1

New Line.l(r:p2udt4347-p2udt6072) Units=km Length=0.027926700000000002 bus1=p2udt4347-p2udt6072x.3 bus2=p2udt4347-p2udt6072xx.3 switch=n enabled=y phases=1 Linecode=1P_UG_AL_#2_15_12_47_0_1_1_1_1

New Line.l(r:p2udt4347-p2udt739) Units=km Length=0.0377878 bus1=p2udt4347-p2udt739xx.3 bus2=p2udt4347-p2udt739x.3 switch=n enabled=y phases=1 Linecode=1P_UG_AL_#2_15_12_47_0_1_1_1_1

New Line.l(r:p2udt4348-p2udt739) Units=km Length=0.0472401 bus1=p2udt4348-p2udt739x.3 bus2=p2udt4348-p2udt739xx.3 switch=n enabled=y phases=1 Linecode=1P_UG_AL_#2_15_12_47_0_1_1_1_1

New Line.l(r:p2udt4348-p2udt740) Units=km Length=0.0520139 bus1=p2udt4348-p2udt740x.3 bus2=p2udt4348-p2udt740xx.3 switch=n enabled=y phases=1 Linecode=1P_UG_AL_#2_15_12_47_0_1_1_1_1

New Line.l(r:p2udt4348-p2udt8551) Units=km Length=0.0186311 bus1=p2udt4348-p2udt8551xx.3 bus2=p2udt4348-p2udt8551x.3 switch=n enabled=y phases=1 Linecode=1P_UG_AL_#2_15_12_47_0_1_1_1_1

New Line.l(r:p2udt5466-p2udt8551) Units=km Length=0.0787986 bus1=p2udt5466-p2udt8551x.3 bus2=p2udt5466-p2udt8551xx.3 switch=n enabled=y phases=1 Linecode=1P_UG_AL_#2_15_12_47_0_1_1_1_1

New Line.l(r:p2udt539-p2udt5466) Units=km Length=0.0381896 bus1=p2udt539-p2udt5466x.3 bus2=p2udt539-p2udt5466xx.3 switch=n enabled=y phases=1 Linecode=1P_UG_AL_#2_15_12_47_0_1_1_1_1

New Line.l(r:p2udt1590-p2udt539) Units=km Length=0.0221702 bus1=p2udt1590-p2udt539x.3 bus2=p2udt1590-p2udt539xx.3 switch=n enabled=y phases=1 Linecode=1P_UG_AL_#2_15_12_47_0_1_1_1_1

New Line.l(r:p2udt1590-p2udt3682) Units=km Length=0.048269 bus1=p2udt1590-p2udt3682xx.3 bus2=p2udt1590-p2udt3682x.3 switch=n enabled=y phases=1 Linecode=1P_UG_AL_#2_15_12_47_0_1_1_1_1

New Line.l(r:p2udt3259-p2udt5906) Units=km Length=0.0390569 bus1=p2udt3259-p2udt5906xx.2 bus2=p2udt3259-p2udt5906x.2 switch=n enabled=y phases=1 Linecode=1P_UG_AL_#2_15_12_47_0_1_1_1_1

New Line.l(r:p2udt2795-p2udt5906) Units=km Length=0.076355 bus1=p2udt2795-p2udt5906x.2 bus2=p2udt2795-p2udt5906xx.2 switch=n enabled=y phases=1 Linecode=1P_UG_AL_#2_15_12_47_0_1_1_1_1

New Line.l(r:p2udt5319-p2udt7432) Units=km Length=0.0281403 bus1=p2udt5319.2 bus2=p2udt7432.2 switch=n enabled=y phases=1 Linecode=1P_OH_AL_ACSR_#2_Sparrow_12_47_0_1_1_1_1

New Line.l(r:p2udt4349-p2udt5319) Units=km Length=0.0588043 bus1=p2udt4349.2 bus2=p2udt5319.2 switch=n enabled=y phases=1 Linecode=1P_OH_AL_ACSR_#2_Sparrow_12_47_0_1_1_1_1

New Line.l(r:p2udt3120-p2udt4349) Units=km Length=0.0391823 bus1=p2udt3120-p2udt4349x.2 bus2=p2udt3120-p2udt4349xx.2 switch=n enabled=y phases=1 Linecode=1P_UG_AL_#2_15_12_47_0_1_1_1_1

New Line.l(r:p2udt1406-p2udt3120) Units=km Length=0.0587681 bus1=p2udt1406-p2udt3120x.2 bus2=p2udt1406-p2udt3120xx.2 switch=n enabled=y phases=1 Linecode=1P_UG_AL_#2_15_12_47_0_1_1_1_1

New Line.l(r:p2udt1406-p2udt1589) Units=km Length=0.04896520000000001 bus1=p2udt1406-p2udt1589xx.2 bus2=p2udt1406-p2udt1589x.2 switch=n enabled=y phases=1 Linecode=1P_UG_AL_#2_15_12_47_0_1_1_1_1

New Line.l(r:p2udt1589-p2udt6840) Units=km Length=0.039182 bus1=p2udt1589-p2udt6840xx.2 bus2=p2udt1589-p2udt6840x.2 switch=n enabled=y phases=1 Linecode=1P_UG_AL_#2_15_12_47_0_1_1_1_1

New Line.l(r:p2udt2795-p2udt6840) Units=km Length=0.0666485 bus1=p2udt2795-p2udt6840x.2 bus2=p2udt2795-p2udt6840xx.2 switch=n enabled=y phases=1 Linecode=1P_UG_AL_#2_15_12_47_0_1_1_1_1

New Line.l(r:p2udt1407-p2udt2795) Units=km Length=0.028237300000000003 bus1=p2udt1407-p2udt2795x.2 bus2=p2udt1407-p2udt2795xx.2 switch=n enabled=y phases=1 Linecode=1P_UG_AL_#2_15_12_47_0_1_1_1_1

New Line.l(r:p2udt1407-p2udt1972) Units=km Length=0.047505 bus1=p2udt1407-p2udt1972xx.2 bus2=p2udt1407-p2udt1972x.2 switch=n enabled=y phases=1 Linecode=1P_UG_AL_#2_15_12_47_0_1_1_1_1

New Line.l(r:p2udt1972-p2udt5994) Units=km Length=0.0495226 bus1=p2udt1972-p2udt5994xx.2 bus2=p2udt1972-p2udt5994x.2 switch=n enabled=y phases=1 Linecode=1P_UG_AL_#2_15_12_47_0_1_1_1_1

New Line.l(r:p2udt4606-p2udt5994) Units=km Length=0.0278747 bus1=p2udt4606-p2udt5994x.2 bus2=p2udt4606-p2udt5994xx.2 switch=n enabled=y phases=1 Linecode=1P_UG_AL_#2_15_12_47_0_1_1_1_1

New Line.l(r:p2udt1591-p2udt4606) Units=km Length=0.0637754 bus1=p2udt1591-p2udt4606x.2 bus2=p2udt1591-p2udt4606xx.2 switch=n enabled=y phases=1 Linecode=1P_UG_AL_#2_15_12_47_0_1_1_1_1

New Line.l(r:p2udt5738-p2udt6841) Units=km Length=0.0515806 bus1=p2udt5738-p2udt6841x.2 bus2=p2udt5738-p2udt6841xx.2 switch=n enabled=y phases=1 Linecode=1P_UG_AL_#2_15_12_47_0_1_1_1_1

New Line.l(r:p2udt1591-p2udt5738) Units=km Length=0.09428570000000001 bus1=p2udt1591-p2udt5738x.2 bus2=p2udt1591-p2udt5738xx.2 switch=n enabled=y phases=1 Linecode=1P_UG_AL_#2_15_12_47_0_1_1_1_1

New Line.l(r:p2udt1591-p2udt5118) Units=km Length=0.058303 bus1=p2udt1591-p2udt5118xx.2 bus2=p2udt1591-p2udt5118x.2 switch=n enabled=y phases=1 Linecode=1P_UG_AL_#2_15_12_47_0_1_1_1_1

New Line.l(r:p2udt5118-p2udt541) Units=km Length=0.0593784 bus1=p2udt5118-p2udt541xx.2 bus2=p2udt5118-p2udt541x.2 switch=n enabled=y phases=1 Linecode=1P_UG_AL_#2_15_12_47_0_1_1_1_1

New Line.l(r:p2udt1179-p2udt541) Units=km Length=0.0611705 bus1=p2udt1179-p2udt541xx.2 bus2=p2udt1179-p2udt541xxx.2 switch=n enabled=y phases=1 Linecode=1P_UG_AL_#2_15_12_47_0_1_1_1_1

New Line.l(r:p2udt1408-p2udt334) Units=km Length=0.001 bus1=p2udt1408-p2udt334x.3 bus2=p2udt1408-p2udt334xx.3 switch=n enabled=y phases=1 Linecode=1P_UG_AL_#2_15_12_47_0_1_1_1_1

New Line.l(r:p2udt1408-p2udt1973) Units=km Length=0.025880700000000003 bus1=p2udt1408-p2udt1973xx.3 bus2=p2udt1408-p2udt1973x.3 switch=n enabled=y phases=1 Linecode=1P_UG_AL_#2_15_12_47_0_1_1_1_1

New Line.l(r:p2udt1409-p2udt1973) Units=km Length=0.06197 bus1=p2udt1409-p2udt1973x.3 bus2=p2udt1409-p2udt1973xx.3 switch=n enabled=y phases=1 Linecode=1P_UG_AL_#2_15_12_47_0_1_1_1_1

New Line.l(r:p2udt1409-p2udt542) Units=km Length=0.0483073 bus1=p2udt1409-p2udt542xx.3 bus2=p2udt1409-p2udt542x.3 switch=n enabled=y phases=1 Linecode=1P_UG_AL_#2_15_12_47_0_1_1_1_1

New Line.l(r:p2udt3409-p2udt542) Units=km Length=0.0573705 bus1=p2udt3409-p2udt542x.3 bus2=p2udt3409-p2udt542xx.3 switch=n enabled=y phases=1 Linecode=1P_UG_AL_#2_15_12_47_0_1_1_1_1

New Line.l(r:p2udt1402-p2udt3409) Units=km Length=0.0117207 bus1=p2udt1402-p2udt3409x.3 bus2=p2udt1402-p2udt3409xx.3 switch=n enabled=y phases=1 Linecode=1P_UG_AL_#2_15_12_47_0_1_1_1_1

New Line.l(r:p2udt1179-p2udt1402) Units=km Length=0.08644690000000001 bus1=p2udt1179-p2udt1402xx.3 bus2=p2udt1179-p2udt1402xxx.3 switch=n enabled=y phases=1 Linecode=1P_UG_AL_#2_15_12_47_0_1_1_1_1

New Line.l(r:p2udt540-p2udt974) Units=km Length=0.0552542 bus1=p2udt974.1 bus2=p2udt540.1 switch=n enabled=y phases=1 Linecode=1P_OH_AL_ACSR_#2_Sparrow_12_47_0_1_1_1_1

New Line.l(r:p2udt974-p2udt975) Units=km Length=0.05499910000000001 bus1=p2udt975.1 bus2=p2udt974.1 switch=n enabled=y phases=1 Linecode=1P_OH_AL_ACSR_#2_Sparrow_12_47_0_1_1_1_1

New Line.l(r:p2udt6379-p2udt975) Units=km Length=0.029889300000000004 bus1=p2udt6379-p2udt975x.1 bus2=p2udt975.1 switch=n enabled=y phases=1 Linecode=1P_OH_AL_ACSR_#2_Sparrow_12_47_0_1_1_1_1

New Line.l(r:p2udt6708-p2udt7763) Units=km Length=0.119722 bus1=p2udt6708-p2udt7763x.1 bus2=p2udt7763.1 switch=n enabled=y phases=1 Linecode=1P_OH_AL_ACSR_#2_Sparrow_12_47_0_1_1_1_1

New Line.l(r:p2udt1179-p2udt4484) Units=km Length=0.0536357 bus1=p2udt4484.1.2.3 bus2=p2udt1179.1.2.3 switch=n enabled=y phases=3 Linecode=3P_OH_AL_ACSR_4/0_Penguin_12_47_0_3_3_3_3

New Line.l(r:p2udt4484-p2udt7234) Units=km Length=0.182239 bus1=p2udt7234.1.2.3 bus2=p2udt4484.1.2.3 switch=n enabled=y phases=3 Linecode=3P_OH_AL_ACSR_4/0_Penguin_12_47_0_3_3_3_3

New Line.l(r:p2udt4350-p2udt7234) Units=km Length=0.0421689 bus1=p2udt4350.1.2.3 bus2=p2udt7234.1.2.3 switch=n enabled=y phases=3 Linecode=3P_OH_AL_ACSR_4/0_Penguin_12_47_0_3_3_3_3

New Line.l(r:p2udt3683-p2udt4350) Units=km Length=0.0115822 bus1=p2udt3683.1.2.3 bus2=p2udt4350.1.2.3 switch=n enabled=y phases=3 Linecode=3P_OH_AL_ACSR_4/0_Penguin_12_47_0_3_3_3_3

New Line.l(r:p2udt333-p2udt3683) Units=km Length=0.0541793 bus1=p2udt333.1.2.3 bus2=p2udt3683.1.2.3 switch=n enabled=y phases=3 Linecode=3P_OH_AL_ACSR_4/0_Penguin_12_47_0_3_3_3_3

New Line.l(r:p2udt333-p2udt6379) Units=km Length=0.0319132 bus1=p2udt6379.1.2.3 bus2=p2udt333.1.2.3 switch=n enabled=y phases=3 Linecode=3P_OH_AL_ACSR_4/0_Penguin_12_47_0_3_3_3_3

New Line.l(r:p2udt3817-p2udt6379) Units=km Length=0.018529 bus1=p2udt3817.1.2.3 bus2=p2udt6379.1.2.3 switch=n enabled=y phases=3 Linecode=3P_OH_AL_ACSR_4/0_Penguin_12_47_0_3_3_3_3

New Line.l(r:p2udt3817-p2udt741) Units=km Length=0.0462977 bus1=p2udt3817-p2udt741xx.1.2.3 bus2=p2udt3817-p2udt741x.1.2.3 switch=n enabled=y phases=3 Linecode=3P_UG_AL_4/0_25_12_47_0_3_3_3_3

New Line.l(r:p2udt3260-p2udt741) Units=km Length=0.0370399 bus1=p2udt3260-p2udt741x.1.2.3 bus2=p2udt3260-p2udt741xx.1.2.3 switch=n enabled=y phases=3 Linecode=3P_UG_AL_4/0_25_12_47_0_3_3_3_3

New Line.l(r:p2udt3260-p2udt3682) Units=km Length=0.0367574 bus1=p2udt3260-p2udt3682xx.1.2.3 bus2=p2udt3260-p2udt3682x.1.2.3 switch=n enabled=y phases=3 Linecode=3P_UG_AL_4/0_25_12_47_0_3_3_3_3

New Line.l(r:p2udt3682-p2udt6708)_s0 Units=km Length=0.12164500000000002 bus1=p2udt3682-p2udt6708xxx.1.2.3 bus2=p2udt3682-p2udt6708xx.1.2.3 switch=n enabled=y phases=3 Linecode=3P_UG_AL_4/0_25_12_47_0_3_3_3_3

New Line.l(r:p2udt3682-p2udt6708)_s1 Units=km Length=0.329736 bus1=p2udt3682-p2udt6708xx.1.2.3 bus2=p2udt3682-p2udt6708x.1.2.3 switch=n enabled=y phases=3 Linecode=3P_OH_AL_ACSR_4/0_Penguin_12_47_0_3_3_3_3

New Line.l(r:p2udt1401-p2udt6708) Units=km Length=0.15836700000000004 bus1=p2udt1401.1.2.3 bus2=p2udt6708.1.2.3 switch=n enabled=y phases=3 Linecode=3P_OH_AL_ACSR_4/0_Penguin_12_47_0_3_3_3_3

New Line.l(r:p2udt1401-p2udt534) Units=km Length=0.138551 bus1=p2udt534.1.2.3 bus2=p2udt1401.1.2.3 switch=n enabled=y phases=3 Linecode=3P_OH_AL_ACSR_4/0_Penguin_12_47_0_3_3_3_3

New Line.l(r:p2udt1586-p2udt534)_s0 Units=km Length=0.3530920000000001 bus1=p2udt1586.1.2.3 bus2=p2udt1586-p2udt534x.1.2.3 switch=n enabled=y phases=3 Linecode=3P_OH_AL_ACSR_4/0_Penguin_12_47_0_3_3_3_3

New Line.l(r:p2udt1586-p2udt534)_s1 Units=km Length=0.0436347 bus1=p2udt1586-p2udt534x.1.2.3 bus2=p2udt534.1.2.3 switch=n enabled=y phases=3 Linecode=3P_OH_AL_ACSR_4/0_Penguin_12_47_0_3_3_3_3

New Line.l(r:p2udt1586-p2udt2514) Units=km Length=0.315066 bus1=p2udt2514.1.2.3 bus2=p2udt1586.1.2.3 switch=n enabled=y phases=3 Linecode=3P_OH_AL_ACSR_4/0_Penguin_12_47_0_3_3_3_3

New Line.l(r:p2udt2514-p2uhs0_1247)_s1 Units=km Length=0.7171130000000001 bus1=p2udt2514-p2uhs0_1247x.1.2.3 bus2=p2udt2514.1.2.3 switch=n enabled=y phases=3 Linecode=3P_OH_AL_ACSR_4/0_Penguin_12_47_0_3_3_3_3

New Line.l(r:p2udt2514-p2udt3815) Units=km Length=0.366439 bus1=p2udt2514-p2udt3815x.1.2.3 bus2=p2udt2514.1.2.3 switch=n enabled=y phases=3 Linecode=3P_OH_AL_ACSR_1033kcmil_Curlew_12.47_1_3_3_3_3

New Line.padswitch(r:p2udt5560-p2udt6160)p2u_35615 Units=km Length=0.001 bus1=p2udt6160.3 bus2=p2udt5560-p2udt6160xx.3 switch=y enabled=y phases=1 Linecode=padswitch_1_1_1_1

New Line.padswitch(r:p2udt5560-p2udt6160)p2u_35616 Units=km Length=0.001 bus1=p2udt5560-p2udt6160x.3 bus2=p2udt5560.3 switch=y enabled=y phases=1 Linecode=padswitch_1_2_1_1_1

New Line.padswitch(r:p2udt6072-p2udt6160)p2u_35617 Units=km Length=0.001 bus1=p2udt6072.3 bus2=p2udt6072-p2udt6160x.3 switch=y enabled=y phases=1 Linecode=padswitch_1_2_1_0_1_1

New Line.padswitch(r:p2udt6072-p2udt6160)p2u_35618 Units=km Length=0.001 bus1=p2udt6072-p2udt6160xx.3 bus2=p2udt6160.3 switch=y enabled=y phases=1 Linecode=padswitch_1_2_1_0_1_1

New Line.padswitch(r:p2udt4347-p2udt6072)p2u_35619 Units=km Length=0.001 bus1=p2udt4347.3 bus2=p2udt4347-p2udt6072x.3 switch=y enabled=y phases=1 Linecode=padswitch_1_2_1_0_1_0_1

New Line.padswitch(r:p2udt4347-p2udt6072)p2u_35620 Units=km Length=0.001 bus1=p2udt4347-p2udt6072xx.3 bus2=p2udt6072.3 switch=y enabled=y phases=1 Linecode=padswitch_1_2_1_0_1_1

New Line.padswitch(r:p2udt4347-p2udt739)p2u_35621 Units=km Length=0.001 bus1=p2udt739.3 bus2=p2udt4347-p2udt739xx.3 switch=y enabled=y phases=1 Linecode=padswitch_1_2_1_0_1_1

New Line.padswitch(r:p2udt4347-p2udt739)p2u_35622 Units=km Length=0.001 bus1=p2udt4347-p2udt739x.3 bus2=p2udt4347.3 switch=y enabled=y phases=1 Linecode=padswitch_1_2_1_0_1_1

New Line.padswitch(r:p2udt4348-p2udt739)p2u_35623 Units=km Length=0.001 bus1=p2udt4348.3 bus2=p2udt4348-p2udt739x.3 switch=y enabled=y phases=1 Linecode=padswitch_1_2_1_0_1_1

New Line.padswitch(r:p2udt4348-p2udt739)p2u_35624 Units=km Length=0.001 bus1=p2udt4348-p2udt739xx.3 bus2=p2udt739.3 switch=y enabled=y phases=1 Linecode=padswitch_1_2_1_0_1_1

New Line.padswitch(r:p2udt4348-p2udt740)p2u_35625 Units=km Length=0.001 bus1=p2udt4348.3 bus2=p2udt4348-p2udt740x.3 switch=y enabled=y phases=1 Linecode=padswitch_1_2_1_0_1_1

New Line.padswitch(r:p2udt4348-p2udt740)p2u_35626 Units=km Length=0.001 bus1=p2udt4348-p2udt740xx.3 bus2=p2udt740.3 switch=y enabled=y phases=1 Linecode=padswitch_1_2_1_0_1_0_1_0

New Line.padswitch(r:p2udt4348-p2udt8551)p2u_35627 Units=km Length=0.001 bus1=p2udt8551.3 bus2=p2udt4348-p2udt8551xx.3 switch=y enabled=y phases=1 Linecode=padswitch_1_2_1_0_1_0_1_0

New Line.padswitch(r:p2udt4348-p2udt8551)p2u_35628 Units=km Length=0.001 bus1=p2udt4348-p2udt8551x.3 bus2=p2udt4348.3 switch=y enabled=y phases=1 Linecode=padswitch_1_2_1_0_1_1

New Line.padswitch(r:p2udt5466-p2udt8551)p2u_35629 Units=km Length=0.001 bus1=p2udt5466.3 bus2=p2udt5466-p2udt8551x.3 switch=y enabled=y phases=1 Linecode=padswitch_1_2_1_0_1_1

New Line.padswitch(r:p2udt5466-p2udt8551)p2u_35630 Units=km Length=0.001 bus1=p2udt5466-p2udt8551xx.3 bus2=p2udt8551.3 switch=y enabled=y phases=1 Linecode=padswitch_1_2_1_0_1_1

New Line.padswitch(r:p2udt539-p2udt5466)p2u_35631 Units=km Length=0.001 bus1=p2udt539.3 bus2=p2udt539-p2udt5466x.3 switch=y enabled=y phases=1 Linecode=padswitch_1_2_1_0_1_1

New Line.padswitch(r:p2udt539-p2udt5466)p2u_35632 Units=km Length=0.001 bus1=p2udt539-p2udt5466xx.3 bus2=p2udt5466.3 switch=y enabled=y phases=1 Linecode=padswitch_1_2_1_0_1_1

New Line.padswitch(r:p2udt1590-p2udt539)p2u_35633 Units=km Length=0.001 bus1=p2udt1590.3 bus2=p2udt1590-p2udt539x.3 switch=y enabled=y phases=1 Linecode=padswitch_1_2_1_0_1_1

New Line.padswitch(r:p2udt1590-p2udt539)p2u_35634 Units=km Length=0.001 bus1=p2udt1590-p2udt539xx.3 bus2=p2udt539.3 switch=y enabled=y phases=1 Linecode=padswitch_1_2_1_0_1_1

New Line.padswitch(r:p2udt1590-p2udt3682)p2u_35635 Units=km Length=0.001 bus1=p2udt1590-p2udt3682xxx.3 bus2=p2udt1590-p2udt3682xx.3 switch=y enabled=y phases=1 Linecode=padswitch_1_2_1_0_1_1

New Line.padswitch(r:p2udt1590-p2udt3682)p2u_35636 Units=km Length=0.001 bus1=p2udt1590-p2udt3682x.3 bus2=p2udt1590.3 switch=y enabled=y phases=1 Linecode=padswitch_1_2_1_0_1_1

New Line.padswitch(r:p2udt3259-p2udt5906)p2u_35637 Units=km Length=0.001 bus1=p2udt5906.2 bus2=p2udt3259-p2udt5906xx.2 switch=y enabled=y phases=1 Linecode=padswitch_1_2_1_0_1_0_1

New Line.padswitch(r:p2udt3259-p2udt5906)p2u_35638 Units=km Length=0.001 bus1=p2udt3259-p2udt5906x.2 bus2=p2udt3259.2 switch=y enabled=y phases=1 Linecode=padswitch_1_2_1_0_1_0_1

New Line.padswitch(r:p2udt2795-p2udt5906)p2u_35639 Units=km Length=0.001 bus1=p2udt2795.2 bus2=p2udt2795-p2udt5906x.2 switch=y enabled=y phases=1 Linecode=padswitch_1_2_1_0_1_1

New Line.padswitch(r:p2udt2795-p2udt5906)p2u_35640 Units=km Length=0.001 bus1=p2udt2795-p2udt5906xx.2 bus2=p2udt5906.2 switch=y enabled=y phases=1 Linecode=padswitch_1_2_1_0_1_0_1

New Line.padswitch(r:p2udt3120-p2udt4349)p2u_35641 Units=km Length=0.001 bus1=p2udt3120.2 bus2=p2udt3120-p2udt4349x.2 switch=y enabled=y phases=1 Linecode=padswitch_1_2_1_0_1_1

New Line.padswitch(r:p2udt3120-p2udt4349)p2u_35642 Units=km Length=0.001 bus1=p2udt3120-p2udt4349xx.2 bus2=p2udt4349.2 switch=y enabled=y phases=1 Linecode=padswitch_1_1_1_1

New Line.padswitch(r:p2udt1406-p2udt3120)p2u_35643 Units=km Length=0.001 bus1=p2udt1406.2 bus2=p2udt1406-p2udt3120x.2 switch=y enabled=y phases=1 Linecode=padswitch_1_2_1_0_1_0_1

New Line.padswitch(r:p2udt1406-p2udt3120)p2u_35644 Units=km Length=0.001 bus1=p2udt1406-p2udt3120xx.2 bus2=p2udt3120.2 switch=y enabled=y phases=1 Linecode=padswitch_1_2_1_0_1_1

New Line.padswitch(r:p2udt1406-p2udt1589)p2u_35645 Units=km Length=0.001 bus1=p2udt1589.2 bus2=p2udt1406-p2udt1589xx.2 switch=y enabled=y phases=1 Linecode=padswitch_1_2_1_0_1_1

New Line.padswitch(r:p2udt1406-p2udt1589)p2u_35646 Units=km Length=0.001 bus1=p2udt1406-p2udt1589x.2 bus2=p2udt1406.2 switch=y enabled=y phases=1 Linecode=padswitch_1_2_1_0_1_1

New Line.padswitch(r:p2udt1589-p2udt6840)p2u_35647 Units=km Length=0.001 bus1=p2udt6840.2 bus2=p2udt1589-p2udt6840xx.2 switch=y enabled=y phases=1 Linecode=padswitch_1_2_1_0_1_1

New Line.padswitch(r:p2udt1589-p2udt6840)p2u_35648 Units=km Length=0.001 bus1=p2udt1589-p2udt6840x.2 bus2=p2udt1589.2 switch=y enabled=y phases=1 Linecode=padswitch_1_2_1_0_1_1

New Line.padswitch(r:p2udt2795-p2udt6840)p2u_35649 Units=km Length=0.001 bus1=p2udt2795.2 bus2=p2udt2795-p2udt6840x.2 switch=y enabled=y phases=1 Linecode=padswitch_1_2_1_0_1_1

New Line.padswitch(r:p2udt2795-p2udt6840)p2u_35650 Units=km Length=0.001 bus1=p2udt2795-p2udt6840xx.2 bus2=p2udt6840.2 switch=y enabled=y phases=1 Linecode=padswitch_1_2_1_0_1_1

New Line.padswitch(r:p2udt1407-p2udt2795)p2u_35651 Units=km Length=0.001 bus1=p2udt1407.2 bus2=p2udt1407-p2udt2795x.2 switch=y enabled=y phases=1 Linecode=padswitch_1_2_1_0_1_1

New Line.padswitch(r:p2udt1407-p2udt2795)p2u_35652 Units=km Length=0.001 bus1=p2udt1407-p2udt2795xx.2 bus2=p2udt2795.2 switch=y enabled=y phases=1 Linecode=padswitch_1_2_1_0_1_0_1

New Line.padswitch(r:p2udt1407-p2udt1972)p2u_35653 Units=km Length=0.001 bus1=p2udt1972.2 bus2=p2udt1407-p2udt1972xx.2 switch=y enabled=y phases=1 Linecode=padswitch_1_2_1_0_1_1

New Line.padswitch(r:p2udt1407-p2udt1972)p2u_35654 Units=km Length=0.001 bus1=p2udt1407-p2udt1972x.2 bus2=p2udt1407.2 switch=y enabled=y phases=1 Linecode=padswitch_1_2_1_0_1_1

New Line.padswitch(r:p2udt1972-p2udt5994)p2u_35655 Units=km Length=0.001 bus1=p2udt5994.2 bus2=p2udt1972-p2udt5994xx.2 switch=y enabled=y phases=1 Linecode=padswitch_1_2_1_0_1_1

New Line.padswitch(r:p2udt1972-p2udt5994)p2u_35656 Units=km Length=0.001 bus1=p2udt1972-p2udt5994x.2 bus2=p2udt1972.2 switch=y enabled=y phases=1 Linecode=padswitch_1_2_1_0_1_1

New Line.padswitch(r:p2udt4606-p2udt5994)p2u_35657 Units=km Length=0.001 bus1=p2udt4606.2 bus2=p2udt4606-p2udt5994x.2 switch=y enabled=y phases=1 Linecode=padswitch_1_2_1_0_1_0_1

New Line.padswitch(r:p2udt4606-p2udt5994)p2u_35658 Units=km Length=0.001 bus1=p2udt4606-p2udt5994xx.2 bus2=p2udt5994.2 switch=y enabled=y phases=1 Linecode=padswitch_1_2_1_0_1_1

New Line.padswitch(r:p2udt1591-p2udt4606)p2u_35659 Units=km Length=0.001 bus1=p2udt1591.2 bus2=p2udt1591-p2udt4606x.2 switch=y enabled=y phases=1 Linecode=padswitch_1_2_1_0_1_1

New Line.padswitch(r:p2udt1591-p2udt4606)p2u_35660 Units=km Length=0.001 bus1=p2udt1591-p2udt4606xx.2 bus2=p2udt4606.2 switch=y enabled=y phases=1 Linecode=padswitch_1_2_1_0_1_1

New Line.padswitch(r:p2udt5738-p2udt6841)p2u_35661 Units=km Length=0.001 bus1=p2udt5738.2 bus2=p2udt5738-p2udt6841x.2 switch=y enabled=y phases=1 Linecode=padswitch_1_2_1_0_1_0_1_0

New Line.padswitch(r:p2udt5738-p2udt6841)p2u_35662 Units=km Length=0.001 bus1=p2udt5738-p2udt6841xx.2 bus2=p2udt6841.2 switch=y enabled=y phases=1 Linecode=padswitch_1_2_1_0_1_0_1_0

New Line.padswitch(r:p2udt1591-p2udt5738)p2u_35663 Units=km Length=0.001 bus1=p2udt1591.2 bus2=p2udt1591-p2udt5738x.2 switch=y enabled=y phases=1 Linecode=padswitch_1_2_1_0_1_1

New Line.padswitch(r:p2udt1591-p2udt5738)p2u_35664 Units=km Length=0.001 bus1=p2udt1591-p2udt5738xx.2 bus2=p2udt5738.2 switch=y enabled=y phases=1 Linecode=padswitch_1_2_1_0_1_0_1_0

New Line.padswitch(r:p2udt1591-p2udt5118)p2u_35665 Units=km Length=0.001 bus1=p2udt5118.2 bus2=p2udt1591-p2udt5118xx.2 switch=y enabled=y phases=1 Linecode=padswitch_1_2_1_0_1_0_1_0

New Line.padswitch(r:p2udt1591-p2udt5118)p2u_35666 Units=km Length=0.001 bus1=p2udt1591-p2udt5118x.2 bus2=p2udt1591.2 switch=y enabled=y phases=1 Linecode=padswitch_1_2_1_0_1_1

New Line.padswitch(r:p2udt5118-p2udt541)p2u_35667 Units=km Length=0.001 bus1=p2udt541.2 bus2=p2udt5118-p2udt541xx.2 switch=y enabled=y phases=1 Linecode=padswitch_1_2_1_0_1_0_1_0

New Line.padswitch(r:p2udt5118-p2udt541)p2u_35668 Units=km Length=0.001 bus1=p2udt5118-p2udt541x.2 bus2=p2udt5118.2 switch=y enabled=y phases=1 Linecode=padswitch_1_2_1_0_1_1

New Line.padswitch(r:p2udt1179-p2udt541)p2u_35669 Units=km Length=0.001 bus1=p2udt1179-p2udt541x.2 bus2=p2udt1179-p2udt541xx.2 switch=y enabled=y phases=1 Linecode=padswitch_1_2_1_0_1_0_1_0

New Line.padswitch(r:p2udt1179-p2udt541)p2u_35670 Units=km Length=0.001 bus1=p2udt1179-p2udt541xxx.2 bus2=p2udt541.2 switch=y enabled=y phases=1 Linecode=padswitch_1_2_1_0_1_0_1_0

New Line.padswitch(r:p2udt1408-p2udt334)p2u_35671 Units=km Length=0.001 bus1=p2udt1408.3 bus2=p2udt1408-p2udt334x.3 switch=y enabled=y phases=1 Linecode=padswitch_1_2_1_0_1_1

New Line.padswitch(r:p2udt1408-p2udt334)p2u_35672 Units=km Length=0.001 bus1=p2udt1408-p2udt334xx.3 bus2=p2udt334.3 switch=y enabled=y phases=1 Linecode=padswitch_1_2_1_0_1_0_1_0

New Line.padswitch(r:p2udt1408-p2udt1973)p2u_35673 Units=km Length=0.001 bus1=p2udt1973.3 bus2=p2udt1408-p2udt1973xx.3 switch=y enabled=y phases=1 Linecode=padswitch_1_2_1_0_1_1

New Line.padswitch(r:p2udt1408-p2udt1973)p2u_35674 Units=km Length=0.001 bus1=p2udt1408-p2udt1973x.3 bus2=p2udt1408.3 switch=y enabled=y phases=1 Linecode=padswitch_1_2_1_0_1_1

New Line.padswitch(r:p2udt1409-p2udt1973)p2u_35675 Units=km Length=0.001 bus1=p2udt1409.3 bus2=p2udt1409-p2udt1973x.3 switch=y enabled=y phases=1 Linecode=padswitch_1_2_1_0_1_1

New Line.padswitch(r:p2udt1409-p2udt1973)p2u_35676 Units=km Length=0.001 bus1=p2udt1409-p2udt1973xx.3 bus2=p2udt1973.3 switch=y enabled=y phases=1 Linecode=padswitch_1_2_1_0_1_1

New Line.padswitch(r:p2udt1409-p2udt542)p2u_35677 Units=km Length=0.001 bus1=p2udt542.3 bus2=p2udt1409-p2udt542xx.3 switch=y enabled=y phases=1 Linecode=padswitch_1_2_1_0_1_1

New Line.padswitch(r:p2udt1409-p2udt542)p2u_35678 Units=km Length=0.001 bus1=p2udt1409-p2udt542x.3 bus2=p2udt1409.3 switch=y enabled=y phases=1 Linecode=padswitch_1_2_1_0_1_1

New Line.padswitch(r:p2udt3409-p2udt542)p2u_35679 Units=km Length=0.001 bus1=p2udt3409.3 bus2=p2udt3409-p2udt542x.3 switch=y enabled=y phases=1 Linecode=padswitch_1_2_1_0_1_1

New Line.padswitch(r:p2udt3409-p2udt542)p2u_35680 Units=km Length=0.001 bus1=p2udt3409-p2udt542xx.3 bus2=p2udt542.3 switch=y enabled=y phases=1 Linecode=padswitch_1_2_1_0_1_1

New Line.padswitch(r:p2udt1402-p2udt3409)p2u_35681 Units=km Length=0.001 bus1=p2udt1402.3 bus2=p2udt1402-p2udt3409x.3 switch=y enabled=y phases=1 Linecode=padswitch_1_2_1_0_1_1

New Line.padswitch(r:p2udt1402-p2udt3409)p2u_35682 Units=km Length=0.001 bus1=p2udt1402-p2udt3409xx.3 bus2=p2udt3409.3 switch=y enabled=y phases=1 Linecode=padswitch_1_2_1_0_1_1

New Line.padswitch(r:p2udt1179-p2udt1402)p2u_35683 Units=km Length=0.001 bus1=p2udt1179-p2udt1402x.3 bus2=p2udt1179-p2udt1402xx.3 switch=y enabled=y phases=1 Linecode=padswitch_1_2_1_0_1_1

New Line.padswitch(r:p2udt1179-p2udt1402)p2u_35684 Units=km Length=0.001 bus1=p2udt1179-p2udt1402xxx.3 bus2=p2udt1402.3 switch=y enabled=y phases=1 Linecode=padswitch_1_2_1_0_1_1

New Line.padswitch(r:p2udt3817-p2udt741)p2u_35685 Units=km Length=0.001 bus1=p2udt741.1.2.3 bus2=p2udt3817-p2udt741xx.1.2.3 switch=y enabled=y phases=3 Linecode=padswitch_3_3_3_3

New Line.padswitch(r:p2udt3817-p2udt741)p2u_35686 Units=km Length=0.001 bus1=p2udt3817-p2udt741x.1.2.3 bus2=p2udt3817.1.2.3 switch=y enabled=y phases=3 Linecode=padswitch_3_3_3_3_3

New Line.padswitch(r:p2udt3260-p2udt741)p2u_35687 Units=km Length=0.001 bus1=p2udt3260.1.2.3 bus2=p2udt3260-p2udt741x.1.2.3 switch=y enabled=y phases=3 Linecode=padswitch_3_3_3_3_3

New Line.padswitch(r:p2udt3260-p2udt741)p2u_35688 Units=km Length=0.001 bus1=p2udt3260-p2udt741xx.1.2.3 bus2=p2udt741.1.2.3 switch=y enabled=y phases=3 Linecode=padswitch_3_3_3_1_3_3

New Line.padswitch(r:p2udt3260-p2udt3682)p2u_35689 Units=km Length=0.001 bus1=p2udt3682.1.2.3 bus2=p2udt3260-p2udt3682xx.1.2.3 switch=y enabled=y phases=3 Linecode=padswitch_3_3_3_3_3

New Line.padswitch(r:p2udt3260-p2udt3682)p2u_35690 Units=km Length=0.001 bus1=p2udt3260-p2udt3682x.1.2.3 bus2=p2udt3260.1.2.3 switch=y enabled=y phases=3 Linecode=padswitch_3_3_3_3_3

New Line.padswitch(r:p2udt3682-p2udt6708)p2u_35691 Units=km Length=0.001 bus1=p2udt6708.1.2.3 bus2=p2udt3682-p2udt6708xxx.1.2.3 switch=y enabled=y phases=3 Linecode=padswitch_3_3_3_3_3

New Line.padswitch(r:p2udt3682-p2udt6708)p2u_35692 Units=km Length=0.001 bus1=p2udt3682-p2udt6708x.1.2.3 bus2=p2udt3682.1.2.3 switch=y enabled=y phases=3 Linecode=padswitch_3_3_3_1_3_3

New Line.fuse(r:p2udt1179-p2udt541)p2u_45619 Units=km Length=0.001 bus1=p2udt1179.2 bus2=p2udt1179-p2udt541x.2 switch=n enabled=y phases=1 Linecode=fuse_1_1_1_1

New Fuse.Fuse_fuse(r:p2udt1179-p2udt541)p2u_45619 monitoredobj=Line.fuse(r:p2udt1179-p2udt541)p2u_45619 enabled=y ratedcurrent=100.0

New Line.fuse(r:p2udt1179-p2udt1402)p2u_45620 Units=km Length=0.001 bus1=p2udt1179.3 bus2=p2udt1179-p2udt1402x.3 switch=n enabled=y phases=1 Linecode=fuse_1_6_1_1_1

New Fuse.Fuse_fuse(r:p2udt1179-p2udt1402)p2u_45620 monitoredobj=Line.fuse(r:p2udt1179-p2udt1402)p2u_45620 enabled=y ratedcurrent=100.0

New Line.fuse(r:p2udt1590-p2udt3682)p2u_45893 Units=km Length=0.001 bus1=p2udt3682.3 bus2=p2udt1590-p2udt3682xxx.3 switch=n enabled=y phases=1 Linecode=fuse_1_6_1_3_1_1

New Fuse.Fuse_fuse(r:p2udt1590-p2udt3682)p2u_45893 monitoredobj=Line.fuse(r:p2udt1590-p2udt3682)p2u_45893 enabled=y ratedcurrent=100.0

New Line.fuse(r:p2udt6379-p2udt975)p2u_46192 Units=km Length=0.001 bus1=p2udt6379.1 bus2=p2udt6379-p2udt975x.1 switch=n enabled=y phases=1 Linecode=fuse_1_1_1_1

New Fuse.Fuse_fuse(r:p2udt6379-p2udt975)p2u_46192 monitoredobj=Line.fuse(r:p2udt6379-p2udt975)p2u_46192 enabled=y ratedcurrent=100.0

New Line.fuse(r:p2udt2793-p2udt6708)p2u_46225 Units=km Length=0.001 bus1=p2udt6708.1 bus2=p2udt2793-p2udt6708x.1 switch=n enabled=y phases=1 Linecode=fuse_1_6_1_1_1

New Fuse.Fuse_fuse(r:p2udt2793-p2udt6708)p2u_46225 monitoredobj=Line.fuse(r:p2udt2793-p2udt6708)p2u_46225 enabled=y ratedcurrent=100.0

New Line.fuse(r:p2udt6708-p2udt7763)p2u_46226 Units=km Length=0.001 bus1=p2udt6708.1 bus2=p2udt6708-p2udt7763x.1 switch=n enabled=y phases=1 Linecode=fuse_1_6_1_1_1

New Fuse.Fuse_fuse(r:p2udt6708-p2udt7763)p2u_46226 monitoredobj=Line.fuse(r:p2udt6708-p2udt7763)p2u_46226 enabled=y ratedcurrent=100.0
