New Line.l(r:p2udt4999-p2uhs0_1247)_s1 Units=km Length=0.26005400000000006 bus1=p2udt4999-p2uhs0_1247x.1.2.3 bus2=p2udt4999.1.2.3 switch=n enabled=y phases=3 Linecode=3P_OH_AL_ACSR_4/0_Penguin_12_47_0_3_3_3_3

New Line.l(r:p2udt4999lv-p2ulv7575) Units=km Length=0.016518 bus1=p2udt4999lv.1.2.3 bus2=p2ulv7575.1.2.3 switch=n enabled=y phases=3 Linecode=3P_UG_AL_4/0_15_0_416_0_3_3_3_3

New Line.l(r:p2udt4597lv-p2ulv6620) Units=km Length=0.019486 bus1=p2udt4597lv.1.2.3 bus2=p2ulv6620.1.2.3 switch=n enabled=y phases=3 Linecode=3P_UG_AL_4/0_15_0_416_0_3_3_3_3

New Line.l(r:p2udt4597-p2udt4999) Units=km Length=0.430044 bus1=p2udt4999.1.2.3 bus2=p2udt4597.1.2.3 switch=n enabled=y phases=3 Linecode=3P_OH_AL_ACSR_4/0_Penguin_12_47_0_3_3_3_3
