New Capacitor.p2uc3 Bus1=p2udt5897 phases=3 Kv=12.47 conn=Wye Kvar=300.0

New CapControl.p2uc3 Capacitor=p2uc3 Element=Line.padswitch(r:p2udt1568-p2udt5897)p2u_36072 Terminal=1 delay=100.0 Type=voltage Vmin=120.5 Vmax=125.0 Ptratio=59.99631547328862 Ctratio=100.0

New Capacitor.p2uc4 Bus1=p2udt3241 phases=3 Kv=12.47 conn=Wye Kvar=300.0

New CapControl.p2uc4 Capacitor=p2uc4 Element=Line.padswitch(r:p2udt310-p2udt3241)p2u_35846 Terminal=1 delay=100.0 Type=voltage Vmin=120.5 Vmax=125.0 Ptratio=59.99631547328862 Ctratio=100.0

New Capacitor.p2uc8 Bus1=p2udt7081 phases=3 Kv=12.47 conn=Wye Kvar=300.0

New CapControl.p2uc8 Capacitor=p2uc8 Element=Line.padswitch(r:p2udt6640-p2udt7081)p2u_36206 Terminal=1 delay=100.0 Type=voltage Vmin=120.5 Vmax=125.0 Ptratio=59.99631547328862 Ctratio=100.0

New Capacitor.p2uc9 Bus1=p2udt4909 phases=3 Kv=12.47 conn=Wye Kvar=300.0

New CapControl.p2uc9 Capacitor=p2uc9 Element=Line.l(r:p2udt4909-p2udt5397) Terminal=1 delay=100.0 Type=voltage Vmin=120.5 Vmax=125.0 Ptratio=59.99631547328862 Ctratio=100.0
