New Line.l(r:p2udt23lv-p2ulv24) Units=km Length=0.00475784 bus1=p2udt23lv.1.2 bus2=p2ulv24.1.2 switch=n enabled=y phases=2 Linecode=1P_OH_AL_2/0_Rucina_0_416_0_2_2_2_2

New Line.l(r:p2udt23lv-p2ulv21114) Units=km Length=0.0191968 bus1=p2udt23lv.1.2 bus2=p2ulv21114.1.2 switch=n enabled=y phases=2 Linecode=1P_OH_AL_2/0_Rucina_0_416_0_2_2_2_2

New Line.l(r:p2udm86-p2ulv12956) Units=km Length=0.0106963 bus1=p2udm86.1.2 bus2=p2ulv12956.1.2 switch=n enabled=y phases=2 Linecode=1P_OH_AL_2/0_Rucina_0_416_0_2_2_2_2

New Line.l(r:p2udm86-p2udt23lv) Units=km Length=0.0165231 bus1=p2udt23lv.1.2 bus2=p2udm86.1.2 switch=n enabled=y phases=2 Linecode=1P_OH_AL_2/0_Rucina_0_416_0_2_2_2_2

New Line.l(r:p2udm87-p2ulv14771) Units=km Length=0.008156270000000002 bus1=p2udm87.1.2 bus2=p2ulv14771.1.2 switch=n enabled=y phases=2 Linecode=1P_OH_AL_2/0_Rucina_0_416_0_2_2_2_2

New Line.l(r:p2udm87-p2udt23lv) Units=km Length=0.0324586 bus1=p2udt23lv.1.2 bus2=p2udm87.1.2 switch=n enabled=y phases=2 Linecode=1P_OH_AL_4/0_Zuzara_0_416_0_2_2_2_2

New Line.l(r:p2udm1050-p2ulv297) Units=km Length=0.00829266 bus1=p2udm1050.1.2 bus2=p2ulv297.1.2 switch=n enabled=y phases=2 Linecode=1P_OH_AL_2/0_Rucina_0_416_0_2_2_2_2

New Line.l(r:p2udm1050-p2udt291lv) Units=km Length=0.0114571 bus1=p2udt291lv.1.2 bus2=p2udm1050.1.2 switch=n enabled=y phases=2 Linecode=1P_OH_AL_2/0_Rucina_0_416_0_2_2_2_2

New Line.l(r:p2udm1051-p2ulv13655) Units=km Length=0.021232900000000002 bus1=p2udm1051.1.2 bus2=p2ulv13655.1.2 switch=n enabled=y phases=2 Linecode=1P_OH_AL_2/0_Rucina_0_416_0_2_2_2_2

New Line.l(r:p2udm1051-p2udt291lv) Units=km Length=0.029781300000000004 bus1=p2udt291lv.1.2 bus2=p2udm1051.1.2 switch=n enabled=y phases=2 Linecode=1P_OH_AL_4/0_Zuzara_0_416_0_2_2_2_2

New Line.l(r:p2udt292lv-p2ulv298) Units=km Length=0.0869018 bus1=p2udt292lv.1.2 bus2=p2ulv298.1.2 switch=n enabled=y phases=2 Linecode=1P_OH_AL_4/0_Zuzara_0_416_0_2_2_2_2

New Line.l(r:p2udm1053-p2ulv3906) Units=km Length=0.103852 bus1=p2udm1053.1.2 bus2=p2ulv3906.1.2 switch=n enabled=y phases=2 Linecode=1P_OH_AL_4/0_Zuzara_0_416_0_2_2_2_2

New Line.l(r:p2udm1053-p2ulv15449) Units=km Length=0.0384354 bus1=p2udm1053.1.2 bus2=p2ulv15449.1.2 switch=n enabled=y phases=2 Linecode=1P_OH_AL_4/0_Zuzara_0_416_0_2_2_2_2

New Line.l(r:p2udm1053-p2udt292lv) Units=km Length=0.0187971 bus1=p2udt292lv.1.2 bus2=p2udm1053.1.2 switch=n enabled=y phases=2 Linecode=1P_OH_AL_2/0_Rucina_0_416_0_2_2_2_2

New Line.l(r:p2udt1133lv-p2ulv20470) Units=km Length=0.00959252 bus1=p2udt1133lv.1.2 bus2=p2ulv20470.1.2 switch=n enabled=y phases=2 Linecode=1P_OH_AL_2/0_Rucina_0_416_0_2_2_2_2

New Line.l(r:p2udm4146-p2ulv1238) Units=km Length=0.00920967 bus1=p2udm4146.1.2 bus2=p2ulv1238.1.2 switch=n enabled=y phases=2 Linecode=1P_OH_AL_2/0_Rucina_0_416_0_2_2_2_2

New Line.l(r:p2udm4146-p2udt1133lv) Units=km Length=0.0136848 bus1=p2udt1133lv.1.2 bus2=p2udm4146.1.2 switch=n enabled=y phases=2 Linecode=1P_OH_AL_2/0_Rucina_0_416_0_2_2_2_2

New Line.l(r:p2udt1536lv-p2ulv2959) Units=km Length=0.09176 bus1=p2udt1536lv.1.2 bus2=p2ulv2959.1.2 switch=n enabled=y phases=2 Linecode=1P_OH_AL_4/0_Zuzara_0_416_0_2_2_2_2

New Line.l(r:p2udm5613-p2ulv1709) Units=km Length=0.08107460000000001 bus1=p2udm5613.1.2 bus2=p2ulv1709.1.2 switch=n enabled=y phases=2 Linecode=1P_OH_AL_4/0_Zuzara_0_416_0_2_2_2_2

New Line.l(r:p2udm5613-p2udt1536lv) Units=km Length=0.0181076 bus1=p2udt1536lv.1.2 bus2=p2udm5613.1.2 switch=n enabled=y phases=2 Linecode=1P_OH_AL_2/0_Rucina_0_416_0_2_2_2_2

New Line.l(r:p2udt1929lv-p2ulv2199) Units=km Length=0.0700685 bus1=p2udt1929lv.1.2 bus2=p2ulv2199.1.2 switch=n enabled=y phases=2 Linecode=1P_OH_AL_4/0_Zuzara_0_416_0_2_2_2_2

New Line.l(r:p2udt2112lv-p2ulv11537) Units=km Length=0.0334113 bus1=p2udt2112lv.1.2 bus2=p2ulv11537.1.2 switch=n enabled=y phases=2 Linecode=1P_OH_AL_4/0_Zuzara_0_416_0_2_2_2_2

New Line.l(r:p2udm7605-p2ulv2456) Units=km Length=0.029508400000000004 bus1=p2udm7605.1.2 bus2=p2ulv2456.1.2 switch=n enabled=y phases=2 Linecode=1P_OH_AL_4/0_Zuzara_0_416_0_2_2_2_2

New Line.l(r:p2udm7605-p2udt2112lv) Units=km Length=0.0182439 bus1=p2udt2112lv.1.2 bus2=p2udm7605.1.2 switch=n enabled=y phases=2 Linecode=1P_OH_AL_2/0_Rucina_0_416_0_2_2_2_2

New Line.l(r:p2udt2477lv-p2ulv2960) Units=km Length=0.009221980000000001 bus1=p2udt2477lv.1.2 bus2=p2ulv2960.1.2 switch=n enabled=y phases=2 Linecode=1P_OH_AL_2/0_Rucina_0_416_0_2_2_2_2

New Line.l(r:p2udt2632lv-p2ulv3198) Units=km Length=0.001 bus1=p2udt2632lv.1.2 bus2=p2ulv3198.1.2 switch=n enabled=y phases=2 Linecode=1P_OH_AL_4_Periwinkle_0_416_0_2_2_2_2

New Line.l(r:p2udt2635lv-p2ulv3201) Units=km Length=0.0136302 bus1=p2udt2635lv.1.2 bus2=p2ulv3201.1.2 switch=n enabled=y phases=2 Linecode=1P_OH_AL_2/0_Rucina_0_416_0_2_2_2_2

New Line.l(r:p2udm9307-p2ulv3422) Units=km Length=0.00943801 bus1=p2udm9307.1.2 bus2=p2ulv3422.1.2 switch=n enabled=y phases=2 Linecode=1P_OH_AL_2/0_Rucina_0_416_0_2_2_2_2

New Line.l(r:p2udm9309-p2ulv12470) Units=km Length=0.011717 bus1=p2udm9309.1.2 bus2=p2ulv12470.1.2 switch=n enabled=y phases=2 Linecode=1P_OH_AL_2/0_Rucina_0_416_0_2_2_2_2

New Line.l(r:p2udm9308-p2ulv7783) Units=km Length=0.0315808 bus1=p2udm9308.1.2 bus2=p2ulv7783.1.2 switch=n enabled=y phases=2 Linecode=1P_OH_AL_4/0_Zuzara_0_416_0_2_2_2_2

New Line.l(r:p2udm9308-p2udm9309) Units=km Length=0.050288 bus1=p2udm9309.1.2 bus2=p2udm9308.1.2 switch=n enabled=y phases=2 Linecode=1P_OH_AL_4/0_Zuzara_0_416_0_2_2_2_2

New Line.l(r:p2udm9307-p2udm9309) Units=km Length=0.0149021 bus1=p2udm9307.1.2 bus2=p2udm9309.1.2 switch=n enabled=y phases=2 Linecode=1P_OH_AL_2/0_Rucina_0_416_0_2_2_2_2

New Line.l(r:p2udm9307-p2udt2635lv) Units=km Length=0.0149137 bus1=p2udt2635lv.1.2 bus2=p2udm9307.1.2 switch=n enabled=y phases=2 Linecode=1P_OH_AL_2/0_Rucina_0_416_0_2_2_2_2

New Line.l(r:p2udm9310-p2ulv19811) Units=km Length=0.0262783 bus1=p2udm9310.1.2 bus2=p2ulv19811.1.2 switch=n enabled=y phases=2 Linecode=1P_OH_AL_2/0_Rucina_0_416_0_2_2_2_2

New Line.l(r:p2udm9310-p2udt2635lv) Units=km Length=0.0390219 bus1=p2udt2635lv.1.2 bus2=p2udm9310.1.2 switch=n enabled=y phases=2 Linecode=1P_OH_AL_4/0_Zuzara_0_416_0_2_2_2_2

New Line.l(r:p2udm10842-p2ulv3907) Units=km Length=0.018071 bus1=p2udm10842.1.2 bus2=p2ulv3907.1.2 switch=n enabled=y phases=2 Linecode=1P_UG_AL_1/0_Brenau_0_416_0_2_2_2_2

New Line.l(r:p2udm10842-p2udt3088lv) Units=km Length=0.00877416 bus1=p2udt3088lv.1.2 bus2=p2udm10842.1.2 switch=n enabled=y phases=2 Linecode=1P_UG_AL_1/0_Brenau_0_416_0_2_2_2_2

New Line.l(r:p2udm10843-p2ulv9857) Units=km Length=0.00984441 bus1=p2udm10843.1.2 bus2=p2ulv9857.1.2 switch=n enabled=y phases=2 Linecode=1P_UG_AL_1/0_Brenau_0_416_0_2_2_2_2

New Line.l(r:p2udm10843-p2udt3088lv) Units=km Length=0.00876416 bus1=p2udt3088lv.1.2 bus2=p2udm10843.1.2 switch=n enabled=y phases=2 Linecode=1P_UG_AL_1/0_Brenau_0_416_0_2_2_2_2

New Line.l(r:p2udt3228lv-p2ulv5144) Units=km Length=0.0354851 bus1=p2udt3228lv.1.2 bus2=p2ulv5144.1.2 switch=n enabled=y phases=2 Linecode=1P_OH_AL_4/0_Zuzara_0_416_0_2_2_2_2

New Line.l(r:p2udm11268-p2ulv4148) Units=km Length=0.0120894 bus1=p2udm11268.1.2 bus2=p2ulv4148.1.2 switch=n enabled=y phases=2 Linecode=1P_OH_AL_2/0_Rucina_0_416_0_2_2_2_2

New Line.l(r:p2udm11268-p2udt3228lv) Units=km Length=0.0126241 bus1=p2udt3228lv.1.2 bus2=p2udm11268.1.2 switch=n enabled=y phases=2 Linecode=1P_OH_AL_2/0_Rucina_0_416_0_2_2_2_2

New Line.l(r:p2udt3535lv-p2ulv4652) Units=km Length=0.0188727 bus1=p2udt3535lv.1.2 bus2=p2ulv4652.1.2 switch=n enabled=y phases=2 Linecode=1P_OH_AL_2/0_Rucina_0_416_0_2_2_2_2

New Line.l(r:p2udm12251-p2ulv14535) Units=km Length=0.017861700000000005 bus1=p2udm12251.1.2 bus2=p2ulv14535.1.2 switch=n enabled=y phases=2 Linecode=1P_OH_AL_2/0_Rucina_0_416_0_2_2_2_2

New Line.l(r:p2udm12251-p2udt3535lv) Units=km Length=0.0586139 bus1=p2udt3535lv.1.2 bus2=p2udm12251.1.2 switch=n enabled=y phases=2 Linecode=1P_OH_AL_4/0_Zuzara_0_416_0_2_2_2_2

New Line.l(r:p2udm12252-p2ulv19582) Units=km Length=0.02107 bus1=p2udm12252.1.2 bus2=p2ulv19582.1.2 switch=n enabled=y phases=2 Linecode=1P_OH_AL_2/0_Rucina_0_416_0_2_2_2_2

New Line.l(r:p2udm12252-p2udt3535lv) Units=km Length=0.0585892 bus1=p2udt3535lv.1.2 bus2=p2udm12252.1.2 switch=n enabled=y phases=2 Linecode=1P_OH_AL_4/0_Zuzara_0_416_0_2_2_2_2

New Line.l(r:p2udt3795lv-p2ulv5142) Units=km Length=0.0175313 bus1=p2udt3795lv.1.2 bus2=p2ulv5142.1.2 switch=n enabled=y phases=2 Linecode=1P_OH_AL_2/0_Rucina_0_416_0_2_2_2_2

New Line.l(r:p2udt4186lv-p2ulv5834) Units=km Length=0.047296500000000005 bus1=p2udt4186lv.1.2 bus2=p2ulv5834.1.2 switch=n enabled=y phases=2 Linecode=1P_OH_AL_4/0_Zuzara_0_416_0_2_2_2_2

New Line.l(r:p2udt4186lv-p2ulv19809) Units=km Length=0.0323025 bus1=p2udt4186lv.1.2 bus2=p2ulv19809.1.2 switch=n enabled=y phases=2 Linecode=1P_OH_AL_4/0_Zuzara_0_416_0_2_2_2_2

New Line.l(r:p2udt4187lv-p2ulv5835) Units=km Length=0.033826 bus1=p2udt4187lv.1.2 bus2=p2ulv5835.1.2 switch=n enabled=y phases=2 Linecode=1P_OH_AL_4/0_Zuzara_0_416_0_2_2_2_2

New Line.l(r:p2udt4455lv-p2ulv6344) Units=km Length=0.027169800000000004 bus1=p2udt4455lv.1.2 bus2=p2ulv6344.1.2 switch=n enabled=y phases=2 Linecode=1P_OH_AL_4/0_Zuzara_0_416_0_2_2_2_2

New Line.l(r:p2udt4455lv-p2ulv14769) Units=km Length=0.0591275 bus1=p2udt4455lv.1.2 bus2=p2ulv14769.1.2 switch=n enabled=y phases=2 Linecode=1P_OH_AL_4/0_Zuzara_0_416_0_2_2_2_2

New Line.l(r:p2udm14872-p2ulv20464) Units=km Length=0.131887 bus1=p2udm14872.1.2 bus2=p2ulv20464.1.2 switch=n enabled=y phases=2 Linecode=1P_OH_AL_4/0_Zuzara_0_416_0_2_2_2_2

New Line.l(r:p2udm14872-p2udt4455lv) Units=km Length=0.0189256 bus1=p2udt4455lv.1.2 bus2=p2udm14872.1.2 switch=n enabled=y phases=2 Linecode=1P_OH_AL_2/0_Rucina_0_416_0_2_2_2_2

New Line.l(r:p2udt4979lv-p2ulv7526) Units=km Length=0.0196537 bus1=p2udt4979lv.1.2 bus2=p2ulv7526.1.2 switch=n enabled=y phases=2 Linecode=1P_OH_AL_2/0_Rucina_0_416_0_2_2_2_2

New Line.l(r:p2udm16247-p2ulv14533) Units=km Length=0.00986668 bus1=p2udm16247.1.2 bus2=p2ulv14533.1.2 switch=n enabled=y phases=2 Linecode=1P_OH_AL_2/0_Rucina_0_416_0_2_2_2_2

New Line.l(r:p2udm16247-p2udt4979lv) Units=km Length=0.0190547 bus1=p2udt4979lv.1.2 bus2=p2udm16247.1.2 switch=n enabled=y phases=2 Linecode=1P_OH_AL_2/0_Rucina_0_416_0_2_2_2_2

New Line.l(r:p2udt5205lv-p2ulv8033) Units=km Length=0.0581233 bus1=p2udt5205lv.1.2 bus2=p2ulv8033.1.2 switch=n enabled=y phases=2 Linecode=1P_OH_AL_4/0_Zuzara_0_416_0_2_2_2_2

New Line.l(r:p2udm17081-p2ulv8276) Units=km Length=0.0245506 bus1=p2udm17081.1.2 bus2=p2ulv8276.1.2 switch=n enabled=y phases=2 Linecode=1P_OH_AL_2/0_Rucina_0_416_0_2_2_2_2

New Line.l(r:p2udm17081-p2udt5304lv) Units=km Length=0.0192899 bus1=p2udt5304lv.1.2 bus2=p2udm17081.1.2 switch=n enabled=y phases=2 Linecode=1P_OH_AL_2/0_Rucina_0_416_0_2_2_2_2

New Line.l(r:p2udm17082-p2ulv23188) Units=km Length=0.0202145 bus1=p2udm17082.1.2 bus2=p2ulv23188.1.2 switch=n enabled=y phases=2 Linecode=1P_OH_AL_2/0_Rucina_0_416_0_2_2_2_2

New Line.l(r:p2udm17082-p2udt5304lv) Units=km Length=0.0192899 bus1=p2udt5304lv.1.2 bus2=p2udm17082.1.2 switch=n enabled=y phases=2 Linecode=1P_OH_AL_2/0_Rucina_0_416_0_2_2_2_2

New Line.l(r:p2udt5306lv-p2ulv8279) Units=km Length=0.0148401 bus1=p2udt5306lv.1.2 bus2=p2ulv8279.1.2 switch=n enabled=y phases=2 Linecode=1P_OH_AL_2/0_Rucina_0_416_0_2_2_2_2

New Line.l(r:p2udt5306lv-p2ulv11295) Units=km Length=0.0254311 bus1=p2udt5306lv.1.2 bus2=p2ulv11295.1.2 switch=n enabled=y phases=2 Linecode=1P_OH_AL_2/0_Rucina_0_416_0_2_2_2_2

New Line.l(r:p2udm17642-p2ulv8921) Units=km Length=0.001 bus1=p2udm17642.1.2 bus2=p2ulv8921.1.2 switch=n enabled=y phases=2 Linecode=1P_OH_AL_4_Periwinkle_0_416_0_2_2_2_2

New Line.l(r:p2udm17645-p2ulv23579) Units=km Length=0.00680952 bus1=p2udm17645.1.2 bus2=p2ulv23579.1.2 switch=n enabled=y phases=2 Linecode=1P_OH_AL_2/0_Rucina_0_416_0_2_2_2_2

New Line.l(r:p2udm17642-p2udm17645) Units=km Length=0.0180251 bus1=p2udm17642.1.2 bus2=p2udm17645.1.2 switch=n enabled=y phases=2 Linecode=1P_OH_AL_2/0_Rucina_0_416_0_2_2_2_2

New Line.l(r:p2udm17642-p2udt5536lv) Units=km Length=0.0180251 bus1=p2udt5536lv.1.2 bus2=p2udm17642.1.2 switch=n enabled=y phases=2 Linecode=1P_OH_AL_2/0_Rucina_0_416_0_2_2_2_2

New Line.l(r:p2udm17644-p2ulv20692) Units=km Length=0.00893538 bus1=p2udm17644.1.2 bus2=p2ulv20692.1.2 switch=n enabled=y phases=2 Linecode=1P_UG_AL_1/0_Brenau_0_416_0_2_2_2_2

New Line.l(r:p2udm17643-p2ulv13871) Units=km Length=0.00985427 bus1=p2udm17643.1.2 bus2=p2ulv13871.1.2 switch=n enabled=y phases=2 Linecode=1P_OH_AL_2/0_Rucina_0_416_0_2_2_2_2

New Line.l(r:p2udm17643-p2udm17644) Units=km Length=0.0364769 bus1=p2udm17644.1.2 bus2=p2udm17643.1.2 switch=n enabled=y phases=2 Linecode=1P_OH_AL_4/0_Zuzara_0_416_0_2_2_2_2

New Line.l(r:p2udm17644-p2udt5536lv) Units=km Length=0.0355631 bus1=p2udt5536lv.1.2 bus2=p2udm17644.1.2 switch=n enabled=y phases=2 Linecode=1P_OH_AL_4/0_Zuzara_0_416_0_2_2_2_2

New Line.l(r:p2udt6148lv-p2ulv17090) Units=km Length=0.0390636 bus1=p2udt6148lv.1.2 bus2=p2ulv17090.1.2 switch=n enabled=y phases=2 Linecode=1P_OH_AL_4/0_Zuzara_0_416_0_2_2_2_2

New Line.l(r:p2udm19095-p2ulv10589) Units=km Length=0.0224825 bus1=p2udm19095.1.2 bus2=p2ulv10589.1.2 switch=n enabled=y phases=2 Linecode=1P_OH_AL_2/0_Rucina_0_416_0_2_2_2_2

New Line.l(r:p2udm19095-p2udt6148lv) Units=km Length=0.0182461 bus1=p2udt6148lv.1.2 bus2=p2udm19095.1.2 switch=n enabled=y phases=2 Linecode=1P_OH_AL_2/0_Rucina_0_416_0_2_2_2_2

New Line.l(r:p2udm19097-p2ulv20466) Units=km Length=0.033887 bus1=p2udm19097.1.2 bus2=p2ulv20466.1.2 switch=n enabled=y phases=2 Linecode=1P_OH_AL_4/0_Zuzara_0_416_0_2_2_2_2

New Line.l(r:p2udm19097-p2udt6148lv) Units=km Length=0.0182341 bus1=p2udt6148lv.1.2 bus2=p2udm19097.1.2 switch=n enabled=y phases=2 Linecode=1P_OH_AL_2/0_Rucina_0_416_0_2_2_2_2

New Line.l(r:p2udm19588-p2ulv11296) Units=km Length=0.0173595 bus1=p2udm19588.1.2 bus2=p2ulv11296.1.2 switch=n enabled=y phases=2 Linecode=1P_OH_AL_2/0_Rucina_0_416_0_2_2_2_2

New Line.l(r:p2udm19588-p2udt6371lv) Units=km Length=0.0585087 bus1=p2udt6371lv.1.2 bus2=p2udm19588.1.2 switch=n enabled=y phases=2 Linecode=1P_OH_AL_4/0_Zuzara_0_416_0_2_2_2_2

New Line.l(r:p2udm19589-p2ulv14534) Units=km Length=0.014973500000000002 bus1=p2udm19589.1.2 bus2=p2ulv14534.1.2 switch=n enabled=y phases=2 Linecode=1P_OH_AL_2/0_Rucina_0_416_0_2_2_2_2

New Line.l(r:p2udm19589-p2udt6371lv) Units=km Length=0.0390093 bus1=p2udt6371lv.1.2 bus2=p2udm19589.1.2 switch=n enabled=y phases=2 Linecode=1P_OH_AL_4/0_Zuzara_0_416_0_2_2_2_2

New Line.l(r:p2udt7137lv-p2ulv14120) Units=km Length=0.0133586 bus1=p2udt7137lv.1.2 bus2=p2ulv14120.1.2 switch=n enabled=y phases=2 Linecode=1P_OH_AL_2/0_Rucina_0_416_0_2_2_2_2

New Line.l(r:p2udt7423lv-p2ulv15448) Units=km Length=0.0190025 bus1=p2udt7423lv.1.2 bus2=p2ulv15448.1.2 switch=n enabled=y phases=2 Linecode=1P_OH_AL_2/0_Rucina_0_416_0_2_2_2_2

New Line.l(r:p2udt7474lv-p2ulv15682) Units=km Length=0.0280321 bus1=p2udt7474lv.1.2 bus2=p2ulv15682.1.2 switch=n enabled=y phases=2 Linecode=1P_OH_AL_4/0_Zuzara_0_416_0_2_2_2_2

New Line.l(r:p2udt8432lv-p2ulv20691) Units=km Length=0.0231219 bus1=p2udt8432lv.1.2 bus2=p2ulv20691.1.2 switch=n enabled=y phases=2 Linecode=1P_OH_AL_2/0_Rucina_0_416_0_2_2_2_2

New Line.l(r:p2udt4186-p2udt4187) Units=km Length=0.0581802 bus1=p2udt4186.1 bus2=p2udt4187.1 switch=n enabled=y phases=1 Linecode=1P_OH_AL_ACSR_#2_Sparrow_12_47_0_1_1_1_1

New Line.l(r:p2udt4186-p2udt4455) Units=km Length=0.246467 bus1=p2udt4455.1 bus2=p2udt4186.1 switch=n enabled=y phases=1 Linecode=1P_OH_AL_ACSR_#2_Sparrow_12_47_0_1_1_1_1

New Line.l(r:p2udt3377-p2udt4455) Units=km Length=0.10336600000000001 bus1=p2udt3377-p2udt4455x.1 bus2=p2udt3377-p2udt4455x_b1_1.1 switch=n enabled=y phases=1 Linecode=1P_OH_AL_ACSR_#2_Sparrow_12_47_0_1_1_1_1

New Line.l(r:p2udt1130-p2udt2632) Units=km Length=0.0414715 bus1=p2udt1130-p2udt2632x.3 bus2=p2udt2632.3 switch=n enabled=y phases=1 Linecode=1P_OH_AL_ACSR_#2_Sparrow_12_47_0_1_1_1_1

New Line.l(r:p2udt6146-p2udt8432) Units=km Length=0.0197423 bus1=p2udt6146-p2udt8432x.3 bus2=p2udt8432.3 switch=n enabled=y phases=1 Linecode=1P_OH_AL_ACSR_#2_Sparrow_12_47_0_1_1_1_1

New Line.l(r:p2udt4979-p2udt6149) Units=km Length=0.095264 bus1=p2udt4979-p2udt6149x.3 bus2=p2udt4979.3 switch=n enabled=y phases=1 Linecode=1P_OH_AL_ACSR_#2_Sparrow_12_47_0_1_1_1_1

New Line.l(r:p2udt3795-p2udt6064) Units=km Length=0.10897100000000001 bus1=p2udt3795-p2udt6064x.1 bus2=p2udt3795.1 switch=n enabled=y phases=1 Linecode=1P_OH_AL_ACSR_#2_Sparrow_12_47_0_1_1_1_1

New Line.l(r:p2udt1929-p2udt6894) Units=km Length=0.6000980000000001 bus1=p2udt1929-p2udt6894x.1 bus2=p2udt1929.1 switch=n enabled=y phases=1 Linecode=1P_OH_AL_ACSR_#2_Sparrow_12_47_0_1_1_1_1

New Line.l(r:p2udt23-p2udt2635) Units=km Length=0.0730089 bus1=p2udt2635.3 bus2=p2udt23.3 switch=n enabled=y phases=1 Linecode=1P_OH_AL_ACSR_#2_Sparrow_12_47_0_1_1_1_1

New Line.l(r:p2udt1133-p2udt2635) Units=km Length=0.0664213 bus1=p2udt2635.3 bus2=p2udt1133.3 switch=n enabled=y phases=1 Linecode=1P_OH_AL_ACSR_#2_Sparrow_12_47_0_1_1_1_1

New Line.l(r:p2udt2635-p2udt7137) Units=km Length=0.0975762 bus1=p2udt2635.3 bus2=p2udt7137.3 switch=n enabled=y phases=1 Linecode=1P_OH_AL_ACSR_#2_Sparrow_12_47_0_1_1_1_1

New Line.l(r:p2udt2635-p2udt8286) Units=km Length=0.11363500000000001 bus1=p2udt2635-p2udt8286x.3 bus2=p2udt2635.3 switch=n enabled=y phases=1 Linecode=1P_OH_AL_ACSR_#2_Sparrow_12_47_0_1_1_1_1

New Line.l(r:p2udt3228-p2udt8285) Units=km Length=0.0676168 bus1=p2udt3228-p2udt8285x.2 bus2=p2udt3228.2 switch=n enabled=y phases=1 Linecode=1P_OH_AL_ACSR_#2_Sparrow_12_47_0_1_1_1_1

New Line.l(r:p2udt8122-p2uhs0_1247)_s1 Units=km Length=0.53339 bus1=p2udt8122-p2uhs0_1247x.1.2.3 bus2=p2udt8122.1.2.3 switch=n enabled=y phases=3 Linecode=3P_OH_AL_ACSR_1033kcmil_Curlew_12.47_1_3_3_3_3

New Line.l(r:p2udt3377-p2udt5304) Units=km Length=0.0720262 bus1=p2udt3377.1.2.3 bus2=p2udt5304.1.2.3 switch=n enabled=y phases=3 Linecode=3P_OH_AL_ACSR_4/0_Penguin_12_47_0_3_3_3_3

New Line.l(r:p2udt3377-p2udt5205) Units=km Length=0.160788 bus1=p2udt5205.1.2.3 bus2=p2udt3377.1.2.3 switch=n enabled=y phases=3 Linecode=3P_OH_AL_ACSR_4/0_Penguin_12_47_0_3_3_3_3

New Line.l(r:p2udt3531-p2udt5205) Units=km Length=0.187872 bus1=p2udt3531.1.2.3 bus2=p2udt5205.1.2.3 switch=n enabled=y phases=3 Linecode=3P_OH_AL_ACSR_4/0_Penguin_12_47_0_3_3_3_3

New Line.l(r:p2udt3531-p2udt8123) Units=km Length=0.132478 bus1=p2udt3531.1.2.3 bus2=p2udt8123.1.2.3 switch=n enabled=y phases=3 Linecode=3P_OH_AL_ACSR_4/0_Penguin_12_47_0_3_3_3_3

New Line.l(r:p2udt3531-p2udt7866) Units=km Length=0.038875700000000006 bus1=p2udt7866.1.2.3 bus2=p2udt3531.1.2.3 switch=n enabled=y phases=3 Linecode=3P_OH_AL_ACSR_4/0_Penguin_12_47_0_3_3_3_3

New Line.l(r:p2udt1537-p2udt7866) Units=km Length=0.18472200000000003 bus1=p2udt1537.1.2.3 bus2=p2udt7866.1.2.3 switch=n enabled=y phases=3 Linecode=3P_OH_AL_ACSR_4/0_Penguin_12_47_0_3_3_3_3

New Line.l(r:p2udt1537-p2udt7423) Units=km Length=0.596693 bus1=p2udt7423.1.2.3 bus2=p2udt1537.1.2.3 switch=n enabled=y phases=3 Linecode=3P_OH_AL_ACSR_4/0_Penguin_12_47_0_3_3_3_3

New Line.l(r:p2udt3227-p2udt6148) Units=km Length=0.05473390000000001 bus1=p2udt6148.1.2.3 bus2=p2udt3227.1.2.3 switch=n enabled=y phases=3 Linecode=3P_OH_AL_ACSR_4/0_Penguin_12_47_0_3_3_3_3

New Line.l(r:p2udt6148-p2udt7423) Units=km Length=0.0182341 bus1=p2udt7423.1.2.3 bus2=p2udt6148.1.2.3 switch=n enabled=y phases=3 Linecode=3P_OH_AL_ACSR_4/0_Penguin_12_47_0_3_3_3_3

New Line.l(r:p2udt7423-p2udt8122) Units=km Length=0.18336600000000003 bus1=p2udt8122.1.2.3 bus2=p2udt7423.1.2.3 switch=n enabled=y phases=3 Linecode=3P_OH_AL_ACSR_4/0_Penguin_12_47_0_3_3_3_3

New Line.l(r:p2udt8122lv-p2ulv18860) Units=km Length=0.0107799 bus1=p2udt8122lv.1.2.3 bus2=p2ulv18860.1.2.3 switch=n enabled=y phases=3 Linecode=3P_UG_AL_350kcmil_15_0_416_0_3_3_3_3

New Line.l(r:p2udt1353lv-p2ulv2455) Units=km Length=0.0106785 bus1=p2udt1353lv.1.2.3 bus2=p2ulv2455.1.2.3 switch=n enabled=y phases=3 Linecode=3P_UG_AL_750kcmil_25_0_416_0_3_3_3_3

New Line.l(r:p2udm4972-p2ulv1493) Units=km Length=0.00512653 bus1=p2udm4972.1.2.3 bus2=p2ulv1493.1.2.3 switch=n enabled=y phases=3 Linecode=3P_UG_AL_350kcmil_15_0_416_0_3_3_3_3

New Line.l(r:p2udm4972-p2udt1353lv) Units=km Length=0.0157187 bus1=p2udt1353lv.1.2.3 bus2=p2udm4972.1.2.3 switch=n enabled=y phases=3 Linecode=3P_UG_AL_350kcmil_15_0_416_0_3_3_3_3

New Line.l(r:p2udt1353-p2udt2477) Units=km Length=0.0684503 bus1=p2udt2477.1.2.3 bus2=p2udt1353.1.2.3 switch=n enabled=y phases=3 Linecode=3P_OH_AL_ACSR_4/0_Penguin_12_47_0_3_3_3_3

New Line.l(r:p2udt2477-p2udt8122) Units=km Length=0.104404 bus1=p2udt8122.1.2.3 bus2=p2udt2477.1.2.3 switch=n enabled=y phases=3 Linecode=3P_OH_AL_ACSR_4/0_Penguin_12_47_0_3_3_3_3

New Line.l(r:p2udt1537lv-p2ulv1710) Units=km Length=0.031228 bus1=p2udt1537lv.1.2.3 bus2=p2ulv1710.1.2.3 switch=n enabled=y phases=3 Linecode=3P_UG_AL_750kcmil_25_0_416_0_3_3_3_3

New Line.l(r:p2udt7696lv-p2ulv16615) Units=km Length=0.0150581 bus1=p2udt7696lv.1.2.3 bus2=p2ulv16615.1.2.3 switch=n enabled=y phases=3 Linecode=3P_UG_AL_750kcmil_25_0_416_0_3_3_3_3

New Line.l(r:p2udt3532lv-p2ulv4649) Units=km Length=0.0410531 bus1=p2udt3532lv.1.2.3 bus2=p2ulv4649.1.2.3 switch=n enabled=y phases=3 Linecode=3P_UG_AL_750kcmil_25_0_416_0_3_3_3_3

New Line.l(r:p2udt3532-p2udt7696) Units=km Length=0.0552883 bus1=p2udt7696.1.2.3 bus2=p2udt3532.1.2.3 switch=n enabled=y phases=3 Linecode=3P_OH_AL_ACSR_4/0_Penguin_12_47_0_3_3_3_3

New Line.l(r:p2udt1537-p2udt7696) Units=km Length=0.0732349 bus1=p2udt1537.1.2.3 bus2=p2udt7696.1.2.3 switch=n enabled=y phases=3 Linecode=3P_OH_AL_ACSR_4/0_Penguin_12_47_0_3_3_3_3

New Line.l(r:p2udt7866lv-p2ulv17534) Units=km Length=0.0210965 bus1=p2udt7866lv.1.2.3 bus2=p2ulv17534.1.2.3 switch=n enabled=y phases=3 Linecode=3P_UG_AL_750kcmil_25_0_416_0_3_3_3_3

New Line.l(r:p2udt3531lv-p2ulv4648) Units=km Length=0.0107904 bus1=p2udt3531lv.1.2.3 bus2=p2ulv4648.1.2.3 switch=n enabled=y phases=3 Linecode=3P_UG_AL_750kcmil_25_0_416_0_3_3_3_3

New Line.l(r:p2udt3377lv-p2ulv4403) Units=km Length=0.0339208 bus1=p2udt3377lv.1.2.3 bus2=p2ulv4403.1.2.3 switch=n enabled=y phases=3 Linecode=3P_UG_AL_750kcmil_25_0_416_0_3_3_3_3

New Line.l(r:p2udt1130lv-p2ulv1234) Units=km Length=0.00841942 bus1=p2udt1130lv.1.2.3 bus2=p2ulv1234.1.2.3 switch=n enabled=y phases=3 Linecode=3P_UG_AL_350kcmil_15_0_416_0_3_3_3_3

New Line.l(r:p2udt1130lv-p2ulv16161) Units=km Length=0.00841942 bus1=p2udt1130lv.1.2.3 bus2=p2ulv16161.1.2.3 switch=n enabled=y phases=3 Linecode=3P_UG_AL_350kcmil_15_0_416_0_3_3_3_3

New Line.l(r:p2udt1130-p2udt1536) Units=km Length=0.120534 bus1=p2udt1536.1.2.3 bus2=p2udt1130.1.2.3 switch=n enabled=y phases=3 Linecode=3P_OH_AL_ACSR_4/0_Penguin_12_47_0_3_3_3_3

New Line.l(r:p2udt6146lv-p2ulv10587) Units=km Length=0.027015400000000002 bus1=p2udt6146lv.1.2.3 bus2=p2ulv10587.1.2.3 switch=n enabled=y phases=3 Linecode=3P_UG_AL_350kcmil_15_0_416_0_3_3_3_3

New Line.l(r:p2udt6146-p2udt7474) Units=km Length=0.417788 bus1=p2udt7474.1.2.3 bus2=p2udt6146.1.2.3 switch=n enabled=y phases=3 Linecode=3P_OH_AL_ACSR_4/0_Penguin_12_47_0_3_3_3_3

New Line.l(r:p2udt1536-p2udt7474) Units=km Length=0.05433230000000001 bus1=p2udt1536.1.2.3 bus2=p2udt7474.1.2.3 switch=n enabled=y phases=3 Linecode=3P_OH_AL_ACSR_4/0_Penguin_12_47_0_3_3_3_3

New Line.l(r:p2udt1536-p2umv20) Units=km Length=0.09638090000000002 bus1=p2umv20.1.2.3 bus2=p2udt1536.1.2.3 switch=n enabled=y phases=3 Linecode=3P_OH_AL_ACSR_4/0_Penguin_12_47_0_3_3_3_3

New Line.l(r:p2udt5304-p2umv20) Units=km Length=0.0963714 bus1=p2udt5304.1.2.3 bus2=p2umv20.1.2.3 switch=n enabled=y phases=3 Linecode=3P_OH_AL_ACSR_4/0_Penguin_12_47_0_3_3_3_3

New Line.l(r:p2udt7473lv-p2ulv15681) Units=km Length=0.0899037 bus1=p2udt7473lv.1.2.3 bus2=p2ulv15681.1.2.3 switch=n enabled=y phases=3 Linecode=3P_UG_AL_350kcmil_15_0_416_0_3_3_3_3

New Line.l(r:p2udt5205-p2udt7473) Units=km Length=0.001 bus1=p2udt5205.1.2.3 bus2=p2udt7473.1.2.3 switch=n enabled=y phases=3 Linecode=3P_OH_AL_ACSR_4/0_Penguin_12_47_0_3_3_3_3

New Line.l(r:p2udt8123lv-p2ulv18861) Units=km Length=0.0375453 bus1=p2udt8123lv.1.2.3 bus2=p2ulv18861.1.2.3 switch=n enabled=y phases=3 Linecode=3P_UG_AL_750kcmil_25_0_416_0_3_3_3_3

New Line.l(r:p2udt8123-p2umv23) Units=km Length=0.0611813 bus1=p2udt8123.1.2.3 bus2=p2umv23.1.2.3 switch=n enabled=y phases=3 Linecode=3P_OH_AL_ACSR_4/0_Penguin_12_47_0_3_3_3_3

New Line.l(r:p2udt8361lv-p2ulv20244) Units=km Length=0.0148521 bus1=p2udt8361lv.1.2.3 bus2=p2ulv20244.1.2.3 switch=n enabled=y phases=3 Linecode=3P_UG_AL_350kcmil_15_0_416_0_3_3_3_3

New Line.l(r:p2udt7999lv-p2ulv18215) Units=km Length=0.00894635 bus1=p2udt7999lv.1.2.3 bus2=p2ulv18215.1.2.3 switch=n enabled=y phases=3 Linecode=3P_UG_AL_350kcmil_15_0_416_0_3_3_3_3

New Line.l(r:p2udt5303lv-p2ulv8275) Units=km Length=0.025245200000000002 bus1=p2udt5303lv.1.2.3 bus2=p2ulv8275.1.2.3 switch=n enabled=y phases=3 Linecode=3P_UG_AL_350kcmil_15_0_416_0_3_3_3_3

New Line.l(r:p2udt8576lv-p2ulv21580) Units=km Length=0.02686 bus1=p2udt8576lv.1.2.3 bus2=p2ulv21580.1.2.3 switch=n enabled=y phases=3 Linecode=3P_UG_AL_350kcmil_15_0_416_0_3_3_3_3

New Line.l(r:p2udt6149lv-p2ulv10590) Units=km Length=0.011179500000000002 bus1=p2udt6149lv.1.2.3 bus2=p2ulv10590.1.2.3 switch=n enabled=y phases=3 Linecode=3P_UG_AL_750kcmil_25_0_416_0_3_3_3_3

New Line.l(r:p2udt6149-p2udt8576) Units=km Length=0.0381089 bus1=p2udt8576.1.2.3 bus2=p2udt6149.1.2.3 switch=n enabled=y phases=3 Linecode=3P_OH_AL_ACSR_4/0_Penguin_12_47_0_3_3_3_3

New Line.l(r:p2udt5303-p2udt8576) Units=km Length=0.038104700000000005 bus1=p2udt5303.1.2.3 bus2=p2udt8576.1.2.3 switch=n enabled=y phases=3 Linecode=3P_OH_AL_ACSR_4/0_Penguin_12_47_0_3_3_3_3

New Line.l(r:p2udt5303-p2udt7999) Units=km Length=0.10658 bus1=p2udt7999.1.2.3 bus2=p2udt5303.1.2.3 switch=n enabled=y phases=3 Linecode=3P_OH_AL_ACSR_4/0_Penguin_12_47_0_3_3_3_3

New Line.l(r:p2udt7999-p2udt8361) Units=km Length=0.11392300000000001 bus1=p2udt8361.1.2.3 bus2=p2udt7999.1.2.3 switch=n enabled=y phases=3 Linecode=3P_OH_AL_ACSR_4/0_Penguin_12_47_0_3_3_3_3

New Line.l(r:p2udt3531-p2udt8361) Units=km Length=0.125198 bus1=p2udt3531.1.2.3 bus2=p2udt8361.1.2.3 switch=n enabled=y phases=3 Linecode=3P_OH_AL_ACSR_4/0_Penguin_12_47_0_3_3_3_3

New Line.l(r:p2udt3227lv-p2ulv4147) Units=km Length=0.0237062 bus1=p2udt3227lv.1.2.3 bus2=p2ulv4147.1.2.3 switch=n enabled=y phases=3 Linecode=3P_UG_AL_350kcmil_15_0_416_0_3_3_3_3

New Line.l(r:p2udt6064lv-p2ulv10330) Units=km Length=0.0165373 bus1=p2udt6064lv.1.2.3 bus2=p2ulv10330.1.2.3 switch=n enabled=y phases=3 Linecode=3P_UG_AL_350kcmil_15_0_416_0_3_3_3_3

New Line.l(r:p2udt6698lv-p2ulv12467) Units=km Length=0.0100774 bus1=p2udt6698lv.1.2.3 bus2=p2ulv12467.1.2.3 switch=n enabled=y phases=3 Linecode=3P_UG_AL_350kcmil_15_0_416_0_3_3_3_3

New Line.l(r:p2udt6064-p2udt6698) Units=km Length=0.11388900000000002 bus1=p2udt6064.1.2.3 bus2=p2udt6698.1.2.3 switch=n enabled=y phases=3 Linecode=3P_OH_AL_ACSR_4/0_Penguin_12_47_0_3_3_3_3

New Line.l(r:p2udt291-p2udt6064) Units=km Length=0.484986 bus1=p2udt291.1.2.3 bus2=p2udt6064.1.2.3 switch=n enabled=y phases=3 Linecode=3P_OH_AL_ACSR_4/0_Penguin_12_47_0_3_3_3_3

New Line.l(r:p2udt8285lv-p2ulv19810) Units=km Length=0.0171835 bus1=p2udt8285lv.1.2.3 bus2=p2ulv19810.1.2.3 switch=n enabled=y phases=3 Linecode=3P_UG_AL_350kcmil_15_0_416_0_3_3_3_3

New Line.l(r:p2udt6894lv-p2ulv13186) Units=km Length=0.031081700000000004 bus1=p2udt6894lv.1.2.3 bus2=p2ulv13186.1.2.3 switch=n enabled=y phases=3 Linecode=3P_UG_AL_350kcmil_15_0_416_0_3_3_3_3

New Line.l(r:p2udt4063lv-p2ulv5608) Units=km Length=0.0224646 bus1=p2udt4063lv.1.2.3 bus2=p2ulv5608.1.2.3 switch=n enabled=y phases=3 Linecode=3P_UG_AL_350kcmil_15_0_416_0_3_3_3_3

New Line.l(r:p2udt8286lv-p2ulv19812) Units=km Length=0.0112579 bus1=p2udt8286lv.1.2.3 bus2=p2ulv19812.1.2.3 switch=n enabled=y phases=3 Linecode=3P_UG_AL_350kcmil_15_0_416_0_3_3_3_3

New Line.l(r:p2udt5306-p2udt8286) Units=km Length=0.0195446 bus1=p2udt5306.1.2.3 bus2=p2udt8286.1.2.3 switch=n enabled=y phases=3 Linecode=3P_OH_AL_ACSR_4/0_Penguin_12_47_0_3_3_3_3

New Line.l(r:p2udt3535-p2udt5306) Units=km Length=0.0781486 bus1=p2udt3535.1.2.3 bus2=p2udt5306.1.2.3 switch=n enabled=y phases=3 Linecode=3P_OH_AL_ACSR_4/0_Penguin_12_47_0_3_3_3_3

New Line.l(r:p2udt3535-p2udt4063) Units=km Length=0.0390793 bus1=p2udt4063.1.2.3 bus2=p2udt3535.1.2.3 switch=n enabled=y phases=3 Linecode=3P_OH_AL_ACSR_4/0_Penguin_12_47_0_3_3_3_3

New Line.l(r:p2udt4063-p2udt6371) Units=km Length=0.0780186 bus1=p2udt6371.1.2.3 bus2=p2udt4063.1.2.3 switch=n enabled=y phases=3 Linecode=3P_OH_AL_ACSR_4/0_Penguin_12_47_0_3_3_3_3

New Line.l(r:p2udt6371-p2udt6894) Units=km Length=0.6349390000000001 bus1=p2udt6894.1.2.3 bus2=p2udt6371.1.2.3 switch=n enabled=y phases=3 Linecode=3P_OH_AL_ACSR_4/0_Penguin_12_47_0_3_3_3_3

New Line.l(r:p2udt292-p2udt6894) Units=km Length=0.0375948 bus1=p2udt292.1.2.3 bus2=p2udt6894.1.2.3 switch=n enabled=y phases=3 Linecode=3P_OH_AL_ACSR_4/0_Penguin_12_47_0_3_3_3_3

New Line.l(r:p2udt292-p2udt5536) Units=km Length=0.314757 bus1=p2udt5536.1.2.3 bus2=p2udt292.1.2.3 switch=n enabled=y phases=3 Linecode=3P_OH_AL_ACSR_4/0_Penguin_12_47_0_3_3_3_3

New Line.l(r:p2udt3088-p2udt5536) Units=km Length=0.0706495 bus1=p2udt3088.1.2.3 bus2=p2udt5536.1.2.3 switch=n enabled=y phases=3 Linecode=3P_OH_AL_ACSR_4/0_Penguin_12_47_0_3_3_3_3

New Line.l(r:p2udt3088-p2udt8285) Units=km Length=0.352421 bus1=p2udt8285.1.2.3 bus2=p2udt3088.1.2.3 switch=n enabled=y phases=3 Linecode=3P_OH_AL_ACSR_4/0_Penguin_12_47_0_3_3_3_3

New Line.l(r:p2udt291-p2udt8285) Units=km Length=0.0114505 bus1=p2udt291.1.2.3 bus2=p2udt8285.1.2.3 switch=n enabled=y phases=3 Linecode=3P_OH_AL_ACSR_4/0_Penguin_12_47_0_3_3_3_3

New Line.l(r:p2udt2112-p2udt291) Units=km Length=0.135874 bus1=p2udt2112.1.2.3 bus2=p2udt2112_b1_1.1.2.3 switch=n enabled=y phases=3 Linecode=3P_OH_AL_ACSR_4/0_Penguin_12_47_0_3_3_3_3

New Line.l(r:p2udt2112-p2udt3227) Units=km Length=0.0547241 bus1=p2udt3227.1.2.3 bus2=p2udt2112.1.2.3 switch=n enabled=y phases=3 Linecode=3P_OH_AL_ACSR_4/0_Penguin_12_47_0_3_3_3_3

New Line.l(r:p2udt3796lv-p2ulv5143) Units=km Length=0.00959927 bus1=p2udt3796lv.1.2.3 bus2=p2ulv5143.1.2.3 switch=n enabled=y phases=3 Linecode=3P_UG_AL_750kcmil_25_0_416_0_3_3_3_3

New Line.l(r:p2udt3796-p2udt6148) Units=km Length=0.138421 bus1=p2udt6148.1.2.3 bus2=p2udt3796.1.2.3 switch=n enabled=y phases=3 Linecode=3P_OH_AL_ACSR_4/0_Penguin_12_47_0_3_3_3_3

New Line.l(r:p2udt5459-p2udt8122) Units=km Length=0.0338391 bus1=p2udt5459-p2udt8122x.1.2.3 bus2=p2udt8122.1.2.3 switch=n enabled=y phases=3 Linecode=3P_OH_AL_ACSR_1033kcmil_Curlew_12.47_1_3_3_3_3

New Line.fuse(r:p2udt1130-p2udt2632)p2u_45614 Units=km Length=0.001 bus1=p2udt1130.3 bus2=p2udt1130-p2udt2632x.3 switch=n enabled=y phases=1 Linecode=fuse_1_1_1_1

New Fuse.Fuse_fuse(r:p2udt1130-p2udt2632)p2u_45614 monitoredobj=Line.fuse(r:p2udt1130-p2udt2632)p2u_45614 enabled=y ratedcurrent=100.0

New Line.fuse(r:p2udt3377-p2udt4455)p2u_45858 Units=km Length=0.001 bus1=p2udt3377.1 bus2=p2udt3377-p2udt4455x.1 switch=n enabled=y phases=1 Linecode=fuse_1_1_1_1

New Fuse.Fuse_fuse(r:p2udt3377-p2udt4455)p2u_45858 monitoredobj=Line.fuse(r:p2udt3377-p2udt4455)p2u_45858 enabled=y ratedcurrent=100.0

New Line.fuse(r:p2udt3795-p2udt6064)p2u_46153 Units=km Length=0.001 bus1=p2udt6064.1 bus2=p2udt3795-p2udt6064x.1 switch=n enabled=y phases=1 Linecode=fuse_1_1_1_1

New Fuse.Fuse_fuse(r:p2udt3795-p2udt6064)p2u_46153 monitoredobj=Line.fuse(r:p2udt3795-p2udt6064)p2u_46153 enabled=y ratedcurrent=100.0

New Line.fuse(r:p2udt6146-p2udt8432)p2u_46162 Units=km Length=0.001 bus1=p2udt6146.3 bus2=p2udt6146-p2udt8432x.3 switch=n enabled=y phases=1 Linecode=fuse_1_6_1_1_1

New Fuse.Fuse_fuse(r:p2udt6146-p2udt8432)p2u_46162 monitoredobj=Line.fuse(r:p2udt6146-p2udt8432)p2u_46162 enabled=y ratedcurrent=100.0

New Line.fuse(r:p2udt4979-p2udt6149)p2u_46163 Units=km Length=0.001 bus1=p2udt6149.3 bus2=p2udt4979-p2udt6149x.3 switch=n enabled=y phases=1 Linecode=fuse_1_6_1_3_1_1

New Fuse.Fuse_fuse(r:p2udt4979-p2udt6149)p2u_46163 monitoredobj=Line.fuse(r:p2udt4979-p2udt6149)p2u_46163 enabled=y ratedcurrent=100.0

New Line.fuse(r:p2udt1929-p2udt6894)p2u_46248 Units=km Length=0.001 bus1=p2udt6894.1 bus2=p2udt1929-p2udt6894x.1 switch=n enabled=y phases=1 Linecode=fuse_1_1_1_1

New Fuse.Fuse_fuse(r:p2udt1929-p2udt6894)p2u_46248 monitoredobj=Line.fuse(r:p2udt1929-p2udt6894)p2u_46248 enabled=y ratedcurrent=100.0

New Line.fuse(r:p2udt3228-p2udt8285)p2u_46417 Units=km Length=0.001 bus1=p2udt8285.2 bus2=p2udt3228-p2udt8285x.2 switch=n enabled=y phases=1 Linecode=fuse_1_1_1_1

New Fuse.Fuse_fuse(r:p2udt3228-p2udt8285)p2u_46417 monitoredobj=Line.fuse(r:p2udt3228-p2udt8285)p2u_46417 enabled=y ratedcurrent=100.0

New Line.fuse(r:p2udt2635-p2udt8286)p2u_46418 Units=km Length=0.001 bus1=p2udt8286.3 bus2=p2udt2635-p2udt8286x.3 switch=n enabled=y phases=1 Linecode=fuse_1_6_1_1_1

New Fuse.Fuse_fuse(r:p2udt2635-p2udt8286)p2u_46418 monitoredobj=Line.fuse(r:p2udt2635-p2udt8286)p2u_46418 enabled=y ratedcurrent=100.0

New Line.l(r:p2udt3377-p2udt4455)_disconnect Units=km Length=0.001 bus1=p2udt3377-p2udt4455x_b1_1.1 bus2=p2udt3377-p2udt4455x_b2_1.1 switch=y enabled=y phases=1 Linecode=1P_OH_AL_ACSR_#2_Sparrow_12_47_0_1_1_1_1

New Line.l(r:p2udt3377-p2udt4455)_cont Units=km Length=0.9392940000000001 bus1=p2udt3377-p2udt4455x_b2_1.1 bus2=p2udt4455.1 switch=n enabled=y phases=1 Linecode=1P_OH_AL_ACSR_#2_Sparrow_12_47_0_1_1_1_1

New Line.l(r:p2udt2112-p2udt291)_disconnect Units=km Length=0.001 bus1=p2udt2112_b1_1.1.2.3 bus2=p2udt2112_b2_1.1.2.3 switch=y enabled=y phases=3 Linecode=3P_OH_AL_ACSR_4/0_Penguin_12_47_0_3_3_3_3

New Line.l(r:p2udt2112-p2udt291)_cont Units=km Length=1.231866 bus1=p2udt2112_b2_1.1.2.3 bus2=p2udt291.1.2.3 switch=n enabled=y phases=3 Linecode=3P_OH_AL_ACSR_4/0_Penguin_12_47_0_3_3_3_3
