New Line.l(r:p2udt4810lv-p2ulv7087) Units=km Length=0.0291993 bus1=p2udt4810lv.1.2 bus2=p2ulv7087.1.2 switch=n enabled=y phases=2 Linecode=1P_OH_AL_4/0_Zuzara_0_416_0_2_2_2_2

New Line.l(r:p2udt6966lv-p2ulv13478) Units=km Length=0.0420499 bus1=p2udt6966lv.1.2 bus2=p2ulv13478.1.2 switch=n enabled=y phases=2 Linecode=1P_OH_AL_4/0_Zuzara_0_416_0_2_2_2_2

New Line.l(r:p2udm20748-p2ulv19613) Units=km Length=0.0360142 bus1=p2udm20748.1.2 bus2=p2ulv19613.1.2 switch=n enabled=y phases=2 Linecode=1P_OH_AL_4/0_Zuzara_0_416_0_2_2_2_2

New Line.l(r:p2udm20748-p2udt6966lv) Units=km Length=0.0150667 bus1=p2udt6966lv.1.2 bus2=p2udm20748.1.2 switch=n enabled=y phases=2 Linecode=1P_OH_AL_2/0_Rucina_0_416_0_2_2_2_2

New Line.l(r:p2udt8625lv-p2ulv21842) Units=km Length=0.00504714 bus1=p2udt8625lv.1.2.3 bus2=p2ulv21842.1.2.3 switch=n enabled=y phases=3 Linecode=3P_UG_AL_350kcmil_15_0_416_0_3_3_3_3

New Line.l(r:p2udt3246lv-p2ulv4180) Units=km Length=0.0535644 bus1=p2udt3246lv.1.2.3 bus2=p2ulv4180.1.2.3 switch=n enabled=y phases=3 Linecode=3P_UG_AL_750kcmil_25_0_416_0_3_3_3_3

New Line.l(r:p2udt3246-p2udt4810) Units=km Length=0.0381548 bus1=p2udt4810.1.2.3 bus2=p2udt3246.1.2.3 switch=n enabled=y phases=3 Linecode=3P_OH_AL_ACSR_4/0_Penguin_12_47_0_3_3_3_3

New Line.l(r:p2udt4810-p2udt6966) Units=km Length=0.28907600000000006 bus1=p2udt6966.1.2.3 bus2=p2udt4810.1.2.3 switch=n enabled=y phases=3 Linecode=3P_OH_AL_ACSR_4/0_Penguin_12_47_0_3_3_3_3

New Line.l(r:p2udt5734lv-p2ulv9434) Units=km Length=0.0279469 bus1=p2udt5734lv.1.2.3 bus2=p2ulv9434.1.2.3 switch=n enabled=y phases=3 Linecode=3P_UG_AL_350kcmil_15_0_416_0_3_3_3_3

New Line.l(r:p2udt7656lv-p2ulv16420) Units=km Length=0.001 bus1=p2udt7656lv.1.2.3 bus2=p2ulv16420.1.2.3 switch=n enabled=y phases=3 Linecode=3P_UG_AL_350kcmil_15_0_416_0_3_3_3_3

New Line.l(r:p2udt7190lv-p2ulv14333) Units=km Length=0.001 bus1=p2udt7190lv.1.2.3 bus2=p2ulv14333.1.2.3 switch=n enabled=y phases=3 Linecode=3P_UG_AL_350kcmil_15_0_416_0_3_3_3_3

New Line.l(r:p2udt7190-p2udt7656) Units=km Length=0.0519351 bus1=p2udt7656.1.2.3 bus2=p2udt7190.1.2.3 switch=n enabled=y phases=3 Linecode=3P_OH_AL_ACSR_4/0_Penguin_12_47_0_3_3_3_3

New Line.l(r:p2udt5734-p2udt7656) Units=km Length=0.138828 bus1=p2udt5734.1.2.3 bus2=p2udt7656.1.2.3 switch=n enabled=y phases=3 Linecode=3P_OH_AL_ACSR_4/0_Penguin_12_47_0_3_3_3_3

New Line.l(r:p2udt5734-p2udt6966) Units=km Length=0.33913400000000005 bus1=p2udt6966.1.2.3 bus2=p2udt5734.1.2.3 switch=n enabled=y phases=3 Linecode=3P_OH_AL_ACSR_4/0_Penguin_12_47_0_3_3_3_3

New Line.l(r:p2udt6966-p2udt8625) Units=km Length=0.238865 bus1=p2udt8625.1.2.3 bus2=p2udt6966.1.2.3 switch=n enabled=y phases=3 Linecode=3P_OH_AL_ACSR_4/0_Penguin_12_47_0_3_3_3_3

New Line.l(r:p2udt8625-p2uhs0_1247)_s1 Units=km Length=0.948549 bus1=p2udt8625-p2uhs0_1247x.1.2.3 bus2=p2udt8625.1.2.3 switch=n enabled=y phases=3 Linecode=3P_OH_AL_ACSR_4/0_Penguin_12_47_0_3_3_3_3

New Line.l(r:p2udt3246-p2udt5222) Units=km Length=0.733957 bus1=p2udt3246-p2udt5222x.1.2.3 bus2=p2udt3246.1.2.3 switch=n enabled=y phases=3 Linecode=3P_OH_AL_ACSR_1033kcmil_Curlew_12.47_1_3_3_3_3
