New Load.load_p2ulv4180 conn=wye bus1=p2ulv4180.1.2.3 kV=0.48 Vminpu=0.8 Vmaxpu=1.2 model=1 kW=148.52100000000002 kvar=30.158475336022953 Phases=3

New Load.load_p2ulv7087 conn=wye bus1=p2ulv7087.1.2 kV=0.2080002494301389 Vminpu=0.8 Vmaxpu=1.2 model=1 kW=6.22006 kvar=1.2597787689245672 Phases=2

New Load.load_p2ulv9434 conn=wye bus1=p2ulv9434.1.2.3 kV=0.48 Vminpu=0.8 Vmaxpu=1.2 model=1 kW=28.170300000000005 kvar=5.720223387658091 Phases=3

New Load.load_p2ulv13478 conn=wye bus1=p2ulv13478.1.2 kV=0.2080002494301389 Vminpu=0.8 Vmaxpu=1.2 model=1 kW=7.200070000000001 kvar=1.4582649236133909 Phases=2

New Load.load_p2ulv14333 conn=wye bus1=p2ulv14333.1.2.3 kV=0.48 Vminpu=0.8 Vmaxpu=1.2 model=1 kW=48.5005 kvar=9.848446570079524 Phases=3

New Load.load_p2ulv16420 conn=wye bus1=p2ulv16420.1.2.3 kV=0.48 Vminpu=0.8 Vmaxpu=1.2 model=1 kW=27.9703 kvar=5.679611655531291 Phases=3

New Load.load_p2ulv19613 conn=wye bus1=p2ulv19613.1.2 kV=0.2080002494301389 Vminpu=0.8 Vmaxpu=1.2 model=1 kW=5.600060000000001 kvar=1.1400675357543906 Phases=2

New Load.load_p2ulv21842 conn=wye bus1=p2ulv21842.1.2.3 kV=0.48 Vminpu=0.8 Vmaxpu=1.2 model=1 kW=30.120300000000004 kvar=6.116187775894399 Phases=3
