New Line.l(r:p2udt3516-p2uhs10_1247)_s1 Units=km Length=0.620428 bus1=p2udt3516-p2uhs10_1247x.1.2.3 bus2=p2udt3516.1.2.3 switch=n enabled=y phases=3 Linecode=3P_OH_AL_ACSR_4/0_Penguin_12_47_0_3_3_3_3

New Line.l(r:p2udt3516lv-p2ulv4622) Units=km Length=0.0296699 bus1=p2udt3516lv.1.2.3 bus2=p2ulv4622.1.2.3 switch=n enabled=y phases=3 Linecode=3P_UG_AL_4/0_15_0_416_0_3_3_3_3

New Line.l(r:p2udt673lv-p2ulv713)_s0 Units=km Length=0.0789113 bus1=p2udt673lv.1.2.3 bus2=p2udt673lv-p2ulv713x.1.2.3 switch=n enabled=y phases=3 Linecode=3P_UG_AL_4/0_15_0_416_0_3_3_3_3

New Line.l(r:p2udt673lv-p2ulv713)_s1 Units=km Length=0.00181003 bus1=p2udt673lv-p2ulv713x.1.2.3 bus2=p2ulv713.1.2.3 switch=n enabled=y phases=3 Linecode=3P_UG_AL_4/0_15_0_416_0_3_3_3_3

New Line.l(r:p2udt673lv-p2ulv2168) Units=km Length=0.0392044 bus1=p2udt673lv.1.2.3 bus2=p2ulv2168.1.2.3 switch=n enabled=y phases=3 Linecode=3P_UG_AL_4/0_15_0_416_0_3_3_3_3

New Line.l(r:p2udm2508-p2ulv712) Units=km Length=0.0388716 bus1=p2udm2508.1.2.3 bus2=p2ulv712.1.2.3 switch=n enabled=y phases=3 Linecode=3P_UG_AL_4/0_15_0_416_0_3_3_3_3

New Line.l(r:p2udm2511-p2ulv13634) Units=km Length=0.0388723 bus1=p2udm2511.1.2.3 bus2=p2ulv13634.1.2.3 switch=n enabled=y phases=3 Linecode=3P_UG_AL_4/0_15_0_416_0_3_3_3_3

New Line.l(r:p2udm2508-p2udm2511) Units=km Length=0.0197849 bus1=p2udm2508.1.2.3 bus2=p2udm2511.1.2.3 switch=n enabled=y phases=3 Linecode=3P_UG_AL_4/0_15_0_416_0_3_3_3_3

New Line.l(r:p2udm2508-p2udt673lv) Units=km Length=0.0197803 bus1=p2udt673lv.1.2.3 bus2=p2udm2508.1.2.3 switch=n enabled=y phases=3 Linecode=3P_UG_AL_4/0_15_0_416_0_3_3_3_3

New Line.l(r:p2udt3516-p2udt673) Units=km Length=0.0791438 bus1=p2udt3516.1.2.3 bus2=p2udt673.1.2.3 switch=n enabled=y phases=3 Linecode=3P_OH_AL_ACSR_4/0_Penguin_12_47_0_3_3_3_3

New Line.l(r:p2udt7172lv-p2ulv14277) Units=km Length=0.0493078 bus1=p2udt7172lv.1.2.3 bus2=p2ulv14277.1.2.3 switch=n enabled=y phases=3 Linecode=3P_UG_AL_4/0_15_0_416_0_3_3_3_3

New Line.l(r:p2udt7172lv-p2ulv22245) Units=km Length=0.0493078 bus1=p2udt7172lv.1.2.3 bus2=p2ulv22245.1.2.3 switch=n enabled=y phases=3 Linecode=3P_UG_AL_4/0_15_0_416_0_3_3_3_3

New Line.l(r:p2udt3778lv-p2ulv5117) Units=km Length=0.001 bus1=p2udt3778lv.1.2.3 bus2=p2ulv5117.1.2.3 switch=n enabled=y phases=3 Linecode=3P_UG_AL_4/0_15_0_416_0_3_3_3_3

New Line.l(r:p2udt3778-p2udt7172)_s0 Units=km Length=0.283221 bus1=p2udt7172.1.2.3 bus2=p2udt3778-p2udt7172x.1.2.3 switch=n enabled=y phases=3 Linecode=3P_OH_AL_ACSR_4/0_Penguin_12_47_0_3_3_3_3

New Line.l(r:p2udt3778-p2udt7172)_s1 Units=km Length=0.169663 bus1=p2udt3778-p2udt7172x.1.2.3 bus2=p2udt3778.1.2.3 switch=n enabled=y phases=3 Linecode=3P_OH_AL_ACSR_4/0_Penguin_12_47_0_3_3_3_3

New Line.l(r:p2udt8746lv-p2ulv22702) Units=km Length=0.04934430000000001 bus1=p2udt8746lv.1.2.3 bus2=p2ulv22702.1.2.3 switch=n enabled=y phases=3 Linecode=3P_UG_AL_4/0_15_0_416_0_3_3_3_3

New Line.l(r:p2udt3067lv-p2ulv3875) Units=km Length=0.079162 bus1=p2udt3067lv.1.2.3 bus2=p2ulv3875.1.2.3 switch=n enabled=y phases=3 Linecode=3P_UG_AL_4/0_15_0_416_0_3_3_3_3

New Line.l(r:p2udt8061lv-p2ulv18606) Units=km Length=0.0893593 bus1=p2udt8061lv.1.2.3 bus2=p2ulv18606.1.2.3 switch=n enabled=y phases=3 Linecode=3P_UG_AL_4/0_15_0_416_0_3_3_3_3

New Line.l(r:p2udt910lv-p2ulv24244) Units=km Length=0.08791290000000002 bus1=p2udt910lv.1.2.3 bus2=p2ulv24244.1.2.3 switch=n enabled=y phases=3 Linecode=3P_UG_AL_4/0_15_0_416_0_3_3_3_3

New Line.l(r:p2udm3367-p2ulv973) Units=km Length=0.119484 bus1=p2udm3367.1.2.3 bus2=p2ulv973.1.2.3 switch=n enabled=y phases=3 Linecode=3P_UG_AL_4/0_15_0_416_0_3_3_3_3

New Line.l(r:p2udm3367-p2ulv14276) Units=km Length=0.091806 bus1=p2udm3367.1.2.3 bus2=p2ulv14276.1.2.3 switch=n enabled=y phases=3 Linecode=3P_UG_AL_4/0_15_0_416_0_3_3_3_3

New Line.l(r:p2udm3367-p2udt910lv) Units=km Length=0.0197775 bus1=p2udt910lv.1.2.3 bus2=p2udm3367.1.2.3 switch=n enabled=y phases=3 Linecode=3P_UG_AL_4/0_15_0_416_0_3_3_3_3

New Line.l(r:p2udm3368-p2ulv11504) Units=km Length=0.0824052 bus1=p2udm3368.1.2.3 bus2=p2ulv11504.1.2.3 switch=n enabled=y phases=3 Linecode=3P_UG_AL_4/0_15_0_416_0_3_3_3_3

New Line.l(r:p2udm3368-p2udt910lv) Units=km Length=0.0167226 bus1=p2udt910lv.1.2.3 bus2=p2udm3368.1.2.3 switch=n enabled=y phases=3 Linecode=3P_UG_AL_4/0_15_0_416_0_3_3_3_3

New Line.l(r:p2udt1327lv-p2ulv1464) Units=km Length=0.001 bus1=p2udt1327lv.1.2.3 bus2=p2ulv1464.1.2.3 switch=n enabled=y phases=3 Linecode=3P_UG_AL_4/0_15_0_416_0_3_3_3_3

New Line.l(r:p2udt1327-p2udt910) Units=km Length=0.33099600000000007 bus1=p2udt910.1.2.3 bus2=p2udt1327.1.2.3 switch=n enabled=y phases=3 Linecode=3P_OH_AL_ACSR_4/0_Penguin_12_47_0_3_3_3_3

New Line.l(r:p2udt6214lv-p2ulv10803) Units=km Length=0.001 bus1=p2udt6214lv.1.2.3 bus2=p2ulv10803.1.2.3 switch=n enabled=y phases=3 Linecode=3P_UG_AL_4/0_15_0_416_0_3_3_3_3

New Line.l(r:p2udt6214-p2udt910) Units=km Length=0.142976 bus1=p2udt910.1.2.3 bus2=p2udt6214.1.2.3 switch=n enabled=y phases=3 Linecode=3P_OH_AL_ACSR_4/0_Penguin_12_47_0_3_3_3_3

New Line.l(r:p2udt8061-p2udt910) Units=km Length=0.317261 bus1=p2udt8061.1.2.3 bus2=p2udt910.1.2.3 switch=n enabled=y phases=3 Linecode=3P_OH_AL_ACSR_4/0_Penguin_12_47_0_3_3_3_3

New Line.l(r:p2udt6054lv-p2ulv10308) Units=km Length=0.0121441 bus1=p2udt6054lv.1.2.3 bus2=p2ulv10308.1.2.3 switch=n enabled=y phases=3 Linecode=3P_UG_AL_4/0_15_0_416_0_3_3_3_3

New Line.l(r:p2udt5077lv-p2ulv7755) Units=km Length=0.0425239 bus1=p2udt5077lv.1.2.3 bus2=p2ulv7755.1.2.3 switch=n enabled=y phases=3 Linecode=3P_UG_AL_4/0_15_0_416_0_3_3_3_3

New Line.l(r:p2udt5077-p2udt6054) Units=km Length=0.0782422 bus1=p2udt6054.1.2.3 bus2=p2udt5077.1.2.3 switch=n enabled=y phases=3 Linecode=3P_OH_AL_ACSR_4/0_Penguin_12_47_0_3_3_3_3

New Line.l(r:p2udt6054-p2udt8061) Units=km Length=0.457641 bus1=p2udt8061.1.2.3 bus2=p2udt6054.1.2.3 switch=n enabled=y phases=3 Linecode=3P_OH_AL_ACSR_4/0_Penguin_12_47_0_3_3_3_3

New Line.l(r:p2udt3067-p2udt8061) Units=km Length=0.0626314 bus1=p2udt3067.1.2.3 bus2=p2udt8061.1.2.3 switch=n enabled=y phases=3 Linecode=3P_OH_AL_ACSR_4/0_Penguin_12_47_0_3_3_3_3

New Line.l(r:p2udt3067-p2udt8746) Units=km Length=0.0824006 bus1=p2udt8746.1.2.3 bus2=p2udt8746_b1_1.1.2.3 switch=n enabled=y phases=3 Linecode=3P_OH_AL_ACSR_4/0_Penguin_12_47_0_3_3_3_3

New Line.l(r:p2udt7218lv-p2ulv14502) Units=km Length=0.065718 bus1=p2udt7218lv.1.2.3 bus2=p2ulv14502.1.2.3 switch=n enabled=y phases=3 Linecode=3P_UG_AL_4/0_15_0_416_0_3_3_3_3

New Line.l(r:p2udt8461lv-p2ulv20872) Units=km Length=0.0524551 bus1=p2udt8461lv.1.2.3 bus2=p2ulv20872.1.2.3 switch=n enabled=y phases=3 Linecode=3P_UG_AL_4/0_15_0_416_0_3_3_3_3

New Line.l(r:p2udt7218-p2udt8461) Units=km Length=0.21135800000000002 bus1=p2udt7218.1.2.3 bus2=p2udt8461.1.2.3 switch=n enabled=y phases=3 Linecode=3P_OH_AL_ACSR_4/0_Penguin_12_47_0_3_3_3_3

New Line.l(r:p2udt7218-p2udt8746) Units=km Length=0.260393 bus1=p2udt8746.1.2.3 bus2=p2udt7218.1.2.3 switch=n enabled=y phases=3 Linecode=3P_OH_AL_ACSR_4/0_Penguin_12_47_0_3_3_3_3

New Line.l(r:p2udt7172-p2udt8746)_s0 Units=km Length=0.391289 bus1=p2udt7172.1.2.3 bus2=p2udt7172-p2udt8746x.1.2.3 switch=n enabled=y phases=3 Linecode=3P_OH_AL_ACSR_4/0_Penguin_12_47_0_3_3_3_3

New Line.l(r:p2udt7172-p2udt8746)_s1 Units=km Length=0.182546 bus1=p2udt7172-p2udt8746x.1.2.3 bus2=p2udt8746.1.2.3 switch=n enabled=y phases=3 Linecode=3P_OH_AL_ACSR_4/0_Penguin_12_47_0_3_3_3_3

New Line.l(r:p2udt3516-p2udt7172)_s0 Units=km Length=0.2507 bus1=p2udt3516.1.2.3 bus2=p2udt3516-p2udt7172x.1.2.3 switch=n enabled=y phases=3 Linecode=3P_OH_AL_ACSR_4/0_Penguin_12_47_0_3_3_3_3

New Line.l(r:p2udt3516-p2udt7172)_s1 Units=km Length=0.0393767 bus1=p2udt3516-p2udt7172x.1.2.3 bus2=p2udt7172.1.2.3 switch=n enabled=y phases=3 Linecode=3P_OH_AL_ACSR_4/0_Penguin_12_47_0_3_3_3_3

New Line.l(r:p2udt8746-p2udt8946) Units=km Length=0.31349 bus1=p2udt8746-p2udt8946x.1.2.3 bus2=p2udt8946.1.2.3 switch=n enabled=y phases=3 Linecode=3P_OH_AL_ACSR_1033kcmil_Curlew_12.47_1_3_3_3_3

New Line.elbswitch(r:p2udt8746-p2udt8946)p2u_45480 Units=km Length=0.001 bus1=p2udt8746.1.2.3 bus2=p2udt8746-p2udt8946x.1.2.3 switch=y enabled=n phases=3 Linecode=elbswitch_3_3_3_3

New Line.l(r:p2udt3067-p2udt8746)_disconnect Units=km Length=0.001 bus1=p2udt8746_b1_1.1.2.3 bus2=p2udt8746_b2_1.1.2.3 switch=y enabled=y phases=3 Linecode=3P_OH_AL_ACSR_4/0_Penguin_12_47_0_3_3_3_3

New Line.l(r:p2udt3067-p2udt8746)_cont Units=km Length=0.7506054000000001 bus1=p2udt8746_b2_1.1.2.3 bus2=p2udt3067.1.2.3 switch=n enabled=y phases=3 Linecode=3P_OH_AL_ACSR_4/0_Penguin_12_47_0_3_3_3_3
