New Line.l(r:p2udt7118-p2uhs10_1247)_s1 Units=km Length=0.5396450000000002 bus1=p2udt7118-p2uhs10_1247x.1.2.3 bus2=p2udt7118.1.2.3 switch=n enabled=y phases=3 Linecode=3P_OH_AL_ACSR_4/0_Penguin_12_47_0_3_3_3_3

New Line.l(r:p2udt7118lv-p2ulv14077) Units=km Length=0.0129531 bus1=p2udt7118lv.1.2.3 bus2=p2ulv14077.1.2.3 switch=n enabled=y phases=3 Linecode=3P_UG_AL_4/0_15_0_416_0_3_3_3_3

New Line.l(r:p2udt902lv-p2ulv965) Units=km Length=0.09428950000000001 bus1=p2udt902lv.1.2.3 bus2=p2ulv965.1.2.3 switch=n enabled=y phases=3 Linecode=3P_UG_AL_4/0_15_0_416_0_3_3_3_3

New Line.l(r:p2udm15176-p2ulv6556) Units=km Length=0.0825773 bus1=p2udm15176.1.2.3 bus2=p2ulv6556.1.2.3 switch=n enabled=y phases=3 Linecode=3P_UG_AL_4/0_15_0_416_0_3_3_3_3

New Line.l(r:p2udm15176-p2ulv22242) Units=km Length=0.099976 bus1=p2udm15176.1.2.3 bus2=p2ulv22242.1.2.3 switch=n enabled=y phases=3 Linecode=3P_UG_AL_4/0_15_0_416_0_3_3_3_3

New Line.l(r:p2udm15176-p2udt4561lv) Units=km Length=0.019140500000000005 bus1=p2udt4561lv.1.2.3 bus2=p2udm15176.1.2.3 switch=n enabled=y phases=3 Linecode=3P_UG_AL_4/0_15_0_416_0_3_3_3_3

New Line.l(r:p2udm15178-p2ulv24238) Units=km Length=0.09345 bus1=p2udm15178.1.2.3 bus2=p2ulv24238.1.2.3 switch=n enabled=y phases=3 Linecode=3P_UG_AL_4/0_15_0_416_0_3_3_3_3

New Line.l(r:p2udm15178-p2udt4561lv) Units=km Length=0.0191453 bus1=p2udt4561lv.1.2.3 bus2=p2udm15178.1.2.3 switch=n enabled=y phases=3 Linecode=3P_UG_AL_4/0_15_0_416_0_3_3_3_3

New Line.l(r:p2udt8874lv-p2ulv23552) Units=km Length=0.0162791 bus1=p2udt8874lv.1.2.3 bus2=p2ulv23552.1.2.3 switch=n enabled=y phases=3 Linecode=3P_UG_AL_4/0_15_0_416_0_3_3_3_3

New Line.l(r:p2udt4562lv-p2ulv6557) Units=km Length=0.0680071 bus1=p2udt4562lv.1.2.3 bus2=p2ulv6557.1.2.3 switch=n enabled=y phases=3 Linecode=3P_UG_AL_4/0_15_0_416_0_3_3_3_3

New Line.l(r:p2udt6472lv-p2ulv11736) Units=km Length=0.00877363 bus1=p2udt6472lv.1.2.3 bus2=p2ulv11736.1.2.3 switch=n enabled=y phases=3 Linecode=3P_UG_AL_4/0_15_0_416_0_3_3_3_3

New Line.l(r:p2udt3774lv-p2ulv5113) Units=km Length=0.0105427 bus1=p2udt3774lv.1.2.3 bus2=p2ulv5113.1.2.3 switch=n enabled=y phases=3 Linecode=3P_UG_AL_4/0_15_0_416_0_3_3_3_3

New Line.l(r:p2udt3774lv-p2ulv17508) Units=km Length=0.0157925 bus1=p2udt3774lv.1.2.3 bus2=p2ulv17508.1.2.3 switch=n enabled=y phases=3 Linecode=3P_UG_AL_4/0_15_0_416_0_3_3_3_3

New Line.l(r:p2udt7984lv-p2ulv18176) Units=km Length=0.00613688 bus1=p2udt7984lv.1.2.3 bus2=p2ulv18176.1.2.3 switch=n enabled=y phases=3 Linecode=3P_UG_AL_4/0_15_0_416_0_3_3_3_3

New Line.l(r:p2udm22384-p2ulv18175) Units=km Length=0.0249698 bus1=p2udm22384.1.2.3 bus2=p2ulv18175.1.2.3 switch=n enabled=y phases=3 Linecode=3P_UG_AL_4/0_15_0_416_0_3_3_3_3

New Line.l(r:p2udm22384-p2udt7984lv) Units=km Length=0.06042630000000001 bus1=p2udt7984lv.1.2.3 bus2=p2udm22384.1.2.3 switch=n enabled=y phases=3 Linecode=3P_UG_AL_4/0_15_0_416_0_3_3_3_3

New Line.l(r:p2udm22386-p2ulv21311) Units=km Length=0.00615302 bus1=p2udm22386.1.2.3 bus2=p2ulv21311.1.2.3 switch=n enabled=y phases=3 Linecode=3P_UG_AL_4/0_15_0_416_0_3_3_3_3

New Line.l(r:p2udm22386-p2udt7984lv) Units=km Length=0.0605697 bus1=p2udt7984lv.1.2.3 bus2=p2udm22386.1.2.3 switch=n enabled=y phases=3 Linecode=3P_UG_AL_4/0_15_0_416_0_3_3_3_3

New Line.l(r:p2udt3774-p2udt7984) Units=km Length=0.198717 bus1=p2udt3774.1.2.3 bus2=p2udt7984.1.2.3 switch=n enabled=y phases=3 Linecode=3P_OH_AL_ACSR_4/0_Penguin_12_47_0_3_3_3_3

New Line.l(r:p2udt3774-p2udt6472) Units=km Length=0.46282 bus1=p2udt6472.1.2.3 bus2=p2udt3774.1.2.3 switch=n enabled=y phases=3 Linecode=3P_OH_AL_ACSR_4/0_Penguin_12_47_0_3_3_3_3

New Line.l(r:p2udt3894lv-p2ulv5306) Units=km Length=0.0172453 bus1=p2udt3894lv.1.2.3 bus2=p2ulv5306.1.2.3 switch=n enabled=y phases=3 Linecode=3P_UG_AL_350kcmil_15_0_416_0_3_3_3_3

New Line.l(r:p2udt7057lv-p2ulv13840) Units=km Length=0.019022 bus1=p2udt7057lv.1.2.3 bus2=p2ulv13840.1.2.3 switch=n enabled=y phases=3 Linecode=3P_UG_AL_350kcmil_15_0_416_0_3_3_3_3

New Line.l(r:p2udt1103lv-p2ulv11490) Units=km Length=0.0161647 bus1=p2udt1103lv.1.2.3 bus2=p2ulv11490.1.2.3 switch=n enabled=y phases=3 Linecode=3P_UG_AL_350kcmil_15_0_416_0_3_3_3_3

New Line.l(r:p2udm4057-p2ulv7739) Units=km Length=0.0150755 bus1=p2udm4057.1.2.3 bus2=p2ulv7739.1.2.3 switch=n enabled=y phases=3 Linecode=3P_UG_AL_350kcmil_15_0_416_0_3_3_3_3

New Line.l(r:p2udm4056-p2ulv2915) Units=km Length=0.0131466 bus1=p2udm4056.1.2.3 bus2=p2ulv2915.1.2.3 switch=n enabled=y phases=3 Linecode=3P_UG_AL_350kcmil_15_0_416_0_3_3_3_3

New Line.l(r:p2udm4060-p2ulv13143) Units=km Length=0.0187059 bus1=p2udm4060.1.2.3 bus2=p2ulv13143.1.2.3 switch=n enabled=y phases=3 Linecode=3P_UG_AL_350kcmil_15_0_416_0_3_3_3_3

New Line.l(r:p2udm4056-p2udm4060) Units=km Length=0.00898066 bus1=p2udm4056.1.2.3 bus2=p2udm4060.1.2.3 switch=n enabled=y phases=3 Linecode=3P_UG_AL_350kcmil_15_0_416_0_3_3_3_3

New Line.l(r:p2udm4056-p2udm4057) Units=km Length=0.00898066 bus1=p2udm4057.1.2.3 bus2=p2udm4056.1.2.3 switch=n enabled=y phases=3 Linecode=3P_UG_AL_350kcmil_15_0_416_0_3_3_3_3

New Line.l(r:p2udm4057-p2udt1103lv) Units=km Length=0.00935624 bus1=p2udt1103lv.1.2.3 bus2=p2udm4057.1.2.3 switch=n enabled=y phases=3 Linecode=3P_UG_AL_350kcmil_15_0_416_0_3_3_3_3

New Line.l(r:p2udm4058-p2ulv8456) Units=km Length=0.0173307 bus1=p2udm4058.1.2.3 bus2=p2ulv8456.1.2.3 switch=n enabled=y phases=3 Linecode=3P_UG_AL_350kcmil_15_0_416_0_3_3_3_3

New Line.l(r:p2udm4055-p2ulv1198) Units=km Length=0.0128766 bus1=p2udm4055.1.2.3 bus2=p2ulv1198.1.2.3 switch=n enabled=y phases=3 Linecode=3P_UG_AL_350kcmil_15_0_416_0_3_3_3_3

New Line.l(r:p2udm4055-p2udm4058) Units=km Length=0.00935624 bus1=p2udm4058.1.2.3 bus2=p2udm4055.1.2.3 switch=n enabled=y phases=3 Linecode=3P_UG_AL_350kcmil_15_0_416_0_3_3_3_3

New Line.l(r:p2udm4058-p2udt1103lv) Units=km Length=0.00935624 bus1=p2udt1103lv.1.2.3 bus2=p2udm4058.1.2.3 switch=n enabled=y phases=3 Linecode=3P_UG_AL_350kcmil_15_0_416_0_3_3_3_3

New Line.l(r:p2udt1103-p2udt7057) Units=km Length=0.04159050000000001 bus1=p2udt1103-p2udt7057xx.1.2.3 bus2=p2udt1103-p2udt7057x.1.2.3 switch=n enabled=y phases=3 Linecode=3P_UG_AL_4/0_25_12_47_0_3_3_3_3

New Line.l(r:p2udt3894-p2udt7057) Units=km Length=0.0157383 bus1=p2udt3894-p2udt7057x.1.2.3 bus2=p2udt3894-p2udt7057xx.1.2.3 switch=n enabled=y phases=3 Linecode=3P_UG_AL_4/0_25_12_47_0_3_3_3_3

New Line.l(r:p2udt8181lv-p2ulv19284) Units=km Length=0.019028700000000003 bus1=p2udt8181lv.1.2.3 bus2=p2ulv19284.1.2.3 switch=n enabled=y phases=3 Linecode=3P_UG_AL_350kcmil_15_0_416_0_3_3_3_3

New Line.l(r:p2udm22634-p2ulv19764) Units=km Length=0.023114900000000004 bus1=p2udm22634.1.2.3 bus2=p2ulv19764.1.2.3 switch=n enabled=y phases=3 Linecode=3P_UG_AL_350kcmil_15_0_416_0_3_3_3_3

New Line.l(r:p2udm22634-p2udt8181lv) Units=km Length=0.00918234 bus1=p2udt8181lv.1.2.3 bus2=p2udm22634.1.2.3 switch=n enabled=y phases=3 Linecode=3P_UG_AL_350kcmil_15_0_416_0_3_3_3_3

New Line.l(r:p2udm878-p2ulv471) Units=km Length=0.0179038 bus1=p2udm878.1.2.3 bus2=p2ulv471.1.2.3 switch=n enabled=y phases=3 Linecode=3P_UG_AL_350kcmil_15_0_416_0_3_3_3_3

New Line.l(r:p2udm878-p2ulv7262) Units=km Length=0.012353 bus1=p2udm878.1.2.3 bus2=p2ulv7262.1.2.3 switch=n enabled=y phases=3 Linecode=3P_UG_AL_350kcmil_15_0_416_0_3_3_3_3

New Line.l(r:p2udm878-p2udt238lv) Units=km Length=0.0183604 bus1=p2udt238lv.1.2.3 bus2=p2udm878.1.2.3 switch=n enabled=y phases=3 Linecode=3P_UG_AL_350kcmil_15_0_416_0_3_3_3_3

New Line.l(r:p2udm880-p2ulv16112) Units=km Length=0.0177556 bus1=p2udm880.1.2.3 bus2=p2ulv16112.1.2.3 switch=n enabled=y phases=3 Linecode=3P_UG_AL_350kcmil_15_0_416_0_3_3_3_3

New Line.l(r:p2udm877-p2ulv243) Units=km Length=0.013007100000000002 bus1=p2udm877.1.2.3 bus2=p2ulv243.1.2.3 switch=n enabled=y phases=3 Linecode=3P_UG_AL_350kcmil_15_0_416_0_3_3_3_3

New Line.l(r:p2udm877-p2udm880) Units=km Length=0.00917808 bus1=p2udm880.1.2.3 bus2=p2udm877.1.2.3 switch=n enabled=y phases=3 Linecode=3P_UG_AL_350kcmil_15_0_416_0_3_3_3_3

New Line.l(r:p2udm880-p2udt238lv) Units=km Length=0.00918695 bus1=p2udt238lv.1.2.3 bus2=p2udm880.1.2.3 switch=n enabled=y phases=3 Linecode=3P_UG_AL_350kcmil_15_0_416_0_3_3_3_3

New Line.l(r:p2udm16496-p2ulv7738) Units=km Length=0.0171172 bus1=p2udm16496.1.2.3 bus2=p2ulv7738.1.2.3 switch=n enabled=y phases=3 Linecode=3P_UG_AL_350kcmil_15_0_416_0_3_3_3_3

New Line.l(r:p2udm16496-p2udt5070lv) Units=km Length=0.046978200000000005 bus1=p2udt5070lv.1.2.3 bus2=p2udm16496.1.2.3 switch=n enabled=y phases=3 Linecode=3P_UG_AL_350kcmil_15_0_416_0_3_3_3_3

New Line.l(r:p2udm16497-p2ulv24229) Units=km Length=0.00929005 bus1=p2udm16497.1.2.3 bus2=p2ulv24229.1.2.3 switch=n enabled=y phases=3 Linecode=3P_UG_AL_350kcmil_15_0_416_0_3_3_3_3

New Line.l(r:p2udm16497-p2udt5070lv) Units=km Length=0.0195152 bus1=p2udt5070lv.1.2.3 bus2=p2udm16497.1.2.3 switch=n enabled=y phases=3 Linecode=3P_UG_AL_350kcmil_15_0_416_0_3_3_3_3

New Line.l(r:p2udt238-p2udt5070) Units=km Length=0.049797100000000004 bus1=p2udt238-p2udt5070x.1.2.3 bus2=p2udt238-p2udt5070xx.1.2.3 switch=n enabled=y phases=3 Linecode=3P_UG_AL_4/0_25_12_47_0_3_3_3_3

New Line.l(r:p2udt238-p2udt8181) Units=km Length=0.0367255 bus1=p2udt238-p2udt8181xx.1.2.3 bus2=p2udt238-p2udt8181x.1.2.3 switch=n enabled=y phases=3 Linecode=3P_UG_AL_4/0_25_12_47_0_3_3_3_3

New Line.l(r:p2udt3894-p2udt8181) Units=km Length=0.03832440000000001 bus1=p2udt3894-p2udt8181x.1.2.3 bus2=p2udt3894-p2udt8181xx.1.2.3 switch=n enabled=y phases=3 Linecode=3P_UG_AL_4/0_25_12_47_0_3_3_3_3

New Line.l(r:p2udt3894-p2udt6472) Units=km Length=0.222597 bus1=p2udt6472.1.2.3 bus2=p2udt6472_b1_1.1.2.3 switch=n enabled=y phases=3 Linecode=3P_OH_AL_ACSR_4/0_Penguin_12_47_0_3_3_3_3

New Line.l(r:p2udt4562-p2udt6472) Units=km Length=0.203632 bus1=p2udt4562.1.2.3 bus2=p2udt6472.1.2.3 switch=n enabled=y phases=3 Linecode=3P_OH_AL_ACSR_4/0_Penguin_12_47_0_3_3_3_3

New Line.l(r:p2udt4562-p2udt8874) Units=km Length=0.100839 bus1=p2udt8874.1.2.3 bus2=p2udt4562.1.2.3 switch=n enabled=y phases=3 Linecode=3P_OH_AL_ACSR_4/0_Penguin_12_47_0_3_3_3_3

New Line.l(r:p2udt4561-p2udt8874) Units=km Length=0.0468306 bus1=p2udt4561.1.2.3 bus2=p2udt8874.1.2.3 switch=n enabled=y phases=3 Linecode=3P_OH_AL_ACSR_4/0_Penguin_12_47_0_3_3_3_3

New Line.l(r:p2udt4561-p2udt902) Units=km Length=0.0957083 bus1=p2udt902.1.2.3 bus2=p2udt4561.1.2.3 switch=n enabled=y phases=3 Linecode=3P_OH_AL_ACSR_4/0_Penguin_12_47_0_3_3_3_3

New Line.l(r:p2udt7118-p2udt902) Units=km Length=0.172138 bus1=p2udt7118.1.2.3 bus2=p2udt902.1.2.3 switch=n enabled=y phases=3 Linecode=3P_OH_AL_ACSR_4/0_Penguin_12_47_0_3_3_3_3

New Line.l(r:p2udt5870lv-p2ulv9818) Units=km Length=0.001 bus1=p2udt5870lv.1.2.3 bus2=p2ulv9818.1.2.3 switch=n enabled=y phases=3 Linecode=3P_UG_AL_4/0_15_0_416_0_3_3_3_3

New Line.l(r:p2udt5075lv-p2ulv7751) Units=km Length=0.0338744 bus1=p2udt5075lv.1.2.3 bus2=p2ulv7751.1.2.3 switch=n enabled=y phases=3 Linecode=3P_UG_AL_4/0_15_0_416_0_3_3_3_3

New Line.l(r:p2udt5075lv-p2ulv12926) Units=km Length=0.0338744 bus1=p2udt5075lv.1.2.3 bus2=p2ulv12926.1.2.3 switch=n enabled=y phases=3 Linecode=3P_UG_AL_4/0_15_0_416_0_3_3_3_3

New Line.l(r:p2udt6211lv-p2ulv10797) Units=km Length=0.001 bus1=p2udt6211lv.1.2.3 bus2=p2ulv10797.1.2.3 switch=n enabled=y phases=3 Linecode=3P_UG_AL_4/0_15_0_416_0_3_3_3_3

New Line.l(r:p2udt6359lv-p2ulv11261) Units=km Length=0.0436599 bus1=p2udt6359lv.1.2.3 bus2=p2ulv11261.1.2.3 switch=n enabled=y phases=3 Linecode=3P_UG_AL_4/0_15_0_416_0_3_3_3_3

New Line.l(r:p2udm19560-p2ulv13408) Units=km Length=0.0211767 bus1=p2udm19560.1.2.3 bus2=p2ulv13408.1.2.3 switch=n enabled=y phases=3 Linecode=3P_UG_AL_4/0_15_0_416_0_3_3_3_3

New Line.l(r:p2udm19560-p2udt6359lv) Units=km Length=0.018941600000000003 bus1=p2udt6359lv.1.2.3 bus2=p2udm19560.1.2.3 switch=n enabled=y phases=3 Linecode=3P_UG_AL_4/0_15_0_416_0_3_3_3_3

New Line.l(r:p2udt4302lv-p2ulv6030) Units=km Length=0.0146427 bus1=p2udt4302lv.1.2.3 bus2=p2ulv6030.1.2.3 switch=n enabled=y phases=3 Linecode=3P_UG_AL_4/0_15_0_416_0_3_3_3_3

New Line.l(r:p2udt4302-p2udt6359) Units=km Length=0.146979 bus1=p2udt6359.1.2.3 bus2=p2udt4302.1.2.3 switch=n enabled=y phases=3 Linecode=3P_OH_AL_ACSR_4/0_Penguin_12_47_0_3_3_3_3

New Line.l(r:p2udt6211-p2udt6359)_s0 Units=km Length=0.594759 bus1=p2udt6211.1.2.3 bus2=p2udt6211-p2udt6359x.1.2.3 switch=n enabled=y phases=3 Linecode=3P_OH_AL_ACSR_4/0_Penguin_12_47_0_3_3_3_3

New Line.l(r:p2udt6211-p2udt6359)_s1 Units=km Length=0.398515 bus1=p2udt6211-p2udt6359x.1.2.3 bus2=p2udt6359.1.2.3 switch=n enabled=y phases=3 Linecode=3P_OH_AL_ACSR_4/0_Penguin_12_47_0_3_3_3_3

New Line.l(r:p2udm20456-p2ulv12925) Units=km Length=0.0766882 bus1=p2udm20456.1.2.3 bus2=p2ulv12925.1.2.3 switch=n enabled=y phases=3 Linecode=3P_UG_AL_4/0_15_0_416_0_3_3_3_3

New Line.l(r:p2udm20456-p2udt6819lv) Units=km Length=0.018385600000000002 bus1=p2udt6819lv.1.2.3 bus2=p2udm20456.1.2.3 switch=n enabled=y phases=3 Linecode=3P_UG_AL_4/0_15_0_416_0_3_3_3_3

New Line.l(r:p2udm20457-p2ulv18408) Units=km Length=0.0655731 bus1=p2udm20457.1.2.3 bus2=p2ulv18408.1.2.3 switch=n enabled=y phases=3 Linecode=3P_UG_AL_4/0_15_0_416_0_3_3_3_3

New Line.l(r:p2udm20457-p2udt6819lv) Units=km Length=0.0183809 bus1=p2udt6819lv.1.2.3 bus2=p2udm20457.1.2.3 switch=n enabled=y phases=3 Linecode=3P_UG_AL_4/0_15_0_416_0_3_3_3_3

New Line.l(r:p2udt3776lv-p2ulv5115) Units=km Length=0.0628836 bus1=p2udt3776lv.1.2.3 bus2=p2ulv5115.1.2.3 switch=n enabled=y phases=3 Linecode=3P_UG_AL_4/0_15_0_416_0_3_3_3_3

New Line.l(r:p2udm12946-p2ulv14501) Units=km Length=0.0508146 bus1=p2udm12946.1.2.3 bus2=p2ulv14501.1.2.3 switch=n enabled=y phases=3 Linecode=3P_UG_AL_4/0_15_0_416_0_3_3_3_3

New Line.l(r:p2udm12946-p2udt3776lv) Units=km Length=0.0183809 bus1=p2udt3776lv.1.2.3 bus2=p2udm12946.1.2.3 switch=n enabled=y phases=3 Linecode=3P_UG_AL_4/0_15_0_416_0_3_3_3_3

New Line.l(r:p2udt8813lv-p2ulv23161) Units=km Length=0.0884287 bus1=p2udt8813lv.1.2.3 bus2=p2ulv23161.1.2.3 switch=n enabled=y phases=3 Linecode=3P_UG_AL_4/0_15_0_416_0_3_3_3_3

New Line.l(r:p2udm6900-p2ulv2167) Units=km Length=0.026505900000000002 bus1=p2udm6900.1.2.3 bus2=p2ulv2167.1.2.3 switch=n enabled=y phases=3 Linecode=3P_UG_AL_4/0_15_0_416_0_3_3_3_3

New Line.l(r:p2udm6900-p2udt1902lv) Units=km Length=0.012177400000000001 bus1=p2udt1902lv.1.2.3 bus2=p2udm6900.1.2.3 switch=n enabled=y phases=3 Linecode=3P_UG_AL_4/0_15_0_416_0_3_3_3_3

New Line.l(r:p2udm6901-p2ulv11502) Units=km Length=0.0579891 bus1=p2udm6901.1.2.3 bus2=p2ulv11502.1.2.3 switch=n enabled=y phases=3 Linecode=3P_UG_AL_4/0_15_0_416_0_3_3_3_3

New Line.l(r:p2udm6901-p2udt1902lv) Units=km Length=0.0380749 bus1=p2udt1902lv.1.2.3 bus2=p2udm6901.1.2.3 switch=n enabled=y phases=3 Linecode=3P_UG_AL_4/0_15_0_416_0_3_3_3_3

New Line.l(r:p2udt7000lv-p2ulv13633) Units=km Length=0.0530889 bus1=p2udt7000lv.1.2.3 bus2=p2ulv13633.1.2.3 switch=n enabled=y phases=3 Linecode=3P_UG_AL_4/0_15_0_416_0_3_3_3_3

New Line.l(r:p2udt3638lv-p2ulv22499) Units=km Length=0.0380296 bus1=p2udt3638lv.1.2.3 bus2=p2ulv22499.1.2.3 switch=n enabled=y phases=3 Linecode=3P_UG_AL_4/0_15_0_416_0_3_3_3_3

New Line.l(r:p2udm12546-p2ulv4860) Units=km Length=0.046871 bus1=p2udm12546.1.2.3 bus2=p2ulv4860.1.2.3 switch=n enabled=y phases=3 Linecode=3P_UG_AL_4/0_15_0_416_0_3_3_3_3

New Line.l(r:p2udm12546-p2udt3638lv) Units=km Length=0.0193419 bus1=p2udt3638lv.1.2.3 bus2=p2udm12546.1.2.3 switch=n enabled=y phases=3 Linecode=3P_UG_AL_4/0_15_0_416_0_3_3_3_3

New Line.l(r:p2udt672lv-p2ulv1463) Units=km Length=0.0904927 bus1=p2udt672lv.1.2.3 bus2=p2ulv1463.1.2.3 switch=n enabled=y phases=3 Linecode=3P_UG_AL_4/0_15_0_416_0_3_3_3_3

New Line.l(r:p2udm2504-p2ulv711) Units=km Length=0.105775 bus1=p2udm2504.1.2.3 bus2=p2ulv711.1.2.3 switch=n enabled=y phases=3 Linecode=3P_UG_AL_4/0_15_0_416_0_3_3_3_3

New Line.l(r:p2udm2504-p2ulv19557) Units=km Length=0.0556339 bus1=p2udm2504.1.2.3 bus2=p2ulv19557.1.2.3 switch=n enabled=y phases=3 Linecode=3P_UG_AL_4/0_15_0_416_0_3_3_3_3

New Line.l(r:p2udm2504-p2udt672lv) Units=km Length=0.0193419 bus1=p2udt672lv.1.2.3 bus2=p2udm2504.1.2.3 switch=n enabled=y phases=3 Linecode=3P_UG_AL_4/0_15_0_416_0_3_3_3_3

New Line.l(r:p2udm2506-p2ulv16128) Units=km Length=0.110739 bus1=p2udm2506.1.2.3 bus2=p2ulv16128.1.2.3 switch=n enabled=y phases=3 Linecode=3P_UG_AL_4/0_15_0_416_0_3_3_3_3

New Line.l(r:p2udm2506-p2udt672lv) Units=km Length=0.0193419 bus1=p2udt672lv.1.2.3 bus2=p2udm2506.1.2.3 switch=n enabled=y phases=3 Linecode=3P_UG_AL_4/0_15_0_416_0_3_3_3_3

New Line.l(r:p2udt5194lv-p2ulv11503) Units=km Length=0.04345460000000001 bus1=p2udt5194lv.1.2.3 bus2=p2ulv11503.1.2.3 switch=n enabled=y phases=3 Linecode=3P_UG_AL_4/0_15_0_416_0_3_3_3_3

New Line.l(r:p2udt5194lv-p2ulv16838) Units=km Length=0.0989338 bus1=p2udt5194lv.1.2.3 bus2=p2ulv16838.1.2.3 switch=n enabled=y phases=3 Linecode=3P_UG_AL_4/0_15_0_416_0_3_3_3_3

New Line.l(r:p2udm16835-p2ulv8009) Units=km Length=0.0664293 bus1=p2udm16835.1.2.3 bus2=p2ulv8009.1.2.3 switch=n enabled=y phases=3 Linecode=3P_UG_AL_4/0_15_0_416_0_3_3_3_3

New Line.l(r:p2udm16835-p2udt5194lv) Units=km Length=0.0193419 bus1=p2udt5194lv.1.2.3 bus2=p2udm16835.1.2.3 switch=n enabled=y phases=3 Linecode=3P_UG_AL_4/0_15_0_416_0_3_3_3_3

New Line.l(r:p2udt2610lv-p2ulv3167) Units=km Length=0.00869274 bus1=p2udt2610lv.1.2.3 bus2=p2ulv3167.1.2.3 switch=n enabled=y phases=3 Linecode=3P_UG_AL_4/0_15_0_416_0_3_3_3_3

New Line.l(r:p2udt2610lv-p2ulv10556) Units=km Length=0.0510645 bus1=p2udt2610lv.1.2.3 bus2=p2ulv10556.1.2.3 switch=n enabled=y phases=3 Linecode=3P_UG_AL_4/0_15_0_416_0_3_3_3_3

New Line.l(r:p2udt2610lv-p2ulv12690) Units=km Length=0.05877070000000001 bus1=p2udt2610lv.1.2.3 bus2=p2ulv12690.1.2.3 switch=n enabled=y phases=3 Linecode=3P_UG_AL_4/0_15_0_416_0_3_3_3_3

New Line.l(r:p2udt2610lv-p2ulv15192) Units=km Length=0.015863 bus1=p2udt2610lv.1.2.3 bus2=p2ulv15192.1.2.3 switch=n enabled=y phases=3 Linecode=3P_UG_AL_4/0_15_0_416_0_3_3_3_3

New Line.l(r:p2udt2610-p2udt5194) Units=km Length=0.338075 bus1=p2udt5194.1.2.3 bus2=p2udt2610.1.2.3 switch=n enabled=y phases=3 Linecode=3P_OH_AL_ACSR_4/0_Penguin_12_47_0_3_3_3_3

New Line.l(r:p2udt8842lv-p2ulv23336) Units=km Length=0.025387 bus1=p2udt8842lv.1.2.3 bus2=p2ulv23336.1.2.3 switch=n enabled=y phases=3 Linecode=3P_UG_AL_4/0_15_0_416_0_3_3_3_3

New Line.l(r:p2udt5364lv-p2ulv8440) Units=km Length=0.012082700000000002 bus1=p2udt5364lv.1.2.3 bus2=p2ulv8440.1.2.3 switch=n enabled=y phases=3 Linecode=3P_UG_AL_4/0_15_0_416_0_3_3_3_3

New Line.l(r:p2udt5364lv-p2ulv12658) Units=km Length=0.0117472 bus1=p2udt5364lv.1.2.3 bus2=p2ulv12658.1.2.3 switch=n enabled=y phases=3 Linecode=3P_UG_AL_4/0_15_0_416_0_3_3_3_3

New Line.l(r:p2udm10217-p2ulv4374) Units=km Length=0.012030100000000002 bus1=p2udm10217.1.2.3 bus2=p2ulv4374.1.2.3 switch=n enabled=y phases=3 Linecode=3P_UG_AL_4/0_15_0_416_0_3_3_3_3

New Line.l(r:p2udm10220-p2ulv23356) Units=km Length=0.0117395 bus1=p2udm10220.1.2.3 bus2=p2ulv23356.1.2.3 switch=n enabled=y phases=3 Linecode=3P_UG_AL_4/0_15_0_416_0_3_3_3_3

New Line.l(r:p2udm10217-p2udm10220) Units=km Length=0.018909400000000003 bus1=p2udm10217.1.2.3 bus2=p2udm10220.1.2.3 switch=n enabled=y phases=3 Linecode=3P_UG_AL_4/0_15_0_416_0_3_3_3_3

New Line.l(r:p2udm10217-p2udt2889lv) Units=km Length=0.018909400000000003 bus1=p2udt2889lv.1.2.3 bus2=p2udm10217.1.2.3 switch=n enabled=y phases=3 Linecode=3P_UG_AL_4/0_15_0_416_0_3_3_3_3

New Line.l(r:p2udm10218-p2ulv7275) Units=km Length=0.0118058 bus1=p2udm10218.1.2.3 bus2=p2ulv7275.1.2.3 switch=n enabled=y phases=3 Linecode=3P_UG_AL_4/0_15_0_416_0_3_3_3_3

New Line.l(r:p2udm10218-p2ulv11981) Units=km Length=0.0124959 bus1=p2udm10218.1.2.3 bus2=p2ulv11981.1.2.3 switch=n enabled=y phases=3 Linecode=3P_UG_AL_4/0_15_0_416_0_3_3_3_3

New Line.l(r:p2udm10216-p2ulv3612) Units=km Length=0.0117054 bus1=p2udm10216.1.2.3 bus2=p2ulv3612.1.2.3 switch=n enabled=y phases=3 Linecode=3P_UG_AL_4/0_15_0_416_0_3_3_3_3

New Line.l(r:p2udm10216-p2udm10218) Units=km Length=0.018909400000000003 bus1=p2udm10218.1.2.3 bus2=p2udm10216.1.2.3 switch=n enabled=y phases=3 Linecode=3P_UG_AL_4/0_15_0_416_0_3_3_3_3

New Line.l(r:p2udm10218-p2udt2889lv) Units=km Length=0.018914100000000003 bus1=p2udt2889lv.1.2.3 bus2=p2udm10218.1.2.3 switch=n enabled=y phases=3 Linecode=3P_UG_AL_4/0_15_0_416_0_3_3_3_3

New Line.l(r:p2udt2273lv-p2ulv17740) Units=km Length=0.00937129 bus1=p2udt2273lv.1.2.3 bus2=p2ulv17740.1.2.3 switch=n enabled=y phases=3 Linecode=3P_UG_AL_4/0_15_0_416_0_3_3_3_3

New Line.l(r:p2udm8149-p2ulv2678) Units=km Length=0.0128607 bus1=p2udm8149.1.2.3 bus2=p2ulv2678.1.2.3 switch=n enabled=y phases=3 Linecode=3P_UG_AL_4/0_15_0_416_0_3_3_3_3

New Line.l(r:p2udm8149-p2ulv11743) Units=km Length=0.012552500000000001 bus1=p2udm8149.1.2.3 bus2=p2ulv11743.1.2.3 switch=n enabled=y phases=3 Linecode=3P_UG_AL_4/0_15_0_416_0_3_3_3_3

New Line.l(r:p2udm8149-p2udt2273lv) Units=km Length=0.018914100000000003 bus1=p2udt2273lv.1.2.3 bus2=p2udm8149.1.2.3 switch=n enabled=y phases=3 Linecode=3P_UG_AL_4/0_15_0_416_0_3_3_3_3

New Line.l(r:p2udm8151-p2ulv11980) Units=km Length=0.0128843 bus1=p2udm8151.1.2.3 bus2=p2ulv11980.1.2.3 switch=n enabled=y phases=3 Linecode=3P_UG_AL_4/0_15_0_416_0_3_3_3_3

New Line.l(r:p2udm8151-p2ulv16129) Units=km Length=0.012090700000000001 bus1=p2udm8151.1.2.3 bus2=p2ulv16129.1.2.3 switch=n enabled=y phases=3 Linecode=3P_UG_AL_4/0_15_0_416_0_3_3_3_3

New Line.l(r:p2udm8151-p2udt2273lv) Units=km Length=0.018909400000000003 bus1=p2udt2273lv.1.2.3 bus2=p2udm8151.1.2.3 switch=n enabled=y phases=3 Linecode=3P_UG_AL_4/0_15_0_416_0_3_3_3_3

New Line.l(r:p2udt465lv-p2ulv9132) Units=km Length=0.0117167 bus1=p2udt465lv.1.2.3 bus2=p2ulv9132.1.2.3 switch=n enabled=y phases=3 Linecode=3P_UG_AL_4/0_15_0_416_0_3_3_3_3

New Line.l(r:p2udt465lv-p2ulv17279) Units=km Length=0.0121463 bus1=p2udt465lv.1.2.3 bus2=p2ulv17279.1.2.3 switch=n enabled=y phases=3 Linecode=3P_UG_AL_4/0_15_0_416_0_3_3_3_3

New Line.l(r:p2udm1711-p2ulv485) Units=km Length=0.0152268 bus1=p2udm1711.1.2.3 bus2=p2ulv485.1.2.3 switch=n enabled=y phases=3 Linecode=3P_UG_AL_4/0_15_0_416_0_3_3_3_3

New Line.l(r:p2udm1711-p2ulv6060) Units=km Length=0.013447 bus1=p2udm1711.1.2.3 bus2=p2ulv6060.1.2.3 switch=n enabled=y phases=3 Linecode=3P_UG_AL_4/0_15_0_416_0_3_3_3_3

New Line.l(r:p2udm1711-p2udt465lv) Units=km Length=0.0378236 bus1=p2udt465lv.1.2.3 bus2=p2udm1711.1.2.3 switch=n enabled=y phases=3 Linecode=3P_UG_AL_4/0_15_0_416_0_3_3_3_3

New Line.l(r:p2udm1715-p2ulv24243) Units=km Length=0.0117368 bus1=p2udm1715.1.2.3 bus2=p2ulv24243.1.2.3 switch=n enabled=y phases=3 Linecode=3P_UG_AL_4/0_15_0_416_0_3_3_3_3

New Line.l(r:p2udm1715-p2udt465lv) Units=km Length=0.018909400000000003 bus1=p2udt465lv.1.2.3 bus2=p2udm1715.1.2.3 switch=n enabled=y phases=3 Linecode=3P_UG_AL_4/0_15_0_416_0_3_3_3_3

New Line.l(r:p2udt8945lv-p2ulv24242) Units=km Length=0.0453457 bus1=p2udt8945lv.1.2.3 bus2=p2ulv24242.1.2.3 switch=n enabled=y phases=3 Linecode=3P_UG_AL_4/0_15_0_416_0_3_3_3_3

New Line.l(r:p2udt465-p2udt8945) Units=km Length=0.0378236 bus1=p2udt465.1.2.3 bus2=p2udt8945.1.2.3 switch=n enabled=y phases=3 Linecode=3P_OH_AL_ACSR_4/0_Penguin_12_47_0_3_3_3_3

New Line.l(r:p2udt2273-p2udt465) Units=km Length=0.0756466 bus1=p2udt2273.1.2.3 bus2=p2udt465.1.2.3 switch=n enabled=y phases=3 Linecode=3P_OH_AL_ACSR_4/0_Penguin_12_47_0_3_3_3_3

New Line.l(r:p2udm13692-p2ulv5575) Units=km Length=0.0137943 bus1=p2udm13692.1.2.3 bus2=p2ulv5575.1.2.3 switch=n enabled=y phases=3 Linecode=3P_UG_AL_4/0_15_0_416_0_3_3_3_3

New Line.l(r:p2udm13692-p2udt4038lv) Units=km Length=0.0378236 bus1=p2udt4038lv.1.2.3 bus2=p2udm13692.1.2.3 switch=n enabled=y phases=3 Linecode=3P_UG_AL_4/0_15_0_416_0_3_3_3_3

New Line.l(r:p2udm13693-p2ulv5799) Units=km Length=0.0131367 bus1=p2udm13693.1.2.3 bus2=p2ulv5799.1.2.3 switch=n enabled=y phases=3 Linecode=3P_UG_AL_4/0_15_0_416_0_3_3_3_3

New Line.l(r:p2udm13693-p2udt4038lv) Units=km Length=0.0378277 bus1=p2udt4038lv.1.2.3 bus2=p2udm13693.1.2.3 switch=n enabled=y phases=3 Linecode=3P_UG_AL_4/0_15_0_416_0_3_3_3_3

New Line.l(r:p2udt2273-p2udt4038) Units=km Length=0.001 bus1=p2udt2273.1.2.3 bus2=p2udt4038.1.2.3 switch=n enabled=y phases=3 Linecode=3P_OH_AL_ACSR_4/0_Penguin_12_47_0_3_3_3_3

New Line.l(r:p2udt8877lv-p2ulv23558) Units=km Length=0.001 bus1=p2udt8877lv.1.2.3 bus2=p2ulv23558.1.2.3 switch=n enabled=y phases=3 Linecode=3P_UG_AL_4/0_15_0_416_0_3_3_3_3

New Line.l(r:p2udt1721lv-p2ulv1939) Units=km Length=0.0201707 bus1=p2udt1721lv.1.2.3 bus2=p2ulv1939.1.2.3 switch=n enabled=y phases=3 Linecode=3P_UG_AL_4/0_15_0_416_0_3_3_3_3

New Line.l(r:p2udt1721lv-p2ulv8670) Units=km Length=0.0180719 bus1=p2udt1721lv.1.2.3 bus2=p2ulv8670.1.2.3 switch=n enabled=y phases=3 Linecode=3P_UG_AL_4/0_15_0_416_0_3_3_3_3

New Line.l(r:p2udt1721lv-p2ulv18825) Units=km Length=0.0279307 bus1=p2udt1721lv.1.2.3 bus2=p2ulv18825.1.2.3 switch=n enabled=y phases=3 Linecode=3P_UG_AL_4/0_15_0_416_0_3_3_3_3

New Line.l(r:p2udt1721-p2udt8877) Units=km Length=0.0450729 bus1=p2udt8877.1.2.3 bus2=p2udt1721.1.2.3 switch=n enabled=y phases=3 Linecode=3P_OH_AL_ACSR_4/0_Penguin_12_47_0_3_3_3_3

New Line.l(r:p2udt2273-p2udt8877) Units=km Length=0.121178 bus1=p2udt2273.1.2.3 bus2=p2udt8877.1.2.3 switch=n enabled=y phases=3 Linecode=3P_OH_AL_ACSR_4/0_Penguin_12_47_0_3_3_3_3

New Line.l(r:p2udt2273-p2udt2889) Units=km Length=0.0945519 bus1=p2udt2889.1.2.3 bus2=p2udt2273.1.2.3 switch=n enabled=y phases=3 Linecode=3P_OH_AL_ACSR_4/0_Penguin_12_47_0_3_3_3_3

New Line.l(r:p2udt2889-p2udt5364) Units=km Length=0.0756425 bus1=p2udt5364.1.2.3 bus2=p2udt2889.1.2.3 switch=n enabled=y phases=3 Linecode=3P_OH_AL_ACSR_4/0_Penguin_12_47_0_3_3_3_3

New Line.l(r:p2udt5364-p2udt8842) Units=km Length=0.0754983 bus1=p2udt8842.1.2.3 bus2=p2udt5364.1.2.3 switch=n enabled=y phases=3 Linecode=3P_OH_AL_ACSR_4/0_Penguin_12_47_0_3_3_3_3

New Line.l(r:p2udt5194-p2udt8842) Units=km Length=0.432862 bus1=p2udt5194.1.2.3 bus2=p2udt8842.1.2.3 switch=n enabled=y phases=3 Linecode=3P_OH_AL_ACSR_4/0_Penguin_12_47_0_3_3_3_3

New Line.l(r:p2udt5194-p2udt672) Units=km Length=0.0193419 bus1=p2udt672.1.2.3 bus2=p2udt5194.1.2.3 switch=n enabled=y phases=3 Linecode=3P_OH_AL_ACSR_4/0_Penguin_12_47_0_3_3_3_3

New Line.l(r:p2udt3638-p2udt672) Units=km Length=0.0967096 bus1=p2udt3638.1.2.3 bus2=p2udt672.1.2.3 switch=n enabled=y phases=3 Linecode=3P_OH_AL_ACSR_4/0_Penguin_12_47_0_3_3_3_3

New Line.l(r:p2udt7368lv-p2ulv15191) Units=km Length=0.001 bus1=p2udt7368lv.1.2.3 bus2=p2ulv15191.1.2.3 switch=n enabled=y phases=3 Linecode=3P_UG_AL_4/0_15_0_416_0_3_3_3_3

New Line.l(r:p2udt6885lv-p2ulv13161) Units=km Length=0.001 bus1=p2udt6885lv.1.2.3 bus2=p2ulv13161.1.2.3 switch=n enabled=y phases=3 Linecode=3P_UG_AL_4/0_15_0_416_0_3_3_3_3

New Line.l(r:p2udt6885-p2udt7368) Units=km Length=0.207987 bus1=p2udt7368.1.2.3 bus2=p2udt6885.1.2.3 switch=n enabled=y phases=3 Linecode=3P_OH_AL_ACSR_4/0_Penguin_12_47_0_3_3_3_3

New Line.l(r:p2udt3638-p2udt7368)_s0 Units=km Length=0.135289 bus1=p2udt3638.1.2.3 bus2=p2udt3638-p2udt7368x.1.2.3 switch=n enabled=y phases=3 Linecode=3P_OH_AL_ACSR_4/0_Penguin_12_47_0_3_3_3_3

New Line.l(r:p2udt3638-p2udt7368)_s1 Units=km Length=0.00268804 bus1=p2udt3638-p2udt7368x.1.2.3 bus2=p2udt7368.1.2.3 switch=n enabled=y phases=3 Linecode=3P_OH_AL_ACSR_4/0_Penguin_12_47_0_3_3_3_3

New Line.l(r:p2udt3638-p2udt7000) Units=km Length=0.0565481 bus1=p2udt7000.1.2.3 bus2=p2udt3638.1.2.3 switch=n enabled=y phases=3 Linecode=3P_OH_AL_ACSR_4/0_Penguin_12_47_0_3_3_3_3

New Line.l(r:p2udt1902-p2udt7000) Units=km Length=0.061778900000000005 bus1=p2udt1902.1.2.3 bus2=p2udt7000.1.2.3 switch=n enabled=y phases=3 Linecode=3P_OH_AL_ACSR_4/0_Penguin_12_47_0_3_3_3_3

New Line.l(r:p2udt1902-p2udt8813) Units=km Length=0.0380749 bus1=p2udt8813.1.2.3 bus2=p2udt1902.1.2.3 switch=n enabled=y phases=3 Linecode=3P_OH_AL_ACSR_4/0_Penguin_12_47_0_3_3_3_3

New Line.l(r:p2udt3776-p2udt8813) Units=km Length=0.0978506 bus1=p2udt3776.1.2.3 bus2=p2udt8813.1.2.3 switch=n enabled=y phases=3 Linecode=3P_OH_AL_ACSR_4/0_Penguin_12_47_0_3_3_3_3

New Line.l(r:p2udt3776-p2udt6819) Units=km Length=0.0735506 bus1=p2udt6819.1.2.3 bus2=p2udt3776.1.2.3 switch=n enabled=y phases=3 Linecode=3P_OH_AL_ACSR_4/0_Penguin_12_47_0_3_3_3_3

New Line.l(r:p2udt6211-p2udt6819)_s0 Units=km Length=0.418074 bus1=p2udt6211.1.2.3 bus2=p2udt6211-p2udt6819x.1.2.3 switch=n enabled=y phases=3 Linecode=3P_OH_AL_ACSR_4/0_Penguin_12_47_0_3_3_3_3

New Line.l(r:p2udt6211-p2udt6819)_s1 Units=km Length=0.623135 bus1=p2udt6211-p2udt6819x.1.2.3 bus2=p2udt6819.1.2.3 switch=n enabled=y phases=3 Linecode=3P_OH_AL_ACSR_4/0_Penguin_12_47_0_3_3_3_3

New Line.l(r:p2udt5075-p2udt6211) Units=km Length=0.386535 bus1=p2udt5075.1.2.3 bus2=p2udt6211.1.2.3 switch=n enabled=y phases=3 Linecode=3P_OH_AL_ACSR_4/0_Penguin_12_47_0_3_3_3_3

New Line.l(r:p2udt5075-p2udt5870) Units=km Length=1.2668800000000002 bus1=p2udt5870.1.2.3 bus2=p2udt5075.1.2.3 switch=n enabled=y phases=3 Linecode=3P_OH_AL_ACSR_4/0_Penguin_12_47_0_3_3_3_3

New Line.l(r:p2udt5870-p2udt7118)_s0 Units=km Length=0.12491 bus1=p2udt7118.1.2.3 bus2=p2udt5870-p2udt7118x.1.2.3 switch=n enabled=y phases=3 Linecode=3P_OH_AL_ACSR_4/0_Penguin_12_47_0_3_3_3_3

New Line.l(r:p2udt5870-p2udt7118)_s1 Units=km Length=0.022284 bus1=p2udt5870-p2udt7118x.1.2.3 bus2=p2udt5870.1.2.3 switch=n enabled=y phases=3 Linecode=3P_OH_AL_ACSR_4/0_Penguin_12_47_0_3_3_3_3

New Line.padswitch(r:p2udt1103-p2udt7057)p2u_43042 Units=km Length=0.001 bus1=p2udt7057.1.2.3 bus2=p2udt1103-p2udt7057xx.1.2.3 switch=y enabled=y phases=3 Linecode=padswitch_3_3_3_3

New Line.padswitch(r:p2udt1103-p2udt7057)p2u_43043 Units=km Length=0.001 bus1=p2udt1103-p2udt7057x.1.2.3 bus2=p2udt1103.1.2.3 switch=y enabled=y phases=3 Linecode=padswitch_3_3_3_3_3

New Line.padswitch(r:p2udt3894-p2udt7057)p2u_43044 Units=km Length=0.001 bus1=p2udt3894.1.2.3 bus2=p2udt3894-p2udt7057x.1.2.3 switch=y enabled=y phases=3 Linecode=padswitch_3_3_3_1_3_3

New Line.padswitch(r:p2udt3894-p2udt7057)p2u_43045 Units=km Length=0.001 bus1=p2udt3894-p2udt7057xx.1.2.3 bus2=p2udt7057.1.2.3 switch=y enabled=y phases=3 Linecode=padswitch_3_3_3_1_3_1_3

New Line.padswitch(r:p2udt238-p2udt5070)p2u_43046 Units=km Length=0.001 bus1=p2udt238.1.2.3 bus2=p2udt238-p2udt5070x.1.2.3 switch=y enabled=y phases=3 Linecode=padswitch_3_3_3_3_3

New Line.padswitch(r:p2udt238-p2udt5070)p2u_43047 Units=km Length=0.001 bus1=p2udt238-p2udt5070xx.1.2.3 bus2=p2udt5070.1.2.3 switch=y enabled=y phases=3 Linecode=padswitch_3_3_3_1_3_1_3_1

New Line.padswitch(r:p2udt238-p2udt8181)p2u_43048 Units=km Length=0.001 bus1=p2udt8181.1.2.3 bus2=p2udt238-p2udt8181xx.1.2.3 switch=y enabled=y phases=3 Linecode=padswitch_3_3_3_1_3_1_3_1

New Line.padswitch(r:p2udt238-p2udt8181)p2u_43049 Units=km Length=0.001 bus1=p2udt238-p2udt8181x.1.2.3 bus2=p2udt238.1.2.3 switch=y enabled=y phases=3 Linecode=padswitch_3_3_3_3_3

New Line.padswitch(r:p2udt3894-p2udt8181)p2u_43050 Units=km Length=0.001 bus1=p2udt3894.1.2.3 bus2=p2udt3894-p2udt8181x.1.2.3 switch=y enabled=y phases=3 Linecode=padswitch_3_3_3_1_3_3

New Line.padswitch(r:p2udt3894-p2udt8181)p2u_43051 Units=km Length=0.001 bus1=p2udt3894-p2udt8181xx.1.2.3 bus2=p2udt8181.1.2.3 switch=y enabled=y phases=3 Linecode=padswitch_3_3_3_1_3_1_3_1

New Line.l(r:p2udt3894-p2udt6472)_disconnect Units=km Length=0.001 bus1=p2udt6472_b1_1.1.2.3 bus2=p2udt6472_b2_1.1.2.3 switch=y enabled=y phases=3 Linecode=3P_OH_AL_ACSR_4/0_Penguin_12_47_0_3_3_3_3

New Line.l(r:p2udt3894-p2udt6472)_cont Units=km Length=2.0123729999999997 bus1=p2udt6472_b2_1.1.2.3 bus2=p2udt3894.1.2.3 switch=n enabled=y phases=3 Linecode=3P_OH_AL_ACSR_4/0_Penguin_12_47_0_3_3_3_3
