New Capacitor.p2uc64 Bus1=p2udt664 phases=3 Kv=12.47 conn=Wye Kvar=300.0

New CapControl.p2uc64 Capacitor=p2uc64 Element=Line.padswitch(r:p2udt664-p2udt666)p2u_43325 Terminal=1 delay=100.0 Type=voltage Vmin=120.5 Vmax=125.0 Ptratio=59.99631547328862 Ctratio=100.0

New Capacitor.p2uc69 Bus1=p2udt7217 phases=3 Kv=12.47 conn=Wye Kvar=300.0

New CapControl.p2uc69 Capacitor=p2uc69 Element=Line.padswitch(r:p2udt7217-p2udt7938)p2u_43251 Terminal=1 delay=100.0 Type=voltage Vmin=120.5 Vmax=125.0 Ptratio=59.99631547328862 Ctratio=100.0
