New Capacitor.p2uc67 Bus1=p2udt3781 phases=3 Kv=12.47 conn=Wye Kvar=300.0

New CapControl.p2uc67 Capacitor=p2uc67 Element=Line.l(r:p2udt3781-p2udt6364) Terminal=1 delay=100.0 Type=voltage Vmin=120.5 Vmax=125.0 Ptratio=59.99631547328862 Ctratio=100.0

New Capacitor.p2uc71 Bus1=p2udt6693 phases=3 Kv=12.47 conn=Wye Kvar=300.0

New CapControl.p2uc71 Capacitor=p2uc71 Element=Line.l(r:p2udt6693-p2udt8615) Terminal=1 delay=100.0 Type=voltage Vmin=120.5 Vmax=125.0 Ptratio=59.99631547328862 Ctratio=100.0
