Clear

New Circuit.substation_p2uhs11_69 bus1=p2uhs11_69 pu=1.0 basekV=69.0 R1=1e-05 X1=1e-05 R0=1e-05 X0=1e-05

Redirect Transformers.dss
Redirect p2uhs11_1247--p2udt4732/Transformers.dss
Redirect p2uhs11_1247--p2udt5729/Transformers.dss
Redirect p2uhs11_1247--p2udt7967/Transformers.dss
Redirect p2uhs11_1247--p2udt3455/Transformers.dss
Redirect Regulators.dss
Redirect p2uhs11_1247--p2udt3455/Loads.dss
Redirect p2uhs11_1247--p2udt7967/Loads.dss
Redirect p2uhs11_1247--p2udt4732/Loads.dss
Redirect p2uhs11_1247--p2udt5729/Loads.dss
Redirect LineCodes.dss
Redirect p2uhs11_1247--p2udt4732/LineCodes.dss
Redirect p2uhs11_1247--p2udt5729/LineCodes.dss
Redirect p2uhs11_1247--p2udt7967/LineCodes.dss
Redirect p2uhs11_1247--p2udt3455/LineCodes.dss
Redirect Lines.dss
Redirect p2uhs11_1247--p2udt4732/Lines.dss
Redirect p2uhs11_1247--p2udt5729/Lines.dss
Redirect p2uhs11_1247--p2udt7967/Lines.dss
Redirect p2uhs11_1247--p2udt3455/Lines.dss
Redirect p2uhs11_1247--p2udt3455/Capacitors.dss
Redirect p2uhs11_1247--p2udt7967/Capacitors.dss
Redirect p2uhs11_1247--p2udt4732/Capacitors.dss
Redirect p2uhs11_1247--p2udt5729/Capacitors.dss

Set Voltagebases=[0.2080002494301389, 0.48, 7.199560000000001, 12.47, 69.0]

Calcvoltagebases

Buscoords Buscoords.dss

Solve
