New Capacitor.p2uc75 Bus1=p2udt5455 phases=3 Kv=12.47 conn=Wye Kvar=300.0

New CapControl.p2uc75 Capacitor=p2uc75 Element=Line.l(r:p2udt3808-p2udt5455) Terminal=1 delay=100.0 Type=voltage Vmin=120.5 Vmax=125.0 Ptratio=59.99631547328862 Ctratio=100.0
