New Capacitor.p2uc73 Bus1=p2udt4465 phases=3 Kv=12.47 conn=Wye Kvar=450.0

New CapControl.p2uc73 Capacitor=p2uc73 Element=Line.l(r:p2udt1548-p2udt4465) Terminal=1 delay=100.0 Type=voltage Vmin=120.5 Vmax=125.0 Ptratio=59.99631547328862 Ctratio=100.0

New Capacitor.p2uc77 Bus1=p2udt4588 phases=3 Kv=12.47 conn=Wye Kvar=300.0

New CapControl.p2uc77 Capacitor=p2uc77 Element=Line.padswitch(r:p2udt4588-p2udt5544)p2u_44210 Terminal=1 delay=100.0 Type=voltage Vmin=120.5 Vmax=125.0 Ptratio=59.99631547328862 Ctratio=100.0
