New Capacitor.p2uc79 Bus1=p2udt3404 phases=3 Kv=12.47 conn=Wye Kvar=300.0

New CapControl.p2uc79 Capacitor=p2uc79 Element=Line.padswitch(r:p2udt3404-p2udt4813)p2u_44990 Terminal=1 delay=100.0 Type=voltage Vmin=120.5 Vmax=125.0 Ptratio=59.99631547328862 Ctratio=100.0
