New Capacitor.p2uc78 Bus1=p2udt2494 phases=3 Kv=12.47 conn=Wye Kvar=300.0

New CapControl.p2uc78 Capacitor=p2uc78 Element=Line.padswitch(r:p2udt2494-p2udt2495)p2u_45355 Terminal=1 delay=100.0 Type=voltage Vmin=120.5 Vmax=125.0 Ptratio=59.99631547328862 Ctratio=100.0

New Capacitor.p2uc80 Bus1=p2udt2313 phases=3 Kv=12.47 conn=Wye Kvar=300.0

New CapControl.p2uc80 Capacitor=p2uc80 Element=Line.padswitch(r:p2udt2313-p2udt6638)p2u_45153 Terminal=1 delay=100.0 Type=voltage Vmin=120.5 Vmax=125.0 Ptratio=59.99631547328862 Ctratio=100.0
