New Capacitor.p2uc14 Bus1=p2udt3874 phases=3 Kv=12.47 conn=Wye Kvar=300.0

New CapControl.p2uc14 Capacitor=p2uc14 Element=Line.padswitch(r:p2udt1855-p2udt3874)p2u_36630 Terminal=1 delay=100.0 Type=voltage Vmin=120.5 Vmax=125.0 Ptratio=59.99631547328862 Ctratio=100.0
