New Capacitor.p2uc17 Bus1=p2udt5862 phases=3 Kv=12.47 conn=Wye Kvar=300.0

New CapControl.p2uc17 Capacitor=p2uc17 Element=Line.l(r:p2udt2742-p2udt5862) Terminal=1 delay=100.0 Type=voltage Vmin=120.5 Vmax=125.0 Ptratio=59.99631547328862 Ctratio=100.0
