New Line.l(r:p2udt168lv-p2ulv173) Units=km Length=0.0140039 bus1=p2udt168lv.1.2 bus2=p2ulv173.1.2 switch=n enabled=y phases=2 Linecode=1P_OH_AL_2/0_Rucina_0_416_0_2_2_2_2

New Line.l(r:p2udt168lv-p2ulv3558) Units=km Length=0.0157808 bus1=p2udt168lv.1.2 bus2=p2ulv3558.1.2 switch=n enabled=y phases=2 Linecode=1P_OH_AL_2/0_Rucina_0_416_0_2_2_2_2

New Line.l(r:p2udm625-p2ulv5082) Units=km Length=0.0510706 bus1=p2udm625.1.2 bus2=p2ulv5082.1.2 switch=n enabled=y phases=2 Linecode=1P_OH_AL_4/0_Zuzara_0_416_0_2_2_2_2

New Line.l(r:p2udm627-p2ulv6252) Units=km Length=0.0249529 bus1=p2udm627.1.2 bus2=p2ulv6252.1.2 switch=n enabled=y phases=2 Linecode=1P_OH_AL_2/0_Rucina_0_416_0_2_2_2_2

New Line.l(r:p2udm625-p2udm627) Units=km Length=0.0586415 bus1=p2udm625.1.2 bus2=p2udm627.1.2 switch=n enabled=y phases=2 Linecode=1P_OH_AL_4/0_Zuzara_0_416_0_2_2_2_2

New Line.l(r:p2udm625-p2udt168lv) Units=km Length=0.0195485 bus1=p2udt168lv.1.2 bus2=p2udm625.1.2 switch=n enabled=y phases=2 Linecode=1P_OH_AL_2/0_Rucina_0_416_0_2_2_2_2

New Line.l(r:p2udm628-p2ulv9314) Units=km Length=0.0169497 bus1=p2udm628.1.2 bus2=p2ulv9314.1.2 switch=n enabled=y phases=2 Linecode=1P_OH_AL_2/0_Rucina_0_416_0_2_2_2_2

New Line.l(r:p2udm626-p2ulv5776) Units=km Length=0.0194636 bus1=p2udm626.1.2 bus2=p2ulv5776.1.2 switch=n enabled=y phases=2 Linecode=1P_OH_AL_2/0_Rucina_0_416_0_2_2_2_2

New Line.l(r:p2udm626-p2udm628) Units=km Length=0.0195485 bus1=p2udm628.1.2 bus2=p2udm626.1.2 switch=n enabled=y phases=2 Linecode=1P_OH_AL_2/0_Rucina_0_416_0_2_2_2_2

New Line.l(r:p2udm628-p2udt168lv) Units=km Length=0.0195485 bus1=p2udt168lv.1.2 bus2=p2udm628.1.2 switch=n enabled=y phases=2 Linecode=1P_OH_AL_2/0_Rucina_0_416_0_2_2_2_2

New Line.l(r:p2udt192lv-p2ulv197) Units=km Length=0.027309100000000003 bus1=p2udt192lv.1.2 bus2=p2ulv197.1.2 switch=n enabled=y phases=2 Linecode=1P_OH_AL_4/0_Zuzara_0_416_0_2_2_2_2

New Line.l(r:p2udt1056lv-p2ulv1144) Units=km Length=0.017621200000000004 bus1=p2udt1056lv.1.2 bus2=p2ulv1144.1.2 switch=n enabled=y phases=2 Linecode=1P_OH_AL_2/0_Rucina_0_416_0_2_2_2_2

New Line.l(r:p2udt1056lv-p2ulv1393) Units=km Length=0.0140625 bus1=p2udt1056lv.1.2 bus2=p2ulv1393.1.2 switch=n enabled=y phases=2 Linecode=1P_OH_AL_2/0_Rucina_0_416_0_2_2_2_2

New Line.l(r:p2udt1087lv-p2ulv1181) Units=km Length=0.026171500000000004 bus1=p2udt1087lv.1.2 bus2=p2ulv1181.1.2 switch=n enabled=y phases=2 Linecode=1P_OH_AL_2/0_Rucina_0_416_0_2_2_2_2

New Line.l(r:p2udt1087lv-p2ulv2657) Units=km Length=0.0257786 bus1=p2udt1087lv.1.2 bus2=p2ulv2657.1.2 switch=n enabled=y phases=2 Linecode=1P_OH_AL_2/0_Rucina_0_416_0_2_2_2_2

New Line.l(r:p2udt1087lv-p2ulv15167) Units=km Length=0.023337 bus1=p2udt1087lv.1.2 bus2=p2ulv15167.1.2 switch=n enabled=y phases=2 Linecode=1P_OH_AL_2/0_Rucina_0_416_0_2_2_2_2

New Line.l(r:p2udt1087lv-p2ulv15858) Units=km Length=0.0246962 bus1=p2udt1087lv.1.2 bus2=p2ulv15858.1.2 switch=n enabled=y phases=2 Linecode=1P_OH_AL_2/0_Rucina_0_416_0_2_2_2_2

New Line.l(r:p2udt1087lv-p2ulv16344) Units=km Length=0.0257573 bus1=p2udt1087lv.1.2 bus2=p2ulv16344.1.2 switch=n enabled=y phases=2 Linecode=1P_OH_AL_2/0_Rucina_0_416_0_2_2_2_2

New Line.l(r:p2udt1087lv-p2ulv18592) Units=km Length=0.0247869 bus1=p2udt1087lv.1.2 bus2=p2ulv18592.1.2 switch=n enabled=y phases=2 Linecode=1P_OH_AL_2/0_Rucina_0_416_0_2_2_2_2

New Line.l(r:p2udt1088lv-p2ulv2658) Units=km Length=0.0147143 bus1=p2udt1088lv.1.2 bus2=p2ulv2658.1.2 switch=n enabled=y phases=2 Linecode=1P_OH_AL_2/0_Rucina_0_416_0_2_2_2_2

New Line.l(r:p2udm4002-p2ulv1182) Units=km Length=0.0159977 bus1=p2udm4002.1.2 bus2=p2ulv1182.1.2 switch=n enabled=y phases=2 Linecode=1P_OH_AL_2/0_Rucina_0_416_0_2_2_2_2

New Line.l(r:p2udm4002-p2udt1088lv) Units=km Length=0.0177848 bus1=p2udt1088lv.1.2 bus2=p2udm4002.1.2 switch=n enabled=y phases=2 Linecode=1P_OH_AL_2/0_Rucina_0_416_0_2_2_2_2

New Line.l(r:p2udt1089lv-p2ulv17925) Units=km Length=0.0141317 bus1=p2udt1089lv.1.2 bus2=p2ulv17925.1.2 switch=n enabled=y phases=2 Linecode=1P_OH_AL_2/0_Rucina_0_416_0_2_2_2_2

New Line.l(r:p2udm4004-p2ulv1183) Units=km Length=0.0111101 bus1=p2udm4004.1.2 bus2=p2ulv1183.1.2 switch=n enabled=y phases=2 Linecode=1P_OH_AL_2/0_Rucina_0_416_0_2_2_2_2

New Line.l(r:p2udm4004-p2udt1089lv) Units=km Length=0.0195566 bus1=p2udt1089lv.1.2 bus2=p2udm4004.1.2 switch=n enabled=y phases=2 Linecode=1P_OH_AL_2/0_Rucina_0_416_0_2_2_2_2

New Line.l(r:p2udm4005-p2ulv13375) Units=km Length=0.0106016 bus1=p2udm4005.1.2 bus2=p2ulv13375.1.2 switch=n enabled=y phases=2 Linecode=1P_OH_AL_2/0_Rucina_0_416_0_2_2_2_2

New Line.l(r:p2udm4005-p2udt1089lv) Units=km Length=0.0710145 bus1=p2udt1089lv.1.2 bus2=p2udm4005.1.2 switch=n enabled=y phases=2 Linecode=1P_OH_AL_4/0_Zuzara_0_416_0_2_2_2_2

New Line.l(r:p2udm4666-p2ulv1394) Units=km Length=0.0108861 bus1=p2udm4666.1.2 bus2=p2ulv1394.1.2 switch=n enabled=y phases=2 Linecode=1P_OH_AL_2/0_Rucina_0_416_0_2_2_2_2

New Line.l(r:p2udm4666-p2ulv11200) Units=km Length=0.0159795 bus1=p2udm4666.1.2 bus2=p2ulv11200.1.2 switch=n enabled=y phases=2 Linecode=1P_OH_AL_2/0_Rucina_0_416_0_2_2_2_2

New Line.l(r:p2udm4666-p2udt1266lv) Units=km Length=0.0195485 bus1=p2udt1266lv.1.2 bus2=p2udm4666.1.2 switch=n enabled=y phases=2 Linecode=1P_OH_AL_2/0_Rucina_0_416_0_2_2_2_2

New Line.l(r:p2udm4667-p2ulv2868) Units=km Length=0.0167679 bus1=p2udm4667.1.2 bus2=p2ulv2868.1.2 switch=n enabled=y phases=2 Linecode=1P_OH_AL_2/0_Rucina_0_416_0_2_2_2_2

New Line.l(r:p2udm4669-p2ulv15132) Units=km Length=0.0223119 bus1=p2udm4669.1.2 bus2=p2ulv15132.1.2 switch=n enabled=y phases=2 Linecode=1P_OH_AL_2/0_Rucina_0_416_0_2_2_2_2

New Line.l(r:p2udm4667-p2udm4669) Units=km Length=0.0195485 bus1=p2udm4667.1.2 bus2=p2udm4669.1.2 switch=n enabled=y phases=2 Linecode=1P_OH_AL_2/0_Rucina_0_416_0_2_2_2_2

New Line.l(r:p2udm4667-p2udt1266lv) Units=km Length=0.0195533 bus1=p2udt1266lv.1.2 bus2=p2udm4667.1.2 switch=n enabled=y phases=2 Linecode=1P_OH_AL_2/0_Rucina_0_416_0_2_2_2_2

New Line.l(r:p2udt1305lv-p2ulv1438) Units=km Length=0.0199771 bus1=p2udt1305lv.1.2 bus2=p2ulv1438.1.2 switch=n enabled=y phases=2 Linecode=1P_OH_AL_2/0_Rucina_0_416_0_2_2_2_2

New Line.l(r:p2udt1305lv-p2ulv4837) Units=km Length=0.0208791 bus1=p2udt1305lv.1.2 bus2=p2ulv4837.1.2 switch=n enabled=y phases=2 Linecode=1P_OH_AL_2/0_Rucina_0_416_0_2_2_2_2

New Line.l(r:p2udt1305lv-p2ulv11008) Units=km Length=0.0247067 bus1=p2udt1305lv.1.2 bus2=p2ulv11008.1.2 switch=n enabled=y phases=2 Linecode=1P_OH_AL_2/0_Rucina_0_416_0_2_2_2_2

New Line.l(r:p2udt1305lv-p2ulv15638) Units=km Length=0.0210779 bus1=p2udt1305lv.1.2 bus2=p2ulv15638.1.2 switch=n enabled=y phases=2 Linecode=1P_OH_AL_2/0_Rucina_0_416_0_2_2_2_2

New Line.l(r:p2udt1305lv-p2ulv22475) Units=km Length=0.0210044 bus1=p2udt1305lv.1.2 bus2=p2ulv22475.1.2 switch=n enabled=y phases=2 Linecode=1P_OH_AL_2/0_Rucina_0_416_0_2_2_2_2

New Line.l(r:p2udt1845lv-p2ulv2090) Units=km Length=0.001 bus1=p2udt1845lv.1.2 bus2=p2ulv2090.1.2 switch=n enabled=y phases=2 Linecode=1P_OH_AL_4_Periwinkle_0_416_0_2_2_2_2

New Line.l(r:p2udt2041lv-p2ulv2354) Units=km Length=0.001 bus1=p2udt2041lv.1.2 bus2=p2ulv2354.1.2 switch=n enabled=y phases=2 Linecode=1P_OH_AL_4_Periwinkle_0_416_0_2_2_2_2

New Line.l(r:p2udm7993-p2ulv2608) Units=km Length=0.00840964 bus1=p2udm7993.1.2 bus2=p2ulv2608.1.2 switch=n enabled=y phases=2 Linecode=1P_OH_AL_2/0_Rucina_0_416_0_2_2_2_2

New Line.l(r:p2udm7993-p2udt2226lv) Units=km Length=0.0186067 bus1=p2udt2226lv.1.2 bus2=p2udm7993.1.2 switch=n enabled=y phases=2 Linecode=1P_OH_AL_2/0_Rucina_0_416_0_2_2_2_2

New Line.l(r:p2udm7994-p2ulv24181) Units=km Length=0.0482181 bus1=p2udm7994.1.2 bus2=p2ulv24181.1.2 switch=n enabled=y phases=2 Linecode=1P_OH_AL_4/0_Zuzara_0_416_0_2_2_2_2

New Line.l(r:p2udm7994-p2udt2226lv) Units=km Length=0.0185934 bus1=p2udt2226lv.1.2 bus2=p2udm7994.1.2 switch=n enabled=y phases=2 Linecode=1P_OH_AL_2/0_Rucina_0_416_0_2_2_2_2

New Line.l(r:p2udt2410lv-p2ulv2869) Units=km Length=0.0123989 bus1=p2udt2410lv.1.2 bus2=p2ulv2869.1.2 switch=n enabled=y phases=2 Linecode=1P_OH_AL_2/0_Rucina_0_416_0_2_2_2_2

New Line.l(r:p2udm9692-p2ulv3368) Units=km Length=0.0148624 bus1=p2udm9692.1.2 bus2=p2ulv3368.1.2 switch=n enabled=y phases=2 Linecode=1P_OH_AL_2/0_Rucina_0_416_0_2_2_2_2

New Line.l(r:p2udm9692-p2udt2742lv) Units=km Length=0.0512562 bus1=p2udt2742lv.1.2 bus2=p2udm9692.1.2 switch=n enabled=y phases=2 Linecode=1P_OH_AL_4/0_Zuzara_0_416_0_2_2_2_2

New Line.l(r:p2udm9693-p2ulv10272) Units=km Length=0.0109438 bus1=p2udm9693.1.2 bus2=p2ulv10272.1.2 switch=n enabled=y phases=2 Linecode=1P_OH_AL_2/0_Rucina_0_416_0_2_2_2_2

New Line.l(r:p2udm9693-p2udt2742lv) Units=km Length=0.016620000000000003 bus1=p2udt2742lv.1.2 bus2=p2udm9693.1.2 switch=n enabled=y phases=2 Linecode=1P_OH_AL_2/0_Rucina_0_416_0_2_2_2_2

New Line.l(r:p2udt2863lv-p2ulv3560) Units=km Length=0.00835516 bus1=p2udt2863lv.1.2 bus2=p2ulv3560.1.2 switch=n enabled=y phases=2 Linecode=1P_OH_AL_2/0_Rucina_0_416_0_2_2_2_2

New Line.l(r:p2udt2863lv-p2ulv17016) Units=km Length=0.00835516 bus1=p2udt2863lv.1.2 bus2=p2ulv17016.1.2 switch=n enabled=y phases=2 Linecode=1P_OH_AL_2/0_Rucina_0_416_0_2_2_2_2

New Line.l(r:p2udt2864lv-p2ulv3562) Units=km Length=0.0667086 bus1=p2udt2864lv.1.2 bus2=p2ulv3562.1.2 switch=n enabled=y phases=2 Linecode=1P_OH_AL_4/0_Zuzara_0_416_0_2_2_2_2

New Line.l(r:p2udt2864lv-p2ulv5743) Units=km Length=0.0905013 bus1=p2udt2864lv.1.2 bus2=p2ulv5743.1.2 switch=n enabled=y phases=2 Linecode=1P_OH_AL_4/0_Zuzara_0_416_0_2_2_2_2

New Line.l(r:p2udt2864lv-p2ulv12141) Units=km Length=0.0730859 bus1=p2udt2864lv.1.2 bus2=p2ulv12141.1.2 switch=n enabled=y phases=2 Linecode=1P_OH_AL_4/0_Zuzara_0_416_0_2_2_2_2

New Line.l(r:p2udt2864lv-p2ulv16755) Units=km Length=0.121822 bus1=p2udt2864lv.1.2 bus2=p2ulv16755.1.2 switch=n enabled=y phases=2 Linecode=1P_OH_AL_4/0_Zuzara_0_416_0_2_2_2_2

New Line.l(r:p2udt2864lv-p2ulv23732) Units=km Length=0.0940556 bus1=p2udt2864lv.1.2 bus2=p2ulv23732.1.2 switch=n enabled=y phases=2 Linecode=1P_OH_AL_4/0_Zuzara_0_416_0_2_2_2_2

New Line.l(r:p2udt2891lv-p2ulv3614) Units=km Length=0.014543500000000001 bus1=p2udt2891lv.1.2 bus2=p2ulv3614.1.2 switch=n enabled=y phases=2 Linecode=1P_OH_AL_2/0_Rucina_0_416_0_2_2_2_2

New Line.l(r:p2udt2891lv-p2ulv10521) Units=km Length=0.014245 bus1=p2udt2891lv.1.2 bus2=p2ulv10521.1.2 switch=n enabled=y phases=2 Linecode=1P_OH_AL_2/0_Rucina_0_416_0_2_2_2_2

New Line.l(r:p2udm10226-p2ulv6032) Units=km Length=0.0136556 bus1=p2udm10226.1.2 bus2=p2ulv6032.1.2 switch=n enabled=y phases=2 Linecode=1P_OH_AL_2/0_Rucina_0_416_0_2_2_2_2

New Line.l(r:p2udm10226-p2ulv11717) Units=km Length=0.0156114 bus1=p2udm10226.1.2 bus2=p2ulv11717.1.2 switch=n enabled=y phases=2 Linecode=1P_OH_AL_2/0_Rucina_0_416_0_2_2_2_2

New Line.l(r:p2udm10226-p2udt2891lv) Units=km Length=0.0173887 bus1=p2udt2891lv.1.2 bus2=p2udm10226.1.2 switch=n enabled=y phases=2 Linecode=1P_OH_AL_2/0_Rucina_0_416_0_2_2_2_2

New Line.l(r:p2udm10229-p2ulv17048) Units=km Length=0.0139492 bus1=p2udm10229.1.2 bus2=p2ulv17048.1.2 switch=n enabled=y phases=2 Linecode=1P_OH_AL_2/0_Rucina_0_416_0_2_2_2_2

New Line.l(r:p2udm10229-p2udt2891lv) Units=km Length=0.0173935 bus1=p2udt2891lv.1.2 bus2=p2udm10229.1.2 switch=n enabled=y phases=2 Linecode=1P_OH_AL_2/0_Rucina_0_416_0_2_2_2_2

New Line.l(r:p2udt3171lv-p2ulv4057) Units=km Length=0.0309601 bus1=p2udt3171lv.1.2 bus2=p2ulv4057.1.2 switch=n enabled=y phases=2 Linecode=1P_OH_AL_4/0_Zuzara_0_416_0_2_2_2_2

New Line.l(r:p2udt3171lv-p2ulv7682) Units=km Length=0.0813352 bus1=p2udt3171lv.1.2 bus2=p2ulv7682.1.2 switch=n enabled=y phases=2 Linecode=1P_OH_AL_4/0_Zuzara_0_416_0_2_2_2_2

New Line.l(r:p2udt3171lv-p2ulv16756) Units=km Length=0.058352100000000004 bus1=p2udt3171lv.1.2 bus2=p2ulv16756.1.2 switch=n enabled=y phases=2 Linecode=1P_OH_AL_4/0_Zuzara_0_416_0_2_2_2_2

New Line.l(r:p2udt3171lv-p2ulv17672) Units=km Length=0.0632194 bus1=p2udt3171lv.1.2 bus2=p2ulv17672.1.2 switch=n enabled=y phases=2 Linecode=1P_OH_AL_4/0_Zuzara_0_416_0_2_2_2_2

New Line.l(r:p2udt3171lv-p2ulv23311) Units=km Length=0.0592835 bus1=p2udt3171lv.1.2 bus2=p2ulv23311.1.2 switch=n enabled=y phases=2 Linecode=1P_OH_AL_4/0_Zuzara_0_416_0_2_2_2_2

New Line.l(r:p2udt3198lv-p2ulv5081) Units=km Length=0.0133617 bus1=p2udt3198lv.1.2 bus2=p2ulv5081.1.2 switch=n enabled=y phases=2 Linecode=1P_OH_AL_2/0_Rucina_0_416_0_2_2_2_2

New Line.l(r:p2udt3198lv-p2ulv13374) Units=km Length=0.0150032 bus1=p2udt3198lv.1.2 bus2=p2ulv13374.1.2 switch=n enabled=y phases=2 Linecode=1P_OH_AL_2/0_Rucina_0_416_0_2_2_2_2

New Line.l(r:p2udm11193-p2ulv4098) Units=km Length=0.0136355 bus1=p2udm11193.1.2 bus2=p2ulv4098.1.2 switch=n enabled=y phases=2 Linecode=1P_OH_AL_2/0_Rucina_0_416_0_2_2_2_2

New Line.l(r:p2udm11193-p2ulv6031) Units=km Length=0.0144343 bus1=p2udm11193.1.2 bus2=p2ulv6031.1.2 switch=n enabled=y phases=2 Linecode=1P_OH_AL_2/0_Rucina_0_416_0_2_2_2_2

New Line.l(r:p2udm11193-p2udt3198lv) Units=km Length=0.0186046 bus1=p2udt3198lv.1.2 bus2=p2udm11193.1.2 switch=n enabled=y phases=2 Linecode=1P_OH_AL_2/0_Rucina_0_416_0_2_2_2_2

New Line.l(r:p2udt3339lv-p2ulv4341) Units=km Length=0.0657745 bus1=p2udt3339lv.1.2 bus2=p2ulv4341.1.2 switch=n enabled=y phases=2 Linecode=1P_OH_AL_4/0_Zuzara_0_416_0_2_2_2_2

New Line.l(r:p2udm12128-p2ulv4591) Units=km Length=0.0138367 bus1=p2udm12128.1.2 bus2=p2ulv4591.1.2 switch=n enabled=y phases=2 Linecode=1P_OH_AL_2/0_Rucina_0_416_0_2_2_2_2

New Line.l(r:p2udm12128-p2udt3492lv) Units=km Length=0.0362097 bus1=p2udt3492lv.1.2 bus2=p2udm12128.1.2 switch=n enabled=y phases=2 Linecode=1P_OH_AL_4/0_Zuzara_0_416_0_2_2_2_2

New Line.l(r:p2udm12129-p2ulv15639) Units=km Length=0.0141874 bus1=p2udm12129.1.2 bus2=p2ulv15639.1.2 switch=n enabled=y phases=2 Linecode=1P_OH_AL_2/0_Rucina_0_416_0_2_2_2_2

New Line.l(r:p2udm12129-p2udt3492lv) Units=km Length=0.049981 bus1=p2udt3492lv.1.2 bus2=p2udm12129.1.2 switch=n enabled=y phases=2 Linecode=1P_OH_AL_4/0_Zuzara_0_416_0_2_2_2_2

New Line.l(r:p2udm12517-p2ulv4838) Units=km Length=0.0219359 bus1=p2udm12517.1.2 bus2=p2ulv4838.1.2 switch=n enabled=y phases=2 Linecode=1P_OH_AL_2/0_Rucina_0_416_0_2_2_2_2

New Line.l(r:p2udm12518-p2ulv11949) Units=km Length=0.021061400000000004 bus1=p2udm12518.1.2 bus2=p2ulv11949.1.2 switch=n enabled=y phases=2 Linecode=1P_OH_AL_2/0_Rucina_0_416_0_2_2_2_2

New Line.l(r:p2udm12517-p2udm12518) Units=km Length=0.0389557 bus1=p2udm12517.1.2 bus2=p2udm12518.1.2 switch=n enabled=y phases=2 Linecode=1P_OH_AL_4/0_Zuzara_0_416_0_2_2_2_2

New Line.l(r:p2udm12517-p2udt3627lv) Units=km Length=0.0191398 bus1=p2udt3627lv.1.2 bus2=p2udm12517.1.2 switch=n enabled=y phases=2 Linecode=1P_OH_AL_2/0_Rucina_0_416_0_2_2_2_2

New Line.l(r:p2udt3867lv-p2ulv5261) Units=km Length=0.001 bus1=p2udt3867lv.1.2 bus2=p2ulv5261.1.2 switch=n enabled=y phases=2 Linecode=1P_OH_AL_4_Periwinkle_0_416_0_2_2_2_2

New Line.l(r:p2udt3868lv-p2ulv5262) Units=km Length=0.001 bus1=p2udt3868lv.1.2 bus2=p2ulv5262.1.2 switch=n enabled=y phases=2 Linecode=1P_OH_AL_4_Periwinkle_0_416_0_2_2_2_2

New Line.l(r:p2udt4272lv-p2ulv5980) Units=km Length=0.0274987 bus1=p2udt4272lv.1.2 bus2=p2ulv5980.1.2 switch=n enabled=y phases=2 Linecode=1P_OH_AL_4/0_Zuzara_0_416_0_2_2_2_2

New Line.l(r:p2udt4273lv-p2ulv5981) Units=km Length=0.001 bus1=p2udt4273lv.1.2 bus2=p2ulv5981.1.2 switch=n enabled=y phases=2 Linecode=1P_OH_AL_4_Periwinkle_0_416_0_2_2_2_2

New Line.l(r:p2udt4427lv-p2ulv6287) Units=km Length=0.0196218 bus1=p2udt4427lv.1.2 bus2=p2ulv6287.1.2 switch=n enabled=y phases=2 Linecode=1P_OH_AL_2/0_Rucina_0_416_0_2_2_2_2

New Line.l(r:p2udt4427lv-p2ulv11481) Units=km Length=0.0149614 bus1=p2udt4427lv.1.2 bus2=p2ulv11481.1.2 switch=n enabled=y phases=2 Linecode=1P_OH_AL_2/0_Rucina_0_416_0_2_2_2_2

New Line.l(r:p2udt4427lv-p2ulv12660) Units=km Length=0.0135113 bus1=p2udt4427lv.1.2 bus2=p2ulv12660.1.2 switch=n enabled=y phases=2 Linecode=1P_OH_AL_2/0_Rucina_0_416_0_2_2_2_2

New Line.l(r:p2udt4522lv-p2ulv16997) Units=km Length=0.00754944 bus1=p2udt4522lv.1.2 bus2=p2ulv16997.1.2 switch=n enabled=y phases=2 Linecode=1P_OH_AL_2/0_Rucina_0_416_0_2_2_2_2

New Line.l(r:p2udm15067-p2ulv6479) Units=km Length=0.00700179 bus1=p2udm15067.1.2 bus2=p2ulv6479.1.2 switch=n enabled=y phases=2 Linecode=1P_OH_AL_2/0_Rucina_0_416_0_2_2_2_2

New Line.l(r:p2udm15067-p2udt4522lv) Units=km Length=0.0430749 bus1=p2udt4522lv.1.2 bus2=p2udm15067.1.2 switch=n enabled=y phases=2 Linecode=1P_OH_AL_4/0_Zuzara_0_416_0_2_2_2_2

New Line.l(r:p2udm15068-p2ulv13791) Units=km Length=0.00562228 bus1=p2udm15068.1.2 bus2=p2ulv13791.1.2 switch=n enabled=y phases=2 Linecode=1P_OH_AL_2/0_Rucina_0_416_0_2_2_2_2

New Line.l(r:p2udm15068-p2udt4522lv) Units=km Length=0.0313004 bus1=p2udt4522lv.1.2 bus2=p2udm15068.1.2 switch=n enabled=y phases=2 Linecode=1P_OH_AL_4/0_Zuzara_0_416_0_2_2_2_2

New Line.l(r:p2udt4534lv-p2ulv6947) Units=km Length=0.0498415 bus1=p2udt4534lv.1.2 bus2=p2ulv6947.1.2 switch=n enabled=y phases=2 Linecode=1P_OH_AL_4/0_Zuzara_0_416_0_2_2_2_2

New Line.l(r:p2udm15094-p2ulv6495) Units=km Length=0.0177809 bus1=p2udm15094.1.2 bus2=p2ulv6495.1.2 switch=n enabled=y phases=2 Linecode=1P_OH_AL_2/0_Rucina_0_416_0_2_2_2_2

New Line.l(r:p2udm15094-p2udt4534lv) Units=km Length=0.0394507 bus1=p2udt4534lv.1.2 bus2=p2udm15094.1.2 switch=n enabled=y phases=2 Linecode=1P_OH_AL_4/0_Zuzara_0_416_0_2_2_2_2

New Line.l(r:p2udm15096-p2ulv18559) Units=km Length=0.0278166 bus1=p2udm15096.1.2 bus2=p2ulv18559.1.2 switch=n enabled=y phases=2 Linecode=1P_OH_AL_4/0_Zuzara_0_416_0_2_2_2_2

New Line.l(r:p2udm15096-p2udt4534lv) Units=km Length=0.0197229 bus1=p2udt4534lv.1.2 bus2=p2udm15096.1.2 switch=n enabled=y phases=2 Linecode=1P_OH_AL_2/0_Rucina_0_416_0_2_2_2_2

New Line.l(r:p2udt4535lv-p2ulv6496) Units=km Length=0.0327256 bus1=p2udt4535lv.1.2 bus2=p2ulv6496.1.2 switch=n enabled=y phases=2 Linecode=1P_OH_AL_4/0_Zuzara_0_416_0_2_2_2_2

New Line.l(r:p2udm15098-p2ulv18764) Units=km Length=0.0503828 bus1=p2udm15098.1.2 bus2=p2ulv18764.1.2 switch=n enabled=y phases=2 Linecode=1P_OH_AL_4/0_Zuzara_0_416_0_2_2_2_2

New Line.l(r:p2udm15098-p2udt4535lv) Units=km Length=0.0191076 bus1=p2udt4535lv.1.2 bus2=p2udm15098.1.2 switch=n enabled=y phases=2 Linecode=1P_OH_AL_2/0_Rucina_0_416_0_2_2_2_2

New Line.l(r:p2udt4548lv-p2ulv20633) Units=km Length=0.0157187 bus1=p2udt4548lv.1.2 bus2=p2ulv20633.1.2 switch=n enabled=y phases=2 Linecode=1P_OH_AL_2/0_Rucina_0_416_0_2_2_2_2

New Line.l(r:p2udm15138-p2ulv6531) Units=km Length=0.0115786 bus1=p2udm15138.1.2 bus2=p2ulv6531.1.2 switch=n enabled=y phases=2 Linecode=1P_OH_AL_2/0_Rucina_0_416_0_2_2_2_2

New Line.l(r:p2udm15140-p2ulv8441) Units=km Length=0.0144899 bus1=p2udm15140.1.2 bus2=p2ulv8441.1.2 switch=n enabled=y phases=2 Linecode=1P_OH_AL_2/0_Rucina_0_416_0_2_2_2_2

New Line.l(r:p2udm15138-p2udm15140) Units=km Length=0.0584102 bus1=p2udm15138.1.2 bus2=p2udm15140.1.2 switch=n enabled=y phases=2 Linecode=1P_OH_AL_4/0_Zuzara_0_416_0_2_2_2_2

New Line.l(r:p2udm15138-p2udt4548lv) Units=km Length=0.0144648 bus1=p2udt4548lv.1.2 bus2=p2udm15138.1.2 switch=n enabled=y phases=2 Linecode=1P_OH_AL_2/0_Rucina_0_416_0_2_2_2_2

New Line.l(r:p2udm15139-p2ulv6756) Units=km Length=0.0147051 bus1=p2udm15139.1.2 bus2=p2ulv6756.1.2 switch=n enabled=y phases=2 Linecode=1P_OH_AL_2/0_Rucina_0_416_0_2_2_2_2

New Line.l(r:p2udm15139-p2ulv14050) Units=km Length=0.015673 bus1=p2udm15139.1.2 bus2=p2ulv14050.1.2 switch=n enabled=y phases=2 Linecode=1P_OH_AL_2/0_Rucina_0_416_0_2_2_2_2

New Line.l(r:p2udm15139-p2udt4548lv) Units=km Length=0.0144667 bus1=p2udt4548lv.1.2 bus2=p2udm15139.1.2 switch=n enabled=y phases=2 Linecode=1P_OH_AL_2/0_Rucina_0_416_0_2_2_2_2

New Line.l(r:p2udm15379-p2ulv19483) Units=km Length=0.0235959 bus1=p2udm15379.1.2 bus2=p2ulv19483.1.2 switch=n enabled=y phases=2 Linecode=1P_OH_AL_2/0_Rucina_0_416_0_2_2_2_2

New Line.l(r:p2udm15379-p2ulv21708) Units=km Length=0.00961418 bus1=p2udm15379.1.2 bus2=p2ulv21708.1.2 switch=n enabled=y phases=2 Linecode=1P_OH_AL_2/0_Rucina_0_416_0_2_2_2_2

New Line.l(r:p2udm15379-p2udt4643lv) Units=km Length=0.0183284 bus1=p2udt4643lv.1.2 bus2=p2udm15379.1.2 switch=n enabled=y phases=2 Linecode=1P_OH_AL_2/0_Rucina_0_416_0_2_2_2_2

New Line.l(r:p2udm15381-p2ulv22437) Units=km Length=0.0277576 bus1=p2udm15381.1.2 bus2=p2ulv22437.1.2 switch=n enabled=y phases=2 Linecode=1P_OH_AL_4/0_Zuzara_0_416_0_2_2_2_2

New Line.l(r:p2udm15378-p2ulv6718) Units=km Length=0.0223062 bus1=p2udm15378.1.2 bus2=p2ulv6718.1.2 switch=n enabled=y phases=2 Linecode=1P_OH_AL_2/0_Rucina_0_416_0_2_2_2_2

New Line.l(r:p2udm15378-p2udm15381) Units=km Length=0.0171725 bus1=p2udm15381.1.2 bus2=p2udm15378.1.2 switch=n enabled=y phases=2 Linecode=1P_OH_AL_2/0_Rucina_0_416_0_2_2_2_2

New Line.l(r:p2udm15381-p2udt4643lv) Units=km Length=0.0641749 bus1=p2udt4643lv.1.2 bus2=p2udm15381.1.2 switch=n enabled=y phases=2 Linecode=1P_OH_AL_4/0_Zuzara_0_416_0_2_2_2_2

New Line.l(r:p2udt4644lv-p2ulv13566) Units=km Length=0.0301481 bus1=p2udt4644lv.1.2 bus2=p2ulv13566.1.2 switch=n enabled=y phases=2 Linecode=1P_OH_AL_4/0_Zuzara_0_416_0_2_2_2_2

New Line.l(r:p2udm15382-p2ulv6719) Units=km Length=0.025717 bus1=p2udm15382.1.2 bus2=p2ulv6719.1.2 switch=n enabled=y phases=2 Linecode=1P_OH_AL_2/0_Rucina_0_416_0_2_2_2_2

New Line.l(r:p2udm15382-p2udt4644lv) Units=km Length=0.0184326 bus1=p2udt4644lv.1.2 bus2=p2udm15382.1.2 switch=n enabled=y phases=2 Linecode=1P_OH_AL_2/0_Rucina_0_416_0_2_2_2_2

New Line.l(r:p2udt4739lv-p2ulv6948) Units=km Length=0.0666625 bus1=p2udt4739lv.1.2 bus2=p2ulv6948.1.2 switch=n enabled=y phases=2 Linecode=1P_OH_AL_4/0_Zuzara_0_416_0_2_2_2_2

New Line.l(r:p2udm15635-p2ulv10957) Units=km Length=0.0612507 bus1=p2udm15635.1.2 bus2=p2ulv10957.1.2 switch=n enabled=y phases=2 Linecode=1P_OH_AL_4/0_Zuzara_0_416_0_2_2_2_2

New Line.l(r:p2udm15635-p2udt4739lv) Units=km Length=0.019586600000000003 bus1=p2udt4739lv.1.2 bus2=p2udm15635.1.2 switch=n enabled=y phases=2 Linecode=1P_OH_AL_2/0_Rucina_0_416_0_2_2_2_2

New Line.l(r:p2udm15636-p2ulv13090) Units=km Length=0.0536468 bus1=p2udm15636.1.2 bus2=p2ulv13090.1.2 switch=n enabled=y phases=2 Linecode=1P_OH_AL_4/0_Zuzara_0_416_0_2_2_2_2

New Line.l(r:p2udm15636-p2udt4739lv) Units=km Length=0.014769900000000002 bus1=p2udt4739lv.1.2 bus2=p2udm15636.1.2 switch=n enabled=y phases=2 Linecode=1P_OH_AL_2/0_Rucina_0_416_0_2_2_2_2

New Line.l(r:p2udt4740lv-p2ulv6949) Units=km Length=0.0104892 bus1=p2udt4740lv.1.2 bus2=p2ulv6949.1.2 switch=n enabled=y phases=2 Linecode=1P_OH_AL_2/0_Rucina_0_416_0_2_2_2_2

New Line.l(r:p2udt4740lv-p2ulv8166) Units=km Length=0.0546635 bus1=p2udt4740lv.1.2 bus2=p2ulv8166.1.2 switch=n enabled=y phases=2 Linecode=1P_OH_AL_4/0_Zuzara_0_416_0_2_2_2_2

New Line.l(r:p2udt4740lv-p2ulv9532) Units=km Length=0.054536 bus1=p2udt4740lv.1.2 bus2=p2ulv9532.1.2 switch=n enabled=y phases=2 Linecode=1P_OH_AL_4/0_Zuzara_0_416_0_2_2_2_2

New Line.l(r:p2udt4740lv-p2ulv22648) Units=km Length=0.0071201 bus1=p2udt4740lv.1.2 bus2=p2ulv22648.1.2 switch=n enabled=y phases=2 Linecode=1P_OH_AL_2/0_Rucina_0_416_0_2_2_2_2

New Line.l(r:p2udt4872lv-p2ulv7254) Units=km Length=0.0131899 bus1=p2udt4872lv.1.2 bus2=p2ulv7254.1.2 switch=n enabled=y phases=2 Linecode=1P_OH_AL_2/0_Rucina_0_416_0_2_2_2_2

New Line.l(r:p2udt4872lv-p2ulv18798) Units=km Length=0.0155691 bus1=p2udt4872lv.1.2 bus2=p2ulv18798.1.2 switch=n enabled=y phases=2 Linecode=1P_OH_AL_2/0_Rucina_0_416_0_2_2_2_2

New Line.l(r:p2udm15962-p2ulv10772) Units=km Length=0.0142166 bus1=p2udm15962.1.2 bus2=p2ulv10772.1.2 switch=n enabled=y phases=2 Linecode=1P_OH_AL_2/0_Rucina_0_416_0_2_2_2_2

New Line.l(r:p2udm15962-p2ulv23768) Units=km Length=0.0133005 bus1=p2udm15962.1.2 bus2=p2ulv23768.1.2 switch=n enabled=y phases=2 Linecode=1P_OH_AL_2/0_Rucina_0_416_0_2_2_2_2

New Line.l(r:p2udm15962-p2udt4872lv) Units=km Length=0.013917 bus1=p2udt4872lv.1.2 bus2=p2udm15962.1.2 switch=n enabled=y phases=2 Linecode=1P_OH_AL_2/0_Rucina_0_416_0_2_2_2_2

New Line.l(r:p2udm15964-p2ulv20184) Units=km Length=0.0133615 bus1=p2udm15964.1.2 bus2=p2ulv20184.1.2 switch=n enabled=y phases=2 Linecode=1P_OH_AL_2/0_Rucina_0_416_0_2_2_2_2

New Line.l(r:p2udm15964-p2ulv23769) Units=km Length=0.015183 bus1=p2udm15964.1.2 bus2=p2ulv23769.1.2 switch=n enabled=y phases=2 Linecode=1P_OH_AL_2/0_Rucina_0_416_0_2_2_2_2

New Line.l(r:p2udm15964-p2udt4872lv) Units=km Length=0.0139166 bus1=p2udt4872lv.1.2 bus2=p2udm15964.1.2 switch=n enabled=y phases=2 Linecode=1P_OH_AL_2/0_Rucina_0_416_0_2_2_2_2

New Line.l(r:p2udt5167lv-p2ulv7944) Units=km Length=0.001 bus1=p2udt5167lv.1.2 bus2=p2ulv7944.1.2 switch=n enabled=y phases=2 Linecode=1P_OH_AL_4_Periwinkle_0_416_0_2_2_2_2

New Line.l(r:p2udt5486lv-p2ulv8819) Units=km Length=0.001 bus1=p2udt5486lv.1.2 bus2=p2ulv8819.1.2 switch=n enabled=y phases=2 Linecode=1P_OH_AL_4_Periwinkle_0_416_0_2_2_2_2

New Line.l(r:p2udt5785lv-p2ulv9572) Units=km Length=0.0156973 bus1=p2udt5785lv.1.2 bus2=p2ulv9572.1.2 switch=n enabled=y phases=2 Linecode=1P_OH_AL_2/0_Rucina_0_416_0_2_2_2_2

New Line.l(r:p2udt5785lv-p2ulv14466) Units=km Length=0.0133866 bus1=p2udt5785lv.1.2 bus2=p2ulv14466.1.2 switch=n enabled=y phases=2 Linecode=1P_OH_AL_2/0_Rucina_0_416_0_2_2_2_2

New Line.l(r:p2udt5786lv-p2ulv9573) Units=km Length=0.001 bus1=p2udt5786lv.1.2 bus2=p2ulv9573.1.2 switch=n enabled=y phases=2 Linecode=1P_OH_AL_4_Periwinkle_0_416_0_2_2_2_2

New Line.l(r:p2udt5849lv-p2ulv9757) Units=km Length=0.0316912 bus1=p2udt5849lv.1.2 bus2=p2ulv9757.1.2 switch=n enabled=y phases=2 Linecode=1P_OH_AL_4/0_Zuzara_0_416_0_2_2_2_2

New Line.l(r:p2udt5849lv-p2ulv9990) Units=km Length=0.0316912 bus1=p2udt5849lv.1.2 bus2=p2ulv9990.1.2 switch=n enabled=y phases=2 Linecode=1P_OH_AL_4/0_Zuzara_0_416_0_2_2_2_2

New Line.l(r:p2udm18448-p2ulv9794) Units=km Length=0.013534 bus1=p2udm18448.1.2 bus2=p2ulv9794.1.2 switch=n enabled=y phases=2 Linecode=1P_OH_AL_2/0_Rucina_0_416_0_2_2_2_2

New Line.l(r:p2udm18448-p2ulv19964) Units=km Length=0.012773200000000002 bus1=p2udm18448.1.2 bus2=p2ulv19964.1.2 switch=n enabled=y phases=2 Linecode=1P_OH_AL_2/0_Rucina_0_416_0_2_2_2_2

New Line.l(r:p2udm18448-p2udt5862lv) Units=km Length=0.0187718 bus1=p2udt5862lv.1.2 bus2=p2udm18448.1.2 switch=n enabled=y phases=2 Linecode=1P_OH_AL_2/0_Rucina_0_416_0_2_2_2_2

New Line.l(r:p2udm18449-p2ulv12174) Units=km Length=0.013737900000000003 bus1=p2udm18449.1.2 bus2=p2ulv12174.1.2 switch=n enabled=y phases=2 Linecode=1P_OH_AL_2/0_Rucina_0_416_0_2_2_2_2

New Line.l(r:p2udm18449-p2udt5862lv) Units=km Length=0.0343278 bus1=p2udt5862lv.1.2 bus2=p2udm18449.1.2 switch=n enabled=y phases=2 Linecode=1P_OH_AL_4/0_Zuzara_0_416_0_2_2_2_2

New Line.l(r:p2udt5953lv-p2ulv10030) Units=km Length=0.0121819 bus1=p2udt5953lv.1.2 bus2=p2ulv10030.1.2 switch=n enabled=y phases=2 Linecode=1P_OH_AL_2/0_Rucina_0_416_0_2_2_2_2

New Line.l(r:p2udm18650-p2ulv18799) Units=km Length=0.0231918 bus1=p2udm18650.1.2 bus2=p2ulv18799.1.2 switch=n enabled=y phases=2 Linecode=1P_OH_AL_2/0_Rucina_0_416_0_2_2_2_2

New Line.l(r:p2udm18650-p2udt5953lv) Units=km Length=0.0582917 bus1=p2udt5953lv.1.2 bus2=p2udm18650.1.2 switch=n enabled=y phases=2 Linecode=1P_OH_AL_4/0_Zuzara_0_416_0_2_2_2_2

New Line.l(r:p2udt6023lv-p2ulv10228) Units=km Length=0.001 bus1=p2udt6023lv.1.2 bus2=p2ulv10228.1.2 switch=n enabled=y phases=2 Linecode=1P_OH_AL_4_Periwinkle_0_416_0_2_2_2_2

New Line.l(r:p2udt6340lv-p2ulv11201) Units=km Length=0.0629375 bus1=p2udt6340lv.1.2 bus2=p2ulv11201.1.2 switch=n enabled=y phases=2 Linecode=1P_OH_AL_4/0_Zuzara_0_416_0_2_2_2_2

New Line.l(r:p2udt6340lv-p2ulv19934) Units=km Length=0.0629375 bus1=p2udt6340lv.1.2 bus2=p2ulv19934.1.2 switch=n enabled=y phases=2 Linecode=1P_OH_AL_4/0_Zuzara_0_416_0_2_2_2_2

New Line.l(r:p2udt6394lv-p2ulv11441) Units=km Length=0.084787 bus1=p2udt6394lv.1.2 bus2=p2ulv11441.1.2 switch=n enabled=y phases=2 Linecode=1P_OH_AL_4/0_Zuzara_0_416_0_2_2_2_2

New Line.l(r:p2udt6681lv-p2ulv12406) Units=km Length=0.0258184 bus1=p2udt6681lv.1.2 bus2=p2ulv12406.1.2 switch=n enabled=y phases=2 Linecode=1P_OH_AL_2/0_Rucina_0_416_0_2_2_2_2

New Line.l(r:p2udt6742lv-p2ulv12661) Units=km Length=0.001 bus1=p2udt6742lv.1.2 bus2=p2ulv12661.1.2 switch=n enabled=y phases=2 Linecode=1P_OH_AL_4_Periwinkle_0_416_0_2_2_2_2

New Line.l(r:p2udt7264lv-p2ulv14722) Units=km Length=0.0147361 bus1=p2udt7264lv.1.2 bus2=p2ulv14722.1.2 switch=n enabled=y phases=2 Linecode=1P_OH_AL_2/0_Rucina_0_416_0_2_2_2_2

New Line.l(r:p2udt7264lv-p2ulv21750) Units=km Length=0.0123873 bus1=p2udt7264lv.1.2 bus2=p2ulv21750.1.2 switch=n enabled=y phases=2 Linecode=1P_OH_AL_2/0_Rucina_0_416_0_2_2_2_2

New Line.l(r:p2udm21410-p2ulv15120) Units=km Length=0.00325523 bus1=p2udm21410.1.2 bus2=p2ulv15120.1.2 switch=n enabled=y phases=2 Linecode=1P_OH_AL_4_Periwinkle_0_416_0_2_2_2_2

New Line.l(r:p2udm21410-p2udt7353lv) Units=km Length=0.0135241 bus1=p2udt7353lv.1.2 bus2=p2udm21410.1.2 switch=n enabled=y phases=2 Linecode=1P_OH_AL_2/0_Rucina_0_416_0_2_2_2_2

New Line.l(r:p2udm21411-p2ulv18093) Units=km Length=0.00802247 bus1=p2udm21411.1.2 bus2=p2ulv18093.1.2 switch=n enabled=y phases=2 Linecode=1P_OH_AL_2/0_Rucina_0_416_0_2_2_2_2

New Line.l(r:p2udm21411-p2udt7353lv) Units=km Length=0.0343573 bus1=p2udt7353lv.1.2 bus2=p2udm21411.1.2 switch=n enabled=y phases=2 Linecode=1P_OH_AL_4/0_Zuzara_0_416_0_2_2_2_2

New Line.l(r:p2udt7567lv-p2ulv16087) Units=km Length=0.00489662 bus1=p2udt7567lv.1.2 bus2=p2ulv16087.1.2 switch=n enabled=y phases=2 Linecode=1P_OH_AL_2/0_Rucina_0_416_0_2_2_2_2

New Line.l(r:p2udt7979lv-p2ulv18148) Units=km Length=0.014542100000000002 bus1=p2udt7979lv.1.2 bus2=p2ulv18148.1.2 switch=n enabled=y phases=2 Linecode=1P_OH_AL_2/0_Rucina_0_416_0_2_2_2_2

New Line.l(r:p2udt8059lv-p2ulv18593) Units=km Length=0.0153163 bus1=p2udt8059lv.1.2 bus2=p2ulv18593.1.2 switch=n enabled=y phases=2 Linecode=1P_OH_AL_2/0_Rucina_0_416_0_2_2_2_2

New Line.l(r:p2udt8097lv-p2ulv18763) Units=km Length=0.001 bus1=p2udt8097lv.1.2 bus2=p2ulv18763.1.2 switch=n enabled=y phases=2 Linecode=1P_OH_AL_4_Periwinkle_0_416_0_2_2_2_2

New Line.l(r:p2udt8449lv-p2ulv20815) Units=km Length=0.00821517 bus1=p2udt8449lv.1.2 bus2=p2ulv20815.1.2 switch=n enabled=y phases=2 Linecode=1P_OH_AL_2/0_Rucina_0_416_0_2_2_2_2

New Line.l(r:p2udt8648lv-p2ulv21985) Units=km Length=0.001 bus1=p2udt8648lv.1.2 bus2=p2ulv21985.1.2 switch=n enabled=y phases=2 Linecode=1P_OH_AL_4_Periwinkle_0_416_0_2_2_2_2

New Line.l(r:p2udt8889lv-p2ulv23730) Units=km Length=0.001 bus1=p2udt8889lv.1.2 bus2=p2ulv23730.1.2 switch=n enabled=y phases=2 Linecode=1P_OH_AL_4_Periwinkle_0_416_0_2_2_2_2

New Line.l(r:p2udt3868-p2udt4535)_s0 Units=km Length=0.08538240000000001 bus1=p2udt4535.3 bus2=p2udt3868-p2udt4535x.3 switch=n enabled=y phases=1 Linecode=1P_OH_AL_ACSR_#2_Sparrow_12_47_0_1_1_1_1

New Line.l(r:p2udt3868-p2udt4535)_s1 Units=km Length=0.058272500000000005 bus1=p2udt3868-p2udt4535x.3 bus2=p2udt3868.3 switch=n enabled=y phases=1 Linecode=1P_OH_AL_ACSR_#2_Sparrow_12_47_0_1_1_1_1

New Line.l(r:p2udt2863-p2udt4273) Units=km Length=0.05377130000000001 bus1=p2udt2863.3 bus2=p2udt4273.3 switch=n enabled=y phases=1 Linecode=1P_OH_AL_ACSR_#2_Sparrow_12_47_0_1_1_1_1

New Line.l(r:p2udt2863-p2udt6023) Units=km Length=0.12319 bus1=p2udt6023.3 bus2=p2udt2863.3 switch=n enabled=y phases=1 Linecode=1P_OH_AL_ACSR_#2_Sparrow_12_47_0_1_1_1_1

New Line.l(r:p2udt4535-p2udt6023)_s0 Units=km Length=0.12194400000000001 bus1=p2udt4535.3 bus2=p2udt4535-p2udt6023x.3 switch=n enabled=y phases=1 Linecode=1P_OH_AL_ACSR_#2_Sparrow_12_47_0_1_1_1_1

New Line.l(r:p2udt4535-p2udt6023)_s1 Units=km Length=0.0338668 bus1=p2udt4535-p2udt6023x.3 bus2=p2udt6023.3 switch=n enabled=y phases=1 Linecode=1P_OH_AL_ACSR_#2_Sparrow_12_47_0_1_1_1_1

New Line.l(r:p2udt2226-p2udt4535) Units=km Length=0.350994 bus1=p2udt2226.3 bus2=p2udt4535.3 switch=n enabled=y phases=1 Linecode=1P_OH_AL_ACSR_#2_Sparrow_12_47_0_1_1_1_1

New Line.l(r:p2udt2226-p2udt5486) Units=km Length=0.194048 bus1=p2udt2226.3 bus2=p2udt5486.3 switch=n enabled=y phases=1 Linecode=1P_OH_AL_ACSR_#2_Sparrow_12_47_0_1_1_1_1

New Line.l(r:p2udt2226-p2udt4272) Units=km Length=0.184121 bus1=p2udt4272.3 bus2=p2udt2226.3 switch=n enabled=y phases=1 Linecode=1P_OH_AL_ACSR_#2_Sparrow_12_47_0_1_1_1_1

New Line.l(r:p2udt4272-p2udt5167) Units=km Length=0.160157 bus1=p2udt4272.3 bus2=p2udt5167.3 switch=n enabled=y phases=1 Linecode=1P_OH_AL_ACSR_#2_Sparrow_12_47_0_1_1_1_1

New Line.l(r:p2udt4272-p2udt5849)_s0 Units=km Length=0.110891 bus1=p2udt5849.3 bus2=p2udt4272-p2udt5849x.3 switch=n enabled=y phases=1 Linecode=1P_OH_AL_ACSR_#2_Sparrow_12_47_0_1_1_1_1

New Line.l(r:p2udt4272-p2udt5849)_s1 Units=km Length=0.0653449 bus1=p2udt4272-p2udt5849x.3 bus2=p2udt4272.3 switch=n enabled=y phases=1 Linecode=1P_OH_AL_ACSR_#2_Sparrow_12_47_0_1_1_1_1

New Line.l(r:p2udt5849-p2udt6340) Units=km Length=0.0535409 bus1=p2udt6340.3 bus2=p2udt5849.3 switch=n enabled=y phases=1 Linecode=1P_OH_AL_ACSR_#2_Sparrow_12_47_0_1_1_1_1

New Line.l(r:p2udt4740-p2udt6340) Units=km Length=0.0977473 bus1=p2udt4740-p2udt6340x.3 bus2=p2udt6340.3 switch=n enabled=y phases=1 Linecode=1P_OH_AL_ACSR_#2_Sparrow_12_47_0_1_1_1_1

New Line.l(r:p2udt1845-p2udt192)_s0 Units=km Length=0.18878 bus1=p2udt1845.1 bus2=p2udt1845-p2udt192x.1 switch=n enabled=y phases=1 Linecode=1P_OH_AL_ACSR_#2_Sparrow_12_47_0_1_1_1_1

New Line.l(r:p2udt1845-p2udt192)_s1 Units=km Length=0.280067 bus1=p2udt1845-p2udt192x.1 bus2=p2udt192.1 switch=n enabled=y phases=1 Linecode=1P_OH_AL_ACSR_#2_Sparrow_12_47_0_1_1_1_1

New Line.l(r:p2udt1845-p2udt8097) Units=km Length=0.0771759 bus1=p2udt8097.1 bus2=p2udt1845.1 switch=n enabled=y phases=1 Linecode=1P_OH_AL_ACSR_#2_Sparrow_12_47_0_1_1_1_1

New Line.l(r:p2udt2410-p2udt8097)_s0 Units=km Length=0.188938 bus1=p2udt2410.1 bus2=p2udt2410-p2udt8097x.1 switch=n enabled=y phases=1 Linecode=1P_OH_AL_ACSR_#2_Sparrow_12_47_0_1_1_1_1

New Line.l(r:p2udt2410-p2udt8097)_s1 Units=km Length=0.019649100000000003 bus1=p2udt2410-p2udt8097x.1 bus2=p2udt8097.1 switch=n enabled=y phases=1 Linecode=1P_OH_AL_ACSR_#2_Sparrow_12_47_0_1_1_1_1

New Line.l(r:p2udt2410-p2udt4534) Units=km Length=0.295832 bus1=p2udt4534.1 bus2=p2udt2410.1 switch=n enabled=y phases=1 Linecode=1P_OH_AL_ACSR_#2_Sparrow_12_47_0_1_1_1_1

New Line.l(r:p2udt4534-p2udt5786)_s0 Units=km Length=0.146371 bus1=p2udt4534.1 bus2=p2udt4534-p2udt5786x.1 switch=n enabled=y phases=1 Linecode=1P_OH_AL_ACSR_#2_Sparrow_12_47_0_1_1_1_1

New Line.l(r:p2udt4534-p2udt5786)_s1 Units=km Length=1.93849 bus1=p2udt4534-p2udt5786x.1 bus2=p2udt5786.1 switch=n enabled=y phases=1 Linecode=1P_OH_AL_ACSR_#2_Sparrow_12_47_0_1_1_1_1

New Line.l(r:p2udt2041-p2udt4534)_s0 Units=km Length=0.192632 bus1=p2udt2041-p2udt4534x.1 bus2=p2udt2041-p2udt4534xx.1 switch=n enabled=y phases=1 Linecode=1P_OH_AL_ACSR_#2_Sparrow_12_47_0_1_1_1_1

New Line.l(r:p2udt2041-p2udt4534)_s1 Units=km Length=0.026142 bus1=p2udt2041-p2udt4534xx.1 bus2=p2udt4534.1 switch=n enabled=y phases=1 Linecode=1P_OH_AL_ACSR_#2_Sparrow_12_47_0_1_1_1_1

New Line.l(r:p2udt1088-p2udt1305) Units=km Length=0.0177984 bus1=p2udt1088.1 bus2=p2udt1305.1 switch=n enabled=y phases=1 Linecode=1P_OH_AL_ACSR_#2_Sparrow_12_47_0_1_1_1_1

New Line.l(r:p2udt1088-p2udt7264) Units=km Length=0.06889350000000001 bus1=p2udt7264.1 bus2=p2udt1088.1 switch=n enabled=y phases=1 Linecode=1P_OH_AL_ACSR_#2_Sparrow_12_47_0_1_1_1_1

New Line.l(r:p2udt3492-p2udt7264) Units=km Length=0.0333238 bus1=p2udt3492.1 bus2=p2udt7264.1 switch=n enabled=y phases=1 Linecode=1P_OH_AL_ACSR_#2_Sparrow_12_47_0_1_1_1_1

New Line.l(r:p2udt1089-p2udt3492) Units=km Length=0.07532290000000001 bus1=p2udt1089.1 bus2=p2udt3492.1 switch=n enabled=y phases=1 Linecode=1P_OH_AL_ACSR_#2_Sparrow_12_47_0_1_1_1_1

New Line.l(r:p2udt1089-p2udt5953) Units=km Length=0.135034 bus1=p2udt1089-p2udt5953x.1 bus2=p2udt1089.1 switch=n enabled=y phases=1 Linecode=1P_OH_AL_ACSR_#2_Sparrow_12_47_0_1_1_1_1

New Line.l(r:p2udt2891-p2udt5862) Units=km Length=0.11297 bus1=p2udt2891-p2udt5862x.2 bus2=p2udt2891.2 switch=n enabled=y phases=1 Linecode=1P_OH_AL_ACSR_#2_Sparrow_12_47_0_1_1_1_1

New Line.l(r:p2udt1087-p2udt4427) Units=km Length=0.0202609 bus1=p2udt4427.3 bus2=p2udt1087.3 switch=n enabled=y phases=1 Linecode=1P_OH_AL_ACSR_#2_Sparrow_12_47_0_1_1_1_1

New Line.l(r:p2udt3198-p2udt4427) Units=km Length=0.0372092 bus1=p2udt3198.3 bus2=p2udt4427.3 switch=n enabled=y phases=1 Linecode=1P_OH_AL_ACSR_#2_Sparrow_12_47_0_1_1_1_1

New Line.l(r:p2udt3198-p2udt5785) Units=km Length=0.0188274 bus1=p2udt5785.3 bus2=p2udt3198.3 switch=n enabled=y phases=1 Linecode=1P_OH_AL_ACSR_#2_Sparrow_12_47_0_1_1_1_1

New Line.l(r:p2udt4872-p2udt5785) Units=km Length=0.032743 bus1=p2udt4872.3 bus2=p2udt5785.3 switch=n enabled=y phases=1 Linecode=1P_OH_AL_ACSR_#2_Sparrow_12_47_0_1_1_1_1

New Line.l(r:p2udt4548-p2udt4872) Units=km Length=0.0423003 bus1=p2udt4548-p2udt4872x.3 bus2=p2udt4872.3 switch=n enabled=y phases=1 Linecode=1P_OH_AL_ACSR_#2_Sparrow_12_47_0_1_1_1_1

New Line.l(r:p2udt4522-p2udt5152) Units=km Length=0.169176 bus1=p2udt4522-p2udt5152x.2 bus2=p2udt4522.2 switch=n enabled=y phases=1 Linecode=1P_OH_AL_ACSR_#2_Sparrow_12_47_0_1_1_1_1

New Line.l(r:p2udt5152-p2udt7353) Units=km Length=0.0542617 bus1=p2udt5152-p2udt7353x.1 bus2=p2udt7353.1 switch=n enabled=y phases=1 Linecode=1P_OH_AL_ACSR_#2_Sparrow_12_47_0_1_1_1_1

New Line.l(r:p2udt2742-p2udt7979) Units=km Length=0.1032 bus1=p2udt2742-p2udt7979x.2 bus2=p2udt7979.2 switch=n enabled=y phases=1 Linecode=1P_OH_AL_ACSR_#2_Sparrow_12_47_0_1_1_1_1

New Line.l(r:p2udt3339-p2udt6742) Units=km Length=0.12167100000000002 bus1=p2udt3339-p2udt6742x.2 bus2=p2udt6742.2 switch=n enabled=y phases=1 Linecode=1P_OH_AL_ACSR_#2_Sparrow_12_47_0_1_1_1_1

New Line.l(r:p2udt3339-p2udt8648) Units=km Length=0.308472 bus1=p2udt3339-p2udt8648x.2 bus2=p2udt8648.2 switch=n enabled=y phases=1 Linecode=1P_OH_AL_ACSR_#2_Sparrow_12_47_0_1_1_1_1

New Line.l(r:p2udt1056-p2udt1266) Units=km Length=0.0586367 bus1=p2udt1056.2 bus2=p2udt1266.2 switch=n enabled=y phases=1 Linecode=1P_OH_AL_ACSR_#2_Sparrow_12_47_0_1_1_1_1

New Line.l(r:p2udt1056-p2udt8449) Units=km Length=0.0586503 bus1=p2udt8449.2 bus2=p2udt1056.2 switch=n enabled=y phases=1 Linecode=1P_OH_AL_ACSR_#2_Sparrow_12_47_0_1_1_1_1

New Line.l(r:p2udt168-p2udt8449) Units=km Length=0.0586415 bus1=p2udt168.2 bus2=p2udt8449.2 switch=n enabled=y phases=1 Linecode=1P_OH_AL_ACSR_#2_Sparrow_12_47_0_1_1_1_1

New Line.l(r:p2udt168-p2udt8059) Units=km Length=0.07819 bus1=p2udt8059.2 bus2=p2udt168.2 switch=n enabled=y phases=1 Linecode=1P_OH_AL_ACSR_#2_Sparrow_12_47_0_1_1_1_1

New Line.l(r:p2udt3627-p2udt8059) Units=km Length=0.077644 bus1=p2udt3627-p2udt8059x.2 bus2=p2udt8059.2 switch=n enabled=y phases=1 Linecode=1P_OH_AL_ACSR_#2_Sparrow_12_47_0_1_1_1_1

New Line.l(r:p2udt2864-p2udt3171)_s0 Units=km Length=0.222548 bus1=p2udt2864-p2udt3171xx.2 bus2=p2udt2864-p2udt3171x.2 switch=n enabled=y phases=1 Linecode=1P_OH_AL_ACSR_#2_Sparrow_12_47_0_1_1_1_1

New Line.l(r:p2udt2864-p2udt3171)_s1 Units=km Length=0.284855 bus1=p2udt2864-p2udt3171x.2 bus2=p2udt2864.2 switch=n enabled=y phases=1 Linecode=1P_OH_AL_ACSR_#2_Sparrow_12_47_0_1_1_1_1

New Line.l(r:p2udt4739-p2udt6394) Units=km Length=0.0575839 bus1=p2udt4739-p2udt6394x.3 bus2=p2udt4739.3 switch=n enabled=y phases=1 Linecode=1P_OH_AL_ACSR_#2_Sparrow_12_47_0_1_1_1_1

New Line.l(r:p2udt4548-p2udt5862) Units=km Length=0.0944455 bus1=p2udt5862.1.2.3 bus2=p2udt4548.1.2.3 switch=n enabled=y phases=3 Linecode=3P_OH_AL_ACSR_4/0_Penguin_12_47_0_3_3_3_3

New Line.l(r:p2udt2742-p2udt5862) Units=km Length=0.0541682 bus1=p2udt2742.1.2.3 bus2=p2udt5862.1.2.3 switch=n enabled=y phases=3 Linecode=3P_OH_AL_ACSR_4/0_Penguin_12_47_0_3_3_3_3

New Line.l(r:p2udt2742-p2udt5953) Units=km Length=0.0953269 bus1=p2udt5953.1.2.3 bus2=p2udt2742.1.2.3 switch=n enabled=y phases=3 Linecode=3P_OH_AL_ACSR_4/0_Penguin_12_47_0_3_3_3_3

New Line.l(r:p2udt5953-p2udt6681) Units=km Length=0.08192300000000001 bus1=p2udt6681.1.2.3 bus2=p2udt6681_b1_1.1.2.3 switch=n enabled=y phases=3 Linecode=3P_OH_AL_ACSR_4/0_Penguin_12_47_0_3_3_3_3

New Line.l(r:p2udt3339-p2udt6681) Units=km Length=0.145487 bus1=p2udt3339.1.2.3 bus2=p2udt6681.1.2.3 switch=n enabled=y phases=3 Linecode=3P_OH_AL_ACSR_4/0_Penguin_12_47_0_3_3_3_3

New Line.l(r:p2udt3339-p2udt3627) Units=km Length=0.224153 bus1=p2udt3627.1.2.3 bus2=p2udt3339.1.2.3 switch=n enabled=y phases=3 Linecode=3P_OH_AL_ACSR_4/0_Penguin_12_47_0_3_3_3_3

New Line.l(r:p2udt3627-p2udt4643) Units=km Length=0.134823 bus1=p2udt4643.1.2.3 bus2=p2udt3627.1.2.3 switch=n enabled=y phases=3 Linecode=3P_OH_AL_ACSR_4/0_Penguin_12_47_0_3_3_3_3

New Line.l(r:p2udt4643-p2udt8889)_s0 Units=km Length=0.0707055 bus1=p2udt8889.1.2.3 bus2=p2udt4643-p2udt8889x.1.2.3 switch=n enabled=y phases=3 Linecode=3P_OH_AL_ACSR_4/0_Penguin_12_47_0_3_3_3_3

New Line.l(r:p2udt4643-p2udt8889)_s1 Units=km Length=0.0352849 bus1=p2udt4643-p2udt8889x.1.2.3 bus2=p2udt4643.1.2.3 switch=n enabled=y phases=3 Linecode=3P_OH_AL_ACSR_4/0_Penguin_12_47_0_3_3_3_3

New Line.l(r:p2udt2041-p2udt8889) Units=km Length=1.94891 bus1=p2udt2041.1.2.3 bus2=p2udt8889.1.2.3 switch=n enabled=y phases=3 Linecode=3P_OH_AL_ACSR_4/0_Penguin_12_47_0_3_3_3_3

New Line.l(r:p2udt2041-p2udt3171) Units=km Length=0.247862 bus1=p2udt3171.1.2.3 bus2=p2udt3171_b1_1.1.2.3 switch=n enabled=y phases=3 Linecode=3P_OH_AL_ACSR_4/0_Penguin_12_47_0_3_3_3_3

New Line.l(r:p2udt3171-p2udt3867) Units=km Length=0.113578 bus1=p2udt3867.1.2.3 bus2=p2udt3171.1.2.3 switch=n enabled=y phases=3 Linecode=3P_OH_AL_ACSR_4/0_Penguin_12_47_0_3_3_3_3

New Line.l(r:p2udt3867-p2udt6394)_s0 Units=km Length=0.0993918 bus1=p2udt6394.1.2.3 bus2=p2udt3867-p2udt6394x.1.2.3 switch=n enabled=y phases=3 Linecode=3P_OH_AL_ACSR_4/0_Penguin_12_47_0_3_3_3_3

New Line.l(r:p2udt3867-p2udt6394)_s1 Units=km Length=0.07763800000000001 bus1=p2udt3867-p2udt6394x.1.2.3 bus2=p2udt3867.1.2.3 switch=n enabled=y phases=3 Linecode=3P_OH_AL_ACSR_4/0_Penguin_12_47_0_3_3_3_3

New Line.l(r:p2udt4644-p2udt6394) Units=km Length=0.0184326 bus1=p2udt4644.1.2.3 bus2=p2udt6394.1.2.3 switch=n enabled=y phases=3 Linecode=3P_OH_AL_ACSR_4/0_Penguin_12_47_0_3_3_3_3

New Line.l(r:p2udt4644-p2udt8605) Units=km Length=0.0676631 bus1=p2udt8605.1.2.3 bus2=p2udt4644.1.2.3 switch=n enabled=y phases=3 Linecode=3P_OH_AL_ACSR_4/0_Penguin_12_47_0_3_3_3_3

New Line.l(r:p2udt4740-p2udt8605)_s0 Units=km Length=0.104343 bus1=p2udt4740.1.2.3 bus2=p2udt4740-p2udt8605x.1.2.3 switch=n enabled=y phases=3 Linecode=3P_OH_AL_ACSR_4/0_Penguin_12_47_0_3_3_3_3

New Line.l(r:p2udt4740-p2udt8605)_s1 Units=km Length=0.0796708 bus1=p2udt4740-p2udt8605x.1.2.3 bus2=p2udt8605.1.2.3 switch=n enabled=y phases=3 Linecode=3P_OH_AL_ACSR_4/0_Penguin_12_47_0_3_3_3_3

New Line.l(r:p2udt4740-p2uhs1_1247) Units=km Length=0.18572200000000003 bus1=p2udt4740-p2uhs1_1247x.1.2.3 bus2=p2udt4740.1.2.3 switch=n enabled=y phases=3 Linecode=3P_OH_AL_ACSR_4/0_Penguin_12_47_0_3_3_3_3

New Line.l(r:p2udt8605lv-p2ulv21709) Units=km Length=0.0369923 bus1=p2udt8605lv.1.2.3 bus2=p2ulv21709.1.2.3 switch=n enabled=y phases=3 Linecode=3P_UG_AL_350kcmil_15_0_416_0_3_3_3_3

New Line.l(r:p2udt5152lv-p2ulv7923) Units=km Length=0.00942739 bus1=p2udt5152lv.1.2.3 bus2=p2ulv7923.1.2.3 switch=n enabled=y phases=3 Linecode=3P_UG_AL_350kcmil_15_0_416_0_3_3_3_3

New Line.l(r:p2udt8225lv-p2ulv19516) Units=km Length=0.006746750000000001 bus1=p2udt8225lv.1.2.3 bus2=p2ulv19516.1.2.3 switch=n enabled=y phases=3 Linecode=3P_UG_AL_750kcmil_25_0_416_0_3_3_3_3

New Line.l(r:p2udt5152-p2udt8225) Units=km Length=0.51399 bus1=p2udt5152.1.2.3 bus2=p2udt8225.1.2.3 switch=n enabled=y phases=3 Linecode=3P_OH_AL_ACSR_4/0_Penguin_12_47_0_3_3_3_3

New Line.l(r:p2udt5152-p2udt7567) Units=km Length=0.6353200000000001 bus1=p2udt7567.1.2.3 bus2=p2udt5152.1.2.3 switch=n enabled=y phases=3 Linecode=3P_OH_AL_ACSR_4/0_Penguin_12_47_0_3_3_3_3

New Line.l(r:p2udt4548-p2udt7567) Units=km Length=0.200015 bus1=p2udt4548.1.2.3 bus2=p2udt4548_b1_1.1.2.3 switch=n enabled=y phases=3 Linecode=3P_OH_AL_ACSR_4/0_Penguin_12_47_0_3_3_3_3

New Line.l(r:p2udt3045lv-p2ulv3843) Units=km Length=0.0128844 bus1=p2udt3045lv.1.2.3 bus2=p2ulv3843.1.2.3 switch=n enabled=y phases=3 Linecode=3P_UG_AL_350kcmil_15_0_416_0_3_3_3_3

New Line.l(r:p2udt3045-p2udt5953) Units=km Length=0.582995 bus1=p2udt5953.1.2.3 bus2=p2udt3045.1.2.3 switch=n enabled=y phases=3 Linecode=3P_OH_AL_ACSR_4/0_Penguin_12_47_0_3_3_3_3

New Line.l(r:p2udt7567-p2udt8840) Units=km Length=0.48767000000000005 bus1=p2udt7567-p2udt8840x.1.2.3 bus2=p2udt7567-p2udt8840x_b1_1.1.2.3 switch=n enabled=y phases=3 Linecode=3P_OH_AL_ACSR_1033kcmil_Curlew_12.47_1_3_3_3_3

New Line.elbswitch(r:p2udt7567-p2udt8840)p2u_45495 Units=km Length=0.001 bus1=p2udt7567.1.2.3 bus2=p2udt7567-p2udt8840x.1.2.3 switch=y enabled=n phases=3 Linecode=elbswitch_3_3_3_3

New Line.fuse(r:p2udt2041-p2udt4534)p2u_45704 Units=km Length=0.001 bus1=p2udt2041.1 bus2=p2udt2041-p2udt4534x.1 switch=n enabled=y phases=1 Linecode=fuse_1_1_1_1

New Fuse.Fuse_fuse(r:p2udt2041-p2udt4534)p2u_45704 monitoredobj=Line.fuse(r:p2udt2041-p2udt4534)p2u_45704 enabled=y ratedcurrent=100.0

New Line.fuse(r:p2udt2742-p2udt7979)p2u_45781 Units=km Length=0.001 bus1=p2udt2742.2 bus2=p2udt2742-p2udt7979x.2 switch=n enabled=y phases=1 Linecode=fuse_1_1_1_1

New Fuse.Fuse_fuse(r:p2udt2742-p2udt7979)p2u_45781 monitoredobj=Line.fuse(r:p2udt2742-p2udt7979)p2u_45781 enabled=y ratedcurrent=100.0

New Line.fuse(r:p2udt2864-p2udt3171)p2u_45827 Units=km Length=0.001 bus1=p2udt3171.2 bus2=p2udt2864-p2udt3171xx.2 switch=n enabled=y phases=1 Linecode=fuse_1_1_1_1

New Fuse.Fuse_fuse(r:p2udt2864-p2udt3171)p2u_45827 monitoredobj=Line.fuse(r:p2udt2864-p2udt3171)p2u_45827 enabled=y ratedcurrent=100.0

New Line.fuse(r:p2udt3339-p2udt6742)p2u_45852 Units=km Length=0.001 bus1=p2udt3339.2 bus2=p2udt3339-p2udt6742x.2 switch=n enabled=y phases=1 Linecode=fuse_1_1_1_1

New Fuse.Fuse_fuse(r:p2udt3339-p2udt6742)p2u_45852 monitoredobj=Line.fuse(r:p2udt3339-p2udt6742)p2u_45852 enabled=y ratedcurrent=100.0

New Line.fuse(r:p2udt3339-p2udt8648)p2u_45853 Units=km Length=0.001 bus1=p2udt3339.2 bus2=p2udt3339-p2udt8648x.2 switch=n enabled=y phases=1 Linecode=fuse_1_1_1_1

New Fuse.Fuse_fuse(r:p2udt3339-p2udt8648)p2u_45853 monitoredobj=Line.fuse(r:p2udt3339-p2udt8648)p2u_45853 enabled=y ratedcurrent=100.0

New Line.fuse(r:p2udt3627-p2udt8059)p2u_45882 Units=km Length=0.001 bus1=p2udt3627.2 bus2=p2udt3627-p2udt8059x.2 switch=n enabled=y phases=1 Linecode=fuse_1_1_1_1

New Fuse.Fuse_fuse(r:p2udt3627-p2udt8059)p2u_45882 monitoredobj=Line.fuse(r:p2udt3627-p2udt8059)p2u_45882 enabled=y ratedcurrent=100.0

New Line.fuse(r:p2udt4548-p2udt4872)p2u_45980 Units=km Length=0.001 bus1=p2udt4548.3 bus2=p2udt4548-p2udt4872x.3 switch=n enabled=y phases=1 Linecode=fuse_1_6_1_1_1

New Fuse.Fuse_fuse(r:p2udt4548-p2udt4872)p2u_45980 monitoredobj=Line.fuse(r:p2udt4548-p2udt4872)p2u_45980 enabled=y ratedcurrent=100.0

New Line.fuse(r:p2udt4740-p2udt6340)p2u_46000 Units=km Length=0.001 bus1=p2udt4740.3 bus2=p2udt4740-p2udt6340x.3 switch=n enabled=y phases=1 Linecode=fuse_1_1_1_1

New Fuse.Fuse_fuse(r:p2udt4740-p2udt6340)p2u_46000 monitoredobj=Line.fuse(r:p2udt4740-p2udt6340)p2u_46000 enabled=y ratedcurrent=100.0

New Line.fuse(r:p2udt4522-p2udt5152)p2u_46049 Units=km Length=0.001 bus1=p2udt5152.2 bus2=p2udt4522-p2udt5152x.2 switch=n enabled=y phases=1 Linecode=fuse_1_1_1_1

New Fuse.Fuse_fuse(r:p2udt4522-p2udt5152)p2u_46049 monitoredobj=Line.fuse(r:p2udt4522-p2udt5152)p2u_46049 enabled=y ratedcurrent=100.0

New Line.fuse(r:p2udt5152-p2udt7353)p2u_46050 Units=km Length=0.001 bus1=p2udt5152.1 bus2=p2udt5152-p2udt7353x.1 switch=n enabled=y phases=1 Linecode=fuse_1_1_1_1

New Fuse.Fuse_fuse(r:p2udt5152-p2udt7353)p2u_46050 monitoredobj=Line.fuse(r:p2udt5152-p2udt7353)p2u_46050 enabled=y ratedcurrent=100.0

New Line.fuse(r:p2udt2891-p2udt5862)p2u_46129 Units=km Length=0.001 bus1=p2udt5862.2 bus2=p2udt2891-p2udt5862x.2 switch=n enabled=y phases=1 Linecode=fuse_1_1_1_1

New Fuse.Fuse_fuse(r:p2udt2891-p2udt5862)p2u_46129 monitoredobj=Line.fuse(r:p2udt2891-p2udt5862)p2u_46129 enabled=y ratedcurrent=100.0

New Line.fuse(r:p2udt1089-p2udt5953)p2u_46137 Units=km Length=0.001 bus1=p2udt5953.1 bus2=p2udt1089-p2udt5953x.1 switch=n enabled=y phases=1 Linecode=fuse_1_1_1_1

New Fuse.Fuse_fuse(r:p2udt1089-p2udt5953)p2u_46137 monitoredobj=Line.fuse(r:p2udt1089-p2udt5953)p2u_46137 enabled=y ratedcurrent=100.0

New Line.fuse(r:p2udt4739-p2udt6394)p2u_46193 Units=km Length=0.001 bus1=p2udt6394.3 bus2=p2udt4739-p2udt6394x.3 switch=n enabled=y phases=1 Linecode=fuse_1_1_1_1

New Fuse.Fuse_fuse(r:p2udt4739-p2udt6394)p2u_46193 monitoredobj=Line.fuse(r:p2udt4739-p2udt6394)p2u_46193 enabled=y ratedcurrent=100.0

New Line.l(r:p2udt5953-p2udt6681)_disconnect Units=km Length=0.001 bus1=p2udt6681_b1_1.1.2.3 bus2=p2udt6681_b2_1.1.2.3 switch=y enabled=y phases=3 Linecode=3P_OH_AL_ACSR_4/0_Penguin_12_47_0_3_3_3_3

New Line.l(r:p2udt5953-p2udt6681)_cont Units=km Length=0.746307 bus1=p2udt6681_b2_1.1.2.3 bus2=p2udt5953.1.2.3 switch=n enabled=y phases=3 Linecode=3P_OH_AL_ACSR_4/0_Penguin_12_47_0_3_3_3_3

New Line.l(r:p2udt2041-p2udt3171)_disconnect Units=km Length=0.001 bus1=p2udt3171_b1_1.1.2.3 bus2=p2udt3171_b2_1.1.2.3 switch=y enabled=y phases=3 Linecode=3P_OH_AL_ACSR_4/0_Penguin_12_47_0_3_3_3_3

New Line.l(r:p2udt2041-p2udt3171)_cont Units=km Length=2.2397579999999997 bus1=p2udt3171_b2_1.1.2.3 bus2=p2udt2041.1.2.3 switch=n enabled=y phases=3 Linecode=3P_OH_AL_ACSR_4/0_Penguin_12_47_0_3_3_3_3

New Line.l(r:p2udt4548-p2udt7567)_disconnect Units=km Length=0.001 bus1=p2udt4548_b1_1.1.2.3 bus2=p2udt4548_b2_1.1.2.3 switch=y enabled=y phases=3 Linecode=3P_OH_AL_ACSR_4/0_Penguin_12_47_0_3_3_3_3

New Line.l(r:p2udt4548-p2udt7567)_cont Units=km Length=1.809135 bus1=p2udt4548_b2_1.1.2.3 bus2=p2udt7567.1.2.3 switch=n enabled=y phases=3 Linecode=3P_OH_AL_ACSR_4/0_Penguin_12_47_0_3_3_3_3

New Line.l(r:p2udt7567-p2udt8840)_disconnect Units=km Length=0.001 bus1=p2udt7567-p2udt8840x_b1_1.1.2.3 bus2=p2udt7567-p2udt8840x_b2_1.1.2.3 switch=y enabled=y phases=3 Linecode=3P_OH_AL_ACSR_1033kcmil_Curlew_12.47_1_3_3_3_3

New Line.l(r:p2udt7567-p2udt8840)_cont Units=km Length=4.398029999999999 bus1=p2udt7567-p2udt8840x_b2_1.1.2.3 bus2=p2udt8840.1.2.3 switch=n enabled=y phases=3 Linecode=3P_OH_AL_ACSR_1033kcmil_Curlew_12.47_1_3_3_3_3
