New Capacitor.p2uc24 Bus1=p2udt6170 phases=3 Kv=12.47 conn=Wye Kvar=300.0

New CapControl.p2uc24 Capacitor=p2uc24 Element=Line.l(r:p2udt5820-p2udt6170) Terminal=1 delay=100.0 Type=voltage Vmin=120.5 Vmax=125.0 Ptratio=59.99631547328862 Ctratio=100.0
