New Line.l(r:p2udt119lv-p2ulv122) Units=km Length=0.0197747 bus1=p2udt119lv.1.2 bus2=p2ulv122.1.2 switch=n enabled=y phases=2 Linecode=1P_OH_AL_2/0_Rucina_0_416_0_2_2_2_2

New Line.l(r:p2udt119lv-p2ulv8112) Units=km Length=0.047627800000000005 bus1=p2udt119lv.1.2 bus2=p2ulv8112.1.2 switch=n enabled=y phases=2 Linecode=1P_OH_AL_4/0_Zuzara_0_416_0_2_2_2_2

New Line.l(r:p2udm452-p2ulv17621) Units=km Length=0.021185 bus1=p2udm452.1.2 bus2=p2ulv17621.1.2 switch=n enabled=y phases=2 Linecode=1P_OH_AL_2/0_Rucina_0_416_0_2_2_2_2

New Line.l(r:p2udm452-p2udt119lv) Units=km Length=0.0187504 bus1=p2udt119lv.1.2 bus2=p2udm452.1.2 switch=n enabled=y phases=2 Linecode=1P_OH_AL_2/0_Rucina_0_416_0_2_2_2_2

New Line.l(r:p2udm453-p2ulv21445) Units=km Length=0.00879477 bus1=p2udm453.1.2 bus2=p2ulv21445.1.2 switch=n enabled=y phases=2 Linecode=1P_OH_AL_2/0_Rucina_0_416_0_2_2_2_2

New Line.l(r:p2udm453-p2udt119lv) Units=km Length=0.0640295 bus1=p2udt119lv.1.2 bus2=p2udm453.1.2 switch=n enabled=y phases=2 Linecode=1P_OH_AL_4/0_Zuzara_0_416_0_2_2_2_2

New Line.l(r:p2udt779lv-p2ulv833) Units=km Length=0.0259598 bus1=p2udt779lv.1.2 bus2=p2ulv833.1.2 switch=n enabled=y phases=2 Linecode=1P_OH_AL_2/0_Rucina_0_416_0_2_2_2_2

New Line.l(r:p2udt779lv-p2ulv20326) Units=km Length=0.063882 bus1=p2udt779lv.1.2 bus2=p2ulv20326.1.2 switch=n enabled=y phases=2 Linecode=1P_OH_AL_4/0_Zuzara_0_416_0_2_2_2_2

New Line.l(r:p2udm2884-p2ulv19894) Units=km Length=0.0162232 bus1=p2udm2884.1.2 bus2=p2ulv19894.1.2 switch=n enabled=y phases=2 Linecode=1P_OH_AL_2/0_Rucina_0_416_0_2_2_2_2

New Line.l(r:p2udm2884-p2udt779lv) Units=km Length=0.0182199 bus1=p2udt779lv.1.2 bus2=p2udm2884.1.2 switch=n enabled=y phases=2 Linecode=1P_OH_AL_2/0_Rucina_0_416_0_2_2_2_2

New Line.l(r:p2udm4516-p2ulv1341) Units=km Length=0.0127407 bus1=p2udm4516.1.2 bus2=p2ulv1341.1.2 switch=n enabled=y phases=2 Linecode=1P_OH_AL_2/0_Rucina_0_416_0_2_2_2_2

New Line.l(r:p2udm4516-p2udt1221lv) Units=km Length=0.0336769 bus1=p2udt1221lv.1.2 bus2=p2udm4516.1.2 switch=n enabled=y phases=2 Linecode=1P_OH_AL_4/0_Zuzara_0_416_0_2_2_2_2

New Line.l(r:p2udm4517-p2ulv19675) Units=km Length=0.0364429 bus1=p2udm4517.1.2 bus2=p2ulv19675.1.2 switch=n enabled=y phases=2 Linecode=1P_OH_AL_4/0_Zuzara_0_416_0_2_2_2_2

New Line.l(r:p2udm4517-p2udt1221lv) Units=km Length=0.0137072 bus1=p2udt1221lv.1.2 bus2=p2udm4517.1.2 switch=n enabled=y phases=2 Linecode=1P_OH_AL_2/0_Rucina_0_416_0_2_2_2_2

New Line.l(r:p2udt1440lv-p2ulv1593) Units=km Length=0.00914606 bus1=p2udt1440lv.1.2 bus2=p2ulv1593.1.2 switch=n enabled=y phases=2 Linecode=1P_OH_AL_2/0_Rucina_0_416_0_2_2_2_2

New Line.l(r:p2udm5292-p2ulv16962) Units=km Length=0.011023200000000002 bus1=p2udm5292.1.2 bus2=p2ulv16962.1.2 switch=n enabled=y phases=2 Linecode=1P_OH_AL_2/0_Rucina_0_416_0_2_2_2_2

New Line.l(r:p2udm5292-p2udt1440lv) Units=km Length=0.0168365 bus1=p2udt1440lv.1.2 bus2=p2udm5292.1.2 switch=n enabled=y phases=2 Linecode=1P_OH_AL_2/0_Rucina_0_416_0_2_2_2_2

New Line.l(r:p2udt2373lv-p2ulv2819) Units=km Length=0.0222734 bus1=p2udt2373lv.1.2 bus2=p2ulv2819.1.2 switch=n enabled=y phases=2 Linecode=1P_UG_AL_1/0_Brenau_0_416_0_2_2_2_2

New Line.l(r:p2udt2375lv-p2ulv9696) Units=km Length=0.0210323 bus1=p2udt2375lv.1.2 bus2=p2ulv9696.1.2 switch=n enabled=y phases=2 Linecode=1P_OH_AL_2/0_Rucina_0_416_0_2_2_2_2

New Line.l(r:p2udt2375lv-p2ulv23054) Units=km Length=0.0863693 bus1=p2udt2375lv.1.2 bus2=p2ulv23054.1.2 switch=n enabled=y phases=2 Linecode=1P_OH_AL_4/0_Zuzara_0_416_0_2_2_2_2

New Line.l(r:p2udm8487-p2ulv2821) Units=km Length=0.055858 bus1=p2udm8487.1.2 bus2=p2ulv2821.1.2 switch=n enabled=y phases=2 Linecode=1P_OH_AL_4/0_Zuzara_0_416_0_2_2_2_2

New Line.l(r:p2udm8487-p2ulv23055) Units=km Length=0.0827121 bus1=p2udm8487.1.2 bus2=p2ulv23055.1.2 switch=n enabled=y phases=2 Linecode=1P_OH_AL_4/0_Zuzara_0_416_0_2_2_2_2

New Line.l(r:p2udm8487-p2udt2375lv) Units=km Length=0.01936 bus1=p2udt2375lv.1.2 bus2=p2udm8487.1.2 switch=n enabled=y phases=2 Linecode=1P_OH_AL_2/0_Rucina_0_416_0_2_2_2_2

New Line.l(r:p2udm8489-p2ulv20555) Units=km Length=0.0211044 bus1=p2udm8489.1.2 bus2=p2ulv20555.1.2 switch=n enabled=y phases=2 Linecode=1P_OH_AL_2/0_Rucina_0_416_0_2_2_2_2

New Line.l(r:p2udm8489-p2udt2375lv) Units=km Length=0.0193648 bus1=p2udt2375lv.1.2 bus2=p2udm8489.1.2 switch=n enabled=y phases=2 Linecode=1P_OH_AL_2/0_Rucina_0_416_0_2_2_2_2

New Line.l(r:p2udm9024-p2ulv3050) Units=km Length=0.00664748 bus1=p2udm9024.1.2 bus2=p2ulv3050.1.2 switch=n enabled=y phases=2 Linecode=1P_OH_AL_2/0_Rucina_0_416_0_2_2_2_2

New Line.l(r:p2udm9024-p2udt2538lv) Units=km Length=0.0703415 bus1=p2udt2538lv.1.2 bus2=p2udm9024.1.2 switch=n enabled=y phases=2 Linecode=1P_OH_AL_4/0_Zuzara_0_416_0_2_2_2_2

New Line.l(r:p2udm9025-p2ulv15087) Units=km Length=0.0043471 bus1=p2udm9025.1.2 bus2=p2ulv15087.1.2 switch=n enabled=y phases=2 Linecode=1P_OH_AL_2/0_Rucina_0_416_0_2_2_2_2

New Line.l(r:p2udm9025-p2udt2538lv) Units=km Length=0.0190551 bus1=p2udt2538lv.1.2 bus2=p2udm9025.1.2 switch=n enabled=y phases=2 Linecode=1P_OH_AL_2/0_Rucina_0_416_0_2_2_2_2

New Line.l(r:p2udt3430lv-p2ulv4495) Units=km Length=0.0112783 bus1=p2udt3430lv.1.2 bus2=p2ulv4495.1.2 switch=n enabled=y phases=2 Linecode=1P_OH_AL_2/0_Rucina_0_416_0_2_2_2_2

New Line.l(r:p2udt3430lv-p2ulv6669) Units=km Length=0.030082 bus1=p2udt3430lv.1.2 bus2=p2ulv6669.1.2 switch=n enabled=y phases=2 Linecode=1P_OH_AL_4/0_Zuzara_0_416_0_2_2_2_2

New Line.l(r:p2udt4378lv-p2ulv6181) Units=km Length=0.0756766 bus1=p2udt4378lv.1.2 bus2=p2ulv6181.1.2 switch=n enabled=y phases=2 Linecode=1P_UG_AL_4/0_Sweetbriar_0_416_0_2_2_2_2

New Line.l(r:p2udt4508lv-p2ulv6446) Units=km Length=0.0231844 bus1=p2udt4508lv.1.2 bus2=p2ulv6446.1.2 switch=n enabled=y phases=2 Linecode=1P_OH_AL_2/0_Rucina_0_416_0_2_2_2_2

New Line.l(r:p2udt4927lv-p2ulv7389) Units=km Length=0.019578100000000005 bus1=p2udt4927lv.1.2 bus2=p2ulv7389.1.2 switch=n enabled=y phases=2 Linecode=1P_OH_AL_2/0_Rucina_0_416_0_2_2_2_2

New Line.l(r:p2udt6006lv-p2ulv11158) Units=km Length=0.0587584 bus1=p2udt6006lv.1.2 bus2=p2ulv11158.1.2 switch=n enabled=y phases=2 Linecode=1P_UG_AL_1/0_Brenau_0_416_0_2_2_2_2

New Line.l(r:p2udm18774-p2ulv10187) Units=km Length=0.0481529 bus1=p2udm18774.1.2 bus2=p2ulv10187.1.2 switch=n enabled=y phases=2 Linecode=1P_UG_AL_1/0_Brenau_0_416_0_2_2_2_2

New Line.l(r:p2udm18776-p2ulv15321) Units=km Length=0.0714524 bus1=p2udm18776.1.2 bus2=p2ulv15321.1.2 switch=n enabled=y phases=2 Linecode=1P_UG_AL_1/0_Brenau_0_416_0_2_2_2_2

New Line.l(r:p2udm18774-p2udm18776) Units=km Length=0.009687420000000002 bus1=p2udm18774.1.2 bus2=p2udm18776.1.2 switch=n enabled=y phases=2 Linecode=1P_UG_AL_1/0_Brenau_0_416_0_2_2_2_2

New Line.l(r:p2udm18774-p2udt6006lv) Units=km Length=0.00969656 bus1=p2udt6006lv.1.2 bus2=p2udm18774.1.2 switch=n enabled=y phases=2 Linecode=1P_UG_AL_1/0_Brenau_0_416_0_2_2_2_2

New Line.l(r:p2udm18777-p2ulv18946) Units=km Length=0.045002200000000006 bus1=p2udm18777.1.2 bus2=p2ulv18946.1.2 switch=n enabled=y phases=2 Linecode=1P_UG_AL_1/0_Brenau_0_416_0_2_2_2_2

New Line.l(r:p2udm18777-p2udt6006lv) Units=km Length=0.0193799 bus1=p2udt6006lv.1.2 bus2=p2udm18777.1.2 switch=n enabled=y phases=2 Linecode=1P_UG_AL_1/0_Brenau_0_416_0_2_2_2_2

New Line.l(r:p2udt6172lv-p2ulv16253) Units=km Length=0.018811 bus1=p2udt6172lv.1.2 bus2=p2ulv16253.1.2 switch=n enabled=y phases=2 Linecode=1P_OH_AL_2/0_Rucina_0_416_0_2_2_2_2

New Line.l(r:p2udm19161-p2ulv10671) Units=km Length=0.0455031 bus1=p2udm19161.1.2 bus2=p2ulv10671.1.2 switch=n enabled=y phases=2 Linecode=1P_OH_AL_4/0_Zuzara_0_416_0_2_2_2_2

New Line.l(r:p2udm19161-p2udt6172lv) Units=km Length=0.01936 bus1=p2udt6172lv.1.2 bus2=p2udm19161.1.2 switch=n enabled=y phases=2 Linecode=1P_OH_AL_2/0_Rucina_0_416_0_2_2_2_2

New Line.l(r:p2udm19162-p2ulv11867) Units=km Length=0.0216295 bus1=p2udm19162.1.2 bus2=p2ulv11867.1.2 switch=n enabled=y phases=2 Linecode=1P_OH_AL_2/0_Rucina_0_416_0_2_2_2_2

New Line.l(r:p2udm19162-p2ulv13051) Units=km Length=0.0593324 bus1=p2udm19162.1.2 bus2=p2ulv13051.1.2 switch=n enabled=y phases=2 Linecode=1P_OH_AL_4/0_Zuzara_0_416_0_2_2_2_2

New Line.l(r:p2udm19162-p2ulv20556) Units=km Length=0.0469224 bus1=p2udm19162.1.2 bus2=p2ulv20556.1.2 switch=n enabled=y phases=2 Linecode=1P_OH_AL_4/0_Zuzara_0_416_0_2_2_2_2

New Line.l(r:p2udm19162-p2udt6172lv) Units=km Length=0.01936 bus1=p2udt6172lv.1.2 bus2=p2udm19162.1.2 switch=n enabled=y phases=2 Linecode=1P_OH_AL_2/0_Rucina_0_416_0_2_2_2_2

New Line.l(r:p2udt6331lv-p2ulv11159) Units=km Length=0.00463493 bus1=p2udt6331lv.1.2 bus2=p2ulv11159.1.2 switch=n enabled=y phases=2 Linecode=1P_OH_AL_2/0_Rucina_0_416_0_2_2_2_2

New Line.l(r:p2udt6450lv-p2ulv11628) Units=km Length=0.0103167 bus1=p2udt6450lv.1.2 bus2=p2ulv11628.1.2 switch=n enabled=y phases=2 Linecode=1P_OH_AL_2/0_Rucina_0_416_0_2_2_2_2

New Line.l(r:p2udm19753-p2ulv15322) Units=km Length=0.0145527 bus1=p2udm19753.1.2 bus2=p2ulv15322.1.2 switch=n enabled=y phases=2 Linecode=1P_OH_AL_2/0_Rucina_0_416_0_2_2_2_2

New Line.l(r:p2udm19753-p2udt6450lv) Units=km Length=0.0177012 bus1=p2udt6450lv.1.2 bus2=p2udm19753.1.2 switch=n enabled=y phases=2 Linecode=1P_OH_AL_2/0_Rucina_0_416_0_2_2_2_2

New Line.l(r:p2udm20664-p2ulv13288) Units=km Length=0.0130046 bus1=p2udm20664.1.2 bus2=p2ulv13288.1.2 switch=n enabled=y phases=2 Linecode=1P_OH_AL_2/0_Rucina_0_416_0_2_2_2_2

New Line.l(r:p2udm20664-p2udt6919lv) Units=km Length=0.0198417 bus1=p2udt6919lv.1.2 bus2=p2udm20664.1.2 switch=n enabled=y phases=2 Linecode=1P_OH_AL_2/0_Rucina_0_416_0_2_2_2_2

New Line.l(r:p2udm20665-p2ulv19432) Units=km Length=0.00913329 bus1=p2udm20665.1.2 bus2=p2ulv19432.1.2 switch=n enabled=y phases=2 Linecode=1P_OH_AL_2/0_Rucina_0_416_0_2_2_2_2

New Line.l(r:p2udm20665-p2udt6919lv) Units=km Length=0.04779660000000001 bus1=p2udt6919lv.1.2 bus2=p2udm20665.1.2 switch=n enabled=y phases=2 Linecode=1P_OH_AL_4/0_Zuzara_0_416_0_2_2_2_2

New Line.l(r:p2udt7291lv-p2ulv14852) Units=km Length=0.012361 bus1=p2udt7291lv.1.2 bus2=p2ulv14852.1.2 switch=n enabled=y phases=2 Linecode=1P_UG_AL_1/0_Brenau_0_416_0_2_2_2_2

New Line.l(r:p2udm21397-p2ulv15088) Units=km Length=0.027671 bus1=p2udm21397.1.2 bus2=p2ulv15088.1.2 switch=n enabled=y phases=2 Linecode=1P_OH_AL_4/0_Zuzara_0_416_0_2_2_2_2

New Line.l(r:p2udm21397-p2udt7345lv) Units=km Length=0.0387248 bus1=p2udt7345lv.1.2 bus2=p2udm21397.1.2 switch=n enabled=y phases=2 Linecode=1P_OH_AL_4/0_Zuzara_0_416_0_2_2_2_2

New Line.l(r:p2udm21398-p2ulv16709) Units=km Length=0.020553700000000005 bus1=p2udm21398.1.2 bus2=p2ulv16709.1.2 switch=n enabled=y phases=2 Linecode=1P_OH_AL_2/0_Rucina_0_416_0_2_2_2_2

New Line.l(r:p2udm21398-p2udt7345lv) Units=km Length=0.0387248 bus1=p2udt7345lv.1.2 bus2=p2udm21398.1.2 switch=n enabled=y phases=2 Linecode=1P_OH_AL_4/0_Zuzara_0_416_0_2_2_2_2

New Line.l(r:p2udt7390lv-p2ulv15318) Units=km Length=0.015103 bus1=p2udt7390lv.1.2 bus2=p2ulv15318.1.2 switch=n enabled=y phases=2 Linecode=1P_OH_AL_2/0_Rucina_0_416_0_2_2_2_2

New Line.l(r:p2udt7492lv-p2ulv15773) Units=km Length=0.0024982600000000004 bus1=p2udt7492lv.1.2 bus2=p2ulv15773.1.2 switch=n enabled=y phases=2 Linecode=1P_UG_AL_2/0_Converse_0_416_0_2_2_2_2

New Line.l(r:p2udt7493lv-p2ulv15774) Units=km Length=0.0316747 bus1=p2udt7493lv.1.2 bus2=p2ulv15774.1.2 switch=n enabled=y phases=2 Linecode=1P_UG_AL_1/0_Brenau_0_416_0_2_2_2_2

New Line.l(r:p2udt7540lv-p2ulv15997) Units=km Length=0.0117236 bus1=p2udt7540lv.1.2 bus2=p2ulv15997.1.2 switch=n enabled=y phases=2 Linecode=1P_OH_AL_2/0_Rucina_0_416_0_2_2_2_2

New Line.l(r:p2udt7605lv-p2ulv16252) Units=km Length=0.0230213 bus1=p2udt7605lv.1.2 bus2=p2ulv16252.1.2 switch=n enabled=y phases=2 Linecode=1P_UG_AL_1/0_Brenau_0_416_0_2_2_2_2

New Line.l(r:p2udt7807lv-p2ulv17171) Units=km Length=0.0708833 bus1=p2udt7807lv.1.2 bus2=p2ulv17171.1.2 switch=n enabled=y phases=2 Linecode=1P_OH_AL_4/0_Zuzara_0_416_0_2_2_2_2

New Line.l(r:p2udt8131lv-p2ulv18947) Units=km Length=0.005819840000000001 bus1=p2udt8131lv.1.2 bus2=p2ulv18947.1.2 switch=n enabled=y phases=2 Linecode=1P_OH_AL_2/0_Rucina_0_416_0_2_2_2_2

New Line.l(r:p2udt8132lv-p2ulv18948) Units=km Length=0.0367546 bus1=p2udt8132lv.1.2 bus2=p2ulv18948.1.2 switch=n enabled=y phases=2 Linecode=1P_OH_AL_4/0_Zuzara_0_416_0_2_2_2_2

New Line.l(r:p2udt8132lv-p2ulv20773) Units=km Length=0.0367546 bus1=p2udt8132lv.1.2 bus2=p2ulv20773.1.2 switch=n enabled=y phases=2 Linecode=1P_UG_AL_1/0_Brenau_0_416_0_2_2_2_2

New Line.l(r:p2udt8209lv-p2ulv19431) Units=km Length=0.0209265 bus1=p2udt8209lv.1.2 bus2=p2ulv19431.1.2 switch=n enabled=y phases=2 Linecode=1P_OH_AL_2/0_Rucina_0_416_0_2_2_2_2

New Line.l(r:p2udt8209lv-p2ulv23932) Units=km Length=0.0416867 bus1=p2udt8209lv.1.2 bus2=p2ulv23932.1.2 switch=n enabled=y phases=2 Linecode=1P_OH_AL_4/0_Zuzara_0_416_0_2_2_2_2

New Line.l(r:p2udt8592lv-p2ulv21676) Units=km Length=0.041885900000000004 bus1=p2udt8592lv.1.2 bus2=p2ulv21676.1.2 switch=n enabled=y phases=2 Linecode=1P_OH_AL_4/0_Zuzara_0_416_0_2_2_2_2

New Line.l(r:p2udt8592lv-p2ulv23931) Units=km Length=0.024235 bus1=p2udt8592lv.1.2 bus2=p2ulv23931.1.2 switch=n enabled=y phases=2 Linecode=1P_OH_AL_2/0_Rucina_0_416_0_2_2_2_2

New Line.l(r:p2udt8929lv-p2ulv24143) Units=km Length=0.0408339 bus1=p2udt8929lv.1.2 bus2=p2ulv24143.1.2 switch=n enabled=y phases=2 Linecode=1P_OH_AL_4/0_Zuzara_0_416_0_2_2_2_2

New Line.l(r:p2udt6331-p2umv8) Units=km Length=0.0795553 bus1=p2udt6331-p2umv8x.2 bus2=p2udt6331.2 switch=n enabled=y phases=1 Linecode=1P_OH_AL_ACSR_#2_Sparrow_12_47_0_1_1_1_1

New Line.l(r:p2udt2538-p2udt7540) Units=km Length=0.0643062 bus1=p2udt7540.1 bus2=p2udt2538.1 switch=n enabled=y phases=1 Linecode=1P_OH_AL_ACSR_#2_Sparrow_12_47_0_1_1_1_1

New Line.l(r:p2udt7540-p2udt8131) Units=km Length=0.0600746 bus1=p2udt7540.1 bus2=p2udt8131.1 switch=n enabled=y phases=1 Linecode=1P_OH_AL_ACSR_#2_Sparrow_12_47_0_1_1_1_1

New Line.l(r:p2udt6450-p2udt8929) Units=km Length=0.0354024 bus1=p2udt8929.1 bus2=p2udt6450.1 switch=n enabled=y phases=1 Linecode=1P_OH_AL_ACSR_#2_Sparrow_12_47_0_1_1_1_1

New Line.l(r:p2udt6172-p2udt7345) Units=km Length=0.0387248 bus1=p2udt6172.1 bus2=p2udt7345.1 switch=n enabled=y phases=1 Linecode=1P_OH_AL_ACSR_#2_Sparrow_12_47_0_1_1_1_1

New Line.l(r:p2udt2375-p2udt6172) Units=km Length=0.0968097 bus1=p2udt2375.1 bus2=p2udt6172.1 switch=n enabled=y phases=1 Linecode=1P_OH_AL_ACSR_#2_Sparrow_12_47_0_1_1_1_1

New Line.l(r:p2udt2375-p2udt8209) Units=km Length=0.0580897 bus1=p2udt8209.1 bus2=p2udt2375.1 switch=n enabled=y phases=1 Linecode=1P_OH_AL_ACSR_#2_Sparrow_12_47_0_1_1_1_1

New Line.l(r:p2udt8209-p2udt8592) Units=km Length=0.0395923 bus1=p2udt8592.1 bus2=p2udt8209.1 switch=n enabled=y phases=1 Linecode=1P_OH_AL_ACSR_#2_Sparrow_12_47_0_1_1_1_1

New Line.l(r:p2udt8592-p2udt8929) Units=km Length=0.0791943 bus1=p2udt8929.1 bus2=p2udt8592.1 switch=n enabled=y phases=1 Linecode=1P_OH_AL_ACSR_#2_Sparrow_12_47_0_1_1_1_1

New Line.l(r:p2udt7540-p2udt8929) Units=km Length=0.0649248 bus1=p2udt7540.1 bus2=p2udt8929.1 switch=n enabled=y phases=1 Linecode=1P_OH_AL_ACSR_#2_Sparrow_12_47_0_1_1_1_1

New Line.l(r:p2udt1221-p2udt7540) Units=km Length=0.09634290000000001 bus1=p2udt1221-p2udt7540x.1 bus2=p2udt7540.1 switch=n enabled=y phases=1 Linecode=1P_OH_AL_ACSR_#2_Sparrow_12_47_0_1_1_1_1

New Line.l(r:p2udt2373-p2udt6582) Units=km Length=0.14778200000000002 bus1=p2udt2373-p2udt6582xx.3 bus2=p2udt2373-p2udt6582x.3 switch=n enabled=y phases=1 Linecode=1P_UG_AL_#2_15_12_47_0_1_1_1_1

New Line.l(r:p2udt1440-p2udt3430) Units=km Length=0.0923139 bus1=p2udt1440.3 bus2=p2udt3430.3 switch=n enabled=y phases=1 Linecode=1P_OH_AL_ACSR_#2_Sparrow_12_47_0_1_1_1_1

New Line.l(r:p2udt1440-p2udt7390) Units=km Length=0.106597 bus1=p2udt7390.3 bus2=p2udt1440.3 switch=n enabled=y phases=1 Linecode=1P_OH_AL_ACSR_#2_Sparrow_12_47_0_1_1_1_1

New Line.l(r:p2udt4508-p2udt7390) Units=km Length=0.130033 bus1=p2udt4508.3 bus2=p2udt7390.3 switch=n enabled=y phases=1 Linecode=1P_OH_AL_ACSR_#2_Sparrow_12_47_0_1_1_1_1

New Line.l(r:p2udt4508-p2udt8516) Units=km Length=0.343457 bus1=p2udt4508-p2udt8516x.3 bus2=p2udt4508.3 switch=n enabled=y phases=1 Linecode=1P_OH_AL_ACSR_#2_Sparrow_12_47_0_1_1_1_1

New Line.l(r:p2udt779-p2udt7807) Units=km Length=0.0439229 bus1=p2udt779.1.2.3 bus2=p2udt7807.1.2.3 switch=n enabled=y phases=3 Linecode=3P_OH_AL_ACSR_4/0_Penguin_12_47_0_3_3_3_3

New Line.l(r:p2udt6006-p2udt779) Units=km Length=0.16861200000000004 bus1=p2udt6006.1.2.3 bus2=p2udt779.1.2.3 switch=n enabled=y phases=3 Linecode=3P_OH_AL_ACSR_4/0_Penguin_12_47_0_3_3_3_3

New Line.l(r:p2udt1220-p2udt6006)_s0 Units=km Length=0.129062 bus1=p2udt1220-p2udt6006xxx.1.2.3 bus2=p2udt1220-p2udt6006xx.1.2.3 switch=n enabled=y phases=3 Linecode=3P_UG_AL_4/0_25_12_47_0_3_3_3_3

New Line.l(r:p2udt1220-p2udt6006)_s1 Units=km Length=0.695337 bus1=p2udt1220-p2udt6006xx.1.2.3 bus2=p2udt1220-p2udt6006x.1.2.3 switch=n enabled=y phases=3 Linecode=3P_OH_AL_ACSR_4/0_Penguin_12_47_0_3_3_3_3

New Line.l(r:p2udt6006-p2udt7291) Units=km Length=0.172734 bus1=p2udt6006-p2udt7291xx.1.2.3 bus2=p2udt6006-p2udt7291x.1.2.3 switch=n enabled=y phases=3 Linecode=3P_UG_AL_4/0_25_12_47_0_3_3_3_3

New Line.l(r:p2udt6919-p2udt7291) Units=km Length=0.304363 bus1=p2udt6919.1.2.3 bus2=p2udt7291.1.2.3 switch=n enabled=y phases=3 Linecode=3P_OH_AL_ACSR_4/0_Penguin_12_47_0_3_3_3_3

New Line.l(r:p2udt6919-p2udt8132) Units=km Length=0.264751 bus1=p2udt8132.1.2.3 bus2=p2udt6919.1.2.3 switch=n enabled=y phases=3 Linecode=3P_OH_AL_ACSR_4/0_Penguin_12_47_0_3_3_3_3

New Line.l(r:p2udt8132-p2umv8) Units=km Length=0.404217 bus1=p2umv8.1.2.3 bus2=p2udt8132.1.2.3 switch=n enabled=y phases=3 Linecode=3P_OH_AL_ACSR_4/0_Penguin_12_47_0_3_3_3_3

New Line.l(r:p2udt8516-p2umv8) Units=km Length=0.561941 bus1=p2udt8516.1.2.3 bus2=p2umv8.1.2.3 switch=n enabled=y phases=3 Linecode=3P_OH_AL_ACSR_4/0_Penguin_12_47_0_3_3_3_3

New Line.l(r:p2udt8516-p2uhs2_1247) Units=km Length=0.15643100000000004 bus1=p2udt8516-p2uhs2_1247x.1.2.3 bus2=p2udt8516-p2uhs2_1247x_b1_1.1.2.3 switch=n enabled=y phases=3 Linecode=3P_OH_AL_ACSR_4/0_Penguin_12_47_0_3_3_3_3

New Line.l(r:p2udt8516lv-p2ulv21192) Units=km Length=0.030489 bus1=p2udt8516lv.1.2.3 bus2=p2ulv21192.1.2.3 switch=n enabled=y phases=3 Linecode=3P_UG_AL_350kcmil_15_0_416_0_3_3_3_3

New Line.l(r:p2udt7807-p2umv3) Units=km Length=0.0136103 bus1=p2udt7807.1.2.3 bus2=p2umv3.1.2.3 switch=n enabled=y phases=3 Linecode=3P_OH_AL_ACSR_4/0_Penguin_12_47_0_3_3_3_3

New Line.l(r:p2udt1220lv-p2ulv1340) Units=km Length=0.0442595 bus1=p2udt1220lv.1.2.3 bus2=p2ulv1340.1.2.3 switch=n enabled=y phases=3 Linecode=3P_UG_AL_350kcmil_15_0_416_0_3_3_3_3

New Line.l(r:p2udt1220lv-p2ulv15556) Units=km Length=0.0615528 bus1=p2udt1220lv.1.2.3 bus2=p2ulv15556.1.2.3 switch=n enabled=y phases=3 Linecode=3P_UG_AL_750kcmil_25_0_416_0_3_3_3_3

New Line.l(r:p2udt1220lv-p2ulv18306) Units=km Length=0.0223011 bus1=p2udt1220lv.1.2.3 bus2=p2ulv18306.1.2.3 switch=n enabled=y phases=3 Linecode=3P_UG_AL_350kcmil_15_0_416_0_3_3_3_3

New Line.l(r:p2udt6514lv-p2ulv11866) Units=km Length=0.0473868 bus1=p2udt6514lv.1.2.3 bus2=p2ulv11866.1.2.3 switch=n enabled=y phases=3 Linecode=3P_UG_AL_350kcmil_15_0_416_0_3_3_3_3

New Line.l(r:p2udt8591lv-p2ulv21675) Units=km Length=0.0175468 bus1=p2udt8591lv.1.2.3 bus2=p2ulv21675.1.2.3 switch=n enabled=y phases=3 Linecode=3P_UG_AL_350kcmil_15_0_416_0_3_3_3_3

New Line.l(r:p2udt3140lv-p2ulv3999) Units=km Length=0.0515432 bus1=p2udt3140lv.1.2.3 bus2=p2ulv3999.1.2.3 switch=n enabled=y phases=3 Linecode=3P_UG_AL_750kcmil_25_0_416_0_3_3_3_3

New Line.l(r:p2udt119-p2udt3140) Units=km Length=0.0374922 bus1=p2udt119.1.2.3 bus2=p2udt3140.1.2.3 switch=n enabled=y phases=3 Linecode=3P_OH_AL_ACSR_4/0_Penguin_12_47_0_3_3_3_3

New Line.l(r:p2udt119-p2udt4927) Units=km Length=0.018741700000000003 bus1=p2udt4927.1.2.3 bus2=p2udt119.1.2.3 switch=n enabled=y phases=3 Linecode=3P_OH_AL_ACSR_4/0_Penguin_12_47_0_3_3_3_3

New Line.l(r:p2udt4927-p2udt8591) Units=km Length=0.129928 bus1=p2udt8591.1.2.3 bus2=p2udt4927.1.2.3 switch=n enabled=y phases=3 Linecode=3P_OH_AL_ACSR_4/0_Penguin_12_47_0_3_3_3_3

New Line.l(r:p2udt1221-p2udt8591) Units=km Length=0.0336769 bus1=p2udt1221.1.2.3 bus2=p2udt8591.1.2.3 switch=n enabled=y phases=3 Linecode=3P_OH_AL_ACSR_4/0_Penguin_12_47_0_3_3_3_3

New Line.l(r:p2udt1221-p2udt6514) Units=km Length=0.0995701 bus1=p2udt6514.1.2.3 bus2=p2udt1221.1.2.3 switch=n enabled=y phases=3 Linecode=3P_OH_AL_ACSR_4/0_Penguin_12_47_0_3_3_3_3

New Line.l(r:p2udt6514-p2udt7605) Units=km Length=0.10875500000000002 bus1=p2udt6514-p2udt7605xx.1.2.3 bus2=p2udt6514-p2udt7605x.1.2.3 switch=n enabled=y phases=3 Linecode=3P_UG_AL_4/0_25_12_47_0_3_3_3_3

New Line.l(r:p2udt4378-p2udt7605) Units=km Length=0.079097 bus1=p2udt4378-p2udt7605x.1.2.3 bus2=p2udt4378-p2udt7605xx.1.2.3 switch=n enabled=y phases=3 Linecode=3P_UG_AL_4/0_25_12_47_0_3_3_3_3

New Line.l(r:p2udt1220-p2udt4378)_s0 Units=km Length=0.138276 bus1=p2udt1220-p2udt4378x.1.2.3 bus2=p2udt1220-p2udt4378xx.1.2.3 switch=n enabled=y phases=3 Linecode=3P_UG_AL_4/0_25_12_47_0_3_3_3_3

New Line.l(r:p2udt1220-p2udt4378)_s1 Units=km Length=0.0272121 bus1=p2udt1220-p2udt4378xx.1.2.3 bus2=p2udt1220-p2udt4378xxx.1.2.3 switch=n enabled=y phases=3 Linecode=3P_OH_AL_ACSR_4/0_Penguin_12_47_0_3_3_3_3

New Line.l(r:p2udt6582lv-p2ulv12090) Units=km Length=0.0385972 bus1=p2udt6582lv.1.2.3 bus2=p2ulv12090.1.2.3 switch=n enabled=y phases=3 Linecode=3P_UG_AL_350kcmil_15_0_416_0_3_3_3_3

New Line.l(r:p2udt4925-p2udt7492) Units=km Length=0.0283941 bus1=p2udt4925-p2udt7492xx.1.2.3 bus2=p2udt4925-p2udt7492x.1.2.3 switch=n enabled=y phases=3 Linecode=3P_UG_AL_4/0_25_12_47_0_3_3_3_3

New Line.l(r:p2udt6582-p2udt7492) Units=km Length=0.12406600000000001 bus1=p2udt6582-p2udt7492x.1.2.3 bus2=p2udt6582-p2udt7492xx.1.2.3 switch=n enabled=y phases=3 Linecode=3P_UG_AL_4/0_25_12_47_0_3_3_3_3

New Line.l(r:p2udt6582-p2udt7493) Units=km Length=0.044338 bus1=p2udt6582-p2udt7493xx.1.2.3 bus2=p2udt6582-p2udt7493x.1.2.3 switch=n enabled=y phases=3 Linecode=3P_UG_AL_4/0_25_12_47_0_3_3_3_3

New Line.l(r:p2udt7291-p2udt7493) Units=km Length=0.114054 bus1=p2udt7291-p2udt7493x.1.2.3 bus2=p2udt7291-p2udt7493xx.1.2.3 switch=n enabled=y phases=3 Linecode=3P_UG_AL_4/0_25_12_47_0_3_3_3_3

New Line.l(r:p2udt8928lv-p2ulv24142) Units=km Length=0.0064848200000000005 bus1=p2udt8928lv.1.2.3 bus2=p2ulv24142.1.2.3 switch=n enabled=y phases=3 Linecode=3P_UG_AL_750kcmil_25_0_416_0_3_3_3_3

New Line.l(r:p2udt6919-p2udt8928) Units=km Length=0.001 bus1=p2udt6919.1.2.3 bus2=p2udt8928.1.2.3 switch=n enabled=y phases=3 Linecode=3P_OH_AL_ACSR_4/0_Penguin_12_47_0_3_3_3_3

New Line.l(r:p2udt2374lv-p2ulv2820) Units=km Length=0.0111125 bus1=p2udt2374lv.1.2.3 bus2=p2ulv2820.1.2.3 switch=n enabled=y phases=3 Linecode=3P_UG_AL_350kcmil_15_0_416_0_3_3_3_3

New Line.l(r:p2udt5021lv-p2ulv7626) Units=km Length=0.0111676 bus1=p2udt5021lv.1.2.3 bus2=p2ulv7626.1.2.3 switch=n enabled=y phases=3 Linecode=3P_UG_AL_750kcmil_25_0_416_0_3_3_3_3

New Line.l(r:p2udt2374-p2udt5021) Units=km Length=0.7143830000000001 bus1=p2udt2374.1.2.3 bus2=p2udt5021.1.2.3 switch=n enabled=y phases=3 Linecode=3P_OH_AL_ACSR_4/0_Penguin_12_47_0_3_3_3_3

New Line.l(r:p2udt2374-p2udt8516) Units=km Length=0.311664 bus1=p2udt2374-p2udt8516xx.1.2.3 bus2=p2udt2374-p2udt8516x.1.2.3 switch=n enabled=y phases=3 Linecode=3P_UG_AL_4/0_25_12_47_0_3_3_3_3

New Line.l(r:p2udt8516-p2udt8670) Units=km Length=0.20361 bus1=p2udt8516-p2udt8670x.1.2.3 bus2=p2udt8516-p2udt8670xx.1.2.3 switch=n enabled=y phases=3 Linecode=3P_OH_AL_ACSR_1033kcmil_Curlew_12.47_1_3_3_3_3

New Line.l(r:p2udt4925lv-p2ulv7387)p2ud1 Units=km Length=0.024594500000000002 bus1=p2udt4925lv.1.2.3 bus2=p2ulv7387.1.2.3 switch=n enabled=y phases=3 Linecode=3P_UG_AL_750kcmil_25_0_416_0_3_3_3_3

New Line.padswitch(r:p2udt2373-p2udt6582)p2u_38619 Units=km Length=0.001 bus1=p2udt2373-p2udt6582xxx.3 bus2=p2udt2373-p2udt6582xx.3 switch=y enabled=y phases=1 Linecode=padswitch_1_1_1_1

New Line.padswitch(r:p2udt2373-p2udt6582)p2u_38620 Units=km Length=0.001 bus1=p2udt2373-p2udt6582x.3 bus2=p2udt2373.3 switch=y enabled=y phases=1 Linecode=padswitch_1_2_1_1_1

New Line.padswitch(r:p2udt1220-p2udt6006)p2u_38615 Units=km Length=0.001 bus1=p2udt6006.1.2.3 bus2=p2udt1220-p2udt6006xxx.1.2.3 switch=y enabled=y phases=3 Linecode=padswitch_3_3_3_3

New Line.padswitch(r:p2udt1220-p2udt6006)p2u_38616 Units=km Length=0.001 bus1=p2udt1220-p2udt6006x.1.2.3 bus2=p2udt1220.1.2.3 switch=y enabled=y phases=3 Linecode=padswitch_3_3_3_3_3

New Line.padswitch(r:p2udt6006-p2udt7291)p2u_38617 Units=km Length=0.001 bus1=p2udt7291.1.2.3 bus2=p2udt6006-p2udt7291xx.1.2.3 switch=y enabled=y phases=3 Linecode=padswitch_3_3_3_3_3

New Line.padswitch(r:p2udt6006-p2udt7291)p2u_38618 Units=km Length=0.001 bus1=p2udt6006-p2udt7291x.1.2.3 bus2=p2udt6006.1.2.3 switch=y enabled=y phases=3 Linecode=padswitch_3_3_3_1_3_3

New Line.padswitch(r:p2udt6514-p2udt7605)p2u_38609 Units=km Length=0.001 bus1=p2udt7605.1.2.3 bus2=p2udt6514-p2udt7605xx.1.2.3 switch=y enabled=y phases=3 Linecode=padswitch_3_3_3_3_3

New Line.padswitch(r:p2udt6514-p2udt7605)p2u_38610 Units=km Length=0.001 bus1=p2udt6514-p2udt7605x.1.2.3 bus2=p2udt6514.1.2.3 switch=y enabled=y phases=3 Linecode=padswitch_3_3_3_1_3_1_3

New Line.padswitch(r:p2udt4378-p2udt7605)p2u_38611 Units=km Length=0.001 bus1=p2udt4378.1.2.3 bus2=p2udt4378-p2udt7605x.1.2.3 switch=y enabled=y phases=3 Linecode=padswitch_3_3_3_3_3

New Line.padswitch(r:p2udt4378-p2udt7605)p2u_38612 Units=km Length=0.001 bus1=p2udt4378-p2udt7605xx.1.2.3 bus2=p2udt7605.1.2.3 switch=y enabled=y phases=3 Linecode=padswitch_3_3_3_3_3

New Line.padswitch(r:p2udt1220-p2udt4378)p2u_38613 Units=km Length=0.001 bus1=p2udt1220.1.2.3 bus2=p2udt1220-p2udt4378x.1.2.3 switch=y enabled=y phases=3 Linecode=padswitch_3_3_3_1_3_3

New Line.padswitch(r:p2udt1220-p2udt4378)p2u_38614 Units=km Length=0.001 bus1=p2udt1220-p2udt4378xxx.1.2.3 bus2=p2udt4378.1.2.3 switch=y enabled=y phases=3 Linecode=padswitch_3_3_3_1_3_3

New Line.padswitch(r:p2udt4925-p2udt7492)p2u_38621 Units=km Length=0.001 bus1=p2udt7492.1.2.3 bus2=p2udt4925-p2udt7492xx.1.2.3 switch=y enabled=y phases=3 Linecode=padswitch_3_3_3_3_3

New Line.padswitch(r:p2udt4925-p2udt7492)p2u_38622 Units=km Length=0.001 bus1=p2udt4925-p2udt7492x.1.2.3 bus2=p2udt4925.1.2.3 switch=y enabled=y phases=3 Linecode=padswitch_3_3_3_1_3_1_3_1

New Line.padswitch(r:p2udt6582-p2udt7492)p2u_38623 Units=km Length=0.001 bus1=p2udt6582.1.2.3 bus2=p2udt6582-p2udt7492x.1.2.3 switch=y enabled=y phases=3 Linecode=padswitch_3_3_3_3_3

New Line.padswitch(r:p2udt6582-p2udt7492)p2u_38624 Units=km Length=0.001 bus1=p2udt6582-p2udt7492xx.1.2.3 bus2=p2udt7492.1.2.3 switch=y enabled=y phases=3 Linecode=padswitch_3_3_3_3_3

New Line.padswitch(r:p2udt6582-p2udt7493)p2u_38625 Units=km Length=0.001 bus1=p2udt7493.1.2.3 bus2=p2udt6582-p2udt7493xx.1.2.3 switch=y enabled=y phases=3 Linecode=padswitch_3_3_3_3_3

New Line.padswitch(r:p2udt6582-p2udt7493)p2u_38626 Units=km Length=0.001 bus1=p2udt6582-p2udt7493x.1.2.3 bus2=p2udt6582.1.2.3 switch=y enabled=y phases=3 Linecode=padswitch_3_3_3_3_3

New Line.padswitch(r:p2udt7291-p2udt7493)p2u_38627 Units=km Length=0.001 bus1=p2udt7291.1.2.3 bus2=p2udt7291-p2udt7493x.1.2.3 switch=y enabled=y phases=3 Linecode=padswitch_3_3_3_3_3

New Line.padswitch(r:p2udt7291-p2udt7493)p2u_38628 Units=km Length=0.001 bus1=p2udt7291-p2udt7493xx.1.2.3 bus2=p2udt7493.1.2.3 switch=y enabled=y phases=3 Linecode=padswitch_3_3_3_3_3

New Line.padswitch(r:p2udt2374-p2udt8516)p2u_38629 Units=km Length=0.001 bus1=p2udt8516.1.2.3 bus2=p2udt2374-p2udt8516xx.1.2.3 switch=y enabled=y phases=3 Linecode=padswitch_3_3_3_1_3_3

New Line.padswitch(r:p2udt2374-p2udt8516)p2u_38630 Units=km Length=0.001 bus1=p2udt2374-p2udt8516x.1.2.3 bus2=p2udt2374.1.2.3 switch=y enabled=y phases=3 Linecode=padswitch_3_3_3_1_3_3

New Line.padswitch(r:p2udt8516-p2udt8670)p2u_45491 Units=km Length=0.001 bus1=p2udt8516.1.2.3 bus2=p2udt8516-p2udt8670x.1.2.3 switch=y enabled=n phases=3 Linecode=padswitch_3_3_3_1_3_3

New Line.padswitch(r:p2udt8516-p2udt8670)p2u_45492 Units=km Length=0.001 bus1=p2udt8516-p2udt8670xx.1.2.3 bus2=p2udt8670.1.2.3 switch=y enabled=n phases=3 Linecode=padswitch_3_3_3_3_3

New Line.fuse(r:p2udt6331-p2umv8)p2u_45514 Units=km Length=0.001 bus1=p2umv8.2 bus2=p2udt6331-p2umv8x.2 switch=n enabled=y phases=1 Linecode=fuse_1_1_1_1

New Fuse.Fuse_fuse(r:p2udt6331-p2umv8)p2u_45514 monitoredobj=Line.fuse(r:p2udt6331-p2umv8)p2u_45514 enabled=y ratedcurrent=100.0

New Line.fuse(r:p2udt1221-p2udt7540)p2u_45622 Units=km Length=0.001 bus1=p2udt1221.1 bus2=p2udt1221-p2udt7540x.1 switch=n enabled=y phases=1 Linecode=fuse_1_1_1_1

New Fuse.Fuse_fuse(r:p2udt1221-p2udt7540)p2u_45622 monitoredobj=Line.fuse(r:p2udt1221-p2udt7540)p2u_45622 enabled=y ratedcurrent=100.0

New Line.fuse(r:p2udt2373-p2udt6582)p2u_46217 Units=km Length=0.001 bus1=p2udt6582.3 bus2=p2udt2373-p2udt6582xxx.3 switch=n enabled=y phases=1 Linecode=fuse_1_6_1_1_1

New Fuse.Fuse_fuse(r:p2udt2373-p2udt6582)p2u_46217 monitoredobj=Line.fuse(r:p2udt2373-p2udt6582)p2u_46217 enabled=y ratedcurrent=100.0

New Line.fuse(r:p2udt4508-p2udt8516)p2u_46450 Units=km Length=0.001 bus1=p2udt8516.3 bus2=p2udt4508-p2udt8516x.3 switch=n enabled=y phases=1 Linecode=fuse_1_1_1_1

New Fuse.Fuse_fuse(r:p2udt4508-p2udt8516)p2u_46450 monitoredobj=Line.fuse(r:p2udt4508-p2udt8516)p2u_46450 enabled=y ratedcurrent=100.0

New Line.l(r:p2udt8516-p2uhs2_1247)_disconnect Units=km Length=0.001 bus1=p2udt8516-p2uhs2_1247x_b1_1.1.2.3 bus2=p2udt8516-p2uhs2_1247x_b2_1.1.2.3 switch=y enabled=y phases=3 Linecode=3P_OH_AL_ACSR_4/0_Penguin_12_47_0_3_3_3_3

New Line.l(r:p2udt8516-p2uhs2_1247)_cont Units=km Length=1.4168790000000002 bus1=p2udt8516-p2uhs2_1247x_b2_1.1.2.3 bus2=p2udt8516.1.2.3 switch=n enabled=y phases=3 Linecode=3P_OH_AL_ACSR_4/0_Penguin_12_47_0_3_3_3_3
