New Capacitor.p2uc30 Bus1=p2udt2744 phases=3 Kv=12.47 conn=Wye Kvar=300.0

New CapControl.p2uc30 Capacitor=p2uc30 Element=Line.padswitch(r:p2udt2744-p2udt2894)p2u_38707 Terminal=1 delay=100.0 Type=voltage Vmin=120.5 Vmax=125.0 Ptratio=59.99631547328862 Ctratio=100.0
