New Line.l(r:p2udt215lv-p2ulv220) Units=km Length=0.0261124 bus1=p2udt215lv.1.2 bus2=p2ulv220.1.2 switch=n enabled=y phases=2 Linecode=1P_OH_AL_2/0_Rucina_0_416_0_2_2_2_2

New Line.l(r:p2udt215lv-p2ulv8200) Units=km Length=0.0191481 bus1=p2udt215lv.1.2 bus2=p2ulv8200.1.2 switch=n enabled=y phases=2 Linecode=1P_OH_AL_2/0_Rucina_0_416_0_2_2_2_2

New Line.l(r:p2udt215lv-p2ulv9104) Units=km Length=0.0476229 bus1=p2udt215lv.1.2 bus2=p2ulv9104.1.2 switch=n enabled=y phases=2 Linecode=1P_OH_AL_4/0_Zuzara_0_416_0_2_2_2_2

New Line.l(r:p2udm803-p2ulv21981) Units=km Length=0.0453967 bus1=p2udm803.1.2 bus2=p2ulv21981.1.2 switch=n enabled=y phases=2 Linecode=1P_OH_AL_4/0_Zuzara_0_416_0_2_2_2_2

New Line.l(r:p2udm803-p2udt215lv) Units=km Length=0.1049 bus1=p2udt215lv.1.2 bus2=p2udm803.1.2 switch=n enabled=y phases=2 Linecode=1P_OH_AL_4/0_Zuzara_0_416_0_2_2_2_2

New Line.l(r:p2udt872lv-p2ulv932) Units=km Length=0.02308 bus1=p2udt872lv.1.2 bus2=p2ulv932.1.2 switch=n enabled=y phases=2 Linecode=1P_OH_AL_2/0_Rucina_0_416_0_2_2_2_2

New Line.l(r:p2udt2066lv-p2ulv2391) Units=km Length=0.0794593 bus1=p2udt2066lv.1.2 bus2=p2ulv2391.1.2 switch=n enabled=y phases=2 Linecode=1P_UG_AL_1/0_Brenau_0_416_0_2_2_2_2

New Line.l(r:p2udt2066lv-p2ulv13373) Units=km Length=0.03602090000000001 bus1=p2udt2066lv.1.2 bus2=p2ulv13373.1.2 switch=n enabled=y phases=2 Linecode=1P_UG_AL_1/0_Brenau_0_416_0_2_2_2_2

New Line.l(r:p2udt2067lv-p2ulv2392) Units=km Length=0.0547662 bus1=p2udt2067lv.1.2 bus2=p2ulv2392.1.2 switch=n enabled=y phases=2 Linecode=1P_OH_AL_4/0_Zuzara_0_416_0_2_2_2_2

New Line.l(r:p2udt2256lv-p2ulv2651) Units=km Length=0.0281458 bus1=p2udt2256lv.1.2 bus2=p2ulv2651.1.2 switch=n enabled=y phases=2 Linecode=1P_UG_AL_1/0_Brenau_0_416_0_2_2_2_2

New Line.l(r:p2udm8103-p2ulv4094) Units=km Length=0.0247515 bus1=p2udm8103.1.2 bus2=p2ulv4094.1.2 switch=n enabled=y phases=2 Linecode=1P_UG_AL_1/0_Brenau_0_416_0_2_2_2_2

New Line.l(r:p2udm8103-p2udt2256lv) Units=km Length=0.0198819 bus1=p2udt2256lv.1.2 bus2=p2udm8103.1.2 switch=n enabled=y phases=2 Linecode=1P_UG_AL_1/0_Brenau_0_416_0_2_2_2_2

New Line.l(r:p2udm8105-p2ulv23763) Units=km Length=0.017863600000000004 bus1=p2udm8105.1.2 bus2=p2ulv23763.1.2 switch=n enabled=y phases=2 Linecode=1P_UG_AL_1/0_Brenau_0_416_0_2_2_2_2

New Line.l(r:p2udm8104-p2ulv19039) Units=km Length=0.0149441 bus1=p2udm8104.1.2 bus2=p2ulv19039.1.2 switch=n enabled=y phases=2 Linecode=1P_UG_AL_1/0_Brenau_0_416_0_2_2_2_2

New Line.l(r:p2udm8104-p2udm8105) Units=km Length=0.00994325 bus1=p2udm8105.1.2 bus2=p2udm8104.1.2 switch=n enabled=y phases=2 Linecode=1P_UG_AL_1/0_Brenau_0_416_0_2_2_2_2

New Line.l(r:p2udm8105-p2udt2256lv) Units=km Length=0.00994325 bus1=p2udt2256lv.1.2 bus2=p2udm8105.1.2 switch=n enabled=y phases=2 Linecode=1P_UG_AL_4/0_Sweetbriar_0_416_0_2_2_2_2

New Line.l(r:p2udt2886lv-p2ulv3605) Units=km Length=0.0167309 bus1=p2udt2886lv.1.2 bus2=p2ulv3605.1.2 switch=n enabled=y phases=2 Linecode=1P_OH_AL_2/0_Rucina_0_416_0_2_2_2_2

New Line.l(r:p2udt2886lv-p2ulv6023) Units=km Length=0.0098792 bus1=p2udt2886lv.1.2 bus2=p2ulv6023.1.2 switch=n enabled=y phases=2 Linecode=1P_OH_AL_2/0_Rucina_0_416_0_2_2_2_2

New Line.l(r:p2udm10208-p2ulv23129) Units=km Length=0.0070124 bus1=p2udm10208.1.2 bus2=p2ulv23129.1.2 switch=n enabled=y phases=2 Linecode=1P_OH_AL_2/0_Rucina_0_416_0_2_2_2_2

New Line.l(r:p2udm10208-p2udt2886lv) Units=km Length=0.0273256 bus1=p2udt2886lv.1.2 bus2=p2udm10208.1.2 switch=n enabled=y phases=2 Linecode=1P_OH_AL_4/0_Zuzara_0_416_0_2_2_2_2

New Line.l(r:p2udt3489lv-p2ulv4586) Units=km Length=0.110781 bus1=p2udt3489lv.1.2 bus2=p2ulv4586.1.2 switch=n enabled=y phases=2 Linecode=1P_OH_AL_4/0_Zuzara_0_416_0_2_2_2_2

New Line.l(r:p2udt3489lv-p2ulv11477) Units=km Length=0.0932435 bus1=p2udt3489lv.1.2 bus2=p2ulv11477.1.2 switch=n enabled=y phases=2 Linecode=1P_OH_AL_4/0_Zuzara_0_416_0_2_2_2_2

New Line.l(r:p2udt3489lv-p2ulv17483) Units=km Length=0.0248103 bus1=p2udt3489lv.1.2 bus2=p2ulv17483.1.2 switch=n enabled=y phases=2 Linecode=1P_OH_AL_2/0_Rucina_0_416_0_2_2_2_2

New Line.l(r:p2udt4149lv-p2ulv19043) Units=km Length=0.0196611 bus1=p2udt4149lv.1.2 bus2=p2ulv19043.1.2 switch=n enabled=y phases=2 Linecode=1P_OH_AL_2/0_Rucina_0_416_0_2_2_2_2

New Line.l(r:p2udt4149lv-p2ulv23333) Units=km Length=0.022271000000000003 bus1=p2udt4149lv.1.2 bus2=p2ulv23333.1.2 switch=n enabled=y phases=2 Linecode=1P_OH_AL_2/0_Rucina_0_416_0_2_2_2_2

New Line.l(r:p2udm14019-p2ulv5772) Units=km Length=0.0156625 bus1=p2udm14019.1.2 bus2=p2ulv5772.1.2 switch=n enabled=y phases=2 Linecode=1P_OH_AL_2/0_Rucina_0_416_0_2_2_2_2

New Line.l(r:p2udm14019-p2udt4149lv) Units=km Length=0.0184872 bus1=p2udt4149lv.1.2 bus2=p2udm14019.1.2 switch=n enabled=y phases=2 Linecode=1P_OH_AL_2/0_Rucina_0_416_0_2_2_2_2

New Line.l(r:p2udt4545lv-p2ulv6525) Units=km Length=0.0288523 bus1=p2udt4545lv.1.2 bus2=p2ulv6525.1.2 switch=n enabled=y phases=2 Linecode=1P_OH_AL_4/0_Zuzara_0_416_0_2_2_2_2

New Line.l(r:p2udt4545lv-p2ulv20417) Units=km Length=0.0288523 bus1=p2udt4545lv.1.2 bus2=p2ulv20417.1.2 switch=n enabled=y phases=2 Linecode=1P_OH_AL_4/0_Zuzara_0_416_0_2_2_2_2

New Line.l(r:p2udt5178lv-p2ulv16337) Units=km Length=0.028118000000000004 bus1=p2udt5178lv.1.2 bus2=p2ulv16337.1.2 switch=n enabled=y phases=2 Linecode=1P_OH_AL_4/0_Zuzara_0_416_0_2_2_2_2

New Line.l(r:p2udm16786-p2ulv7973) Units=km Length=0.056679400000000005 bus1=p2udm16786.1.2 bus2=p2ulv7973.1.2 switch=n enabled=y phases=2 Linecode=1P_OH_AL_4/0_Zuzara_0_416_0_2_2_2_2

New Line.l(r:p2udm16786-p2ulv24012) Units=km Length=0.0549691 bus1=p2udm16786.1.2 bus2=p2ulv24012.1.2 switch=n enabled=y phases=2 Linecode=1P_OH_AL_4/0_Zuzara_0_416_0_2_2_2_2

New Line.l(r:p2udm16786-p2udt5178lv) Units=km Length=0.019206 bus1=p2udt5178lv.1.2 bus2=p2udm16786.1.2 switch=n enabled=y phases=2 Linecode=1P_OH_AL_2/0_Rucina_0_416_0_2_2_2_2

New Line.l(r:p2udm16788-p2ulv22215) Units=km Length=0.0368656 bus1=p2udm16788.1.2 bus2=p2ulv22215.1.2 switch=n enabled=y phases=2 Linecode=1P_OH_AL_4/0_Zuzara_0_416_0_2_2_2_2

New Line.l(r:p2udm16788-p2udt5178lv) Units=km Length=0.0192148 bus1=p2udt5178lv.1.2 bus2=p2udm16788.1.2 switch=n enabled=y phases=2 Linecode=1P_OH_AL_2/0_Rucina_0_416_0_2_2_2_2

New Line.l(r:p2udt5265lv-p2ulv8198) Units=km Length=0.0746603 bus1=p2udt5265lv.1.2 bus2=p2ulv8198.1.2 switch=n enabled=y phases=2 Linecode=1P_OH_AL_4/0_Zuzara_0_416_0_2_2_2_2

New Line.l(r:p2udt5267lv-p2ulv8201) Units=km Length=0.00905442 bus1=p2udt5267lv.1.2 bus2=p2ulv8201.1.2 switch=n enabled=y phases=2 Linecode=1P_OH_AL_2/0_Rucina_0_416_0_2_2_2_2

New Line.l(r:p2udt5267lv-p2ulv21740) Units=km Length=0.00905442 bus1=p2udt5267lv.1.2 bus2=p2ulv21740.1.2 switch=n enabled=y phases=2 Linecode=1P_OH_AL_2/0_Rucina_0_416_0_2_2_2_2

New Line.l(r:p2udt5268lv-p2ulv8202) Units=km Length=0.001 bus1=p2udt5268lv.1.2 bus2=p2ulv8202.1.2 switch=n enabled=y phases=2 Linecode=1P_OH_AL_4_Periwinkle_0_416_0_2_2_2_2

New Line.l(r:p2udm17870-p2ulv9103) Units=km Length=0.0249475 bus1=p2udm17870.1.2 bus2=p2ulv9103.1.2 switch=n enabled=y phases=2 Linecode=1P_UG_AL_1/0_Brenau_0_416_0_2_2_2_2

New Line.l(r:p2udm17870-p2udt5613lv) Units=km Length=0.00993862 bus1=p2udt5613lv.1.2 bus2=p2udm17870.1.2 switch=n enabled=y phases=2 Linecode=1P_UG_AL_1/0_Brenau_0_416_0_2_2_2_2

New Line.l(r:p2udm17871-p2ulv18144) Units=km Length=0.0751542 bus1=p2udm17871.1.2 bus2=p2ulv18144.1.2 switch=n enabled=y phases=2 Linecode=1P_UG_AL_1/0_Brenau_0_416_0_2_2_2_2

New Line.l(r:p2udm17871-p2udt5613lv) Units=km Length=0.00994325 bus1=p2udt5613lv.1.2 bus2=p2udm17871.1.2 switch=n enabled=y phases=2 Linecode=1P_UG_AL_1/0_Brenau_0_416_0_2_2_2_2

New Line.l(r:p2udm18272-p2ulv9565) Units=km Length=0.0222595 bus1=p2udm18272.1.2 bus2=p2ulv9565.1.2 switch=n enabled=y phases=2 Linecode=1P_UG_AL_1/0_Brenau_0_416_0_2_2_2_2

New Line.l(r:p2udm18272-p2udt5781lv) Units=km Length=0.00993439 bus1=p2udt5781lv.1.2 bus2=p2udm18272.1.2 switch=n enabled=y phases=2 Linecode=1P_UG_AL_1/0_Brenau_0_416_0_2_2_2_2

New Line.l(r:p2udm18273-p2ulv16559) Units=km Length=0.0486081 bus1=p2udm18273.1.2 bus2=p2ulv16559.1.2 switch=n enabled=y phases=2 Linecode=1P_UG_AL_1/0_Brenau_0_416_0_2_2_2_2

New Line.l(r:p2udm18273-p2udt5781lv) Units=km Length=0.0198865 bus1=p2udt5781lv.1.2 bus2=p2udm18273.1.2 switch=n enabled=y phases=2 Linecode=1P_UG_AL_1/0_Brenau_0_416_0_2_2_2_2

New Line.l(r:p2udt5782lv-p2ulv9566) Units=km Length=0.0136306 bus1=p2udt5782lv.1.2 bus2=p2ulv9566.1.2 switch=n enabled=y phases=2 Linecode=1P_OH_AL_2/0_Rucina_0_416_0_2_2_2_2

New Line.l(r:p2udt5782lv-p2ulv21050) Units=km Length=0.0136306 bus1=p2udt5782lv.1.2 bus2=p2ulv21050.1.2 switch=n enabled=y phases=2 Linecode=1P_OH_AL_2/0_Rucina_0_416_0_2_2_2_2

New Line.l(r:p2udt6038lv-p2ulv10267) Units=km Length=0.0294414 bus1=p2udt6038lv.1.2 bus2=p2ulv10267.1.2 switch=n enabled=y phases=2 Linecode=1P_OH_AL_4/0_Zuzara_0_416_0_2_2_2_2

New Line.l(r:p2udt6038lv-p2ulv14721) Units=km Length=0.0559754 bus1=p2udt6038lv.1.2 bus2=p2ulv14721.1.2 switch=n enabled=y phases=2 Linecode=1P_OH_AL_4/0_Zuzara_0_416_0_2_2_2_2

New Line.l(r:p2udt6039lv-p2ulv10269) Units=km Length=0.0450626 bus1=p2udt6039lv.1.2 bus2=p2ulv10269.1.2 switch=n enabled=y phases=2 Linecode=1P_UG_AL_1/0_Brenau_0_416_0_2_2_2_2

New Line.l(r:p2udt6353lv-p2ulv11233) Units=km Length=0.001 bus1=p2udt6353lv.1.2 bus2=p2ulv11233.1.2 switch=n enabled=y phases=2 Linecode=1P_OH_AL_4_Periwinkle_0_416_0_2_2_2_2

New Line.l(r:p2udt6612lv-p2ulv12169) Units=km Length=0.001 bus1=p2udt6612lv.1.2 bus2=p2ulv12169.1.2 switch=n enabled=y phases=2 Linecode=1P_OH_AL_4_Periwinkle_0_416_0_2_2_2_2

New Line.l(r:p2udt7570lv-p2ulv16092) Units=km Length=0.0648556 bus1=p2udt7570lv.1.2 bus2=p2ulv16092.1.2 switch=n enabled=y phases=2 Linecode=1P_OH_AL_4/0_Zuzara_0_416_0_2_2_2_2

New Line.l(r:p2udt7571lv-p2ulv16093) Units=km Length=0.070891 bus1=p2udt7571lv.1.2 bus2=p2ulv16093.1.2 switch=n enabled=y phases=2 Linecode=1P_OH_AL_4/0_Zuzara_0_416_0_2_2_2_2

New Line.l(r:p2udt7683lv-p2ulv16560) Units=km Length=0.0242821 bus1=p2udt7683lv.1.2 bus2=p2ulv16560.1.2 switch=n enabled=y phases=2 Linecode=1P_UG_AL_1/0_Brenau_0_416_0_2_2_2_2

New Line.l(r:p2udt7737lv-p2ulv16800) Units=km Length=0.001 bus1=p2udt7737lv.1.2 bus2=p2ulv16800.1.2 switch=n enabled=y phases=2 Linecode=1P_UG_AL_1/0_Brenau_0_416_0_2_2_2_2

New Line.l(r:p2udt7820lv-p2ulv17245) Units=km Length=0.0569207 bus1=p2udt7820lv.1.2 bus2=p2ulv17245.1.2 switch=n enabled=y phases=2 Linecode=1P_OH_AL_4/0_Zuzara_0_416_0_2_2_2_2

New Line.l(r:p2udt7897lv-p2ulv17702) Units=km Length=0.0230282 bus1=p2udt7897lv.1.2 bus2=p2ulv17702.1.2 switch=n enabled=y phases=2 Linecode=1P_OH_AL_2/0_Rucina_0_416_0_2_2_2_2

New Line.l(r:p2udt7898lv-p2ulv17704) Units=km Length=0.0198838 bus1=p2udt7898lv.1.2 bus2=p2ulv17704.1.2 switch=n enabled=y phases=2 Linecode=1P_OH_AL_2/0_Rucina_0_416_0_2_2_2_2

New Line.l(r:p2udt7898lv-p2ulv23334) Units=km Length=0.0198838 bus1=p2udt7898lv.1.2 bus2=p2ulv23334.1.2 switch=n enabled=y phases=2 Linecode=1P_OH_AL_2/0_Rucina_0_416_0_2_2_2_2

New Line.l(r:p2udt8027lv-p2ulv18384) Units=km Length=0.08931120000000001 bus1=p2udt8027lv.1.2 bus2=p2ulv18384.1.2 switch=n enabled=y phases=2 Linecode=1P_OH_AL_4/0_Zuzara_0_416_0_2_2_2_2

New Line.l(r:p2udt8149lv-p2ulv19042) Units=km Length=0.0127073 bus1=p2udt8149lv.1.2 bus2=p2ulv19042.1.2 switch=n enabled=y phases=2 Linecode=1P_OH_AL_2/0_Rucina_0_416_0_2_2_2_2

New Line.l(r:p2udt8149lv-p2ulv19520) Units=km Length=0.0127073 bus1=p2udt8149lv.1.2 bus2=p2ulv19520.1.2 switch=n enabled=y phases=2 Linecode=1P_OH_AL_2/0_Rucina_0_416_0_2_2_2_2

New Line.l(r:p2udt8227lv-p2ulv19521) Units=km Length=0.001 bus1=p2udt8227lv.1.2 bus2=p2ulv19521.1.2 switch=n enabled=y phases=2 Linecode=1P_UG_AL_1/0_Brenau_0_416_0_2_2_2_2

New Line.l(r:p2udt8422lv-p2ulv20630) Units=km Length=0.0553698 bus1=p2udt8422lv.1.2 bus2=p2ulv20630.1.2 switch=n enabled=y phases=2 Linecode=1P_OH_AL_4/0_Zuzara_0_416_0_2_2_2_2

New Line.l(r:p2udt8942lv-p2ulv24214) Units=km Length=0.001 bus1=p2udt8942lv.1.2 bus2=p2ulv24214.1.2 switch=n enabled=y phases=2 Linecode=1P_OH_AL_4_Periwinkle_0_416_0_2_2_2_2

New Line.l(r:p2udt215-p2udt7570) Units=km Length=0.16277800000000003 bus1=p2udt7570.3 bus2=p2udt215.3 switch=n enabled=y phases=1 Linecode=1P_OH_AL_ACSR_#2_Sparrow_12_47_0_1_1_1_1

New Line.l(r:p2udt5178-p2udt6612) Units=km Length=0.44638 bus1=p2udt5178.3 bus2=p2udt6612.3 switch=n enabled=y phases=1 Linecode=1P_OH_AL_ACSR_#2_Sparrow_12_47_0_1_1_1_1

New Line.l(r:p2udt4545-p2udt7820)_s0 Units=km Length=0.12711 bus1=p2udt7820.3 bus2=p2udt4545-p2udt7820x.3 switch=n enabled=y phases=1 Linecode=1P_OH_AL_ACSR_#2_Sparrow_12_47_0_1_1_1_1

New Line.l(r:p2udt4545-p2udt7820)_s1 Units=km Length=0.0604727 bus1=p2udt4545-p2udt7820x.3 bus2=p2udt4545.3 switch=n enabled=y phases=1 Linecode=1P_OH_AL_ACSR_#2_Sparrow_12_47_0_1_1_1_1

New Line.l(r:p2udt5267-p2udt7820)_s0 Units=km Length=0.103562 bus1=p2udt7820.3 bus2=p2udt5267-p2udt7820x.3 switch=n enabled=y phases=1 Linecode=1P_OH_AL_ACSR_#2_Sparrow_12_47_0_1_1_1_1

New Line.l(r:p2udt5267-p2udt7820)_s1 Units=km Length=0.0153248 bus1=p2udt5267-p2udt7820x.3 bus2=p2udt5267.3 switch=n enabled=y phases=1 Linecode=1P_OH_AL_ACSR_#2_Sparrow_12_47_0_1_1_1_1

New Line.l(r:p2udt2067-p2udt7820) Units=km Length=0.059416800000000006 bus1=p2udt2067.3 bus2=p2udt7820.3 switch=n enabled=y phases=1 Linecode=1P_OH_AL_ACSR_#2_Sparrow_12_47_0_1_1_1_1

New Line.l(r:p2udt2067-p2udt8422) Units=km Length=0.0390201 bus1=p2udt8422.3 bus2=p2udt2067.3 switch=n enabled=y phases=1 Linecode=1P_OH_AL_ACSR_#2_Sparrow_12_47_0_1_1_1_1

New Line.l(r:p2udt7898-p2udt8422) Units=km Length=0.153371 bus1=p2udt8422.3 bus2=p2udt7898.3 switch=n enabled=y phases=1 Linecode=1P_OH_AL_ACSR_#2_Sparrow_12_47_0_1_1_1_1

New Line.l(r:p2udt5178-p2udt8422) Units=km Length=0.07684620000000002 bus1=p2udt5178.3 bus2=p2udt8422.3 switch=n enabled=y phases=1 Linecode=1P_OH_AL_ACSR_#2_Sparrow_12_47_0_1_1_1_1

New Line.l(r:p2udt5178-p2udt7570) Units=km Length=0.134889 bus1=p2udt7570.3 bus2=p2udt5178.3 switch=n enabled=y phases=1 Linecode=1P_OH_AL_ACSR_#2_Sparrow_12_47_0_1_1_1_1

New Line.l(r:p2udt7570-p2udt7683) Units=km Length=0.21879 bus1=p2udt7570-p2udt7683x.3 bus2=p2udt7570.3 switch=n enabled=y phases=1 Linecode=1P_OH_AL_ACSR_#2_Sparrow_12_47_0_1_1_1_1

New Line.l(r:p2udt5613-p2udt8227) Units=km Length=0.156884 bus1=p2udt5613-p2udt8227xx.2 bus2=p2udt5613-p2udt8227xxx.2 switch=n enabled=y phases=1 Linecode=1P_UG_AL_#2_15_12_47_0_1_1_1_1

New Line.l(r:p2udt6039-p2udt7737) Units=km Length=0.237897 bus1=p2udt6039-p2udt7737xx.2 bus2=p2udt6039-p2udt7737xxx.2 switch=n enabled=y phases=1 Linecode=1P_UG_AL_#2_15_12_47_0_1_1_1_1

New Line.l(r:p2udt5268-p2udt872)_s0 Units=km Length=0.16805200000000003 bus1=p2udt5268-p2udt872x.3 bus2=p2udt5268-p2udt872xx.3 switch=n enabled=y phases=1 Linecode=1P_OH_AL_ACSR_#2_Sparrow_12_47_0_1_1_1_1

New Line.l(r:p2udt5268-p2udt872)_s1 Units=km Length=0.182261 bus1=p2udt5268-p2udt872xx.3 bus2=p2udt872.3 switch=n enabled=y phases=1 Linecode=1P_OH_AL_ACSR_#2_Sparrow_12_47_0_1_1_1_1

New Line.l(r:p2udt5782-p2udt6353) Units=km Length=0.04490170000000001 bus1=p2udt5782-p2udt6353x.3 bus2=p2udt5782.3 switch=n enabled=y phases=1 Linecode=1P_OH_AL_ACSR_#2_Sparrow_12_47_0_1_1_1_1

New Line.l(r:p2udt8149-p2udt8942) Units=km Length=0.109564 bus1=p2udt8942.2 bus2=p2udt8149.2 switch=n enabled=y phases=1 Linecode=1P_OH_AL_ACSR_#2_Sparrow_12_47_0_1_1_1_1

New Line.l(r:p2udt7571-p2udt8942)_s0 Units=km Length=0.12491100000000001 bus1=p2udt7571-p2udt8942x.2 bus2=p2udt7571-p2udt8942xx.2 switch=n enabled=y phases=1 Linecode=1P_OH_AL_ACSR_#2_Sparrow_12_47_0_1_1_1_1

New Line.l(r:p2udt7571-p2udt8942)_s1 Units=km Length=0.333595 bus1=p2udt7571-p2udt8942xx.2 bus2=p2udt8942.2 switch=n enabled=y phases=1 Linecode=1P_OH_AL_ACSR_#2_Sparrow_12_47_0_1_1_1_1

New Line.l(r:p2udt2886-p2udt6038)_s0 Units=km Length=0.138544 bus1=p2udt2886.1 bus2=p2udt2886-p2udt6038x.1 switch=n enabled=y phases=1 Linecode=1P_OH_AL_ACSR_#2_Sparrow_12_47_0_1_1_1_1

New Line.l(r:p2udt2886-p2udt6038)_s1 Units=km Length=0.41589500000000007 bus1=p2udt2886-p2udt6038x.1 bus2=p2udt2886-p2udt6038xx.1 switch=n enabled=y phases=1 Linecode=1P_OH_AL_ACSR_#2_Sparrow_12_47_0_1_1_1_1

New Line.l(r:p2udt2886-p2udt6038)_s2 Units=km Length=0.137774 bus1=p2udt2886-p2udt6038xx.1 bus2=p2udt6038.1 switch=n enabled=y phases=1 Linecode=1P_OH_AL_ACSR_#2_Sparrow_12_47_0_1_1_1_1

New Line.l(r:p2udt2886-p2udt7897) Units=km Length=0.0136581 bus1=p2udt7897.1 bus2=p2udt2886.1 switch=n enabled=y phases=1 Linecode=1P_OH_AL_ACSR_#2_Sparrow_12_47_0_1_1_1_1

New Line.l(r:p2udt5265-p2udt7897)_s0 Units=km Length=0.273784 bus1=p2udt5265-p2udt7897x.1 bus2=p2udt5265-p2udt7897xx.1 switch=n enabled=y phases=1 Linecode=1P_OH_AL_ACSR_#2_Sparrow_12_47_0_1_1_1_1

New Line.l(r:p2udt5265-p2udt7897)_s1 Units=km Length=0.001 bus1=p2udt5265-p2udt7897xx.1 bus2=p2udt5265-p2udt7897xxx.1 switch=n enabled=y phases=1 Linecode=1P_OH_AL_ACSR_#2_Sparrow_12_47_0_1_1_1_1

New Line.l(r:p2udt5265-p2udt7897)_s2 Units=km Length=0.0646156 bus1=p2udt5265-p2udt7897xxx.1 bus2=p2udt7897.1 switch=n enabled=y phases=1 Linecode=1P_OH_AL_ACSR_#2_Sparrow_12_47_0_1_1_1_1

New Line.l(r:p2udt6679lv-p2ulv12402) Units=km Length=0.08867450000000002 bus1=p2udt6679lv.1.2.3 bus2=p2ulv12402.1.2.3 switch=n enabled=y phases=3 Linecode=3P_UG_AL_350kcmil_15_0_416_0_3_3_3_3

New Line.l(r:p2udt6200lv-p2ulv10766) Units=km Length=0.0107321 bus1=p2udt6200lv.1.2.3 bus2=p2ulv10766.1.2.3 switch=n enabled=y phases=3 Linecode=3P_UG_AL_350kcmil_15_0_416_0_3_3_3_3

New Line.l(r:p2udt4149-p2udt6200) Units=km Length=0.001 bus1=p2udt4149.1.2.3 bus2=p2udt6200.1.2.3 switch=n enabled=y phases=3 Linecode=3P_OH_AL_ACSR_4/0_Penguin_12_47_0_3_3_3_3

New Line.l(r:p2udt4149-p2udt7683) Units=km Length=0.261981 bus1=p2udt7683.1.2.3 bus2=p2udt4149.1.2.3 switch=n enabled=y phases=3 Linecode=3P_OH_AL_ACSR_4/0_Penguin_12_47_0_3_3_3_3

New Line.l(r:p2udt6679-p2udt7683) Units=km Length=0.00994325 bus1=p2udt6679-p2udt7683x.1.2.3 bus2=p2udt6679-p2udt7683xx.1.2.3 switch=n enabled=y phases=3 Linecode=3P_UG_AL_4/0_25_12_47_0_3_3_3_3

New Line.l(r:p2udt5613-p2udt6679) Units=km Length=0.0497028 bus1=p2udt5613-p2udt6679x.1.2.3 bus2=p2udt5613-p2udt6679xx.1.2.3 switch=n enabled=y phases=3 Linecode=3P_UG_AL_4/0_25_12_47_0_3_3_3_3

New Line.l(r:p2udt5613-p2udt6039) Units=km Length=0.248509 bus1=p2udt5613-p2udt6039xx.1.2.3 bus2=p2udt5613-p2udt6039x.1.2.3 switch=n enabled=y phases=3 Linecode=3P_UG_AL_4/0_25_12_47_0_3_3_3_3

New Line.l(r:p2udt5781-p2udt6039) Units=km Length=0.218688 bus1=p2udt5781-p2udt6039x.1.2.3 bus2=p2udt5781-p2udt6039xx.1.2.3 switch=n enabled=y phases=3 Linecode=3P_UG_AL_4/0_25_12_47_0_3_3_3_3

New Line.l(r:p2udt2256-p2udt5781) Units=km Length=0.0795279 bus1=p2udt2256-p2udt5781x.1.2.3 bus2=p2udt2256-p2udt5781xx.1.2.3 switch=n enabled=y phases=3 Linecode=3P_UG_AL_4/0_25_12_47_0_3_3_3_3

New Line.l(r:p2udt2066-p2udt2256) Units=km Length=0.139169 bus1=p2udt2066-p2udt2256x.1.2.3 bus2=p2udt2066-p2udt2256xx.1.2.3 switch=n enabled=y phases=3 Linecode=3P_UG_AL_4/0_25_12_47_0_3_3_3_3

New Line.l(r:p2udt4546lv-p2ulv6526) Units=km Length=0.0629837 bus1=p2udt4546lv.1.2.3 bus2=p2ulv6526.1.2.3 switch=n enabled=y phases=3 Linecode=3P_UG_AL_350kcmil_15_0_416_0_3_3_3_3

New Line.l(r:p2udt3489-p2udt4546) Units=km Length=0.0994844 bus1=p2udt3489.1.2.3 bus2=p2udt4546.1.2.3 switch=n enabled=y phases=3 Linecode=3P_OH_AL_ACSR_4/0_Penguin_12_47_0_3_3_3_3

New Line.l(r:p2udt3489-p2udt7571) Units=km Length=0.0994709 bus1=p2udt7571.1.2.3 bus2=p2udt3489.1.2.3 switch=n enabled=y phases=3 Linecode=3P_OH_AL_ACSR_4/0_Penguin_12_47_0_3_3_3_3

New Line.l(r:p2udt5266lv-p2ulv8199) Units=km Length=0.0507754 bus1=p2udt5266lv.1.2.3 bus2=p2ulv8199.1.2.3 switch=n enabled=y phases=3 Linecode=3P_UG_AL_350kcmil_15_0_416_0_3_3_3_3

New Line.l(r:p2udt5266-p2udt8027) Units=km Length=0.059687 bus1=p2udt8027.1.2.3 bus2=p2udt5266.1.2.3 switch=n enabled=y phases=3 Linecode=3P_OH_AL_ACSR_4/0_Penguin_12_47_0_3_3_3_3

New Line.l(r:p2udt7571-p2udt8027) Units=km Length=0.059687 bus1=p2udt7571.1.2.3 bus2=p2udt8027.1.2.3 switch=n enabled=y phases=3 Linecode=3P_OH_AL_ACSR_4/0_Penguin_12_47_0_3_3_3_3

New Line.l(r:p2udt6353-p2udt7571)_s0 Units=km Length=0.109212 bus1=p2udt6353.1.2.3 bus2=p2udt6353-p2udt7571x.1.2.3 switch=n enabled=y phases=3 Linecode=3P_OH_AL_ACSR_4/0_Penguin_12_47_0_3_3_3_3

New Line.l(r:p2udt6353-p2udt7571)_s1 Units=km Length=0.0645979 bus1=p2udt6353-p2udt7571x.1.2.3 bus2=p2udt7571.1.2.3 switch=n enabled=y phases=3 Linecode=3P_OH_AL_ACSR_4/0_Penguin_12_47_0_3_3_3_3

New Line.l(r:p2udt5268-p2udt6353) Units=km Length=0.46683100000000005 bus1=p2udt5268.1.2.3 bus2=p2udt6353.1.2.3 switch=n enabled=y phases=3 Linecode=3P_OH_AL_ACSR_4/0_Penguin_12_47_0_3_3_3_3

New Line.l(r:p2udt2066-p2udt5268)_s0 Units=km Length=0.15820100000000004 bus1=p2udt2066-p2udt5268x.1.2.3 bus2=p2udt2066-p2udt5268xx.1.2.3 switch=n enabled=y phases=3 Linecode=3P_UG_AL_4/0_25_12_47_0_3_3_3_3

New Line.l(r:p2udt2066-p2udt5268)_s1 Units=km Length=0.423494 bus1=p2udt2066-p2udt5268xx.1.2.3 bus2=p2udt2066-p2udt5268xxx.1.2.3 switch=n enabled=y phases=3 Linecode=3P_OH_AL_ACSR_4/0_Penguin_12_47_0_3_3_3_3

New Line.l(r:p2udt2066-p2udt5265) Units=km Length=0.0773558 bus1=p2udt5265.1.2.3 bus2=p2udt2066.1.2.3 switch=n enabled=y phases=3 Linecode=3P_OH_AL_ACSR_4/0_Penguin_12_47_0_3_3_3_3

New Line.l(r:p2udt5265-p2uhs4_1247)_s1 Units=km Length=2.14576 bus1=p2udt5265-p2uhs4_1247x.1.2.3 bus2=p2udt5265.1.2.3 switch=n enabled=y phases=3 Linecode=3P_OH_AL_ACSR_4/0_Penguin_12_47_0_3_3_3_3

New Line.l(r:p2udt4022-p2udt4546)_s0 Units=km Length=0.27539 bus1=p2udt4022-p2udt4546xxx.1.2.3 bus2=p2udt4022-p2udt4546xx.1.2.3 switch=n enabled=y phases=3 Linecode=3P_OH_AL_ACSR_1033kcmil_Curlew_12.47_1_3_3_3_3

New Line.padswitch(r:p2udt5613-p2udt8227)p2u_39208 Units=km Length=0.001 bus1=p2udt5613-p2udt8227x.2 bus2=p2udt5613-p2udt8227xx.2 switch=y enabled=y phases=1 Linecode=padswitch_1_1_1_1

New Line.padswitch(r:p2udt5613-p2udt8227)p2u_39209 Units=km Length=0.001 bus1=p2udt5613-p2udt8227xxx.2 bus2=p2udt8227.2 switch=y enabled=y phases=1 Linecode=padswitch_1_2_1_1_1

New Line.padswitch(r:p2udt6039-p2udt7737)p2u_39212 Units=km Length=0.001 bus1=p2udt6039-p2udt7737x.2 bus2=p2udt6039-p2udt7737xx.2 switch=y enabled=y phases=1 Linecode=padswitch_1_2_1_0_1_1

New Line.padswitch(r:p2udt6039-p2udt7737)p2u_39213 Units=km Length=0.001 bus1=p2udt6039-p2udt7737xxx.2 bus2=p2udt7737.2 switch=y enabled=y phases=1 Linecode=padswitch_1_2_1_0_1_1

New Line.padswitch(r:p2udt6679-p2udt7683)p2u_39204 Units=km Length=0.001 bus1=p2udt6679.1.2.3 bus2=p2udt6679-p2udt7683x.1.2.3 switch=y enabled=y phases=3 Linecode=padswitch_3_3_3_3

New Line.padswitch(r:p2udt6679-p2udt7683)p2u_39205 Units=km Length=0.001 bus1=p2udt6679-p2udt7683xx.1.2.3 bus2=p2udt7683.1.2.3 switch=y enabled=y phases=3 Linecode=padswitch_3_3_3_3_3

New Line.padswitch(r:p2udt5613-p2udt6679)p2u_39206 Units=km Length=0.001 bus1=p2udt5613.1.2.3 bus2=p2udt5613-p2udt6679x.1.2.3 switch=y enabled=y phases=3 Linecode=padswitch_3_3_3_3_3

New Line.padswitch(r:p2udt5613-p2udt6679)p2u_39207 Units=km Length=0.001 bus1=p2udt5613-p2udt6679xx.1.2.3 bus2=p2udt6679.1.2.3 switch=y enabled=y phases=3 Linecode=padswitch_3_3_3_3_3

New Line.padswitch(r:p2udt5613-p2udt6039)p2u_39210 Units=km Length=0.001 bus1=p2udt6039.1.2.3 bus2=p2udt5613-p2udt6039xx.1.2.3 switch=y enabled=y phases=3 Linecode=padswitch_3_3_3_3_3

New Line.padswitch(r:p2udt5613-p2udt6039)p2u_39211 Units=km Length=0.001 bus1=p2udt5613-p2udt6039x.1.2.3 bus2=p2udt5613.1.2.3 switch=y enabled=y phases=3 Linecode=padswitch_3_3_3_3_3

New Line.padswitch(r:p2udt5781-p2udt6039)p2u_39214 Units=km Length=0.001 bus1=p2udt5781.1.2.3 bus2=p2udt5781-p2udt6039x.1.2.3 switch=y enabled=y phases=3 Linecode=padswitch_3_3_3_3_3

New Line.padswitch(r:p2udt5781-p2udt6039)p2u_39215 Units=km Length=0.001 bus1=p2udt5781-p2udt6039xx.1.2.3 bus2=p2udt6039.1.2.3 switch=y enabled=y phases=3 Linecode=padswitch_3_3_3_3_3

New Line.padswitch(r:p2udt2256-p2udt5781)p2u_39216 Units=km Length=0.001 bus1=p2udt2256.1.2.3 bus2=p2udt2256-p2udt5781x.1.2.3 switch=y enabled=y phases=3 Linecode=padswitch_3_3_3_3_3

New Line.padswitch(r:p2udt2256-p2udt5781)p2u_39217 Units=km Length=0.001 bus1=p2udt2256-p2udt5781xx.1.2.3 bus2=p2udt5781.1.2.3 switch=y enabled=y phases=3 Linecode=padswitch_3_3_3_3_3

New Line.padswitch(r:p2udt2066-p2udt2256)p2u_39218 Units=km Length=0.001 bus1=p2udt2066.1.2.3 bus2=p2udt2066-p2udt2256x.1.2.3 switch=y enabled=y phases=3 Linecode=padswitch_3_3_3_3_3

New Line.padswitch(r:p2udt2066-p2udt2256)p2u_39219 Units=km Length=0.001 bus1=p2udt2066-p2udt2256xx.1.2.3 bus2=p2udt2256.1.2.3 switch=y enabled=y phases=3 Linecode=padswitch_3_3_3_3_3

New Line.padswitch(r:p2udt2066-p2udt5268)p2u_39220 Units=km Length=0.001 bus1=p2udt2066.1.2.3 bus2=p2udt2066-p2udt5268x.1.2.3 switch=y enabled=y phases=3 Linecode=padswitch_3_3_3_3_3

New Line.padswitch(r:p2udt2066-p2udt5268)p2u_39221 Units=km Length=0.001 bus1=p2udt2066-p2udt5268xxx.1.2.3 bus2=p2udt5268.1.2.3 switch=y enabled=y phases=3 Linecode=padswitch_3_3_3_1_3_3

New Line.elbswitch(r:p2udt4022-p2udt4546)p2u_45511 Units=km Length=0.001 bus1=p2udt4546.1.2.3 bus2=p2udt4022-p2udt4546xxx.1.2.3 switch=y enabled=n phases=3 Linecode=elbswitch_3_3_3_3

New Line.fuse(r:p2udt5265-p2udt7897)p2u_46060 Units=km Length=0.001 bus1=p2udt5265.1 bus2=p2udt5265-p2udt7897x.1 switch=n enabled=y phases=1 Linecode=fuse_1_1_1_1

New Fuse.Fuse_fuse(r:p2udt5265-p2udt7897)p2u_46060 monitoredobj=Line.fuse(r:p2udt5265-p2udt7897)p2u_46060 enabled=y ratedcurrent=100.0

New Line.fuse(r:p2udt5268-p2udt872)p2u_46061 Units=km Length=0.001 bus1=p2udt5268.3 bus2=p2udt5268-p2udt872x.3 switch=n enabled=y phases=1 Linecode=fuse_1_1_1_1

New Fuse.Fuse_fuse(r:p2udt5268-p2udt872)p2u_46061 monitoredobj=Line.fuse(r:p2udt5268-p2udt872)p2u_46061 enabled=y ratedcurrent=100.0

New Line.fuse(r:p2udt5613-p2udt8227)p2u_46098 Units=km Length=0.001 bus1=p2udt5613.2 bus2=p2udt5613-p2udt8227x.2 switch=n enabled=y phases=1 Linecode=fuse_1_6_1_1_1

New Fuse.Fuse_fuse(r:p2udt5613-p2udt8227)p2u_46098 monitoredobj=Line.fuse(r:p2udt5613-p2udt8227)p2u_46098 enabled=y ratedcurrent=100.0

New Line.fuse(r:p2udt6039-p2udt7737)p2u_46150 Units=km Length=0.001 bus1=p2udt6039.2 bus2=p2udt6039-p2udt7737x.2 switch=n enabled=y phases=1 Linecode=fuse_1_6_1_3_1_1

New Fuse.Fuse_fuse(r:p2udt6039-p2udt7737)p2u_46150 monitoredobj=Line.fuse(r:p2udt6039-p2udt7737)p2u_46150 enabled=y ratedcurrent=100.0

New Line.fuse(r:p2udt5782-p2udt6353)p2u_46188 Units=km Length=0.001 bus1=p2udt6353.3 bus2=p2udt5782-p2udt6353x.3 switch=n enabled=y phases=1 Linecode=fuse_1_1_1_1

New Fuse.Fuse_fuse(r:p2udt5782-p2udt6353)p2u_46188 monitoredobj=Line.fuse(r:p2udt5782-p2udt6353)p2u_46188 enabled=y ratedcurrent=100.0

New Line.fuse(r:p2udt7571-p2udt8942)p2u_46336 Units=km Length=0.001 bus1=p2udt7571.2 bus2=p2udt7571-p2udt8942x.2 switch=n enabled=y phases=1 Linecode=fuse_1_1_1_1

New Fuse.Fuse_fuse(r:p2udt7571-p2udt8942)p2u_46336 monitoredobj=Line.fuse(r:p2udt7571-p2udt8942)p2u_46336 enabled=y ratedcurrent=100.0

New Line.fuse(r:p2udt7570-p2udt7683)p2u_46343 Units=km Length=0.001 bus1=p2udt7683.3 bus2=p2udt7570-p2udt7683x.3 switch=n enabled=y phases=1 Linecode=fuse_1_1_1_1

New Fuse.Fuse_fuse(r:p2udt7570-p2udt7683)p2u_46343 monitoredobj=Line.fuse(r:p2udt7570-p2udt7683)p2u_46343 enabled=y ratedcurrent=100.0
