New Capacitor.p2uc31 Bus1=p2udt3345 phases=3 Kv=12.47 conn=Wye Kvar=300.0

New CapControl.p2uc31 Capacitor=p2uc31 Element=Line.padswitch(r:p2udt3345-p2udt7366)p2u_39334 Terminal=1 delay=100.0 Type=voltage Vmin=120.5 Vmax=125.0 Ptratio=59.99631547328862 Ctratio=100.0

New Capacitor.p2uc33 Bus1=p2udt6743 phases=3 Kv=12.47 conn=Wye Kvar=300.0

New CapControl.p2uc33 Capacitor=p2uc33 Element=Line.padswitch(r:p2udt3763-p2udt6743)p2u_39462 Terminal=1 delay=100.0 Type=voltage Vmin=120.5 Vmax=125.0 Ptratio=59.99631547328862 Ctratio=100.0
