New Line.l(r:p2udm795-p2ulv217) Units=km Length=0.0254127 bus1=p2udm795.1.2 bus2=p2ulv217.1.2 switch=n enabled=y phases=2 Linecode=1P_OH_AL_2/0_Rucina_0_416_0_2_2_2_2

New Line.l(r:p2udm795-p2udt212lv) Units=km Length=0.0191895 bus1=p2udt212lv.1.2 bus2=p2udm795.1.2 switch=n enabled=y phases=2 Linecode=1P_OH_AL_2/0_Rucina_0_416_0_2_2_2_2

New Line.l(r:p2udm796-p2ulv14936) Units=km Length=0.0348846 bus1=p2udm796.1.2 bus2=p2ulv14936.1.2 switch=n enabled=y phases=2 Linecode=1P_OH_AL_4/0_Zuzara_0_416_0_2_2_2_2

New Line.l(r:p2udm796-p2udt212lv) Units=km Length=0.0191993 bus1=p2udt212lv.1.2 bus2=p2udm796.1.2 switch=n enabled=y phases=2 Linecode=1P_OH_AL_2/0_Rucina_0_416_0_2_2_2_2

New Line.l(r:p2udt434lv-p2ulv10268) Units=km Length=0.04119830000000001 bus1=p2udt434lv.1.2 bus2=p2ulv10268.1.2 switch=n enabled=y phases=2 Linecode=1P_OH_AL_4/0_Zuzara_0_416_0_2_2_2_2

New Line.l(r:p2udm1600-p2ulv451) Units=km Length=0.029834400000000004 bus1=p2udm1600.1.2 bus2=p2ulv451.1.2 switch=n enabled=y phases=2 Linecode=1P_OH_AL_4/0_Zuzara_0_416_0_2_2_2_2

New Line.l(r:p2udm1600-p2udt434lv) Units=km Length=0.0177015 bus1=p2udt434lv.1.2 bus2=p2udm1600.1.2 switch=n enabled=y phases=2 Linecode=1P_OH_AL_2/0_Rucina_0_416_0_2_2_2_2

New Line.l(r:p2udt648lv-p2ulv686) Units=km Length=0.001 bus1=p2udt648lv.1.2 bus2=p2ulv686.1.2 switch=n enabled=y phases=2 Linecode=1P_OH_AL_4_Periwinkle_0_416_0_2_2_2_2

New Line.l(r:p2udm3187-p2ulv924) Units=km Length=0.0187506 bus1=p2udm3187.1.2 bus2=p2ulv924.1.2 switch=n enabled=y phases=2 Linecode=1P_UG_AL_1/0_Brenau_0_416_0_2_2_2_2

New Line.l(r:p2udm3187-p2udt864lv) Units=km Length=0.00507051 bus1=p2udt864lv.1.2 bus2=p2udm3187.1.2 switch=n enabled=y phases=2 Linecode=1P_UG_AL_1/0_Brenau_0_416_0_2_2_2_2

New Line.l(r:p2udm3189-p2ulv20412) Units=km Length=0.0167414 bus1=p2udm3189.1.2 bus2=p2ulv20412.1.2 switch=n enabled=y phases=2 Linecode=1P_UG_AL_4/0_Sweetbriar_0_416_0_2_2_2_2

New Line.l(r:p2udm3188-p2ulv1653) Units=km Length=0.0147461 bus1=p2udm3188.1.2 bus2=p2ulv1653.1.2 switch=n enabled=y phases=2 Linecode=1P_UG_AL_4/0_Sweetbriar_0_416_0_2_2_2_2

New Line.l(r:p2udm3188-p2udm3189) Units=km Length=0.00524691 bus1=p2udm3189.1.2 bus2=p2udm3188.1.2 switch=n enabled=y phases=2 Linecode=1P_UG_AL_4/0_Sweetbriar_0_416_0_2_2_2_2

New Line.l(r:p2udm3189-p2udt864lv) Units=km Length=0.00524263 bus1=p2udt864lv.1.2 bus2=p2udm3189.1.2 switch=n enabled=y phases=2 Linecode=1P_UG_AL_4/0_Sweetbriar_0_416_0_2_2_2_2

New Line.l(r:p2udm3982-p2ulv1177) Units=km Length=0.0183447 bus1=p2udm3982.1.2 bus2=p2ulv1177.1.2 switch=n enabled=y phases=2 Linecode=1P_UG_AL_1/0_Brenau_0_416_0_2_2_2_2

New Line.l(r:p2udm3983-p2ulv2389) Units=km Length=0.0175768 bus1=p2udm3983.1.2 bus2=p2ulv2389.1.2 switch=n enabled=y phases=2 Linecode=1P_UG_AL_1/0_Brenau_0_416_0_2_2_2_2

New Line.l(r:p2udm3982-p2udm3983) Units=km Length=0.0258707 bus1=p2udm3982.1.2 bus2=p2udm3983.1.2 switch=n enabled=y phases=2 Linecode=1P_UG_AL_1/0_Brenau_0_416_0_2_2_2_2

New Line.l(r:p2udm3982-p2udt1083lv) Units=km Length=0.008931850000000002 bus1=p2udt1083lv.1.2 bus2=p2udm3982.1.2 switch=n enabled=y phases=2 Linecode=1P_UG_AL_2/0_Converse_0_416_0_2_2_2_2

New Line.l(r:p2udm3984-p2ulv6749) Units=km Length=0.0148998 bus1=p2udm3984.1.2 bus2=p2ulv6749.1.2 switch=n enabled=y phases=2 Linecode=1P_UG_AL_1/0_Brenau_0_416_0_2_2_2_2

New Line.l(r:p2udm3984-p2ulv10509) Units=km Length=0.0919772 bus1=p2udm3984.1.2 bus2=p2ulv10509.1.2 switch=n enabled=y phases=2 Linecode=1P_UG_AL_1/0_Brenau_0_416_0_2_2_2_2

New Line.l(r:p2udm3984-p2ulv21049) Units=km Length=0.0164629 bus1=p2udm3984.1.2 bus2=p2ulv21049.1.2 switch=n enabled=y phases=2 Linecode=1P_UG_AL_1/0_Brenau_0_416_0_2_2_2_2

New Line.l(r:p2udm3984-p2udt1083lv) Units=km Length=0.00893126 bus1=p2udt1083lv.1.2 bus2=p2udm3984.1.2 switch=n enabled=y phases=2 Linecode=1P_UG_AL_4/0_Sweetbriar_0_416_0_2_2_2_2

New Line.l(r:p2udt1084lv-p2ulv1178) Units=km Length=0.073309 bus1=p2udt1084lv.1.2 bus2=p2ulv1178.1.2 switch=n enabled=y phases=2 Linecode=1P_UG_AL_1/0_Brenau_0_416_0_2_2_2_2

New Line.l(r:p2udm4765-p2ulv4823) Units=km Length=0.0168906 bus1=p2udm4765.1.2 bus2=p2ulv4823.1.2 switch=n enabled=y phases=2 Linecode=1P_UG_AL_1/0_Brenau_0_416_0_2_2_2_2

New Line.l(r:p2udm4765-p2ulv22667) Units=km Length=0.0155505 bus1=p2udm4765.1.2 bus2=p2ulv22667.1.2 switch=n enabled=y phases=2 Linecode=1P_UG_AL_4/0_Sweetbriar_0_416_0_2_2_2_2

New Line.l(r:p2udm4765-p2udt1292lv) Units=km Length=0.00992113 bus1=p2udt1292lv.1.2 bus2=p2udm4765.1.2 switch=n enabled=y phases=2 Linecode=1P_UG_AL_4/0_Sweetbriar_0_416_0_2_2_2_2

New Line.l(r:p2udm4766-p2ulv6007) Units=km Length=0.0154472 bus1=p2udm4766.1.2 bus2=p2ulv6007.1.2 switch=n enabled=y phases=2 Linecode=1P_UG_AL_2/0_Converse_0_416_0_2_2_2_2

New Line.l(r:p2udm4764-p2ulv1424) Units=km Length=0.0186058 bus1=p2udm4764.1.2 bus2=p2ulv1424.1.2 switch=n enabled=y phases=2 Linecode=1P_UG_AL_1/0_Brenau_0_416_0_2_2_2_2

New Line.l(r:p2udm4764-p2udm4766) Units=km Length=0.00992827 bus1=p2udm4766.1.2 bus2=p2udm4764.1.2 switch=n enabled=y phases=2 Linecode=1P_UG_AL_1/0_Brenau_0_416_0_2_2_2_2

New Line.l(r:p2udm4766-p2udt1292lv) Units=km Length=0.00992113 bus1=p2udt1292lv.1.2 bus2=p2udm4766.1.2 switch=n enabled=y phases=2 Linecode=1P_UG_AL_4/0_Sweetbriar_0_416_0_2_2_2_2

New Line.l(r:p2udt1299lv-p2ulv3602) Units=km Length=0.0288318 bus1=p2udt1299lv.1.2 bus2=p2ulv3602.1.2 switch=n enabled=y phases=2 Linecode=1P_UG_AL_1/0_Brenau_0_416_0_2_2_2_2

New Line.l(r:p2udm4780-p2ulv1431) Units=km Length=0.015341000000000002 bus1=p2udm4780.1.2 bus2=p2ulv1431.1.2 switch=n enabled=y phases=2 Linecode=1P_UG_AL_1/0_Brenau_0_416_0_2_2_2_2

New Line.l(r:p2udm4783-p2ulv14464) Units=km Length=0.0253212 bus1=p2udm4783.1.2 bus2=p2ulv14464.1.2 switch=n enabled=y phases=2 Linecode=1P_UG_AL_1/0_Brenau_0_416_0_2_2_2_2

New Line.l(r:p2udm4780-p2udm4783) Units=km Length=0.00993069 bus1=p2udm4780.1.2 bus2=p2udm4783.1.2 switch=n enabled=y phases=2 Linecode=1P_UG_AL_1/0_Brenau_0_416_0_2_2_2_2

New Line.l(r:p2udm4780-p2udt1299lv) Units=km Length=0.00993069 bus1=p2udt1299lv.1.2 bus2=p2udm4780.1.2 switch=n enabled=y phases=2 Linecode=1P_UG_AL_4/0_Sweetbriar_0_416_0_2_2_2_2

New Line.l(r:p2udm4782-p2ulv12401) Units=km Length=0.015768 bus1=p2udm4782.1.2 bus2=p2ulv12401.1.2 switch=n enabled=y phases=2 Linecode=1P_UG_AL_1/0_Brenau_0_416_0_2_2_2_2

New Line.l(r:p2udm4782-p2udt1299lv) Units=km Length=0.0198686 bus1=p2udt1299lv.1.2 bus2=p2udm4782.1.2 switch=n enabled=y phases=2 Linecode=1P_UG_AL_1/0_Brenau_0_416_0_2_2_2_2

New Line.l(r:p2udt1300lv-p2ulv15164) Units=km Length=0.0298565 bus1=p2udt1300lv.1.2 bus2=p2ulv15164.1.2 switch=n enabled=y phases=2 Linecode=1P_OH_AL_4/0_Zuzara_0_416_0_2_2_2_2

New Line.l(r:p2udt1300lv-p2ulv20629) Units=km Length=0.025230000000000002 bus1=p2udt1300lv.1.2 bus2=p2ulv20629.1.2 switch=n enabled=y phases=2 Linecode=1P_OH_AL_2/0_Rucina_0_416_0_2_2_2_2

New Line.l(r:p2udm4784-p2ulv1432) Units=km Length=0.0300651 bus1=p2udm4784.1.2 bus2=p2ulv1432.1.2 switch=n enabled=y phases=2 Linecode=1P_OH_AL_4/0_Zuzara_0_416_0_2_2_2_2

New Line.l(r:p2udm4784-p2udt1300lv) Units=km Length=0.0153185 bus1=p2udt1300lv.1.2 bus2=p2udm4784.1.2 switch=n enabled=y phases=2 Linecode=1P_OH_AL_2/0_Rucina_0_416_0_2_2_2_2

New Line.l(r:p2udm4785-p2ulv6024) Units=km Length=0.0344478 bus1=p2udm4785.1.2 bus2=p2ulv6024.1.2 switch=n enabled=y phases=2 Linecode=1P_OH_AL_4/0_Zuzara_0_416_0_2_2_2_2

New Line.l(r:p2udm4785-p2udt1300lv) Units=km Length=0.0051 bus1=p2udt1300lv.1.2 bus2=p2udm4785.1.2 switch=n enabled=y phases=2 Linecode=1P_OH_AL_2/0_Rucina_0_416_0_2_2_2_2

New Line.l(r:p2udt1487lv-p2ulv5542) Units=km Length=0.023055 bus1=p2udt1487lv.1.2 bus2=p2ulv5542.1.2 switch=n enabled=y phases=2 Linecode=1P_OH_AL_2/0_Rucina_0_416_0_2_2_2_2

New Line.l(r:p2udm5460-p2ulv1655) Units=km Length=0.0163426 bus1=p2udm5460.1.2 bus2=p2ulv1655.1.2 switch=n enabled=y phases=2 Linecode=1P_OH_AL_2/0_Rucina_0_416_0_2_2_2_2

New Line.l(r:p2udm5460-p2udt1487lv) Units=km Length=0.0189206 bus1=p2udt1487lv.1.2 bus2=p2udm5460.1.2 switch=n enabled=y phases=2 Linecode=1P_OH_AL_2/0_Rucina_0_416_0_2_2_2_2

New Line.l(r:p2udt1488lv-p2ulv1656) Units=km Length=0.027147100000000004 bus1=p2udt1488lv.1.2 bus2=p2ulv1656.1.2 switch=n enabled=y phases=2 Linecode=1P_OH_AL_4/0_Zuzara_0_416_0_2_2_2_2

New Line.l(r:p2udt1488lv-p2ulv20182) Units=km Length=0.027147100000000004 bus1=p2udt1488lv.1.2 bus2=p2ulv20182.1.2 switch=n enabled=y phases=2 Linecode=1P_OH_AL_4/0_Zuzara_0_416_0_2_2_2_2

New Line.l(r:p2udt1689lv-p2ulv21515) Units=km Length=0.0374933 bus1=p2udt1689lv.1.2 bus2=p2ulv21515.1.2 switch=n enabled=y phases=2 Linecode=1P_OH_AL_4/0_Zuzara_0_416_0_2_2_2_2

New Line.l(r:p2udm6150-p2ulv1902) Units=km Length=0.0369804 bus1=p2udm6150.1.2 bus2=p2ulv1902.1.2 switch=n enabled=y phases=2 Linecode=1P_OH_AL_4/0_Zuzara_0_416_0_2_2_2_2

New Line.l(r:p2udm6150-p2udt1689lv) Units=km Length=0.039428 bus1=p2udt1689lv.1.2 bus2=p2udm6150.1.2 switch=n enabled=y phases=2 Linecode=1P_OH_AL_4/0_Zuzara_0_416_0_2_2_2_2

New Line.l(r:p2udm6151-p2ulv12163) Units=km Length=0.0238653 bus1=p2udm6151.1.2 bus2=p2ulv12163.1.2 switch=n enabled=y phases=2 Linecode=1P_OH_AL_2/0_Rucina_0_416_0_2_2_2_2

New Line.l(r:p2udm6151-p2udt1689lv) Units=km Length=0.0591422 bus1=p2udt1689lv.1.2 bus2=p2udm6151.1.2 switch=n enabled=y phases=2 Linecode=1P_OH_AL_4/0_Zuzara_0_416_0_2_2_2_2

New Line.l(r:p2udt1690lv-p2ulv15391) Units=km Length=0.013238 bus1=p2udt1690lv.1.2 bus2=p2ulv15391.1.2 switch=n enabled=y phases=2 Linecode=1P_OH_AL_2/0_Rucina_0_416_0_2_2_2_2

New Line.l(r:p2udt1690lv-p2ulv21516) Units=km Length=0.0124421 bus1=p2udt1690lv.1.2 bus2=p2ulv21516.1.2 switch=n enabled=y phases=2 Linecode=1P_OH_AL_2/0_Rucina_0_416_0_2_2_2_2

New Line.l(r:p2udm6155-p2ulv7464) Units=km Length=0.0121102 bus1=p2udm6155.1.2 bus2=p2ulv7464.1.2 switch=n enabled=y phases=2 Linecode=1P_OH_AL_2/0_Rucina_0_416_0_2_2_2_2

New Line.l(r:p2udm6155-p2ulv8191) Units=km Length=0.0134105 bus1=p2udm6155.1.2 bus2=p2ulv8191.1.2 switch=n enabled=y phases=2 Linecode=1P_OH_AL_2/0_Rucina_0_416_0_2_2_2_2

New Line.l(r:p2udm6153-p2ulv1903) Units=km Length=0.0141214 bus1=p2udm6153.1.2 bus2=p2ulv1903.1.2 switch=n enabled=y phases=2 Linecode=1P_OH_AL_2/0_Rucina_0_416_0_2_2_2_2

New Line.l(r:p2udm6153-p2ulv10998) Units=km Length=0.0123551 bus1=p2udm6153.1.2 bus2=p2ulv10998.1.2 switch=n enabled=y phases=2 Linecode=1P_OH_AL_2/0_Rucina_0_416_0_2_2_2_2

New Line.l(r:p2udm6153-p2udm6155) Units=km Length=0.0173434 bus1=p2udm6155.1.2 bus2=p2udm6153.1.2 switch=n enabled=y phases=2 Linecode=1P_OH_AL_2/0_Rucina_0_416_0_2_2_2_2

New Line.l(r:p2udm6155-p2udt1690lv) Units=km Length=0.0173438 bus1=p2udt1690lv.1.2 bus2=p2udm6155.1.2 switch=n enabled=y phases=2 Linecode=1P_OH_AL_2/0_Rucina_0_416_0_2_2_2_2

New Line.l(r:p2udm6163-p2ulv21732) Units=km Length=0.0113818 bus1=p2udm6163.1.2 bus2=p2ulv21732.1.2 switch=n enabled=y phases=2 Linecode=1P_OH_AL_2/0_Rucina_0_416_0_2_2_2_2

New Line.l(r:p2udm6154-p2ulv6514) Units=km Length=0.00450001 bus1=p2udm6154.1.2 bus2=p2ulv6514.1.2 switch=n enabled=y phases=2 Linecode=1P_OH_AL_2/0_Rucina_0_416_0_2_2_2_2

New Line.l(r:p2udm6154-p2ulv10264) Units=km Length=0.0115304 bus1=p2udm6154.1.2 bus2=p2ulv10264.1.2 switch=n enabled=y phases=2 Linecode=1P_OH_AL_2/0_Rucina_0_416_0_2_2_2_2

New Line.l(r:p2udm6154-p2ulv13825) Units=km Length=0.00657001 bus1=p2udm6154.1.2 bus2=p2ulv13825.1.2 switch=n enabled=y phases=2 Linecode=1P_OH_AL_2/0_Rucina_0_416_0_2_2_2_2

New Line.l(r:p2udm6154-p2udm6163) Units=km Length=0.014162 bus1=p2udm6163.1.2 bus2=p2udm6154.1.2 switch=n enabled=y phases=2 Linecode=1P_OH_AL_2/0_Rucina_0_416_0_2_2_2_2

New Line.l(r:p2udm6161-p2ulv17044) Units=km Length=0.00865504 bus1=p2udm6161.1.2 bus2=p2ulv17044.1.2 switch=n enabled=y phases=2 Linecode=1P_OH_AL_2/0_Rucina_0_416_0_2_2_2_2

New Line.l(r:p2udm6161-p2udm6163) Units=km Length=0.0176659 bus1=p2udm6163.1.2 bus2=p2udm6161.1.2 switch=n enabled=y phases=2 Linecode=1P_OH_AL_2/0_Rucina_0_416_0_2_2_2_2

New Line.l(r:p2udm6163-p2udt1690lv) Units=km Length=0.0173507 bus1=p2udt1690lv.1.2 bus2=p2udm6163.1.2 switch=n enabled=y phases=2 Linecode=1P_OH_AL_2/0_Rucina_0_416_0_2_2_2_2

New Line.l(r:p2udt1693lv-p2ulv1906) Units=km Length=0.0220271 bus1=p2udt1693lv.1.2 bus2=p2ulv1906.1.2 switch=n enabled=y phases=2 Linecode=1P_UG_AL_1/0_Brenau_0_416_0_2_2_2_2

New Line.l(r:p2udm6171-p2ulv14046) Units=km Length=0.01637 bus1=p2udm6171.1.2 bus2=p2ulv14046.1.2 switch=n enabled=y phases=2 Linecode=1P_UG_AL_1/0_Brenau_0_416_0_2_2_2_2

New Line.l(r:p2udm6171-p2udt1693lv) Units=km Length=0.00993069 bus1=p2udt1693lv.1.2 bus2=p2udm6171.1.2 switch=n enabled=y phases=2 Linecode=1P_UG_AL_1/0_Brenau_0_416_0_2_2_2_2

New Line.l(r:p2udt1694lv-p2ulv1907) Units=km Length=0.001 bus1=p2udt1694lv.1.2 bus2=p2ulv1907.1.2 switch=n enabled=y phases=2 Linecode=1P_OH_AL_4_Periwinkle_0_416_0_2_2_2_2

New Line.l(r:p2udt1865lv-p2ulv2122) Units=km Length=0.0463137 bus1=p2udt1865lv.1.2 bus2=p2ulv2122.1.2 switch=n enabled=y phases=2 Linecode=1P_OH_AL_4/0_Zuzara_0_416_0_2_2_2_2

New Line.l(r:p2udm6797-p2ulv2650) Units=km Length=0.0966293 bus1=p2udm6797.1.2 bus2=p2ulv2650.1.2 switch=n enabled=y phases=2 Linecode=1P_UG_AL_1/0_Brenau_0_416_0_2_2_2_2

New Line.l(r:p2udm6800-p2ulv12902) Units=km Length=0.0895109 bus1=p2udm6800.1.2 bus2=p2ulv12902.1.2 switch=n enabled=y phases=2 Linecode=1P_UG_AL_1/0_Brenau_0_416_0_2_2_2_2

New Line.l(r:p2udm6797-p2udm6800) Units=km Length=0.0170563 bus1=p2udm6797.1.2 bus2=p2udm6800.1.2 switch=n enabled=y phases=2 Linecode=1P_UG_AL_1/0_Brenau_0_416_0_2_2_2_2

New Line.l(r:p2udm6797-p2udt1874lv) Units=km Length=0.00905058 bus1=p2udt1874lv.1.2 bus2=p2udm6797.1.2 switch=n enabled=y phases=2 Linecode=1P_UG_AL_4/0_Sweetbriar_0_416_0_2_2_2_2

New Line.l(r:p2udm6799-p2ulv12654) Units=km Length=0.0607577 bus1=p2udm6799.1.2 bus2=p2ulv12654.1.2 switch=n enabled=y phases=2 Linecode=1P_UG_AL_1/0_Brenau_0_416_0_2_2_2_2

New Line.l(r:p2udm6798-p2ulv4835) Units=km Length=0.0190473 bus1=p2udm6798.1.2 bus2=p2ulv4835.1.2 switch=n enabled=y phases=2 Linecode=1P_UG_AL_1/0_Brenau_0_416_0_2_2_2_2

New Line.l(r:p2udm6796-p2ulv2133) Units=km Length=0.012912 bus1=p2udm6796.1.2 bus2=p2ulv2133.1.2 switch=n enabled=y phases=2 Linecode=1P_UG_AL_1/0_Brenau_0_416_0_2_2_2_2

New Line.l(r:p2udm6796-p2udm6798) Units=km Length=0.009042200000000002 bus1=p2udm6798.1.2 bus2=p2udm6796.1.2 switch=n enabled=y phases=2 Linecode=1P_UG_AL_1/0_Brenau_0_416_0_2_2_2_2

New Line.l(r:p2udm6798-p2udm6799) Units=km Length=0.00905058 bus1=p2udm6799.1.2 bus2=p2udm6798.1.2 switch=n enabled=y phases=2 Linecode=1P_UG_AL_1/0_Brenau_0_416_0_2_2_2_2

New Line.l(r:p2udm6799-p2udt1874lv) Units=km Length=0.00903675 bus1=p2udt1874lv.1.2 bus2=p2udm6799.1.2 switch=n enabled=y phases=2 Linecode=1P_UG_AL_4/0_Sweetbriar_0_416_0_2_2_2_2

New Line.l(r:p2udm7456-p2ulv9790) Units=km Length=0.018746400000000003 bus1=p2udm7456.1.2 bus2=p2ulv9790.1.2 switch=n enabled=y phases=2 Linecode=1P_UG_AL_1/0_Brenau_0_416_0_2_2_2_2

New Line.l(r:p2udm7453-p2ulv2388) Units=km Length=0.0183921 bus1=p2udm7453.1.2 bus2=p2ulv2388.1.2 switch=n enabled=y phases=2 Linecode=1P_UG_AL_1/0_Brenau_0_416_0_2_2_2_2

New Line.l(r:p2udm7454-p2ulv3604) Units=km Length=0.0196726 bus1=p2udm7454.1.2 bus2=p2ulv3604.1.2 switch=n enabled=y phases=2 Linecode=1P_UG_AL_1/0_Brenau_0_416_0_2_2_2_2

New Line.l(r:p2udm7453-p2udm7454) Units=km Length=0.00990808 bus1=p2udm7453.1.2 bus2=p2udm7454.1.2 switch=n enabled=y phases=2 Linecode=1P_UG_AL_1/0_Brenau_0_416_0_2_2_2_2

New Line.l(r:p2udm7453-p2udm7456) Units=km Length=0.00990033 bus1=p2udm7456.1.2 bus2=p2udm7453.1.2 switch=n enabled=y phases=2 Linecode=1P_UG_AL_2/0_Converse_0_416_0_2_2_2_2

New Line.l(r:p2udm7456-p2udt2064lv) Units=km Length=0.00990808 bus1=p2udt2064lv.1.2 bus2=p2udm7456.1.2 switch=n enabled=y phases=2 Linecode=1P_UG_AL_4/0_Sweetbriar_0_416_0_2_2_2_2

New Line.l(r:p2udm7457-p2ulv15162) Units=km Length=0.018965 bus1=p2udm7457.1.2 bus2=p2ulv15162.1.2 switch=n enabled=y phases=2 Linecode=1P_UG_AL_1/0_Brenau_0_416_0_2_2_2_2

New Line.l(r:p2udm7457-p2ulv17244) Units=km Length=0.0200723 bus1=p2udm7457.1.2 bus2=p2ulv17244.1.2 switch=n enabled=y phases=2 Linecode=1P_UG_AL_4/0_Sweetbriar_0_416_0_2_2_2_2

New Line.l(r:p2udm7455-p2ulv5292) Units=km Length=0.0177345 bus1=p2udm7455.1.2 bus2=p2ulv5292.1.2 switch=n enabled=y phases=2 Linecode=1P_UG_AL_1/0_Brenau_0_416_0_2_2_2_2

New Line.l(r:p2udm7455-p2udm7457) Units=km Length=0.029710200000000003 bus1=p2udm7457.1.2 bus2=p2udm7455.1.2 switch=n enabled=y phases=2 Linecode=1P_UG_AL_1/0_Brenau_0_416_0_2_2_2_2

New Line.l(r:p2udm7457-p2udt2064lv) Units=km Length=0.00990808 bus1=p2udt2064lv.1.2 bus2=p2udm7457.1.2 switch=n enabled=y phases=2 Linecode=1P_UG_AL_4/0_Sweetbriar_0_416_0_2_2_2_2

New Line.l(r:p2udt2065lv-p2ulv11231) Units=km Length=0.0541608 bus1=p2udt2065lv.1.2 bus2=p2ulv11231.1.2 switch=n enabled=y phases=2 Linecode=1P_OH_AL_4/0_Zuzara_0_416_0_2_2_2_2

New Line.l(r:p2udm7459-p2ulv2390) Units=km Length=0.0307695 bus1=p2udm7459.1.2 bus2=p2ulv2390.1.2 switch=n enabled=y phases=2 Linecode=1P_OH_AL_4/0_Zuzara_0_416_0_2_2_2_2

New Line.l(r:p2udm7459-p2udt2065lv) Units=km Length=0.0113294 bus1=p2udt2065lv.1.2 bus2=p2udm7459.1.2 switch=n enabled=y phases=2 Linecode=1P_OH_AL_2/0_Rucina_0_416_0_2_2_2_2

New Line.l(r:p2udt2246lv-p2ulv2639) Units=km Length=0.0138362 bus1=p2udt2246lv.1.2 bus2=p2ulv2639.1.2 switch=n enabled=y phases=2 Linecode=1P_UG_AL_4/0_Sweetbriar_0_416_0_2_2_2_2

New Line.l(r:p2udm8067-p2ulv8645) Units=km Length=0.0170609 bus1=p2udm8067.1.2 bus2=p2ulv8645.1.2 switch=n enabled=y phases=2 Linecode=1P_UG_AL_1/0_Brenau_0_416_0_2_2_2_2

New Line.l(r:p2udm8067-p2ulv20618) Units=km Length=0.016288 bus1=p2udm8067.1.2 bus2=p2ulv20618.1.2 switch=n enabled=y phases=2 Linecode=1P_UG_AL_1/0_Brenau_0_416_0_2_2_2_2

New Line.l(r:p2udm8067-p2udt2246lv) Units=km Length=0.00992113 bus1=p2udt2246lv.1.2 bus2=p2udm8067.1.2 switch=n enabled=y phases=2 Linecode=1P_UG_AL_4/0_Sweetbriar_0_416_0_2_2_2_2

New Line.l(r:p2udm8068-p2ulv10988) Units=km Length=0.017841900000000004 bus1=p2udm8068.1.2 bus2=p2ulv10988.1.2 switch=n enabled=y phases=2 Linecode=1P_UG_AL_1/0_Brenau_0_416_0_2_2_2_2

New Line.l(r:p2udm8068-p2udt2246lv) Units=km Length=0.019842300000000004 bus1=p2udt2246lv.1.2 bus2=p2udm8068.1.2 switch=n enabled=y phases=2 Linecode=1P_UG_AL_1/0_Brenau_0_416_0_2_2_2_2

New Line.l(r:p2udt2594lv-p2ulv24009) Units=km Length=0.0438072 bus1=p2udt2594lv.1.2 bus2=p2ulv24009.1.2 switch=n enabled=y phases=2 Linecode=1P_OH_AL_4/0_Zuzara_0_416_0_2_2_2_2

New Line.l(r:p2udm9203-p2ulv3140) Units=km Length=0.033899200000000004 bus1=p2udm9203.1.2 bus2=p2ulv3140.1.2 switch=n enabled=y phases=2 Linecode=1P_OH_AL_4/0_Zuzara_0_416_0_2_2_2_2

New Line.l(r:p2udm9203-p2udt2594lv) Units=km Length=0.019197 bus1=p2udt2594lv.1.2 bus2=p2udm9203.1.2 switch=n enabled=y phases=2 Linecode=1P_OH_AL_2/0_Rucina_0_416_0_2_2_2_2

New Line.l(r:p2udm9204-p2ulv11474) Units=km Length=0.0663196 bus1=p2udm9204.1.2 bus2=p2ulv11474.1.2 switch=n enabled=y phases=2 Linecode=1P_OH_AL_4/0_Zuzara_0_416_0_2_2_2_2

New Line.l(r:p2udm9205-p2ulv16797) Units=km Length=0.0291269 bus1=p2udm9205.1.2 bus2=p2ulv16797.1.2 switch=n enabled=y phases=2 Linecode=1P_OH_AL_4/0_Zuzara_0_416_0_2_2_2_2

New Line.l(r:p2udm9204-p2udm9205) Units=km Length=0.0191993 bus1=p2udm9204.1.2 bus2=p2udm9205.1.2 switch=n enabled=y phases=2 Linecode=1P_OH_AL_2/0_Rucina_0_416_0_2_2_2_2

New Line.l(r:p2udm9204-p2udt2594lv) Units=km Length=0.0191895 bus1=p2udt2594lv.1.2 bus2=p2udm9204.1.2 switch=n enabled=y phases=2 Linecode=1P_OH_AL_2/0_Rucina_0_416_0_2_2_2_2

New Line.l(r:p2udt2595lv-p2ulv3141) Units=km Length=0.0372897 bus1=p2udt2595lv.1.2 bus2=p2ulv3141.1.2 switch=n enabled=y phases=2 Linecode=1P_OH_AL_4/0_Zuzara_0_416_0_2_2_2_2

New Line.l(r:p2udt2595lv-p2ulv17920) Units=km Length=0.022877100000000004 bus1=p2udt2595lv.1.2 bus2=p2ulv17920.1.2 switch=n enabled=y phases=2 Linecode=1P_OH_AL_2/0_Rucina_0_416_0_2_2_2_2

New Line.l(r:p2udt2878lv-p2ulv3593) Units=km Length=0.0538185 bus1=p2udt2878lv.1.2 bus2=p2ulv3593.1.2 switch=n enabled=y phases=2 Linecode=1P_OH_AL_4/0_Zuzara_0_416_0_2_2_2_2

New Line.l(r:p2udt2884lv-p2ulv24211) Units=km Length=0.0151997 bus1=p2udt2884lv.1.2 bus2=p2ulv24211.1.2 switch=n enabled=y phases=2 Linecode=1P_UG_AL_1/0_Brenau_0_416_0_2_2_2_2

New Line.l(r:p2udm10201-p2ulv3601) Units=km Length=0.0271534 bus1=p2udm10201.1.2 bus2=p2ulv3601.1.2 switch=n enabled=y phases=2 Linecode=1P_UG_AL_1/0_Brenau_0_416_0_2_2_2_2

New Line.l(r:p2udm10201-p2udt2884lv) Units=km Length=0.00993069 bus1=p2udt2884lv.1.2 bus2=p2udm10201.1.2 switch=n enabled=y phases=2 Linecode=1P_UG_AL_1/0_Brenau_0_416_0_2_2_2_2

New Line.l(r:p2udm10204-p2ulv4334) Units=km Length=0.0896696 bus1=p2udm10204.1.2 bus2=p2ulv4334.1.2 switch=n enabled=y phases=2 Linecode=1P_UG_AL_2/0_Converse_0_416_0_2_2_2_2

New Line.l(r:p2udm10204-p2udt2885lv) Units=km Length=0.0198098 bus1=p2udt2885lv.1.2 bus2=p2udm10204.1.2 switch=n enabled=y phases=2 Linecode=1P_UG_AL_2/0_Converse_0_416_0_2_2_2_2

New Line.l(r:p2udm10205-p2ulv19037) Units=km Length=0.0922115 bus1=p2udm10205.1.2 bus2=p2ulv19037.1.2 switch=n enabled=y phases=2 Linecode=1P_UG_AL_4/0_Sweetbriar_0_416_0_2_2_2_2

New Line.l(r:p2udm10203-p2ulv3603) Units=km Length=0.056564 bus1=p2udm10203.1.2 bus2=p2ulv3603.1.2 switch=n enabled=y phases=2 Linecode=1P_UG_AL_4/0_Sweetbriar_0_416_0_2_2_2_2

New Line.l(r:p2udm10203-p2udm10205) Units=km Length=0.00990808 bus1=p2udm10205.1.2 bus2=p2udm10203.1.2 switch=n enabled=y phases=2 Linecode=1P_UG_AL_4/0_Sweetbriar_0_416_0_2_2_2_2

New Line.l(r:p2udm10205-p2udt2885lv) Units=km Length=0.00990033 bus1=p2udt2885lv.1.2 bus2=p2udm10205.1.2 switch=n enabled=y phases=2 Linecode=1P_UG_AL_4/0_Sweetbriar_0_416_0_2_2_2_2

New Line.l(r:p2udt3044lv-p2ulv3841) Units=km Length=0.0259571 bus1=p2udt3044lv.1.2 bus2=p2ulv3841.1.2 switch=n enabled=y phases=2 Linecode=1P_OH_AL_2/0_Rucina_0_416_0_2_2_2_2

New Line.l(r:p2udm10705-p2ulv7726) Units=km Length=0.0284026 bus1=p2udm10705.1.2 bus2=p2ulv7726.1.2 switch=n enabled=y phases=2 Linecode=1P_OH_AL_4/0_Zuzara_0_416_0_2_2_2_2

New Line.l(r:p2udm10705-p2udt3044lv) Units=km Length=0.052827 bus1=p2udt3044lv.1.2 bus2=p2udm10705.1.2 switch=n enabled=y phases=2 Linecode=1P_OH_AL_4/0_Zuzara_0_416_0_2_2_2_2

New Line.l(r:p2udm10706-p2ulv8436) Units=km Length=0.08987170000000001 bus1=p2udm10706.1.2 bus2=p2ulv8436.1.2 switch=n enabled=y phases=2 Linecode=1P_OH_AL_4/0_Zuzara_0_416_0_2_2_2_2

New Line.l(r:p2udm10706-p2ulv19745) Units=km Length=0.0300259 bus1=p2udm10706.1.2 bus2=p2ulv19745.1.2 switch=n enabled=y phases=2 Linecode=1P_OH_AL_4/0_Zuzara_0_416_0_2_2_2_2

New Line.l(r:p2udm10706-p2udt3044lv) Units=km Length=0.0176058 bus1=p2udt3044lv.1.2 bus2=p2udm10706.1.2 switch=n enabled=y phases=2 Linecode=1P_OH_AL_2/0_Rucina_0_416_0_2_2_2_2

New Line.l(r:p2udt3194lv-p2ulv4093) Units=km Length=0.0233281 bus1=p2udt3194lv.1.2 bus2=p2ulv4093.1.2 switch=n enabled=y phases=2 Linecode=1P_OH_AL_2/0_Rucina_0_416_0_2_2_2_2

New Line.l(r:p2udt3335lv-p2ulv4333) Units=km Length=0.021200600000000003 bus1=p2udt3335lv.1.2 bus2=p2ulv4333.1.2 switch=n enabled=y phases=2 Linecode=1P_UG_AL_4/0_Sweetbriar_0_416_0_2_2_2_2

New Line.l(r:p2udt3482lv-p2ulv4579) Units=km Length=0.018999300000000004 bus1=p2udt3482lv.1.2 bus2=p2ulv4579.1.2 switch=n enabled=y phases=2 Linecode=1P_OH_AL_2/0_Rucina_0_416_0_2_2_2_2

New Line.l(r:p2udt3482lv-p2ulv20411) Units=km Length=0.0213149 bus1=p2udt3482lv.1.2 bus2=p2ulv20411.1.2 switch=n enabled=y phases=2 Linecode=1P_OH_AL_2/0_Rucina_0_416_0_2_2_2_2

New Line.l(r:p2udm12495-p2ulv4824) Units=km Length=0.0115345 bus1=p2udm12495.1.2 bus2=p2ulv4824.1.2 switch=n enabled=y phases=2 Linecode=1P_OH_AL_2/0_Rucina_0_416_0_2_2_2_2

New Line.l(r:p2udm12495-p2udt3619lv) Units=km Length=0.0533786 bus1=p2udt3619lv.1.2 bus2=p2udm12495.1.2 switch=n enabled=y phases=2 Linecode=1P_OH_AL_4/0_Zuzara_0_416_0_2_2_2_2

New Line.l(r:p2udm12496-p2ulv11700) Units=km Length=0.0181517 bus1=p2udm12496.1.2 bus2=p2ulv11700.1.2 switch=n enabled=y phases=2 Linecode=1P_OH_AL_2/0_Rucina_0_416_0_2_2_2_2

New Line.l(r:p2udm12496-p2udt3619lv) Units=km Length=0.0190725 bus1=p2udt3619lv.1.2 bus2=p2udm12496.1.2 switch=n enabled=y phases=2 Linecode=1P_OH_AL_2/0_Rucina_0_416_0_2_2_2_2

New Line.l(r:p2udt3758lv-p2ulv19746) Units=km Length=0.067491 bus1=p2udt3758lv.1.2 bus2=p2ulv19746.1.2 switch=n enabled=y phases=2 Linecode=1P_OH_AL_4/0_Zuzara_0_416_0_2_2_2_2

New Line.l(r:p2udm12886-p2ulv5076) Units=km Length=0.0671898 bus1=p2udm12886.1.2 bus2=p2ulv5076.1.2 switch=n enabled=y phases=2 Linecode=1P_OH_AL_4/0_Zuzara_0_416_0_2_2_2_2

New Line.l(r:p2udm12886-p2udt3758lv) Units=km Length=0.0188454 bus1=p2udt3758lv.1.2 bus2=p2udm12886.1.2 switch=n enabled=y phases=2 Linecode=1P_OH_AL_2/0_Rucina_0_416_0_2_2_2_2

New Line.l(r:p2udm13633-p2ulv5541) Units=km Length=0.021472 bus1=p2udm13633.1.2 bus2=p2ulv5541.1.2 switch=n enabled=y phases=2 Linecode=1P_UG_AL_1/0_Brenau_0_416_0_2_2_2_2

New Line.l(r:p2udm13633-p2udt4021lv) Units=km Length=0.0080082 bus1=p2udt4021lv.1.2 bus2=p2udm13633.1.2 switch=n enabled=y phases=2 Linecode=1P_UG_AL_1/0_Brenau_0_416_0_2_2_2_2

New Line.l(r:p2udm13634-p2ulv15854) Units=km Length=0.0263238 bus1=p2udm13634.1.2 bus2=p2ulv15854.1.2 switch=n enabled=y phases=2 Linecode=1P_UG_AL_1/0_Brenau_0_416_0_2_2_2_2

New Line.l(r:p2udm13634-p2udt4021lv) Units=km Length=0.0160283 bus1=p2udt4021lv.1.2 bus2=p2udm13634.1.2 switch=n enabled=y phases=2 Linecode=1P_UG_AL_1/0_Brenau_0_416_0_2_2_2_2

New Line.l(r:p2udt4146lv-p2ulv5769) Units=km Length=0.0193831 bus1=p2udt4146lv.1.2 bus2=p2ulv5769.1.2 switch=n enabled=y phases=2 Linecode=1P_OH_AL_2/0_Rucina_0_416_0_2_2_2_2

New Line.l(r:p2udm14014-p2ulv17697) Units=km Length=0.0182228 bus1=p2udm14014.1.2 bus2=p2ulv17697.1.2 switch=n enabled=y phases=2 Linecode=1P_OH_AL_2/0_Rucina_0_416_0_2_2_2_2

New Line.l(r:p2udm14014-p2udt4146lv) Units=km Length=0.00958293 bus1=p2udt4146lv.1.2 bus2=p2udm14014.1.2 switch=n enabled=y phases=2 Linecode=1P_OH_AL_2/0_Rucina_0_416_0_2_2_2_2

New Line.l(r:p2udm14016-p2ulv11470) Units=km Length=0.013221 bus1=p2udm14016.1.2 bus2=p2ulv11470.1.2 switch=n enabled=y phases=2 Linecode=1P_UG_AL_4/0_Sweetbriar_0_416_0_2_2_2_2

New Line.l(r:p2udm14015-p2ulv5770) Units=km Length=0.016408 bus1=p2udm14015.1.2 bus2=p2ulv5770.1.2 switch=n enabled=y phases=2 Linecode=1P_UG_AL_4/0_Sweetbriar_0_416_0_2_2_2_2

New Line.l(r:p2udm14015-p2udm14016) Units=km Length=0.00992814 bus1=p2udm14016.1.2 bus2=p2udm14015.1.2 switch=n enabled=y phases=2 Linecode=1P_UG_AL_4/0_Sweetbriar_0_416_0_2_2_2_2

New Line.l(r:p2udm14016-p2udt4147lv) Units=km Length=0.00992113 bus1=p2udt4147lv.1.2 bus2=p2udm14016.1.2 switch=n enabled=y phases=2 Linecode=1P_UG_AL_4/0_Sweetbriar_0_416_0_2_2_2_2

New Line.l(r:p2udm14017-p2ulv18376) Units=km Length=0.0170583 bus1=p2udm14017.1.2 bus2=p2ulv18376.1.2 switch=n enabled=y phases=2 Linecode=1P_OH_AL_2/0_Rucina_0_416_0_2_2_2_2

New Line.l(r:p2udm14017-p2udt4147lv) Units=km Length=0.0354297 bus1=p2udt4147lv.1.2 bus2=p2udm14017.1.2 switch=n enabled=y phases=2 Linecode=1P_OH_AL_4/0_Zuzara_0_416_0_2_2_2_2

New Line.l(r:p2udm14425-p2ulv6008) Units=km Length=0.028533 bus1=p2udm14425.1.2 bus2=p2ulv6008.1.2 switch=n enabled=y phases=2 Linecode=1P_OH_AL_4/0_Zuzara_0_416_0_2_2_2_2

New Line.l(r:p2udm14425-p2udt4286lv) Units=km Length=0.0389162 bus1=p2udt4286lv.1.2 bus2=p2udm14425.1.2 switch=n enabled=y phases=2 Linecode=1P_OH_AL_4/0_Zuzara_0_416_0_2_2_2_2

New Line.l(r:p2udm14426-p2ulv21507) Units=km Length=0.0268293 bus1=p2udm14426.1.2 bus2=p2ulv21507.1.2 switch=n enabled=y phases=2 Linecode=1P_OH_AL_2/0_Rucina_0_416_0_2_2_2_2

New Line.l(r:p2udm14426-p2ulv21967) Units=km Length=0.0273212 bus1=p2udm14426.1.2 bus2=p2ulv21967.1.2 switch=n enabled=y phases=2 Linecode=1P_OH_AL_4/0_Zuzara_0_416_0_2_2_2_2

New Line.l(r:p2udm14426-p2udt4286lv) Units=km Length=0.0194579 bus1=p2udt4286lv.1.2 bus2=p2udm14426.1.2 switch=n enabled=y phases=2 Linecode=1P_OH_AL_2/0_Rucina_0_416_0_2_2_2_2

New Line.l(r:p2udt4289lv-p2ulv6013) Units=km Length=0.0139173 bus1=p2udt4289lv.1.2 bus2=p2ulv6013.1.2 switch=n enabled=y phases=2 Linecode=1P_OH_AL_2/0_Rucina_0_416_0_2_2_2_2

New Line.l(r:p2udm14436-p2ulv10025) Units=km Length=0.0240817 bus1=p2udm14436.1.2 bus2=p2ulv10025.1.2 switch=n enabled=y phases=2 Linecode=1P_OH_AL_2/0_Rucina_0_416_0_2_2_2_2

New Line.l(r:p2udm14436-p2udt4289lv) Units=km Length=0.0709655 bus1=p2udt4289lv.1.2 bus2=p2udm14436.1.2 switch=n enabled=y phases=2 Linecode=1P_OH_AL_4/0_Zuzara_0_416_0_2_2_2_2

New Line.l(r:p2udm14457-p2ulv6022) Units=km Length=0.0228944 bus1=p2udm14457.1.2 bus2=p2ulv6022.1.2 switch=n enabled=y phases=2 Linecode=1P_OH_AL_2/0_Rucina_0_416_0_2_2_2_2

New Line.l(r:p2udm14457-p2ulv13128) Units=km Length=0.0238104 bus1=p2udm14457.1.2 bus2=p2ulv13128.1.2 switch=n enabled=y phases=2 Linecode=1P_OH_AL_2/0_Rucina_0_416_0_2_2_2_2

New Line.l(r:p2udm14457-p2udt4297lv) Units=km Length=0.019584 bus1=p2udt4297lv.1.2 bus2=p2udm14457.1.2 switch=n enabled=y phases=2 Linecode=1P_OH_AL_2/0_Rucina_0_416_0_2_2_2_2

New Line.l(r:p2udm14459-p2ulv19519) Units=km Length=0.0196649 bus1=p2udm14459.1.2 bus2=p2ulv19519.1.2 switch=n enabled=y phases=2 Linecode=1P_OH_AL_2/0_Rucina_0_416_0_2_2_2_2

New Line.l(r:p2udm14459-p2udt4297lv) Units=km Length=0.0195915 bus1=p2udt4297lv.1.2 bus2=p2udm14459.1.2 switch=n enabled=y phases=2 Linecode=1P_OH_AL_2/0_Rucina_0_416_0_2_2_2_2

New Line.l(r:p2udt4424lv-p2ulv6281) Units=km Length=0.00996825 bus1=p2udt4424lv.1.2 bus2=p2ulv6281.1.2 switch=n enabled=y phases=2 Linecode=1P_OH_AL_2/0_Rucina_0_416_0_2_2_2_2

New Line.l(r:p2udm14794-p2ulv24010) Units=km Length=0.0113906 bus1=p2udm14794.1.2 bus2=p2ulv24010.1.2 switch=n enabled=y phases=2 Linecode=1P_OH_AL_2/0_Rucina_0_416_0_2_2_2_2

New Line.l(r:p2udm14794-p2udt4424lv) Units=km Length=0.0302311 bus1=p2udt4424lv.1.2 bus2=p2udm14794.1.2 switch=n enabled=y phases=2 Linecode=1P_OH_AL_4/0_Zuzara_0_416_0_2_2_2_2

New Line.l(r:p2udt4542lv-p2ulv6511) Units=km Length=0.0251398 bus1=p2udt4542lv.1.2 bus2=p2ulv6511.1.2 switch=n enabled=y phases=2 Linecode=1P_UG_AL_2/0_Converse_0_416_0_2_2_2_2

New Line.l(r:p2udt4542lv-p2ulv14033) Units=km Length=0.0230673 bus1=p2udt4542lv.1.2 bus2=p2ulv14033.1.2 switch=n enabled=y phases=2 Linecode=1P_UG_AL_2/0_Converse_0_416_0_2_2_2_2

New Line.l(r:p2udt4752lv-p2ulv6976) Units=km Length=0.025124900000000002 bus1=p2udt4752lv.1.2 bus2=p2ulv6976.1.2 switch=n enabled=y phases=2 Linecode=1P_OH_AL_2/0_Rucina_0_416_0_2_2_2_2

New Line.l(r:p2udm15672-p2ulv20416) Units=km Length=0.0266497 bus1=p2udm15672.1.2 bus2=p2ulv20416.1.2 switch=n enabled=y phases=2 Linecode=1P_OH_AL_2/0_Rucina_0_416_0_2_2_2_2

New Line.l(r:p2udm15672-p2udt4752lv) Units=km Length=0.019197 bus1=p2udt4752lv.1.2 bus2=p2udm15672.1.2 switch=n enabled=y phases=2 Linecode=1P_OH_AL_2/0_Rucina_0_416_0_2_2_2_2

New Line.l(r:p2udt4753lv-p2ulv6977) Units=km Length=0.0196379 bus1=p2udt4753lv.1.2 bus2=p2ulv6977.1.2 switch=n enabled=y phases=2 Linecode=1P_OH_AL_2/0_Rucina_0_416_0_2_2_2_2

New Line.l(r:p2udt4754lv-p2ulv6978) Units=km Length=0.0295098 bus1=p2udt4754lv.1.2 bus2=p2ulv6978.1.2 switch=n enabled=y phases=2 Linecode=1P_OH_AL_4/0_Zuzara_0_416_0_2_2_2_2

New Line.l(r:p2udt4865lv-p2ulv7238) Units=km Length=0.0403575 bus1=p2udt4865lv.1.2 bus2=p2ulv7238.1.2 switch=n enabled=y phases=2 Linecode=1P_OH_AL_4/0_Zuzara_0_416_0_2_2_2_2

New Line.l(r:p2udt4865lv-p2ulv15847) Units=km Length=0.06543050000000002 bus1=p2udt4865lv.1.2 bus2=p2ulv15847.1.2 switch=n enabled=y phases=2 Linecode=1P_OH_AL_4/0_Zuzara_0_416_0_2_2_2_2

New Line.l(r:p2udm15949-p2ulv20844) Units=km Length=0.0412996 bus1=p2udm15949.1.2 bus2=p2ulv20844.1.2 switch=n enabled=y phases=2 Linecode=1P_OH_AL_4/0_Zuzara_0_416_0_2_2_2_2

New Line.l(r:p2udm15949-p2udt4865lv) Units=km Length=0.0197142 bus1=p2udt4865lv.1.2 bus2=p2udm15949.1.2 switch=n enabled=y phases=2 Linecode=1P_OH_AL_2/0_Rucina_0_416_0_2_2_2_2

New Line.l(r:p2udt4869lv-p2ulv7246) Units=km Length=0.0180542 bus1=p2udt4869lv.1.2 bus2=p2ulv7246.1.2 switch=n enabled=y phases=2 Linecode=1P_OH_AL_2/0_Rucina_0_416_0_2_2_2_2

New Line.l(r:p2udt4870lv-p2ulv7247) Units=km Length=0.0328694 bus1=p2udt4870lv.1.2 bus2=p2ulv7247.1.2 switch=n enabled=y phases=2 Linecode=1P_OH_AL_4/0_Zuzara_0_416_0_2_2_2_2

New Line.l(r:p2udt4959lv-p2ulv7470) Units=km Length=0.0350742 bus1=p2udt4959lv.1.2 bus2=p2ulv7470.1.2 switch=n enabled=y phases=2 Linecode=1P_OH_AL_4/0_Zuzara_0_416_0_2_2_2_2

New Line.l(r:p2udt5061lv-p2ulv17918) Units=km Length=0.0200262 bus1=p2udt5061lv.1.2 bus2=p2ulv17918.1.2 switch=n enabled=y phases=2 Linecode=1P_OH_AL_2/0_Rucina_0_416_0_2_2_2_2

New Line.l(r:p2udm16474-p2ulv7717) Units=km Length=0.0187558 bus1=p2udm16474.1.2 bus2=p2ulv7717.1.2 switch=n enabled=y phases=2 Linecode=1P_OH_AL_2/0_Rucina_0_416_0_2_2_2_2

New Line.l(r:p2udm16474-p2ulv7969) Units=km Length=0.012784100000000001 bus1=p2udm16474.1.2 bus2=p2ulv7969.1.2 switch=n enabled=y phases=2 Linecode=1P_OH_AL_2/0_Rucina_0_416_0_2_2_2_2

New Line.l(r:p2udm16474-p2udt5061lv) Units=km Length=0.00790213 bus1=p2udt5061lv.1.2 bus2=p2udm16474.1.2 switch=n enabled=y phases=2 Linecode=1P_OH_AL_2/0_Rucina_0_416_0_2_0_2_2_2

New Line.l(r:p2udt5264lv-p2ulv8197) Units=km Length=0.0215666 bus1=p2udt5264lv.1.2 bus2=p2ulv8197.1.2 switch=n enabled=y phases=2 Linecode=1P_UG_AL_1/0_Brenau_0_416_0_2_2_2_2

New Line.l(r:p2udt5264lv-p2ulv21980) Units=km Length=0.0215666 bus1=p2udt5264lv.1.2 bus2=p2ulv21980.1.2 switch=n enabled=y phases=2 Linecode=1P_UG_AL_1/0_Brenau_0_416_0_2_2_2_2

New Line.l(r:p2udt5363lv-p2ulv8439) Units=km Length=0.0673918 bus1=p2udt5363lv.1.2 bus2=p2ulv8439.1.2 switch=n enabled=y phases=2 Linecode=1P_OH_AL_4/0_Zuzara_0_416_0_2_2_2_2

New Line.l(r:p2udt5438lv-p2ulv8649) Units=km Length=0.027396300000000002 bus1=p2udt5438lv.1.2 bus2=p2ulv8649.1.2 switch=n enabled=y phases=2 Linecode=1P_OH_AL_4/0_Zuzara_0_416_0_2_2_2_2

New Line.l(r:p2udt5500lv-p2ulv8852) Units=km Length=0.012154 bus1=p2udt5500lv.1.2 bus2=p2ulv8852.1.2 switch=n enabled=y phases=2 Linecode=1P_UG_AL_4/0_Sweetbriar_0_416_0_2_2_2_2

New Line.l(r:p2udt5607lv-p2ulv9090) Units=km Length=0.0247104 bus1=p2udt5607lv.1.2 bus2=p2ulv9090.1.2 switch=n enabled=y phases=2 Linecode=1P_OH_AL_2/0_Rucina_0_416_0_2_2_2_2

New Line.l(r:p2udt5952lv-p2ulv10027) Units=km Length=0.0238835 bus1=p2udt5952lv.1.2 bus2=p2ulv10027.1.2 switch=n enabled=y phases=2 Linecode=1P_OH_AL_2/0_Rucina_0_416_0_2_2_2_2

New Line.l(r:p2udm18648-p2ulv23128) Units=km Length=0.0198705 bus1=p2udm18648.1.2 bus2=p2ulv23128.1.2 switch=n enabled=y phases=2 Linecode=1P_OH_AL_2/0_Rucina_0_416_0_2_2_2_2

New Line.l(r:p2udm18648-p2udt5952lv) Units=km Length=0.0155108 bus1=p2udt5952lv.1.2 bus2=p2udm18648.1.2 switch=n enabled=y phases=2 Linecode=1P_OH_AL_2/0_Rucina_0_416_0_2_2_2_2

New Line.l(r:p2udm19037-p2ulv10508) Units=km Length=0.0181572 bus1=p2udm19037.1.2 bus2=p2ulv10508.1.2 switch=n enabled=y phases=2 Linecode=1P_UG_AL_1/0_Brenau_0_416_0_2_2_2_2

New Line.l(r:p2udm19037-p2udt6117lv) Units=km Length=0.00993069 bus1=p2udt6117lv.1.2 bus2=p2udm19037.1.2 switch=n enabled=y phases=2 Linecode=1P_UG_AL_1/0_Brenau_0_416_0_2_2_2_2

New Line.l(r:p2udm19038-p2ulv14720) Units=km Length=0.0142896 bus1=p2udm19038.1.2 bus2=p2ulv14720.1.2 switch=n enabled=y phases=2 Linecode=1P_UG_AL_1/0_Brenau_0_416_0_2_2_2_2

New Line.l(r:p2udm19038-p2udt6117lv) Units=km Length=0.00993069 bus1=p2udt6117lv.1.2 bus2=p2udm19038.1.2 switch=n enabled=y phases=2 Linecode=1P_UG_AL_1/0_Brenau_0_416_0_2_2_2_2

New Line.l(r:p2udt6118lv-p2ulv10510) Units=km Length=0.09350180000000001 bus1=p2udt6118lv.1.2 bus2=p2ulv10510.1.2 switch=n enabled=y phases=2 Linecode=1P_OH_AL_4/0_Zuzara_0_416_0_2_2_2_2

New Line.l(r:p2udt6119lv-p2ulv19040) Units=km Length=0.00872391 bus1=p2udt6119lv.1.2 bus2=p2ulv19040.1.2 switch=n enabled=y phases=2 Linecode=1P_UG_AL_1/0_Brenau_0_416_0_2_2_2_2

New Line.l(r:p2udm19040-p2ulv10511) Units=km Length=0.0348286 bus1=p2udm19040.1.2 bus2=p2ulv10511.1.2 switch=n enabled=y phases=2 Linecode=1P_UG_AL_1/0_Brenau_0_416_0_2_2_2_2

New Line.l(r:p2udm19040-p2udt6119lv) Units=km Length=0.009572040000000002 bus1=p2udt6119lv.1.2 bus2=p2udm19040.1.2 switch=n enabled=y phases=2 Linecode=1P_UG_AL_1/0_Brenau_0_416_0_2_2_2_2

New Line.l(r:p2udt6285lv-p2ulv10997) Units=km Length=0.0485949 bus1=p2udt6285lv.1.2 bus2=p2ulv10997.1.2 switch=n enabled=y phases=2 Linecode=1P_OH_AL_4/0_Zuzara_0_416_0_2_2_2_2

New Line.l(r:p2udt6352lv-p2ulv11232) Units=km Length=0.0502463 bus1=p2udt6352lv.1.2 bus2=p2ulv11232.1.2 switch=n enabled=y phases=2 Linecode=1P_OH_AL_4/0_Zuzara_0_416_0_2_2_2_2

New Line.l(r:p2udt6352lv-p2ulv24212) Units=km Length=0.0796453 bus1=p2udt6352lv.1.2 bus2=p2ulv24212.1.2 switch=n enabled=y phases=2 Linecode=1P_OH_AL_4/0_Zuzara_0_416_0_2_2_2_2

New Line.l(r:p2udt6404lv-p2ulv11475) Units=km Length=0.0643793 bus1=p2udt6404lv.1.2 bus2=p2ulv11475.1.2 switch=n enabled=y phases=2 Linecode=1P_OH_AL_4/0_Zuzara_0_416_0_2_2_2_2

New Line.l(r:p2udt6405lv-p2ulv11476) Units=km Length=0.0171787 bus1=p2udt6405lv.1.2 bus2=p2ulv11476.1.2 switch=n enabled=y phases=2 Linecode=1P_UG_AL_1/0_Brenau_0_416_0_2_2_2_2

New Line.l(r:p2udt6469lv-p2ulv21276) Units=km Length=0.019231400000000003 bus1=p2udt6469lv.1.2 bus2=p2ulv21276.1.2 switch=n enabled=y phases=2 Linecode=1P_OH_AL_2/0_Rucina_0_416_0_2_2_2_2

New Line.l(r:p2udm19785-p2ulv11703) Units=km Length=0.0176939 bus1=p2udm19785.1.2 bus2=p2ulv11703.1.2 switch=n enabled=y phases=2 Linecode=1P_OH_AL_2/0_Rucina_0_416_0_2_2_2_2

New Line.l(r:p2udm19785-p2udt6469lv) Units=km Length=0.0184133 bus1=p2udt6469lv.1.2 bus2=p2udm19785.1.2 switch=n enabled=y phases=2 Linecode=1P_OH_AL_2/0_Rucina_0_416_0_2_2_2_2

New Line.l(r:p2udm19786-p2ulv18581) Units=km Length=0.0210194 bus1=p2udm19786.1.2 bus2=p2ulv18581.1.2 switch=n enabled=y phases=2 Linecode=1P_OH_AL_2/0_Rucina_0_416_0_2_2_2_2

New Line.l(r:p2udm19786-p2udt6469lv) Units=km Length=0.0184063 bus1=p2udt6469lv.1.2 bus2=p2udm19786.1.2 switch=n enabled=y phases=2 Linecode=1P_OH_AL_2/0_Rucina_0_416_0_2_2_2_2

New Line.l(r:p2udt6536lv-p2ulv11946) Units=km Length=0.0379525 bus1=p2udt6536lv.1.2 bus2=p2ulv11946.1.2 switch=n enabled=y phases=2 Linecode=1P_OH_AL_4/0_Zuzara_0_416_0_2_2_2_2

New Line.l(r:p2udm19913-p2ulv19961) Units=km Length=0.0315669 bus1=p2udm19913.1.2 bus2=p2ulv19961.1.2 switch=n enabled=y phases=2 Linecode=1P_OH_AL_4/0_Zuzara_0_416_0_2_2_2_2

New Line.l(r:p2udm19913-p2udt6536lv) Units=km Length=0.0115571 bus1=p2udt6536lv.1.2 bus2=p2udm19913.1.2 switch=n enabled=y phases=2 Linecode=1P_OH_AL_2/0_Rucina_0_416_0_2_2_2_2

New Line.l(r:p2udm19914-p2ulv22466) Units=km Length=0.0183455 bus1=p2udm19914.1.2 bus2=p2ulv22466.1.2 switch=n enabled=y phases=2 Linecode=1P_OH_AL_2/0_Rucina_0_416_0_2_2_2_2

New Line.l(r:p2udm19914-p2udt6536lv) Units=km Length=0.0115473 bus1=p2udt6536lv.1.2 bus2=p2udm19914.1.2 switch=n enabled=y phases=2 Linecode=1P_OH_AL_2/0_Rucina_0_416_0_2_2_2_2

New Line.l(r:p2udt6611lv-p2ulv12168) Units=km Length=0.0239402 bus1=p2udt6611lv.1.2 bus2=p2ulv12168.1.2 switch=n enabled=y phases=2 Linecode=1P_OH_AL_2/0_Rucina_0_416_0_2_2_2_2

New Line.l(r:p2udt6740lv-p2ulv12655) Units=km Length=0.0189788 bus1=p2udt6740lv.1.2 bus2=p2ulv12655.1.2 switch=n enabled=y phases=2 Linecode=1P_OH_AL_2/0_Rucina_0_416_0_2_2_2_2

New Line.l(r:p2udt6809lv-p2ulv17045) Units=km Length=0.0160596 bus1=p2udt6809lv.1.2 bus2=p2ulv17045.1.2 switch=n enabled=y phases=2 Linecode=1P_OH_AL_2/0_Rucina_0_416_0_2_2_2_2

New Line.l(r:p2udm20433-p2ulv12893) Units=km Length=0.0136772 bus1=p2udm20433.1.2 bus2=p2ulv12893.1.2 switch=n enabled=y phases=2 Linecode=1P_UG_AL_4/0_Sweetbriar_0_416_0_2_2_2_2

New Line.l(r:p2udm20433-p2udt6809lv) Units=km Length=0.00886797 bus1=p2udt6809lv.1.2 bus2=p2udm20433.1.2 switch=n enabled=y phases=2 Linecode=1P_OH_AL_2/0_Rucina_0_416_0_2_2_2_2

New Line.l(r:p2udt6812lv-p2ulv12903) Units=km Length=0.0944967 bus1=p2udt6812lv.1.2 bus2=p2ulv12903.1.2 switch=n enabled=y phases=2 Linecode=1P_OH_AL_4/0_Zuzara_0_416_0_2_2_2_2

New Line.l(r:p2udm20577-p2ulv13123) Units=km Length=0.0164254 bus1=p2udm20577.1.2 bus2=p2ulv13123.1.2 switch=n enabled=y phases=2 Linecode=1P_OH_AL_2/0_Rucina_0_416_0_2_2_2_2

New Line.l(r:p2udm20577-p2udt6875lv) Units=km Length=0.0239061 bus1=p2udt6875lv.1.2 bus2=p2udm20577.1.2 switch=n enabled=y phases=2 Linecode=1P_OH_AL_2/0_Rucina_0_416_0_2_2_2_2

New Line.l(r:p2udm20579-p2ulv22673) Units=km Length=0.0151574 bus1=p2udm20579.1.2 bus2=p2ulv22673.1.2 switch=n enabled=y phases=2 Linecode=1P_OH_AL_2/0_Rucina_0_416_0_2_2_2_2

New Line.l(r:p2udm20578-p2ulv15392) Units=km Length=0.0160275 bus1=p2udm20578.1.2 bus2=p2ulv15392.1.2 switch=n enabled=y phases=2 Linecode=1P_OH_AL_2/0_Rucina_0_416_0_2_2_2_2

New Line.l(r:p2udm20578-p2udm20579) Units=km Length=0.026642300000000004 bus1=p2udm20579.1.2 bus2=p2udm20578.1.2 switch=n enabled=y phases=2 Linecode=1P_OH_AL_2/0_Rucina_0_416_0_2_2_2_2

New Line.l(r:p2udm20579-p2udt6875lv) Units=km Length=0.0116818 bus1=p2udt6875lv.1.2 bus2=p2udm20579.1.2 switch=n enabled=y phases=2 Linecode=1P_OH_AL_2/0_Rucina_0_416_0_2_2_2_2

New Line.l(r:p2udt6940lv-p2ulv13372) Units=km Length=0.027905800000000005 bus1=p2udt6940lv.1.2 bus2=p2ulv13372.1.2 switch=n enabled=y phases=2 Linecode=1P_OH_AL_4/0_Zuzara_0_416_0_2_2_2_2

New Line.l(r:p2udt6992lv-p2ulv15394) Units=km Length=0.0133607 bus1=p2udt6992lv.1.2 bus2=p2ulv15394.1.2 switch=n enabled=y phases=2 Linecode=1P_UG_AL_4/0_Sweetbriar_0_416_0_2_2_2_2

New Line.l(r:p2udm20794-p2ulv13593) Units=km Length=0.0162277 bus1=p2udm20794.1.2 bus2=p2ulv13593.1.2 switch=n enabled=y phases=2 Linecode=1P_UG_AL_1/0_Brenau_0_416_0_2_2_2_2

New Line.l(r:p2udm20794-p2udt6992lv) Units=km Length=0.0175309 bus1=p2udt6992lv.1.2 bus2=p2udm20794.1.2 switch=n enabled=y phases=2 Linecode=1P_UG_AL_1/0_Brenau_0_416_0_2_2_2_2

New Line.l(r:p2udm20796-p2ulv24004) Units=km Length=0.0187183 bus1=p2udm20796.1.2 bus2=p2ulv24004.1.2 switch=n enabled=y phases=2 Linecode=1P_UG_AL_1/0_Brenau_0_416_0_2_2_2_2

New Line.l(r:p2udm20796-p2udt6992lv) Units=km Length=0.0087655 bus1=p2udt6992lv.1.2 bus2=p2udm20796.1.2 switch=n enabled=y phases=2 Linecode=1P_UG_AL_1/0_Brenau_0_416_0_2_2_2_2

New Line.l(r:p2udt6993lv-p2ulv13594) Units=km Length=0.0144318 bus1=p2udt6993lv.1.2 bus2=p2ulv13594.1.2 switch=n enabled=y phases=2 Linecode=1P_OH_AL_2/0_Rucina_0_416_0_2_2_2_2

New Line.l(r:p2udm20798-p2ulv20619) Units=km Length=0.00700461 bus1=p2udm20798.1.2 bus2=p2ulv20619.1.2 switch=n enabled=y phases=2 Linecode=1P_OH_AL_2/0_Rucina_0_416_0_2_2_2_2

New Line.l(r:p2udm20798-p2udt6993lv) Units=km Length=0.015515 bus1=p2udt6993lv.1.2 bus2=p2udm20798.1.2 switch=n enabled=y phases=2 Linecode=1P_OH_AL_2/0_Rucina_0_416_0_2_2_2_2

New Line.l(r:p2udt7052lv-p2ulv13822) Units=km Length=0.0267311 bus1=p2udt7052lv.1.2 bus2=p2ulv13822.1.2 switch=n enabled=y phases=2 Linecode=1P_OH_AL_2/0_Rucina_0_416_0_2_2_2_2

New Line.l(r:p2udt7111lv-p2ulv14040) Units=km Length=0.028367100000000003 bus1=p2udt7111lv.1.2 bus2=p2ulv14040.1.2 switch=n enabled=y phases=2 Linecode=1P_OH_AL_4/0_Zuzara_0_416_0_2_2_2_2

New Line.l(r:p2udt7161lv-p2ulv14245) Units=km Length=0.0871107 bus1=p2udt7161lv.1.2 bus2=p2ulv14245.1.2 switch=n enabled=y phases=2 Linecode=1P_OH_AL_4/0_Zuzara_0_416_0_2_2_2_2

New Line.l(r:p2udt7165lv-p2ulv14254) Units=km Length=0.0200438 bus1=p2udt7165lv.1.2 bus2=p2ulv14254.1.2 switch=n enabled=y phases=2 Linecode=1P_UG_AL_2/0_Converse_0_416_0_2_2_2_2

New Line.l(r:p2udt7258lv-p2ulv14707) Units=km Length=0.0423432 bus1=p2udt7258lv.1.2 bus2=p2ulv14707.1.2 switch=n enabled=y phases=2 Linecode=1P_OH_AL_4/0_Zuzara_0_416_0_2_2_2_2

New Line.l(r:p2udt7405lv-p2ulv21275) Units=km Length=0.07598 bus1=p2udt7405lv.1.2 bus2=p2ulv21275.1.2 switch=n enabled=y phases=2 Linecode=1P_OH_AL_4/0_Zuzara_0_416_0_2_2_2_2

New Line.l(r:p2udm21496-p2ulv15393) Units=km Length=0.0594738 bus1=p2udm21496.1.2 bus2=p2ulv15393.1.2 switch=n enabled=y phases=2 Linecode=1P_OH_AL_4/0_Zuzara_0_416_0_2_2_2_2

New Line.l(r:p2udm21496-p2ulv23516) Units=km Length=0.028822800000000003 bus1=p2udm21496.1.2 bus2=p2ulv23516.1.2 switch=n enabled=y phases=2 Linecode=1P_OH_AL_4/0_Zuzara_0_416_0_2_2_2_2

New Line.l(r:p2udm21496-p2udt7405lv) Units=km Length=0.0151934 bus1=p2udt7405lv.1.2 bus2=p2udm21496.1.2 switch=n enabled=y phases=2 Linecode=1P_OH_AL_2/0_Rucina_0_416_0_2_2_2_2

New Line.l(r:p2udt7407lv-p2ulv15398) Units=km Length=0.0384767 bus1=p2udt7407lv.1.2 bus2=p2ulv15398.1.2 switch=n enabled=y phases=2 Linecode=1P_UG_AL_1/0_Brenau_0_416_0_2_2_2_2

New Line.l(r:p2udt7456lv-p2ulv15626) Units=km Length=0.0113514 bus1=p2udt7456lv.1.2 bus2=p2ulv15626.1.2 switch=n enabled=y phases=2 Linecode=1P_OH_AL_2/0_Rucina_0_416_0_2_2_2_2

New Line.l(r:p2udt7627lv-p2ulv16330) Units=km Length=0.0125358 bus1=p2udt7627lv.1.2 bus2=p2ulv16330.1.2 switch=n enabled=y phases=2 Linecode=1P_OH_AL_2/0_Rucina_0_416_0_2_2_2_2

New Line.l(r:p2udt7735lv-p2ulv16798) Units=km Length=0.001 bus1=p2udt7735lv.1.2 bus2=p2ulv16798.1.2 switch=n enabled=y phases=2 Linecode=1P_OH_AL_4_Periwinkle_0_416_0_2_2_2_2

New Line.l(r:p2udt7937lv-p2ulv17921) Units=km Length=0.0163789 bus1=p2udt7937lv.1.2 bus2=p2ulv17921.1.2 switch=n enabled=y phases=2 Linecode=1P_OH_AL_2/0_Rucina_0_416_0_2_2_2_2

New Line.l(r:p2udt8024lv-p2ulv18371) Units=km Length=0.025494200000000005 bus1=p2udt8024lv.1.2 bus2=p2ulv18371.1.2 switch=n enabled=y phases=2 Linecode=1P_OH_AL_2/0_Rucina_0_416_0_2_2_2_2

New Line.l(r:p2udt8026lv-p2ulv18383) Units=km Length=0.0683453 bus1=p2udt8026lv.1.2 bus2=p2ulv18383.1.2 switch=n enabled=y phases=2 Linecode=1P_OH_AL_4/0_Zuzara_0_416_0_2_2_2_2

New Line.l(r:p2udt8222lv-p2ulv19509) Units=km Length=0.0254077 bus1=p2udt8222lv.1.2 bus2=p2ulv19509.1.2 switch=n enabled=y phases=2 Linecode=1P_OH_AL_2/0_Rucina_0_416_0_2_2_2_2

New Line.l(r:p2udt8268lv-p2ulv19739) Units=km Length=0.0126734 bus1=p2udt8268lv.1.2 bus2=p2ulv19739.1.2 switch=n enabled=y phases=2 Linecode=1P_OH_AL_2/0_Rucina_0_416_0_2_2_2_2

New Line.l(r:p2udt8268lv-p2ulv22203) Units=km Length=0.018249100000000004 bus1=p2udt8268lv.1.2 bus2=p2ulv22203.1.2 switch=n enabled=y phases=2 Linecode=1P_OH_AL_2/0_Rucina_0_416_0_2_2_2_2

New Line.l(r:p2udt8345lv-p2ulv20171) Units=km Length=0.025810700000000002 bus1=p2udt8345lv.1.2 bus2=p2ulv20171.1.2 switch=n enabled=y phases=2 Linecode=1P_OH_AL_2/0_Rucina_0_416_0_2_2_2_2

New Line.l(r:p2udt8525lv-p2ulv21268) Units=km Length=0.0309007 bus1=p2udt8525lv.1.2 bus2=p2ulv21268.1.2 switch=n enabled=y phases=2 Linecode=1P_OH_AL_4/0_Zuzara_0_416_0_2_2_2_2

New Line.l(r:p2udm23156-p2ulv21739) Units=km Length=0.0195272 bus1=p2udm23156.1.2 bus2=p2ulv21739.1.2 switch=n enabled=y phases=2 Linecode=1P_UG_AL_1/0_Brenau_0_416_0_2_2_2_2

New Line.l(r:p2udm23156-p2udt8607lv) Units=km Length=0.00990808 bus1=p2udt8607lv.1.2 bus2=p2udm23156.1.2 switch=n enabled=y phases=2 Linecode=1P_UG_AL_1/0_Brenau_0_416_0_2_2_2_2

New Line.l(r:p2udm23157-p2ulv22463) Units=km Length=0.022287100000000004 bus1=p2udm23157.1.2 bus2=p2ulv22463.1.2 switch=n enabled=y phases=2 Linecode=1P_UG_AL_1/0_Brenau_0_416_0_2_2_2_2

New Line.l(r:p2udm23157-p2udt8607lv) Units=km Length=0.009042200000000002 bus1=p2udt8607lv.1.2 bus2=p2udm23157.1.2 switch=n enabled=y phases=2 Linecode=1P_UG_AL_1/0_Brenau_0_416_0_2_2_2_2

New Line.l(r:p2udt8683lv-p2ulv22213) Units=km Length=0.021149500000000005 bus1=p2udt8683lv.1.2 bus2=p2ulv22213.1.2 switch=n enabled=y phases=2 Linecode=1P_UG_AL_4/0_Sweetbriar_0_416_0_2_2_2_2

New Line.l(r:p2udt8743lv-p2ulv22672) Units=km Length=0.0374069 bus1=p2udt8743lv.1.2 bus2=p2ulv22672.1.2 switch=n enabled=y phases=2 Linecode=1P_OH_AL_4/0_Zuzara_0_416_0_2_2_2_2

New Line.l(r:p2udt8941lv-p2ulv24213) Units=km Length=0.021401 bus1=p2udt8941lv.1.2 bus2=p2ulv24213.1.2 switch=n enabled=y phases=2 Linecode=1P_OH_AL_2/0_Rucina_0_416_0_2_2_2_2

New Line.l(r:p2udt2065-p2udt3194) Units=km Length=0.001 bus1=p2udt2065-p2udt3194x.1 bus2=p2udt3194.1 switch=n enabled=y phases=1 Linecode=1P_OH_AL_ACSR_#2_Sparrow_12_47_0_1_1_1_1

New Line.l(r:p2udt6875-p2udt7627) Units=km Length=0.129316 bus1=p2udt7627.1 bus2=p2udt6875.1 switch=n enabled=y phases=1 Linecode=1P_OH_AL_ACSR_#2_Sparrow_12_47_0_1_1_1_1

New Line.l(r:p2udt1690-p2udt7627) Units=km Length=0.0598709 bus1=p2udt1690.1 bus2=p2udt7627.1 switch=n enabled=y phases=1 Linecode=1P_OH_AL_ACSR_#2_Sparrow_12_47_0_1_1_1_1

New Line.l(r:p2udt1690-p2udt1865) Units=km Length=0.0732508 bus1=p2udt1865.1 bus2=p2udt1690.1 switch=n enabled=y phases=1 Linecode=1P_OH_AL_ACSR_#2_Sparrow_12_47_0_1_1_1_1

New Line.l(r:p2udt1865-p2udt2879)_s0 Units=km Length=0.0788493 bus1=p2udt1865-p2udt2879xx.1 bus2=p2udt1865-p2udt2879x.1 switch=n enabled=y phases=1 Linecode=1P_OH_AL_ACSR_#2_Sparrow_12_47_0_1_1_1_1

New Line.l(r:p2udt1865-p2udt2879)_s1 Units=km Length=0.056421500000000006 bus1=p2udt1865-p2udt2879x.1 bus2=p2udt1865.1 switch=n enabled=y phases=1 Linecode=1P_OH_AL_ACSR_#2_Sparrow_12_47_0_1_1_1_1

New Line.l(r:p2udt3482-p2udt5061) Units=km Length=0.0444408 bus1=p2udt5061.3 bus2=p2udt3482.3 switch=n enabled=y phases=1 Linecode=1P_OH_AL_ACSR_#2_Sparrow_12_47_0_1_1_1_1

New Line.l(r:p2udt5061-p2udt6809) Units=km Length=0.016611 bus1=p2udt6809.3 bus2=p2udt5061.3 switch=n enabled=y phases=1 Linecode=1P_OH_AL_ACSR_#2_Sparrow_12_47_0_1_1_1_1

New Line.l(r:p2udt6469-p2udt6809) Units=km Length=0.247614 bus1=p2udt6469.3 bus2=p2udt6809.3 switch=n enabled=y phases=1 Linecode=1P_OH_AL_ACSR_#2_Sparrow_12_47_0_1_1_1_1

New Line.l(r:p2udt4289-p2udt6469) Units=km Length=0.110466 bus1=p2udt4289-p2udt6469x.3 bus2=p2udt6469.3 switch=n enabled=y phases=1 Linecode=1P_OH_AL_ACSR_#2_Sparrow_12_47_0_1_1_1_1

New Line.l(r:p2udt4542-p2udt8525) Units=km Length=0.0290347 bus1=p2udt4542.2 bus2=p2udt8525.2 switch=n enabled=y phases=1 Linecode=1P_OH_AL_ACSR_#2_Sparrow_12_47_0_1_1_1_1

New Line.l(r:p2udt1292-p2udt4542) Units=km Length=0.0396987 bus1=p2udt1292-p2udt4542x.2 bus2=p2udt1292-p2udt4542xx.2 switch=n enabled=y phases=1 Linecode=1P_UG_AL_#2_15_12_47_0_1_1_1_1

New Line.l(r:p2udt1292-p2udt2246) Units=km Length=0.0396987 bus1=p2udt1292-p2udt2246xx.2 bus2=p2udt1292-p2udt2246x.2 switch=n enabled=y phases=1 Linecode=1P_UG_AL_#2_15_12_47_0_1_1_1_1

New Line.l(r:p2udt2246-p2udt4147) Units=km Length=0.059541 bus1=p2udt2246-p2udt4147xx.2 bus2=p2udt2246-p2udt4147x.2 switch=n enabled=y phases=1 Linecode=1P_UG_AL_#2_15_12_47_0_1_1_1_1

New Line.l(r:p2udt4147-p2udt8268) Units=km Length=0.0510107 bus1=p2udt8268.2 bus2=p2udt4147.2 switch=n enabled=y phases=1 Linecode=1P_OH_AL_ACSR_#2_Sparrow_12_47_0_1_1_1_1

New Line.l(r:p2udt6992-p2udt864) Units=km Length=0.0455469 bus1=p2udt6992-p2udt864x.2 bus2=p2udt6992-p2udt864xx.2 switch=n enabled=y phases=1 Linecode=1P_UG_AL_#2_15_12_47_0_1_1_1_1

New Line.l(r:p2udt6992-p2udt8268) Units=km Length=0.0804487 bus1=p2udt8268.2 bus2=p2udt6992.2 switch=n enabled=y phases=1 Linecode=1P_OH_AL_ACSR_#2_Sparrow_12_47_0_1_1_1_1

New Line.l(r:p2udt4146-p2udt8268) Units=km Length=0.0311606 bus1=p2udt4146.2 bus2=p2udt8268.2 switch=n enabled=y phases=1 Linecode=1P_OH_AL_ACSR_#2_Sparrow_12_47_0_1_1_1_1

New Line.l(r:p2udt4146-p2udt6993) Units=km Length=0.0374268 bus1=p2udt6993.2 bus2=p2udt4146.2 switch=n enabled=y phases=1 Linecode=1P_OH_AL_ACSR_#2_Sparrow_12_47_0_1_1_1_1

New Line.l(r:p2udt6993-p2udt7052) Units=km Length=0.08545400000000002 bus1=p2udt6993-p2udt7052x.2 bus2=p2udt6993.2 switch=n enabled=y phases=1 Linecode=1P_OH_AL_ACSR_#2_Sparrow_12_47_0_1_1_1_1

New Line.l(r:p2udt2884-p2udt7407) Units=km Length=0.001 bus1=p2udt2884-p2udt7407xx.3 bus2=p2udt2884-p2udt7407xxx.3 switch=n enabled=y phases=1 Linecode=1P_UG_AL_#2_15_12_47_0_1_1_1_1

New Line.l(r:p2udt5264-p2udt8717) Units=km Length=0.0535394 bus1=p2udt5264-p2udt8717xx.2 bus2=p2udt5264-p2udt8717x.2 switch=n enabled=y phases=1 Linecode=1P_UG_AL_#2_15_12_47_0_1_1_1_1

New Line.l(r:p2udt3044-p2udt4869) Units=km Length=0.144043 bus1=p2udt3044-p2udt4869x.2 bus2=p2udt3044.2 switch=n enabled=y phases=1 Linecode=1P_OH_AL_ACSR_#2_Sparrow_12_47_0_1_1_1_1

New Line.l(r:p2udt5438-p2udt6611) Units=km Length=0.081593 bus1=p2udt6611.1 bus2=p2udt5438.1 switch=n enabled=y phases=1 Linecode=1P_OH_AL_ACSR_#2_Sparrow_12_47_0_1_1_1_1

New Line.l(r:p2udt4754-p2udt6611) Units=km Length=0.134243 bus1=p2udt4754.1 bus2=p2udt6611.1 switch=n enabled=y phases=1 Linecode=1P_OH_AL_ACSR_#2_Sparrow_12_47_0_1_1_1_1

New Line.l(r:p2udt1694-p2udt8941)_s0 Units=km Length=0.419234 bus1=p2udt8941.1 bus2=p2udt1694-p2udt8941x.1 switch=n enabled=y phases=1 Linecode=1P_OH_AL_ACSR_#2_Sparrow_12_47_0_1_1_1_1

New Line.l(r:p2udt1694-p2udt8941)_s1 Units=km Length=0.00451741 bus1=p2udt1694-p2udt8941x.1 bus2=p2udt1694.1 switch=n enabled=y phases=1 Linecode=1P_OH_AL_ACSR_#2_Sparrow_12_47_0_1_1_1_1

New Line.l(r:p2udt3758-p2udt6404) Units=km Length=0.197462 bus1=p2udt6404.1 bus2=p2udt3758.1 switch=n enabled=y phases=1 Linecode=1P_OH_AL_ACSR_#2_Sparrow_12_47_0_1_1_1_1

New Line.l(r:p2udt6404-p2udt8941) Units=km Length=0.192647 bus1=p2udt8941.1 bus2=p2udt6404.1 switch=n enabled=y phases=1 Linecode=1P_OH_AL_ACSR_#2_Sparrow_12_47_0_1_1_1_1

New Line.l(r:p2udt4754-p2udt8941) Units=km Length=0.052481 bus1=p2udt4754.1 bus2=p2udt8941.1 switch=n enabled=y phases=1 Linecode=1P_OH_AL_ACSR_#2_Sparrow_12_47_0_1_1_1_1

New Line.l(r:p2udt4754-p2udt4870) Units=km Length=0.24164500000000003 bus1=p2udt4870.1 bus2=p2udt4754.1 switch=n enabled=y phases=1 Linecode=1P_OH_AL_ACSR_#2_Sparrow_12_47_0_1_1_1_1

New Line.l(r:p2udt4870-p2udt7735)_s0 Units=km Length=0.331454 bus1=p2udt4870-p2udt7735xx.1 bus2=p2udt4870-p2udt7735x.1 switch=n enabled=y phases=1 Linecode=1P_OH_AL_ACSR_#2_Sparrow_12_47_0_1_1_1_1

New Line.l(r:p2udt4870-p2udt7735)_s1 Units=km Length=0.205763 bus1=p2udt4870-p2udt7735x.1 bus2=p2udt4870.1 switch=n enabled=y phases=1 Linecode=1P_OH_AL_ACSR_#2_Sparrow_12_47_0_1_1_1_1

New Line.l(r:p2udt4297-p2udt4959) Units=km Length=0.058766900000000004 bus1=p2udt4297-p2udt4959x.2 bus2=p2udt4297.2 switch=n enabled=y phases=1 Linecode=1P_OH_AL_ACSR_#2_Sparrow_12_47_0_1_1_1_1

New Line.l(r:p2udt5952-p2udt6740) Units=km Length=0.0756 bus1=p2udt5952-p2udt6740x.2 bus2=p2udt5952.2 switch=n enabled=y phases=1 Linecode=1P_OH_AL_ACSR_#2_Sparrow_12_47_0_1_1_1_1

New Line.l(r:p2udt1300-p2udt648)_s0 Units=km Length=0.07157210000000001 bus1=p2udt1300.3 bus2=p2udt1300-p2udt648x.3 switch=n enabled=y phases=1 Linecode=1P_OH_AL_ACSR_#2_Sparrow_12_47_0_1_1_1_1

New Line.l(r:p2udt1300-p2udt648)_s1 Units=km Length=0.00696202 bus1=p2udt1300-p2udt648x.3 bus2=p2udt648.3 switch=n enabled=y phases=1 Linecode=1P_OH_AL_ACSR_#2_Sparrow_12_47_0_1_1_1_1

New Line.l(r:p2udt1300-p2udt5363) Units=km Length=0.013648400000000002 bus1=p2udt1300.3 bus2=p2udt5363.3 switch=n enabled=y phases=1 Linecode=1P_OH_AL_ACSR_#2_Sparrow_12_47_0_1_1_1_1

New Line.l(r:p2udt1300-p2udt7937) Units=km Length=0.06133770000000001 bus1=p2udt7937.3 bus2=p2udt1300.3 switch=n enabled=y phases=1 Linecode=1P_OH_AL_ACSR_#2_Sparrow_12_47_0_1_1_1_1

New Line.l(r:p2udt434-p2udt7937) Units=km Length=0.17146900000000004 bus1=p2udt434.3 bus2=p2udt7937.3 switch=n enabled=y phases=1 Linecode=1P_OH_AL_ACSR_#2_Sparrow_12_47_0_1_1_1_1

New Line.l(r:p2udt434-p2udt6119) Units=km Length=0.18963 bus1=p2udt6119.3 bus2=p2udt434.3 switch=n enabled=y phases=1 Linecode=1P_OH_AL_ACSR_#2_Sparrow_12_47_0_1_1_1_1

New Line.l(r:p2udt6119-p2udt6352) Units=km Length=0.282816 bus1=p2udt6119.3 bus2=p2udt6352.3 switch=n enabled=y phases=1 Linecode=1P_OH_AL_ACSR_#2_Sparrow_12_47_0_1_1_1_1

New Line.l(r:p2udt6119-p2udt6405) Units=km Length=0.0574411 bus1=p2udt6119-p2udt6405xx.3 bus2=p2udt6119-p2udt6405x.3 switch=n enabled=y phases=1 Linecode=1P_UG_AL_#2_15_12_47_0_1_1_1_1

New Line.l(r:p2udt6405-p2udt7165) Units=km Length=0.03830170000000001 bus1=p2udt6405-p2udt7165xx.3 bus2=p2udt6405-p2udt7165x.3 switch=n enabled=y phases=1 Linecode=1P_UG_AL_#2_15_12_47_0_1_1_1_1

New Line.l(r:p2udt1084-p2udt7165) Units=km Length=0.135891 bus1=p2udt1084-p2udt7165x.3 bus2=p2udt1084-p2udt7165xx.3 switch=n enabled=y phases=1 Linecode=1P_UG_AL_#2_15_12_47_0_1_1_1_1

New Line.l(r:p2udt1084-p2udt5500) Units=km Length=0.0160264 bus1=p2udt1084-p2udt5500xx.3 bus2=p2udt1084-p2udt5500x.3 switch=n enabled=y phases=1 Linecode=1P_UG_AL_#2_15_12_47_0_1_1_1_1

New Line.l(r:p2udt5500-p2udt8841) Units=km Length=0.05607680000000001 bus1=p2udt5500-p2udt8841x.3 bus2=p2udt5500.3 switch=n enabled=y phases=1 Linecode=1P_OH_AL_ACSR_#2_Sparrow_12_47_0_1_1_1_1

New Line.l(r:p2udt6285-p2udt7405) Units=km Length=0.341208 bus1=p2udt6285.1.2.3 bus2=p2udt7405.1.2.3 switch=n enabled=y phases=3 Linecode=3P_OH_AL_ACSR_4/0_Penguin_12_47_0_3_3_3_3

New Line.l(r:p2udt6285-p2udt7161) Units=km Length=0.019706900000000003 bus1=p2udt7161.1.2.3 bus2=p2udt6285.1.2.3 switch=n enabled=y phases=3 Linecode=3P_OH_AL_ACSR_4/0_Penguin_12_47_0_3_3_3_3

New Line.l(r:p2udt7161-p2udt8743) Units=km Length=0.0788565 bus1=p2udt8743.1.2.3 bus2=p2udt7161.1.2.3 switch=n enabled=y phases=3 Linecode=3P_OH_AL_ACSR_4/0_Penguin_12_47_0_3_3_3_3

New Line.l(r:p2udt4865-p2udt8743) Units=km Length=0.019721 bus1=p2udt4865.1.2.3 bus2=p2udt8743.1.2.3 switch=n enabled=y phases=3 Linecode=3P_OH_AL_ACSR_4/0_Penguin_12_47_0_3_3_3_3

New Line.l(r:p2udt1689-p2udt4865) Units=km Length=0.0591422 bus1=p2udt1689.1.2.3 bus2=p2udt4865.1.2.3 switch=n enabled=y phases=3 Linecode=3P_OH_AL_ACSR_4/0_Penguin_12_47_0_3_3_3_3

New Line.l(r:p2udt1689-p2udt7111) Units=km Length=0.136034 bus1=p2udt7111.1.2.3 bus2=p2udt1689.1.2.3 switch=n enabled=y phases=3 Linecode=3P_OH_AL_ACSR_4/0_Penguin_12_47_0_3_3_3_3

New Line.l(r:p2udt7111-p2udt8223) Units=km Length=0.19381 bus1=p2udt8223.1.2.3 bus2=p2udt7111.1.2.3 switch=n enabled=y phases=3 Linecode=3P_OH_AL_ACSR_4/0_Penguin_12_47_0_3_3_3_3

New Line.l(r:p2udt7258-p2udt8223) Units=km Length=0.019119600000000004 bus1=p2udt7258.1.2.3 bus2=p2udt8223.1.2.3 switch=n enabled=y phases=3 Linecode=3P_OH_AL_ACSR_4/0_Penguin_12_47_0_3_3_3_3

New Line.l(r:p2udt6117-p2udt7258) Units=km Length=0.183534 bus1=p2udt6117.1.2.3 bus2=p2udt7258.1.2.3 switch=n enabled=y phases=3 Linecode=3P_OH_AL_ACSR_4/0_Penguin_12_47_0_3_3_3_3

New Line.l(r:p2udt3335-p2udt6117) Units=km Length=0.0496534 bus1=p2udt3335-p2udt6117x.1.2.3 bus2=p2udt3335-p2udt6117xx.1.2.3 switch=n enabled=y phases=3 Linecode=3P_UG_AL_4/0_25_12_47_0_3_3_3_3

New Line.l(r:p2udt1693-p2udt3335) Units=km Length=0.0397369 bus1=p2udt1693-p2udt3335x.1.2.3 bus2=p2udt1693-p2udt3335xx.1.2.3 switch=n enabled=y phases=3 Linecode=3P_UG_AL_4/0_25_12_47_0_3_3_3_3

New Line.l(r:p2udt1693-p2udt2884) Units=km Length=0.0198614 bus1=p2udt1693-p2udt2884xx.1.2.3 bus2=p2udt1693-p2udt2884x.1.2.3 switch=n enabled=y phases=3 Linecode=3P_UG_AL_4/0_25_12_47_0_3_3_3_3

New Line.l(r:p2udt1299-p2udt2884) Units=km Length=0.0397228 bus1=p2udt1299-p2udt2884x.1.2.3 bus2=p2udt1299-p2udt2884xx.1.2.3 switch=n enabled=y phases=3 Linecode=3P_UG_AL_4/0_25_12_47_0_3_3_3_3

New Line.l(r:p2udt1299-p2udt8683) Units=km Length=0.03973 bus1=p2udt1299-p2udt8683xx.1.2.3 bus2=p2udt1299-p2udt8683x.1.2.3 switch=n enabled=y phases=3 Linecode=3P_UG_AL_4/0_25_12_47_0_3_3_3_3

New Line.l(r:p2udt2885-p2udt8683) Units=km Length=0.0198084 bus1=p2udt2885-p2udt8683x.1.2.3 bus2=p2udt2885-p2udt8683xx.1.2.3 switch=n enabled=y phases=3 Linecode=3P_UG_AL_4/0_25_12_47_0_3_3_3_3

New Line.l(r:p2udt2064-p2udt2885) Units=km Length=0.029717900000000002 bus1=p2udt2064-p2udt2885x.1.2.3 bus2=p2udt2064-p2udt2885xx.1.2.3 switch=n enabled=y phases=3 Linecode=3P_UG_AL_4/0_25_12_47_0_3_3_3_3

New Line.l(r:p2udt2064-p2udt8607) Units=km Length=0.0495263 bus1=p2udt2064-p2udt8607xx.1.2.3 bus2=p2udt2064-p2udt8607x.1.2.3 switch=n enabled=y phases=3 Linecode=3P_UG_AL_4/0_25_12_47_0_3_3_3_3

New Line.l(r:p2udt1874-p2udt8607) Units=km Length=0.054259 bus1=p2udt1874-p2udt8607x.1.2.3 bus2=p2udt1874-p2udt8607xx.1.2.3 switch=n enabled=y phases=3 Linecode=3P_UG_AL_4/0_25_12_47_0_3_3_3_3

New Line.l(r:p2udt1874-p2udt4021) Units=km Length=0.03411510000000001 bus1=p2udt1874-p2udt4021xx.1.2.3 bus2=p2udt1874-p2udt4021x.1.2.3 switch=n enabled=y phases=3 Linecode=3P_UG_AL_4/0_25_12_47_0_3_3_3_3

New Line.l(r:p2udt1083-p2udt4021) Units=km Length=0.0508309 bus1=p2udt1083-p2udt4021x.1.2.3 bus2=p2udt1083-p2udt4021xx.1.2.3 switch=n enabled=y phases=3 Linecode=3P_UG_AL_4/0_25_12_47_0_3_3_3_3

New Line.l(r:p2udt1083-p2udt1487) Units=km Length=0.0467582 bus1=p2udt1487.1.2.3 bus2=p2udt1083.1.2.3 switch=n enabled=y phases=3 Linecode=3P_OH_AL_ACSR_4/0_Penguin_12_47_0_3_3_3_3

New Line.l(r:p2udt1487-p2udt8026) Units=km Length=0.0107602 bus1=p2udt8026.1.2.3 bus2=p2udt1487.1.2.3 switch=n enabled=y phases=3 Linecode=3P_OH_AL_ACSR_4/0_Penguin_12_47_0_3_3_3_3

New Line.l(r:p2udt4753-p2udt8026) Units=km Length=0.0107602 bus1=p2udt4753.1.2.3 bus2=p2udt8026.1.2.3 switch=n enabled=y phases=3 Linecode=3P_OH_AL_ACSR_4/0_Penguin_12_47_0_3_3_3_3

New Line.l(r:p2udt4753-p2udt6812) Units=km Length=0.0183194 bus1=p2udt6812.1.2.3 bus2=p2udt4753.1.2.3 switch=n enabled=y phases=3 Linecode=3P_OH_AL_ACSR_4/0_Penguin_12_47_0_3_3_3_3

New Line.l(r:p2udt2065-p2udt6812) Units=km Length=0.0113294 bus1=p2udt2065.1.2.3 bus2=p2udt6812.1.2.3 switch=n enabled=y phases=3 Linecode=3P_OH_AL_ACSR_4/0_Penguin_12_47_0_3_3_3_3

New Line.l(r:p2udt2065-p2udt4869) Units=km Length=0.0941141 bus1=p2udt4869.1.2.3 bus2=p2udt2065.1.2.3 switch=n enabled=y phases=3 Linecode=3P_OH_AL_ACSR_4/0_Penguin_12_47_0_3_3_3_3

New Line.l(r:p2udt2595-p2udt4869) Units=km Length=0.0191895 bus1=p2udt2595.1.2.3 bus2=p2udt4869.1.2.3 switch=n enabled=y phases=3 Linecode=3P_OH_AL_ACSR_4/0_Penguin_12_47_0_3_3_3_3

New Line.l(r:p2udt212-p2udt2595) Units=km Length=0.05759790000000001 bus1=p2udt212.1.2.3 bus2=p2udt2595.1.2.3 switch=n enabled=y phases=3 Linecode=3P_OH_AL_ACSR_4/0_Penguin_12_47_0_3_3_3_3

New Line.l(r:p2udt212-p2udt4752) Units=km Length=0.0767851 bus1=p2udt4752.1.2.3 bus2=p2udt212.1.2.3 switch=n enabled=y phases=3 Linecode=3P_OH_AL_ACSR_4/0_Penguin_12_47_0_3_3_3_3

New Line.l(r:p2udt4752-p2udt6940) Units=km Length=0.0575881 bus1=p2udt6940.1.2.3 bus2=p2udt4752.1.2.3 switch=n enabled=y phases=3 Linecode=3P_OH_AL_ACSR_4/0_Penguin_12_47_0_3_3_3_3

New Line.l(r:p2udt2594-p2udt6940) Units=km Length=0.0575881 bus1=p2udt2594.1.2.3 bus2=p2udt6940.1.2.3 switch=n enabled=y phases=3 Linecode=3P_OH_AL_ACSR_4/0_Penguin_12_47_0_3_3_3_3

New Line.l(r:p2udt2594-p2udt7735)_s0 Units=km Length=0.20237000000000002 bus1=p2udt7735.1.2.3 bus2=p2udt2594-p2udt7735x.1.2.3 switch=n enabled=y phases=3 Linecode=3P_OH_AL_ACSR_4/0_Penguin_12_47_0_3_3_3_3

New Line.l(r:p2udt2594-p2udt7735)_s1 Units=km Length=0.508781 bus1=p2udt2594-p2udt7735x.1.2.3 bus2=p2udt2594.1.2.3 switch=n enabled=y phases=3 Linecode=3P_OH_AL_ACSR_4/0_Penguin_12_47_0_3_3_3_3

New Line.l(r:p2udt7735-p2uhs4_1247) Units=km Length=2.22865 bus1=p2udt7735-p2uhs4_1247x.1.2.3 bus2=p2udt7735.1.2.3 switch=n enabled=y phases=3 Linecode=3P_OH_AL_ACSR_4/0_Penguin_12_47_0_3_3_3_3

New Line.l(r:p2udt8223lv-p2ulv19514) Units=km Length=0.084206 bus1=p2udt8223lv.1.2.3 bus2=p2ulv19514.1.2.3 switch=n enabled=y phases=3 Linecode=3P_UG_AL_350kcmil_15_0_416_0_3_3_3_3

New Line.l(r:p2udt2879lv-p2ulv3594) Units=km Length=0.001 bus1=p2udt2879lv.1.2.3 bus2=p2ulv3594.1.2.3 switch=n enabled=y phases=3 Linecode=3P_UG_AL_350kcmil_15_0_416_0_3_3_3_3

New Line.l(r:p2udt2879-p2udt6285)_s0 Units=km Length=0.292256 bus1=p2udt6285.1.2.3 bus2=p2udt2879-p2udt6285x.1.2.3 switch=n enabled=y phases=3 Linecode=3P_OH_AL_ACSR_4/0_Penguin_12_47_0_3_3_3_3

New Line.l(r:p2udt2879-p2udt6285)_s1 Units=km Length=0.191128 bus1=p2udt2879-p2udt6285x.1.2.3 bus2=p2udt2879.1.2.3 switch=n enabled=y phases=3 Linecode=3P_OH_AL_ACSR_4/0_Penguin_12_47_0_3_3_3_3

New Line.l(r:p2udt8179lv-p2ulv19261) Units=km Length=0.00798223 bus1=p2udt8179lv.1.2.3 bus2=p2ulv19261.1.2.3 switch=n enabled=y phases=3 Linecode=3P_UG_AL_350kcmil_15_0_416_0_3_3_3_3

New Line.l(r:p2udt7456-p2udt8179) Units=km Length=0.051568100000000006 bus1=p2udt7456.1.2.3 bus2=p2udt8179.1.2.3 switch=n enabled=y phases=3 Linecode=3P_OH_AL_ACSR_4/0_Penguin_12_47_0_3_3_3_3

New Line.l(r:p2udt3619-p2udt7456) Units=km Length=0.101278 bus1=p2udt3619.1.2.3 bus2=p2udt7456.1.2.3 switch=n enabled=y phases=3 Linecode=3P_OH_AL_ACSR_4/0_Penguin_12_47_0_3_3_3_3

New Line.l(r:p2udt3619-p2udt8345) Units=km Length=0.104396 bus1=p2udt8345.1.2.3 bus2=p2udt3619.1.2.3 switch=n enabled=y phases=3 Linecode=3P_OH_AL_ACSR_4/0_Penguin_12_47_0_3_3_3_3

New Line.l(r:p2udt4286-p2udt8345) Units=km Length=0.0389159 bus1=p2udt4286.1.2.3 bus2=p2udt8345.1.2.3 switch=n enabled=y phases=3 Linecode=3P_OH_AL_ACSR_4/0_Penguin_12_47_0_3_3_3_3

New Line.l(r:p2udt4286-p2udt5607) Units=km Length=0.05836720000000001 bus1=p2udt5607.1.2.3 bus2=p2udt4286.1.2.3 switch=n enabled=y phases=3 Linecode=3P_OH_AL_ACSR_4/0_Penguin_12_47_0_3_3_3_3

New Line.l(r:p2udt5607-p2udt8222) Units=km Length=0.03892310000000001 bus1=p2udt8222.1.2.3 bus2=p2udt5607.1.2.3 switch=n enabled=y phases=3 Linecode=3P_OH_AL_ACSR_4/0_Penguin_12_47_0_3_3_3_3

New Line.l(r:p2udt7052-p2udt8222) Units=km Length=0.019451 bus1=p2udt7052.1.2.3 bus2=p2udt8222.1.2.3 switch=n enabled=y phases=3 Linecode=3P_OH_AL_ACSR_4/0_Penguin_12_47_0_3_3_3_3

New Line.l(r:p2udt4289-p2udt7052) Units=km Length=0.161104 bus1=p2udt4289.1.2.3 bus2=p2udt7052.1.2.3 switch=n enabled=y phases=3 Linecode=3P_OH_AL_ACSR_4/0_Penguin_12_47_0_3_3_3_3

New Line.l(r:p2udt4289-p2udt7405) Units=km Length=0.17990300000000004 bus1=p2udt7405.1.2.3 bus2=p2udt4289.1.2.3 switch=n enabled=y phases=3 Linecode=3P_OH_AL_ACSR_4/0_Penguin_12_47_0_3_3_3_3

New Line.l(r:p2udt7053lv-p2ulv13824) Units=km Length=0.0176294 bus1=p2udt7053lv.1.2.3 bus2=p2ulv13824.1.2.3 switch=n enabled=y phases=3 Linecode=3P_UG_AL_350kcmil_15_0_416_0_3_3_3_3

New Line.l(r:p2udt7053-p2udt7405) Units=km Length=0.107105 bus1=p2udt7405.1.2.3 bus2=p2udt7053.1.2.3 switch=n enabled=y phases=3 Linecode=3P_OH_AL_ACSR_4/0_Penguin_12_47_0_3_3_3_3

New Line.l(r:p2udt4956lv-p2ulv7465) Units=km Length=0.0108062 bus1=p2udt4956lv.1.2.3 bus2=p2ulv7465.1.2.3 switch=n enabled=y phases=3 Linecode=3P_UG_AL_750kcmil_25_0_416_0_3_3_3_3

New Line.l(r:p2udt4956-p2udt8024) Units=km Length=0.474064 bus1=p2udt8024.1.2.3 bus2=p2udt4956.1.2.3 switch=n enabled=y phases=3 Linecode=3P_OH_AL_ACSR_4/0_Penguin_12_47_0_3_3_3_3

New Line.l(r:p2udt8742lv-p2ulv22668) Units=km Length=0.012957400000000003 bus1=p2udt8742lv.1.2.3 bus2=p2ulv22668.1.2.3 switch=n enabled=y phases=3 Linecode=3P_UG_AL_750kcmil_25_0_416_0_3_3_3_3

New Line.l(r:p2udt8024-p2udt8742) Units=km Length=0.274883 bus1=p2udt8024.1.2.3 bus2=p2udt8742.1.2.3 switch=n enabled=y phases=3 Linecode=3P_OH_AL_ACSR_4/0_Penguin_12_47_0_3_3_3_3

New Line.l(r:p2udt7405-p2udt8024) Units=km Length=0.473776 bus1=p2udt7405.1.2.3 bus2=p2udt8024.1.2.3 switch=n enabled=y phases=3 Linecode=3P_OH_AL_ACSR_4/0_Penguin_12_47_0_3_3_3_3

New Line.l(r:p2udt8938lv-p2ulv24204) Units=km Length=0.0143689 bus1=p2udt8938lv.1.2.3 bus2=p2ulv24204.1.2.3 switch=n enabled=y phases=3 Linecode=3P_UG_AL_350kcmil_15_0_416_0_3_3_3_3

New Line.l(r:p2udt6533lv-p2ulv11940) Units=km Length=0.014007400000000001 bus1=p2udt6533lv.1.2.3 bus2=p2ulv11940.1.2.3 switch=n enabled=y phases=3 Linecode=3P_UG_AL_350kcmil_15_0_416_0_3_3_3_3

New Line.l(r:p2udt6533-p2udt8938) Units=km Length=0.0697937 bus1=p2udt8938.1.2.3 bus2=p2udt6533.1.2.3 switch=n enabled=y phases=3 Linecode=3P_OH_AL_ACSR_4/0_Penguin_12_47_0_3_3_3_3

New Line.l(r:p2udt2878-p2udt8938) Units=km Length=0.111086 bus1=p2udt2878.1.2.3 bus2=p2udt8938.1.2.3 switch=n enabled=y phases=3 Linecode=3P_OH_AL_ACSR_4/0_Penguin_12_47_0_3_3_3_3

New Line.l(r:p2udt2878-p2udt7111) Units=km Length=0.07492 bus1=p2udt7111.1.2.3 bus2=p2udt2878.1.2.3 switch=n enabled=y phases=3 Linecode=3P_OH_AL_ACSR_4/0_Penguin_12_47_0_3_3_3_3

New Line.l(r:p2udt8717lv-p2ulv22464) Units=km Length=0.001 bus1=p2udt8717lv.1.2.3 bus2=p2ulv22464.1.2.3 switch=n enabled=y phases=3 Linecode=3P_UG_AL_350kcmil_15_0_416_0_3_3_3_3

New Line.l(r:p2udt4021-p2udt8717) Units=km Length=0.139835 bus1=p2udt4021-p2udt8717x.1.2.3 bus2=p2udt4021-p2udt8717xx.1.2.3 switch=n enabled=y phases=3 Linecode=3P_UG_AL_4/0_25_12_47_0_3_3_3_3

New Line.l(r:p2udt7631lv-p2ulv16336) Units=km Length=0.0144202 bus1=p2udt7631lv.1.2.3 bus2=p2ulv16336.1.2.3 switch=n enabled=y phases=3 Linecode=3P_UG_AL_350kcmil_15_0_416_0_3_3_3_3

New Line.l(r:p2udt4544lv-p2ulv6524) Units=km Length=0.007690230000000001 bus1=p2udt4544lv.1.2.3 bus2=p2ulv6524.1.2.3 switch=n enabled=y phases=3 Linecode=3P_UG_AL_350kcmil_15_0_416_0_3_3_3_3

New Line.l(r:p2udt213lv-p2ulv218) Units=km Length=0.00290663 bus1=p2udt213lv.1.2.3 bus2=p2ulv218.1.2.3 switch=n enabled=y phases=3 Linecode=3P_UG_AL_350kcmil_15_0_416_0_3_3_3_3

New Line.l(r:p2udt213-p2udt4544) Units=km Length=0.0755249 bus1=p2udt4544.1.2.3 bus2=p2udt213.1.2.3 switch=n enabled=y phases=3 Linecode=3P_OH_AL_ACSR_4/0_Penguin_12_47_0_3_3_3_3

New Line.l(r:p2udt4544-p2udt7631) Units=km Length=0.0918125 bus1=p2udt7631.1.2.3 bus2=p2udt4544.1.2.3 switch=n enabled=y phases=3 Linecode=3P_OH_AL_ACSR_4/0_Penguin_12_47_0_3_3_3_3

New Line.l(r:p2udt7977lv-p2ulv18143) Units=km Length=0.00712312 bus1=p2udt7977lv.1.2.3 bus2=p2ulv18143.1.2.3 switch=n enabled=y phases=3 Linecode=3P_UG_AL_350kcmil_15_0_416_0_3_3_3_3

New Line.l(r:p2udt7631-p2udt7977) Units=km Length=0.0292776 bus1=p2udt7631.1.2.3 bus2=p2udt7977.1.2.3 switch=n enabled=y phases=3 Linecode=3P_OH_AL_ACSR_4/0_Penguin_12_47_0_3_3_3_3

New Line.l(r:p2udt4424-p2udt7631) Units=km Length=0.0365425 bus1=p2udt4424.1.2.3 bus2=p2udt7631.1.2.3 switch=n enabled=y phases=3 Linecode=3P_OH_AL_ACSR_4/0_Penguin_12_47_0_3_3_3_3

New Line.l(r:p2udt4424-p2udt6740) Units=km Length=0.0236701 bus1=p2udt6740.1.2.3 bus2=p2udt4424.1.2.3 switch=n enabled=y phases=3 Linecode=3P_OH_AL_ACSR_4/0_Penguin_12_47_0_3_3_3_3

New Line.l(r:p2udt4959-p2udt6740) Units=km Length=0.13398 bus1=p2udt4959.1.2.3 bus2=p2udt6740.1.2.3 switch=n enabled=y phases=3 Linecode=3P_OH_AL_ACSR_4/0_Penguin_12_47_0_3_3_3_3

New Line.l(r:p2udt1488-p2udt4959)_s0 Units=km Length=0.222789 bus1=p2udt1488.1.2.3 bus2=p2udt1488-p2udt4959x.1.2.3 switch=n enabled=y phases=3 Linecode=3P_OH_AL_ACSR_4/0_Penguin_12_47_0_3_3_3_3

New Line.l(r:p2udt1488-p2udt4959)_s1 Units=km Length=0.0490046 bus1=p2udt1488-p2udt4959x.1.2.3 bus2=p2udt4959.1.2.3 switch=n enabled=y phases=3 Linecode=3P_OH_AL_ACSR_4/0_Penguin_12_47_0_3_3_3_3

New Line.l(r:p2udt8841lv-p2ulv23332) Units=km Length=0.0260551 bus1=p2udt8841lv.1.2.3 bus2=p2ulv23332.1.2.3 switch=n enabled=y phases=3 Linecode=3P_UG_AL_350kcmil_15_0_416_0_3_3_3_3

New Line.l(r:p2udt6536-p2udt8841) Units=km Length=0.0275826 bus1=p2udt6536.1.2.3 bus2=p2udt8841.1.2.3 switch=n enabled=y phases=3 Linecode=3P_OH_AL_ACSR_4/0_Penguin_12_47_0_3_3_3_3

New Line.l(r:p2udt1488-p2udt6536)_s0 Units=km Length=0.214036 bus1=p2udt1488.1.2.3 bus2=p2udt1488-p2udt6536x.1.2.3 switch=n enabled=y phases=3 Linecode=3P_OH_AL_ACSR_4/0_Penguin_12_47_0_3_3_3_3

New Line.l(r:p2udt1488-p2udt6536)_s1 Units=km Length=0.055558 bus1=p2udt1488-p2udt6536x.1.2.3 bus2=p2udt6536.1.2.3 switch=n enabled=y phases=3 Linecode=3P_OH_AL_ACSR_4/0_Penguin_12_47_0_3_3_3_3

New Line.l(r:p2udt1488-p2udt6118)_s0 Units=km Length=0.169525 bus1=p2udt6118.1.2.3 bus2=p2udt1488-p2udt6118x.1.2.3 switch=n enabled=y phases=3 Linecode=3P_OH_AL_ACSR_4/0_Penguin_12_47_0_3_3_3_3

New Line.l(r:p2udt1488-p2udt6118)_s1 Units=km Length=0.300274 bus1=p2udt1488-p2udt6118x.1.2.3 bus2=p2udt1488.1.2.3 switch=n enabled=y phases=3 Linecode=3P_OH_AL_ACSR_4/0_Penguin_12_47_0_3_3_3_3

New Line.l(r:p2udt6118-p2udt7735)_s0 Units=km Length=0.23570400000000002 bus1=p2udt7735.1.2.3 bus2=p2udt6118-p2udt7735x.1.2.3 switch=n enabled=y phases=3 Linecode=3P_OH_AL_ACSR_4/0_Penguin_12_47_0_3_3_3_3

New Line.l(r:p2udt6118-p2udt7735)_s1 Units=km Length=0.246773 bus1=p2udt6118-p2udt7735x.1.2.3 bus2=p2udt6118.1.2.3 switch=n enabled=y phases=3 Linecode=3P_OH_AL_ACSR_4/0_Penguin_12_47_0_3_3_3_3

New Line.padswitch(r:p2udt1292-p2udt4542)p2u_39516 Units=km Length=0.001 bus1=p2udt1292.2 bus2=p2udt1292-p2udt4542x.2 switch=y enabled=y phases=1 Linecode=padswitch_1_1_1_1

New Line.padswitch(r:p2udt1292-p2udt4542)p2u_39517 Units=km Length=0.001 bus1=p2udt1292-p2udt4542xx.2 bus2=p2udt4542.2 switch=y enabled=y phases=1 Linecode=padswitch_1_2_1_1_1

New Line.padswitch(r:p2udt1292-p2udt2246)p2u_39518 Units=km Length=0.001 bus1=p2udt2246.2 bus2=p2udt1292-p2udt2246xx.2 switch=y enabled=y phases=1 Linecode=padswitch_1_2_1_0_1_1

New Line.padswitch(r:p2udt1292-p2udt2246)p2u_39519 Units=km Length=0.001 bus1=p2udt1292-p2udt2246x.2 bus2=p2udt1292.2 switch=y enabled=y phases=1 Linecode=padswitch_1_2_1_0_1_1

New Line.padswitch(r:p2udt2246-p2udt4147)p2u_39520 Units=km Length=0.001 bus1=p2udt4147.2 bus2=p2udt2246-p2udt4147xx.2 switch=y enabled=y phases=1 Linecode=padswitch_1_2_1_0_1_1

New Line.padswitch(r:p2udt2246-p2udt4147)p2u_39521 Units=km Length=0.001 bus1=p2udt2246-p2udt4147x.2 bus2=p2udt2246.2 switch=y enabled=y phases=1 Linecode=padswitch_1_2_1_0_1_1

New Line.padswitch(r:p2udt6992-p2udt864)p2u_39522 Units=km Length=0.001 bus1=p2udt6992.2 bus2=p2udt6992-p2udt864x.2 switch=y enabled=y phases=1 Linecode=padswitch_1_2_1_1_1

New Line.padswitch(r:p2udt6992-p2udt864)p2u_39523 Units=km Length=0.001 bus1=p2udt6992-p2udt864xx.2 bus2=p2udt864.2 switch=y enabled=y phases=1 Linecode=padswitch_1_2_1_0_1_1

New Line.padswitch(r:p2udt2884-p2udt7407)p2u_39530 Units=km Length=0.001 bus1=p2udt2884-p2udt7407x.3 bus2=p2udt2884-p2udt7407xx.3 switch=y enabled=y phases=1 Linecode=padswitch_1_2_1_0_1_1

New Line.padswitch(r:p2udt2884-p2udt7407)p2u_39531 Units=km Length=0.001 bus1=p2udt2884-p2udt7407xxx.3 bus2=p2udt7407.3 switch=y enabled=y phases=1 Linecode=padswitch_1_2_1_0_1_0_1

New Line.padswitch(r:p2udt5264-p2udt8717)p2u_39546 Units=km Length=0.001 bus1=p2udt5264-p2udt8717xxx.2 bus2=p2udt5264-p2udt8717xx.2 switch=y enabled=y phases=1 Linecode=padswitch_1_2_1_0_1_1

New Line.padswitch(r:p2udt5264-p2udt8717)p2u_39547 Units=km Length=0.001 bus1=p2udt5264-p2udt8717x.2 bus2=p2udt5264.2 switch=y enabled=y phases=1 Linecode=padswitch_1_2_1_0_1_0_1

New Line.padswitch(r:p2udt6119-p2udt6405)p2u_39552 Units=km Length=0.001 bus1=p2udt6405.3 bus2=p2udt6119-p2udt6405xx.3 switch=y enabled=y phases=1 Linecode=padswitch_1_2_1_0_1_1

New Line.padswitch(r:p2udt6119-p2udt6405)p2u_39553 Units=km Length=0.001 bus1=p2udt6119-p2udt6405x.3 bus2=p2udt6119.3 switch=y enabled=y phases=1 Linecode=padswitch_1_1_1_1

New Line.padswitch(r:p2udt6405-p2udt7165)p2u_39554 Units=km Length=0.001 bus1=p2udt7165.3 bus2=p2udt6405-p2udt7165xx.3 switch=y enabled=y phases=1 Linecode=padswitch_1_2_1_0_1_1

New Line.padswitch(r:p2udt6405-p2udt7165)p2u_39555 Units=km Length=0.001 bus1=p2udt6405-p2udt7165x.3 bus2=p2udt6405.3 switch=y enabled=y phases=1 Linecode=padswitch_1_2_1_0_1_1

New Line.padswitch(r:p2udt1084-p2udt7165)p2u_39556 Units=km Length=0.001 bus1=p2udt1084.3 bus2=p2udt1084-p2udt7165x.3 switch=y enabled=y phases=1 Linecode=padswitch_1_2_1_0_1_1

New Line.padswitch(r:p2udt1084-p2udt7165)p2u_39557 Units=km Length=0.001 bus1=p2udt1084-p2udt7165xx.3 bus2=p2udt7165.3 switch=y enabled=y phases=1 Linecode=padswitch_1_2_1_0_1_1

New Line.padswitch(r:p2udt1084-p2udt5500)p2u_39558 Units=km Length=0.001 bus1=p2udt5500.3 bus2=p2udt1084-p2udt5500xx.3 switch=y enabled=y phases=1 Linecode=padswitch_1_2_1_0_1_1

New Line.padswitch(r:p2udt1084-p2udt5500)p2u_39559 Units=km Length=0.001 bus1=p2udt1084-p2udt5500x.3 bus2=p2udt1084.3 switch=y enabled=y phases=1 Linecode=padswitch_1_2_1_0_1_1

New Line.padswitch(r:p2udt3335-p2udt6117)p2u_39524 Units=km Length=0.001 bus1=p2udt3335.1.2.3 bus2=p2udt3335-p2udt6117x.1.2.3 switch=y enabled=y phases=3 Linecode=padswitch_3_3_3_3

New Line.padswitch(r:p2udt3335-p2udt6117)p2u_39525 Units=km Length=0.001 bus1=p2udt3335-p2udt6117xx.1.2.3 bus2=p2udt6117.1.2.3 switch=y enabled=y phases=3 Linecode=padswitch_3_3_3_3_3

New Line.padswitch(r:p2udt1693-p2udt3335)p2u_39526 Units=km Length=0.001 bus1=p2udt1693.1.2.3 bus2=p2udt1693-p2udt3335x.1.2.3 switch=y enabled=y phases=3 Linecode=padswitch_3_3_3_1_3_3

New Line.padswitch(r:p2udt1693-p2udt3335)p2u_39527 Units=km Length=0.001 bus1=p2udt1693-p2udt3335xx.1.2.3 bus2=p2udt3335.1.2.3 switch=y enabled=y phases=3 Linecode=padswitch_3_3_3_1_3_1_3

New Line.padswitch(r:p2udt1693-p2udt2884)p2u_39528 Units=km Length=0.001 bus1=p2udt2884.1.2.3 bus2=p2udt1693-p2udt2884xx.1.2.3 switch=y enabled=y phases=3 Linecode=padswitch_3_3_3_1_3_1_3_1

New Line.padswitch(r:p2udt1693-p2udt2884)p2u_39529 Units=km Length=0.001 bus1=p2udt1693-p2udt2884x.1.2.3 bus2=p2udt1693.1.2.3 switch=y enabled=y phases=3 Linecode=padswitch_3_3_3_3_3

New Line.padswitch(r:p2udt1299-p2udt2884)p2u_39532 Units=km Length=0.001 bus1=p2udt1299.1.2.3 bus2=p2udt1299-p2udt2884x.1.2.3 switch=y enabled=y phases=3 Linecode=padswitch_3_3_3_3_3

New Line.padswitch(r:p2udt1299-p2udt2884)p2u_39533 Units=km Length=0.001 bus1=p2udt1299-p2udt2884xx.1.2.3 bus2=p2udt2884.1.2.3 switch=y enabled=y phases=3 Linecode=padswitch_3_3_3_3_3

New Line.padswitch(r:p2udt1299-p2udt8683)p2u_39534 Units=km Length=0.001 bus1=p2udt8683.1.2.3 bus2=p2udt1299-p2udt8683xx.1.2.3 switch=y enabled=y phases=3 Linecode=padswitch_3_3_3_1_3_1_3_1

New Line.padswitch(r:p2udt1299-p2udt8683)p2u_39535 Units=km Length=0.001 bus1=p2udt1299-p2udt8683x.1.2.3 bus2=p2udt1299.1.2.3 switch=y enabled=y phases=3 Linecode=padswitch_3_3_3_3_3

New Line.padswitch(r:p2udt2885-p2udt8683)p2u_39536 Units=km Length=0.001 bus1=p2udt2885.1.2.3 bus2=p2udt2885-p2udt8683x.1.2.3 switch=y enabled=y phases=3 Linecode=padswitch_3_3_3_3_3

New Line.padswitch(r:p2udt2885-p2udt8683)p2u_39537 Units=km Length=0.001 bus1=p2udt2885-p2udt8683xx.1.2.3 bus2=p2udt8683.1.2.3 switch=y enabled=y phases=3 Linecode=padswitch_3_3_3_1_3_1_3_1

New Line.padswitch(r:p2udt2064-p2udt2885)p2u_39538 Units=km Length=0.001 bus1=p2udt2064.1.2.3 bus2=p2udt2064-p2udt2885x.1.2.3 switch=y enabled=y phases=3 Linecode=padswitch_3_3_3_3_3

New Line.padswitch(r:p2udt2064-p2udt2885)p2u_39539 Units=km Length=0.001 bus1=p2udt2064-p2udt2885xx.1.2.3 bus2=p2udt2885.1.2.3 switch=y enabled=y phases=3 Linecode=padswitch_3_3_3_3_3

New Line.padswitch(r:p2udt2064-p2udt8607)p2u_39540 Units=km Length=0.001 bus1=p2udt8607.1.2.3 bus2=p2udt2064-p2udt8607xx.1.2.3 switch=y enabled=y phases=3 Linecode=padswitch_3_3_3_3_3

New Line.padswitch(r:p2udt2064-p2udt8607)p2u_39541 Units=km Length=0.001 bus1=p2udt2064-p2udt8607x.1.2.3 bus2=p2udt2064.1.2.3 switch=y enabled=y phases=3 Linecode=padswitch_3_3_3_3_3

New Line.padswitch(r:p2udt1874-p2udt8607)p2u_39542 Units=km Length=0.001 bus1=p2udt1874.1.2.3 bus2=p2udt1874-p2udt8607x.1.2.3 switch=y enabled=y phases=3 Linecode=padswitch_3_3_3_3_3

New Line.padswitch(r:p2udt1874-p2udt8607)p2u_39543 Units=km Length=0.001 bus1=p2udt1874-p2udt8607xx.1.2.3 bus2=p2udt8607.1.2.3 switch=y enabled=y phases=3 Linecode=padswitch_3_3_3_3_3

New Line.padswitch(r:p2udt1874-p2udt4021)p2u_39544 Units=km Length=0.001 bus1=p2udt4021.1.2.3 bus2=p2udt1874-p2udt4021xx.1.2.3 switch=y enabled=y phases=3 Linecode=padswitch_3_3_3_3_3

New Line.padswitch(r:p2udt1874-p2udt4021)p2u_39545 Units=km Length=0.001 bus1=p2udt1874-p2udt4021x.1.2.3 bus2=p2udt1874.1.2.3 switch=y enabled=y phases=3 Linecode=padswitch_3_3_3_3_3

New Line.padswitch(r:p2udt1083-p2udt4021)p2u_39550 Units=km Length=0.001 bus1=p2udt1083.1.2.3 bus2=p2udt1083-p2udt4021x.1.2.3 switch=y enabled=y phases=3 Linecode=padswitch_3_3_3_1_3_1_3_1

New Line.padswitch(r:p2udt1083-p2udt4021)p2u_39551 Units=km Length=0.001 bus1=p2udt1083-p2udt4021xx.1.2.3 bus2=p2udt4021.1.2.3 switch=y enabled=y phases=3 Linecode=padswitch_3_3_3_3_3

New Line.padswitch(r:p2udt4021-p2udt8717)p2u_39548 Units=km Length=0.001 bus1=p2udt4021.1.2.3 bus2=p2udt4021-p2udt8717x.1.2.3 switch=y enabled=y phases=3 Linecode=padswitch_3_3_3_3_3

New Line.padswitch(r:p2udt4021-p2udt8717)p2u_39549 Units=km Length=0.001 bus1=p2udt4021-p2udt8717xx.1.2.3 bus2=p2udt8717.1.2.3 switch=y enabled=y phases=3 Linecode=padswitch_3_3_3_1_3_1_3_1

New Line.elbswitch(r:p2udt3619-p2udt5856)p2u_45472 Units=km Length=0.001 bus1=p2udt3619.1.2.3 bus2=p2udt3619-p2udt5856x.1.2.3 switch=y enabled=n phases=3 Linecode=elbswitch_3_3_3_3

New Line.fuse(r:p2udt2065-p2udt3194)p2u_45706 Units=km Length=0.001 bus1=p2udt2065.1 bus2=p2udt2065-p2udt3194x.1 switch=n enabled=y phases=1 Linecode=fuse_1_1_1_1

New Fuse.Fuse_fuse(r:p2udt2065-p2udt3194)p2u_45706 monitoredobj=Line.fuse(r:p2udt2065-p2udt3194)p2u_45706 enabled=y ratedcurrent=100.0

New Line.fuse(r:p2udt1865-p2udt2879)p2u_45795 Units=km Length=0.001 bus1=p2udt2879.1 bus2=p2udt1865-p2udt2879xx.1 switch=n enabled=y phases=1 Linecode=fuse_1_1_1_1

New Fuse.Fuse_fuse(r:p2udt1865-p2udt2879)p2u_45795 monitoredobj=Line.fuse(r:p2udt1865-p2udt2879)p2u_45795 enabled=y ratedcurrent=100.0

New Line.fuse(r:p2udt2884-p2udt7407)p2u_45799 Units=km Length=0.001 bus1=p2udt2884.3 bus2=p2udt2884-p2udt7407x.3 switch=n enabled=y phases=1 Linecode=fuse_1_6_1_1_1

New Fuse.Fuse_fuse(r:p2udt2884-p2udt7407)p2u_45799 monitoredobj=Line.fuse(r:p2udt2884-p2udt7407)p2u_45799 enabled=y ratedcurrent=100.0

New Line.fuse(r:p2udt4289-p2udt6469)p2u_45957 Units=km Length=0.001 bus1=p2udt4289.3 bus2=p2udt4289-p2udt6469x.3 switch=n enabled=y phases=1 Linecode=fuse_1_1_1_1

New Fuse.Fuse_fuse(r:p2udt4289-p2udt6469)p2u_45957 monitoredobj=Line.fuse(r:p2udt4289-p2udt6469)p2u_45957 enabled=y ratedcurrent=100.0

New Line.fuse(r:p2udt3044-p2udt4869)p2u_46016 Units=km Length=0.001 bus1=p2udt4869.2 bus2=p2udt3044-p2udt4869x.2 switch=n enabled=y phases=1 Linecode=fuse_1_1_1_1

New Fuse.Fuse_fuse(r:p2udt3044-p2udt4869)p2u_46016 monitoredobj=Line.fuse(r:p2udt3044-p2udt4869)p2u_46016 enabled=y ratedcurrent=100.0

New Line.fuse(r:p2udt4297-p2udt4959)p2u_46029 Units=km Length=0.001 bus1=p2udt4959.2 bus2=p2udt4297-p2udt4959x.2 switch=n enabled=y phases=1 Linecode=fuse_1_1_1_1

New Fuse.Fuse_fuse(r:p2udt4297-p2udt4959)p2u_46029 monitoredobj=Line.fuse(r:p2udt4297-p2udt4959)p2u_46029 enabled=y ratedcurrent=100.0

New Line.fuse(r:p2udt5952-p2udt6740)p2u_46230 Units=km Length=0.001 bus1=p2udt6740.2 bus2=p2udt5952-p2udt6740x.2 switch=n enabled=y phases=1 Linecode=fuse_1_1_1_1

New Fuse.Fuse_fuse(r:p2udt5952-p2udt6740)p2u_46230 monitoredobj=Line.fuse(r:p2udt5952-p2udt6740)p2u_46230 enabled=y ratedcurrent=100.0

New Line.fuse(r:p2udt6993-p2udt7052)p2u_46274 Units=km Length=0.001 bus1=p2udt7052.2 bus2=p2udt6993-p2udt7052x.2 switch=n enabled=y phases=1 Linecode=fuse_1_1_1_1

New Fuse.Fuse_fuse(r:p2udt6993-p2udt7052)p2u_46274 monitoredobj=Line.fuse(r:p2udt6993-p2udt7052)p2u_46274 enabled=y ratedcurrent=100.0

New Line.fuse(r:p2udt4870-p2udt7735)p2u_46349 Units=km Length=0.001 bus1=p2udt7735.1 bus2=p2udt4870-p2udt7735xx.1 switch=n enabled=y phases=1 Linecode=fuse_1_1_1_1

New Fuse.Fuse_fuse(r:p2udt4870-p2udt7735)p2u_46349 monitoredobj=Line.fuse(r:p2udt4870-p2udt7735)p2u_46349 enabled=y ratedcurrent=100.0

New Line.fuse(r:p2udt5264-p2udt8717)p2u_46477 Units=km Length=0.001 bus1=p2udt8717.2 bus2=p2udt5264-p2udt8717xxx.2 switch=n enabled=y phases=1 Linecode=fuse_1_6_1_3_1_1

New Fuse.Fuse_fuse(r:p2udt5264-p2udt8717)p2u_46477 monitoredobj=Line.fuse(r:p2udt5264-p2udt8717)p2u_46477 enabled=y ratedcurrent=100.0

New Line.fuse(r:p2udt5500-p2udt8841)p2u_46498 Units=km Length=0.001 bus1=p2udt8841.3 bus2=p2udt5500-p2udt8841x.3 switch=n enabled=y phases=1 Linecode=fuse_1_6_1_3_1_3_1

New Fuse.Fuse_fuse(r:p2udt5500-p2udt8841)p2u_46498 monitoredobj=Line.fuse(r:p2udt5500-p2udt8841)p2u_46498 enabled=y ratedcurrent=100.0
