New Line.l(r:p2udt214lv-p2ulv219) Units=km Length=0.0155486 bus1=p2udt214lv.1.2 bus2=p2ulv219.1.2 switch=n enabled=y phases=2 Linecode=1P_OH_AL_2/0_Rucina_0_416_0_2_2_2_2

New Line.l(r:p2udt214lv-p2ulv3143) Units=km Length=0.0155486 bus1=p2udt214lv.1.2 bus2=p2ulv3143.1.2 switch=n enabled=y phases=2 Linecode=1P_OH_AL_2/0_Rucina_0_416_0_2_2_2_2

New Line.l(r:p2udm807-p2ulv222) Units=km Length=0.0129163 bus1=p2udm807.1.2 bus2=p2ulv222.1.2 switch=n enabled=y phases=2 Linecode=1P_UG_AL_1/0_Brenau_0_416_0_2_2_2_2

New Line.l(r:p2udm807-p2udt217lv) Units=km Length=0.00971033 bus1=p2udt217lv.1.2 bus2=p2udm807.1.2 switch=n enabled=y phases=2 Linecode=1P_UG_AL_1/0_Brenau_0_416_0_2_2_2_2

New Line.l(r:p2udm808-p2ulv5078) Units=km Length=0.013942500000000002 bus1=p2udm808.1.2 bus2=p2ulv5078.1.2 switch=n enabled=y phases=2 Linecode=1P_UG_AL_4/0_Sweetbriar_0_416_0_2_2_2_2

New Line.l(r:p2udm808-p2udt217lv) Units=km Length=0.00970633 bus1=p2udt217lv.1.2 bus2=p2udm808.1.2 switch=n enabled=y phases=2 Linecode=1P_UG_AL_4/0_Sweetbriar_0_416_0_2_2_2_2

New Line.l(r:p2udm1618-p2ulv456) Units=km Length=0.0224457 bus1=p2udm1618.1.2 bus2=p2ulv456.1.2 switch=n enabled=y phases=2 Linecode=1P_UG_AL_1/0_Brenau_0_416_0_2_2_2_2

New Line.l(r:p2udm1618-p2udt438lv) Units=km Length=0.00971511 bus1=p2udt438lv.1.2 bus2=p2udm1618.1.2 switch=n enabled=y phases=2 Linecode=1P_UG_AL_1/0_Brenau_0_416_0_2_2_2_2

New Line.l(r:p2udm1619-p2ulv16096) Units=km Length=0.0137046 bus1=p2udm1619.1.2 bus2=p2ulv16096.1.2 switch=n enabled=y phases=2 Linecode=1P_UG_AL_1/0_Brenau_0_416_0_2_2_2_2

New Line.l(r:p2udm1619-p2udt438lv) Units=km Length=0.00971033 bus1=p2udt438lv.1.2 bus2=p2udm1619.1.2 switch=n enabled=y phases=2 Linecode=1P_UG_AL_1/0_Brenau_0_416_0_2_2_2_2

New Line.l(r:p2udt909lv-p2ulv972) Units=km Length=0.040126100000000005 bus1=p2udt909lv.1.2 bus2=p2ulv972.1.2 switch=n enabled=y phases=2 Linecode=1P_OH_AL_4/0_Zuzara_0_416_0_2_2_2_2

New Line.l(r:p2udt909lv-p2ulv2931) Units=km Length=0.0822081 bus1=p2udt909lv.1.2 bus2=p2ulv2931.1.2 switch=n enabled=y phases=2 Linecode=1P_OH_AL_4/0_Zuzara_0_416_0_2_2_2_2

New Line.l(r:p2udt909lv-p2ulv3166) Units=km Length=0.0239784 bus1=p2udt909lv.1.2 bus2=p2ulv3166.1.2 switch=n enabled=y phases=2 Linecode=1P_OH_AL_2/0_Rucina_0_416_0_2_2_2_2

New Line.l(r:p2udt909lv-p2ulv18605) Units=km Length=0.0318425 bus1=p2udt909lv.1.2 bus2=p2ulv18605.1.2 switch=n enabled=y phases=2 Linecode=1P_OH_AL_4/0_Zuzara_0_416_0_2_2_2_2

New Line.l(r:p2udt1303lv-p2ulv1436) Units=km Length=0.0118665 bus1=p2udt1303lv.1.2 bus2=p2ulv1436.1.2 switch=n enabled=y phases=2 Linecode=1P_UG_AL_4/0_Sweetbriar_0_416_0_2_2_2_2

New Line.l(r:p2udm4800-p2ulv12908) Units=km Length=0.012977800000000001 bus1=p2udm4800.1.2 bus2=p2ulv12908.1.2 switch=n enabled=y phases=2 Linecode=1P_UG_AL_1/0_Brenau_0_416_0_2_2_2_2

New Line.l(r:p2udm4800-p2udt1303lv) Units=km Length=0.00970155 bus1=p2udt1303lv.1.2 bus2=p2udm4800.1.2 switch=n enabled=y phases=2 Linecode=1P_UG_AL_1/0_Brenau_0_416_0_2_2_2_2

New Line.l(r:p2udm4801-p2ulv17489) Units=km Length=0.0130994 bus1=p2udm4801.1.2 bus2=p2ulv17489.1.2 switch=n enabled=y phases=2 Linecode=1P_UG_AL_1/0_Brenau_0_416_0_2_2_2_2

New Line.l(r:p2udm4801-p2udt1303lv) Units=km Length=0.00971511 bus1=p2udt1303lv.1.2 bus2=p2udm4801.1.2 switch=n enabled=y phases=2 Linecode=1P_UG_AL_1/0_Brenau_0_416_0_2_2_2_2

New Line.l(r:p2udt1492lv-p2ulv1660) Units=km Length=0.012495200000000001 bus1=p2udt1492lv.1.2 bus2=p2ulv1660.1.2 switch=n enabled=y phases=2 Linecode=1P_UG_AL_1/0_Brenau_0_416_0_2_2_2_2

New Line.l(r:p2udt1879lv-p2ulv2139) Units=km Length=0.0138301 bus1=p2udt1879lv.1.2 bus2=p2ulv2139.1.2 switch=n enabled=y phases=2 Linecode=1P_OH_AL_2/0_Rucina_0_416_0_2_2_2_2

New Line.l(r:p2udt1880lv-p2ulv2140) Units=km Length=0.0147256 bus1=p2udt1880lv.1.2 bus2=p2ulv2140.1.2 switch=n enabled=y phases=2 Linecode=1P_UG_AL_1/0_Brenau_0_416_0_2_2_2_2

New Line.l(r:p2udt1880lv-p2ulv10771) Units=km Length=0.0224106 bus1=p2udt1880lv.1.2 bus2=p2ulv10771.1.2 switch=n enabled=y phases=2 Linecode=1P_UG_AL_1/0_Brenau_0_416_0_2_2_2_2

New Line.l(r:p2udt1880lv-p2ulv21284) Units=km Length=0.025943200000000003 bus1=p2udt1880lv.1.2 bus2=p2ulv21284.1.2 switch=n enabled=y phases=2 Linecode=1P_UG_AL_2/0_Converse_0_416_0_2_2_2_2

New Line.l(r:p2udm9690-p2ulv3367) Units=km Length=0.0744406 bus1=p2udm9690.1.2 bus2=p2ulv3367.1.2 switch=n enabled=y phases=2 Linecode=1P_OH_AL_4/0_Zuzara_0_416_0_2_2_2_2

New Line.l(r:p2udm9690-p2udt2741lv) Units=km Length=0.0199571 bus1=p2udt2741lv.1.2 bus2=p2udm9690.1.2 switch=n enabled=y phases=2 Linecode=1P_OH_AL_2/0_Rucina_0_416_0_2_2_2_2

New Line.l(r:p2udm9691-p2ulv11236) Units=km Length=0.0713293 bus1=p2udm9691.1.2 bus2=p2ulv11236.1.2 switch=n enabled=y phases=2 Linecode=1P_OH_AL_4/0_Zuzara_0_416_0_2_2_2_2

New Line.l(r:p2udm9691-p2udt2741lv) Units=km Length=0.0199435 bus1=p2udt2741lv.1.2 bus2=p2udm9691.1.2 switch=n enabled=y phases=2 Linecode=1P_OH_AL_2/0_Rucina_0_416_0_2_2_2_2

New Line.l(r:p2udt3197lv-p2ulv4097) Units=km Length=0.00926452 bus1=p2udt3197lv.1.2 bus2=p2ulv4097.1.2 switch=n enabled=y phases=2 Linecode=1P_UG_AL_2/0_Converse_0_416_0_2_2_2_2

New Line.l(r:p2udt3197lv-p2ulv16562) Units=km Length=0.0115612 bus1=p2udt3197lv.1.2 bus2=p2ulv16562.1.2 switch=n enabled=y phases=2 Linecode=1P_UG_AL_2/0_Converse_0_416_0_2_2_2_2

New Line.l(r:p2udm11190-p2ulv6029) Units=km Length=0.0114734 bus1=p2udm11190.1.2 bus2=p2ulv6029.1.2 switch=n enabled=y phases=2 Linecode=1P_UG_AL_1/0_Brenau_0_416_0_2_2_2_2

New Line.l(r:p2udm11190-p2udt3197lv) Units=km Length=0.00971033 bus1=p2udt3197lv.1.2 bus2=p2udm11190.1.2 switch=n enabled=y phases=2 Linecode=1P_UG_AL_1/0_Brenau_0_416_0_2_2_2_2

New Line.l(r:p2udm11191-p2ulv12405) Units=km Length=0.0116126 bus1=p2udm11191.1.2 bus2=p2ulv12405.1.2 switch=n enabled=y phases=2 Linecode=1P_UG_AL_1/0_Brenau_0_416_0_2_2_2_2

New Line.l(r:p2udm11191-p2udt3197lv) Units=km Length=0.0194254 bus1=p2udt3197lv.1.2 bus2=p2udm11191.1.2 switch=n enabled=y phases=2 Linecode=1P_UG_AL_1/0_Brenau_0_416_0_2_2_2_2

New Line.l(r:p2udt3886lv-p2ulv13830) Units=km Length=0.0390787 bus1=p2udt3886lv.1.2 bus2=p2ulv13830.1.2 switch=n enabled=y phases=2 Linecode=1P_OH_AL_4/0_Zuzara_0_416_0_2_2_2_2

New Line.l(r:p2udm13245-p2ulv5294) Units=km Length=0.0590939 bus1=p2udm13245.1.2 bus2=p2ulv5294.1.2 switch=n enabled=y phases=2 Linecode=1P_OH_AL_4/0_Zuzara_0_416_0_2_2_2_2

New Line.l(r:p2udm13245-p2udt3886lv) Units=km Length=0.03990060000000001 bus1=p2udt3886lv.1.2 bus2=p2udm13245.1.2 switch=n enabled=y phases=2 Linecode=1P_OH_AL_4/0_Zuzara_0_416_0_2_2_2_2

New Line.l(r:p2udm13247-p2ulv19526) Units=km Length=0.0177342 bus1=p2udm13247.1.2 bus2=p2ulv19526.1.2 switch=n enabled=y phases=2 Linecode=1P_OH_AL_2/0_Rucina_0_416_0_2_2_2_2

New Line.l(r:p2udm13247-p2udt3886lv) Units=km Length=0.0398918 bus1=p2udt3886lv.1.2 bus2=p2udm13247.1.2 switch=n enabled=y phases=2 Linecode=1P_OH_AL_4/0_Zuzara_0_416_0_2_2_2_2

New Line.l(r:p2udt4022lv-p2ulv5543) Units=km Length=0.0515685 bus1=p2udt4022lv.1.2 bus2=p2ulv5543.1.2 switch=n enabled=y phases=2 Linecode=1P_OH_AL_4/0_Zuzara_0_416_0_2_2_2_2

New Line.l(r:p2udt4022lv-p2ulv13129) Units=km Length=0.103937 bus1=p2udt4022lv.1.2 bus2=p2ulv13129.1.2 switch=n enabled=y phases=2 Linecode=1P_OH_AL_4/0_Zuzara_0_416_0_2_2_2_2

New Line.l(r:p2udt4425lv-p2ulv6282) Units=km Length=0.0484516 bus1=p2udt4425lv.1.2 bus2=p2ulv6282.1.2 switch=n enabled=y phases=2 Linecode=1P_OH_AL_4/0_Zuzara_0_416_0_2_2_2_2

New Line.l(r:p2udt4425lv-p2ulv23522) Units=km Length=0.0484516 bus1=p2udt4425lv.1.2 bus2=p2ulv23522.1.2 switch=n enabled=y phases=2 Linecode=1P_OH_AL_4/0_Zuzara_0_416_0_2_2_2_2

New Line.l(r:p2udt4659lv-p2ulv6753) Units=km Length=0.044091200000000004 bus1=p2udt4659lv.1.2 bus2=p2ulv6753.1.2 switch=n enabled=y phases=2 Linecode=1P_OH_AL_4/0_Zuzara_0_416_0_2_2_2_2

New Line.l(r:p2udt4659lv-p2ulv19527) Units=km Length=0.0148279 bus1=p2udt4659lv.1.2 bus2=p2ulv19527.1.2 switch=n enabled=y phases=2 Linecode=1P_OH_AL_2/0_Rucina_0_416_0_2_2_2_2

New Line.l(r:p2udt4757lv-p2ulv6984) Units=km Length=0.0131382 bus1=p2udt4757lv.1.2 bus2=p2ulv6984.1.2 switch=n enabled=y phases=2 Linecode=1P_OH_AL_2/0_Rucina_0_416_0_2_2_2_2

New Line.l(r:p2udt4757lv-p2ulv13134) Units=km Length=0.0131382 bus1=p2udt4757lv.1.2 bus2=p2ulv13134.1.2 switch=n enabled=y phases=2 Linecode=1P_OH_AL_2/0_Rucina_0_416_0_2_2_2_2

New Line.l(r:p2udt5692lv-p2ulv9344) Units=km Length=0.021044300000000002 bus1=p2udt5692lv.1.2 bus2=p2ulv9344.1.2 switch=n enabled=y phases=2 Linecode=1P_OH_AL_2/0_Rucina_0_416_0_2_2_2_2

New Line.l(r:p2udt5692lv-p2ulv22680) Units=km Length=0.021044300000000002 bus1=p2udt5692lv.1.2 bus2=p2ulv22680.1.2 switch=n enabled=y phases=2 Linecode=1P_OH_AL_2/0_Rucina_0_416_0_2_2_2_2

New Line.l(r:p2udt6406lv-p2ulv11480) Units=km Length=0.0204994 bus1=p2udt6406lv.1.2 bus2=p2ulv11480.1.2 switch=n enabled=y phases=2 Linecode=1P_OH_AL_2/0_Rucina_0_416_0_2_2_2_2

New Line.l(r:p2udt6613lv-p2ulv12173) Units=km Length=0.0286057 bus1=p2udt6613lv.1.2 bus2=p2ulv12173.1.2 switch=n enabled=y phases=2 Linecode=1P_OH_AL_4/0_Zuzara_0_416_0_2_2_2_2

New Line.l(r:p2udm20189-p2ulv12404) Units=km Length=0.0142488 bus1=p2udm20189.1.2 bus2=p2ulv12404.1.2 switch=n enabled=y phases=2 Linecode=1P_OH_AL_2/0_Rucina_0_416_0_2_2_2_2

New Line.l(r:p2udm20189-p2udt6680lv) Units=km Length=0.0192738 bus1=p2udt6680lv.1.2 bus2=p2udm20189.1.2 switch=n enabled=y phases=2 Linecode=1P_OH_AL_2/0_Rucina_0_416_0_2_2_2_2

New Line.l(r:p2udm20190-p2ulv16561) Units=km Length=0.0153989 bus1=p2udm20190.1.2 bus2=p2ulv16561.1.2 switch=n enabled=y phases=2 Linecode=1P_OH_AL_2/0_Rucina_0_416_0_2_2_2_2

New Line.l(r:p2udm20190-p2udt6680lv) Units=km Length=0.019282600000000004 bus1=p2udt6680lv.1.2 bus2=p2udm20190.1.2 switch=n enabled=y phases=2 Linecode=1P_OH_AL_2/0_Rucina_0_416_0_2_2_2_2

New Line.l(r:p2udm20802-p2ulv13604) Units=km Length=0.0109852 bus1=p2udm20802.1.2 bus2=p2ulv13604.1.2 switch=n enabled=y phases=2 Linecode=1P_UG_AL_1/0_Brenau_0_416_0_2_2_2_2

New Line.l(r:p2udm20802-p2ulv21283) Units=km Length=0.0131086 bus1=p2udm20802.1.2 bus2=p2ulv21283.1.2 switch=n enabled=y phases=2 Linecode=1P_UG_AL_1/0_Brenau_0_416_0_2_2_2_2

New Line.l(r:p2udm20802-p2udt6996lv) Units=km Length=0.00971033 bus1=p2udt6996lv.1.2 bus2=p2udm20802.1.2 switch=n enabled=y phases=2 Linecode=1P_UG_AL_1/0_Brenau_0_416_0_2_2_2_2

New Line.l(r:p2udm20803-p2ulv14049) Units=km Length=0.012044800000000001 bus1=p2udm20803.1.2 bus2=p2ulv14049.1.2 switch=n enabled=y phases=2 Linecode=1P_UG_AL_1/0_Brenau_0_416_0_2_2_2_2

New Line.l(r:p2udm20803-p2udt6996lv) Units=km Length=0.00971511 bus1=p2udt6996lv.1.2 bus2=p2udm20803.1.2 switch=n enabled=y phases=2 Linecode=1P_UG_AL_1/0_Brenau_0_416_0_2_2_2_2

New Line.l(r:p2udt7166lv-p2ulv14255) Units=km Length=0.0373975 bus1=p2udt7166lv.1.2 bus2=p2ulv14255.1.2 switch=n enabled=y phases=2 Linecode=1P_OH_AL_4/0_Zuzara_0_416_0_2_2_2_2

New Line.l(r:p2udt7736lv-p2ulv16799) Units=km Length=0.0450774 bus1=p2udt7736lv.1.2 bus2=p2ulv16799.1.2 switch=n enabled=y phases=2 Linecode=1P_OH_AL_4/0_Zuzara_0_416_0_2_2_2_2

New Line.l(r:p2udt7736lv-p2ulv17703) Units=km Length=0.0450774 bus1=p2udt7736lv.1.2 bus2=p2ulv17703.1.2 switch=n enabled=y phases=2 Linecode=1P_OH_AL_4/0_Zuzara_0_416_0_2_2_2_2

New Line.l(r:p2udt8058lv-p2ulv18587) Units=km Length=0.001 bus1=p2udt8058lv.1.2 bus2=p2ulv18587.1.2 switch=n enabled=y phases=2 Linecode=1P_OH_AL_4_Periwinkle_0_416_0_2_2_2_2

New Line.l(r:p2udt8148lv-p2ulv19041) Units=km Length=0.0177948 bus1=p2udt8148lv.1.2 bus2=p2ulv19041.1.2 switch=n enabled=y phases=2 Linecode=1P_OH_AL_2/0_Rucina_0_416_0_2_2_2_2

New Line.l(r:p2udt8180lv-p2ulv19268) Units=km Length=0.0577031 bus1=p2udt8180lv.1.2 bus2=p2ulv19268.1.2 switch=n enabled=y phases=2 Linecode=1P_OH_AL_4/0_Zuzara_0_416_0_2_2_2_2

New Line.l(r:p2udm22697-p2ulv19525) Units=km Length=0.0260988 bus1=p2udm22697.1.2 bus2=p2ulv19525.1.2 switch=n enabled=y phases=2 Linecode=1P_UG_AL_1/0_Brenau_0_416_0_2_2_2_2

New Line.l(r:p2udm22697-p2udt8228lv) Units=km Length=0.0091259 bus1=p2udt8228lv.1.2 bus2=p2udm22697.1.2 switch=n enabled=y phases=2 Linecode=1P_UG_AL_1/0_Brenau_0_416_0_2_2_2_2

New Line.l(r:p2udm22698-p2ulv21748) Units=km Length=0.0925794 bus1=p2udm22698.1.2 bus2=p2ulv21748.1.2 switch=n enabled=y phases=2 Linecode=1P_UG_AL_1/0_Brenau_0_416_0_2_2_2_2

New Line.l(r:p2udm22698-p2udt8228lv) Units=km Length=0.0182471 bus1=p2udt8228lv.1.2 bus2=p2udm22698.1.2 switch=n enabled=y phases=2 Linecode=1P_UG_AL_1/0_Brenau_0_416_0_2_2_2_2

New Line.l(r:p2udt8493lv-p2ulv21052) Units=km Length=0.001 bus1=p2udt8493lv.1.2 bus2=p2ulv21052.1.2 switch=n enabled=y phases=2 Linecode=1P_OH_AL_4_Periwinkle_0_416_0_2_2_2_2

New Line.l(r:p2udt8608lv-p2ulv21747) Units=km Length=0.001 bus1=p2udt8608lv.1.2 bus2=p2ulv21747.1.2 switch=n enabled=y phases=2 Linecode=1P_UG_AL_1/0_Brenau_0_416_0_2_2_2_2

New Line.l(r:p2udt8810lv-p2ulv23130) Units=km Length=0.0411237 bus1=p2udt8810lv.1.2 bus2=p2ulv23130.1.2 switch=n enabled=y phases=2 Linecode=1P_OH_AL_4/0_Zuzara_0_416_0_2_2_2_2

New Line.l(r:p2udt8908lv-p2ulv24011) Units=km Length=0.001 bus1=p2udt8908lv.1.2 bus2=p2ulv24011.1.2 switch=n enabled=y phases=2 Linecode=1P_OH_AL_4_Periwinkle_0_416_0_2_2_2_2

New Line.l(r:p2udt214-p2udt4425) Units=km Length=0.182579 bus1=p2udt4425.1 bus2=p2udt214.1 switch=n enabled=y phases=1 Linecode=1P_OH_AL_ACSR_#2_Sparrow_12_47_0_1_1_1_1

New Line.l(r:p2udt4425-p2udt8180)_s0 Units=km Length=0.290681 bus1=p2udt4425-p2udt8180xx.1 bus2=p2udt4425-p2udt8180x.1 switch=n enabled=y phases=1 Linecode=1P_OH_AL_ACSR_#2_Sparrow_12_47_0_1_1_1_1

New Line.l(r:p2udt4425-p2udt8180)_s1 Units=km Length=0.170138 bus1=p2udt4425-p2udt8180x.1 bus2=p2udt4425.1 switch=n enabled=y phases=1 Linecode=1P_OH_AL_ACSR_#2_Sparrow_12_47_0_1_1_1_1

New Line.l(r:p2udt6406-p2udt6613) Units=km Length=0.03856330000000001 bus1=p2udt6406-p2udt6613x.3 bus2=p2udt6406.3 switch=n enabled=y phases=1 Linecode=1P_OH_AL_ACSR_#2_Sparrow_12_47_0_1_1_1_1

New Line.l(r:p2udt8493-p2udt909) Units=km Length=0.774421 bus1=p2udt8493.3 bus2=p2udt909.3 switch=n enabled=y phases=1 Linecode=1P_OH_AL_ACSR_#2_Sparrow_12_47_0_1_1_1_1

New Line.l(r:p2udt4757-p2udt5692) Units=km Length=0.26676800000000006 bus1=p2udt4757.3 bus2=p2udt5692.3 switch=n enabled=y phases=1 Linecode=1P_OH_AL_ACSR_#2_Sparrow_12_47_0_1_1_1_1

New Line.l(r:p2udt4757-p2udt8493) Units=km Length=0.125722 bus1=p2udt8493.3 bus2=p2udt4757.3 switch=n enabled=y phases=1 Linecode=1P_OH_AL_ACSR_#2_Sparrow_12_47_0_1_1_1_1

New Line.l(r:p2udt2741-p2udt8493)_s0 Units=km Length=0.125766 bus1=p2udt2741.3 bus2=p2udt2741-p2udt8493x.3 switch=n enabled=y phases=1 Linecode=1P_OH_AL_ACSR_#2_Sparrow_12_47_0_1_1_1_1

New Line.l(r:p2udt2741-p2udt8493)_s1 Units=km Length=0.001 bus1=p2udt2741-p2udt8493x.3 bus2=p2udt8493.3 switch=n enabled=y phases=1 Linecode=1P_OH_AL_ACSR_#2_Sparrow_12_47_0_1_1_1_1

New Line.l(r:p2udt2741-p2udt3886) Units=km Length=0.0199571 bus1=p2udt3886.3 bus2=p2udt2741.3 switch=n enabled=y phases=1 Linecode=1P_OH_AL_ACSR_#2_Sparrow_12_47_0_1_1_1_1

New Line.l(r:p2udt3886-p2udt8228) Units=km Length=0.10545500000000001 bus1=p2udt8228.3 bus2=p2udt3886.3 switch=n enabled=y phases=1 Linecode=1P_OH_AL_ACSR_#2_Sparrow_12_47_0_1_1_1_1

New Line.l(r:p2udt1879-p2udt4659) Units=km Length=0.0385476 bus1=p2udt4659.3 bus2=p2udt1879.3 switch=n enabled=y phases=1 Linecode=1P_OH_AL_ACSR_#2_Sparrow_12_47_0_1_1_1_1

New Line.l(r:p2udt4659-p2udt6680) Units=km Length=0.001 bus1=p2udt4659.3 bus2=p2udt6680.3 switch=n enabled=y phases=1 Linecode=1P_OH_AL_ACSR_#2_Sparrow_12_47_0_1_1_1_1

New Line.l(r:p2udt4659-p2udt8228) Units=km Length=0.103441 bus1=p2udt8228.3 bus2=p2udt4659.3 switch=n enabled=y phases=1 Linecode=1P_OH_AL_ACSR_#2_Sparrow_12_47_0_1_1_1_1

New Line.l(r:p2udt8228-p2udt8608) Units=km Length=0.156036 bus1=p2udt8228-p2udt8608x.3 bus2=p2udt8228-p2udt8608xx.3 switch=n enabled=y phases=1 Linecode=1P_UG_AL_#2_15_12_47_0_1_1_1_1

New Line.l(r:p2udt3197-p2udt8228) Units=km Length=0.0753363 bus1=p2udt3197-p2udt8228xx.3 bus2=p2udt3197-p2udt8228xxx.3 switch=n enabled=y phases=1 Linecode=1P_UG_AL_#2_15_12_47_0_1_1_1_1

New Line.l(r:p2udt7736-p2udt8058) Units=km Length=0.294423 bus1=p2udt7736.1 bus2=p2udt8058.1 switch=n enabled=y phases=1 Linecode=1P_OH_AL_ACSR_#2_Sparrow_12_47_0_1_1_1_1

New Line.l(r:p2udt7736-p2udt8908)_s0 Units=km Length=0.24544 bus1=p2udt8908.1 bus2=p2udt7736-p2udt8908x.1 switch=n enabled=y phases=1 Linecode=1P_OH_AL_ACSR_#2_Sparrow_12_47_0_1_1_1_1

New Line.l(r:p2udt7736-p2udt8908)_s1 Units=km Length=0.133825 bus1=p2udt7736-p2udt8908x.1 bus2=p2udt7736.1 switch=n enabled=y phases=1 Linecode=1P_OH_AL_ACSR_#2_Sparrow_12_47_0_1_1_1_1

New Line.l(r:p2udt8180-p2udt8908) Units=km Length=0.172306 bus1=p2udt8180-p2udt8908x.1 bus2=p2udt8908.1 switch=n enabled=y phases=1 Linecode=1P_OH_AL_ACSR_#2_Sparrow_12_47_0_1_1_1_1

New Line.l(r:p2udt2258lv-p2ulv2654) Units=km Length=0.0206544 bus1=p2udt2258lv.1.2.3 bus2=p2ulv2654.1.2.3 switch=n enabled=y phases=3 Linecode=3P_UG_AL_350kcmil_15_0_416_0_3_3_3_3

New Line.l(r:p2udt2258-p2udt6613) Units=km Length=0.001 bus1=p2udt6613.1.2.3 bus2=p2udt2258.1.2.3 switch=n enabled=y phases=3 Linecode=3P_OH_AL_ACSR_4/0_Penguin_12_47_0_3_3_3_3

New Line.l(r:p2udt3197-p2udt6613) Units=km Length=0.0773966 bus1=p2udt3197.1.2.3 bus2=p2udt6613.1.2.3 switch=n enabled=y phases=3 Linecode=3P_OH_AL_ACSR_4/0_Penguin_12_47_0_3_3_3_3

New Line.l(r:p2udt1303-p2udt3197) Units=km Length=0.0388421 bus1=p2udt1303-p2udt3197x.1.2.3 bus2=p2udt1303-p2udt3197xx.1.2.3 switch=n enabled=y phases=3 Linecode=3P_UG_AL_4/0_25_12_47_0_3_3_3_3

New Line.l(r:p2udt1303-p2udt6996) Units=km Length=0.0388509 bus1=p2udt1303-p2udt6996xx.1.2.3 bus2=p2udt1303-p2udt6996x.1.2.3 switch=n enabled=y phases=3 Linecode=3P_UG_AL_4/0_25_12_47_0_3_3_3_3

New Line.l(r:p2udt1492-p2udt6996) Units=km Length=0.0291318 bus1=p2udt1492-p2udt6996x.1.2.3 bus2=p2udt1492-p2udt6996xx.1.2.3 switch=n enabled=y phases=3 Linecode=3P_UG_AL_4/0_25_12_47_0_3_3_3_3

New Line.l(r:p2udt1492-p2udt217) Units=km Length=0.0485612 bus1=p2udt1492-p2udt217xx.1.2.3 bus2=p2udt1492-p2udt217x.1.2.3 switch=n enabled=y phases=3 Linecode=3P_UG_AL_4/0_25_12_47_0_3_3_3_3

New Line.l(r:p2udt217-p2udt438) Units=km Length=0.0388421 bus1=p2udt217-p2udt438xx.1.2.3 bus2=p2udt217-p2udt438x.1.2.3 switch=n enabled=y phases=3 Linecode=3P_UG_AL_4/0_25_12_47_0_3_3_3_3

New Line.l(r:p2udt1880-p2udt438) Units=km Length=0.0291318 bus1=p2udt1880-p2udt438x.1.2.3 bus2=p2udt1880-p2udt438xx.1.2.3 switch=n enabled=y phases=3 Linecode=3P_UG_AL_4/0_25_12_47_0_3_3_3_3

New Line.l(r:p2udt1880-p2udt4022)_s0 Units=km Length=0.388785 bus1=p2udt1880-p2udt4022xxxx.1.2.3 bus2=p2udt1880-p2udt4022xxx.1.2.3 switch=n enabled=y phases=3 Linecode=3P_OH_AL_ACSR_4/0_Penguin_12_47_0_3_3_3_3

New Line.l(r:p2udt1880-p2udt4022)_s1 Units=km Length=0.432861 bus1=p2udt1880-p2udt4022xxx.1.2.3 bus2=p2udt1880-p2udt4022xx.1.2.3 switch=n enabled=y phases=3 Linecode=3P_OH_AL_ACSR_4/0_Penguin_12_47_0_3_3_3_3

New Line.l(r:p2udt1880-p2udt4022)_s2 Units=km Length=0.101532 bus1=p2udt1880-p2udt4022xx.1.2.3 bus2=p2udt1880-p2udt4022x.1.2.3 switch=n enabled=y phases=3 Linecode=3P_UG_AL_4/0_25_12_47_0_3_3_3_3

New Line.l(r:p2udt4022-p2udt8810) Units=km Length=0.157796 bus1=p2udt8810.1.2.3 bus2=p2udt4022.1.2.3 switch=n enabled=y phases=3 Linecode=3P_OH_AL_ACSR_4/0_Penguin_12_47_0_3_3_3_3

New Line.l(r:p2udt8148-p2udt8810)_s0 Units=km Length=0.001 bus1=p2udt8148.1.2.3 bus2=p2udt8148-p2udt8810x.1.2.3 switch=n enabled=y phases=3 Linecode=3P_OH_AL_ACSR_4/0_Penguin_12_47_0_3_3_3_3

New Line.l(r:p2udt8148-p2udt8810)_s1 Units=km Length=0.010429800000000001 bus1=p2udt8148-p2udt8810x.1.2.3 bus2=p2udt8148-p2udt8810xx.1.2.3 switch=n enabled=y phases=3 Linecode=3P_OH_AL_ACSR_4/0_Penguin_12_47_0_3_3_3_3

New Line.l(r:p2udt8148-p2udt8810)_s2 Units=km Length=0.48166800000000004 bus1=p2udt8148-p2udt8810xx.1.2.3 bus2=p2udt8810.1.2.3 switch=n enabled=y phases=3 Linecode=3P_OH_AL_ACSR_4/0_Penguin_12_47_0_3_3_3_3

New Line.l(r:p2udt7166-p2udt8148) Units=km Length=0.140887 bus1=p2udt7166.1.2.3 bus2=p2udt8148.1.2.3 switch=n enabled=y phases=3 Linecode=3P_OH_AL_ACSR_4/0_Penguin_12_47_0_3_3_3_3

New Line.l(r:p2udt7166-p2udt8180)_s0 Units=km Length=0.09563450000000001 bus1=p2udt8180.1.2.3 bus2=p2udt7166-p2udt8180xx.1.2.3 switch=n enabled=y phases=3 Linecode=3P_OH_AL_ACSR_4/0_Penguin_12_47_0_3_3_3_3

New Line.l(r:p2udt7166-p2udt8180)_s1 Units=km Length=0.00436386 bus1=p2udt7166-p2udt8180xx.1.2.3 bus2=p2udt7166-p2udt8180x.1.2.3 switch=n enabled=y phases=3 Linecode=3P_OH_AL_ACSR_4/0_Penguin_12_47_0_3_3_3_3

New Line.l(r:p2udt7166-p2udt8180)_s2 Units=km Length=0.318535 bus1=p2udt7166-p2udt8180x.1.2.3 bus2=p2udt7166.1.2.3 switch=n enabled=y phases=3 Linecode=3P_OH_AL_ACSR_4/0_Penguin_12_47_0_3_3_3_3

New Line.l(r:p2udt8180-p2uhs4_1247)_s1 Units=km Length=0.785442 bus1=p2udt8180-p2uhs4_1247x.1.2.3 bus2=p2udt8180.1.2.3 switch=n enabled=y phases=3 Linecode=3P_OH_AL_ACSR_4/0_Penguin_12_47_0_3_3_3_3

New Line.l(r:p2udt4022-p2udt4546)_s1 Units=km Length=0.77333 bus1=p2udt4022-p2udt4546xx.1.2.3 bus2=p2udt4022-p2udt4546x.1.2.3 switch=n enabled=y phases=3 Linecode=3P_OH_AL_ACSR_1033kcmil_Curlew_12.47_1_3_3_3_3

New Line.l(r:p2udt4022-p2udt4546)_s2 Units=km Length=0.358213 bus1=p2udt4022-p2udt4546x.1.2.3 bus2=p2udt4022.1.2.3 switch=n enabled=y phases=3 Linecode=3P_OH_AL_ACSR_1033kcmil_Curlew_12.47_1_3_3_3_3

New Line.padswitch(r:p2udt8228-p2udt8608)p2u_39561 Units=km Length=0.001 bus1=p2udt8228.3 bus2=p2udt8228-p2udt8608x.3 switch=y enabled=y phases=1 Linecode=padswitch_1_1_1_1

New Line.padswitch(r:p2udt8228-p2udt8608)p2u_39562 Units=km Length=0.001 bus1=p2udt8228-p2udt8608xx.3 bus2=p2udt8608.3 switch=y enabled=y phases=1 Linecode=padswitch_1_2_1_1_1

New Line.padswitch(r:p2udt3197-p2udt8228)p2u_39563 Units=km Length=0.001 bus1=p2udt3197-p2udt8228x.3 bus2=p2udt3197-p2udt8228xx.3 switch=y enabled=y phases=1 Linecode=padswitch_1_2_1_0_1_1

New Line.padswitch(r:p2udt3197-p2udt8228)p2u_39564 Units=km Length=0.001 bus1=p2udt3197-p2udt8228xxx.3 bus2=p2udt8228.3 switch=y enabled=y phases=1 Linecode=padswitch_1_1_1_1

New Line.padswitch(r:p2udt1303-p2udt3197)p2u_39565 Units=km Length=0.001 bus1=p2udt1303.1.2.3 bus2=p2udt1303-p2udt3197x.1.2.3 switch=y enabled=y phases=3 Linecode=padswitch_3_3_3_3

New Line.padswitch(r:p2udt1303-p2udt3197)p2u_39566 Units=km Length=0.001 bus1=p2udt1303-p2udt3197xx.1.2.3 bus2=p2udt3197.1.2.3 switch=y enabled=y phases=3 Linecode=padswitch_3_3_3_3_3

New Line.padswitch(r:p2udt1303-p2udt6996)p2u_39567 Units=km Length=0.001 bus1=p2udt6996.1.2.3 bus2=p2udt1303-p2udt6996xx.1.2.3 switch=y enabled=y phases=3 Linecode=padswitch_3_3_3_3_3

New Line.padswitch(r:p2udt1303-p2udt6996)p2u_39568 Units=km Length=0.001 bus1=p2udt1303-p2udt6996x.1.2.3 bus2=p2udt1303.1.2.3 switch=y enabled=y phases=3 Linecode=padswitch_3_3_3_1_3_3

New Line.padswitch(r:p2udt1492-p2udt6996)p2u_39569 Units=km Length=0.001 bus1=p2udt1492.1.2.3 bus2=p2udt1492-p2udt6996x.1.2.3 switch=y enabled=y phases=3 Linecode=padswitch_3_3_3_3_3

New Line.padswitch(r:p2udt1492-p2udt6996)p2u_39570 Units=km Length=0.001 bus1=p2udt1492-p2udt6996xx.1.2.3 bus2=p2udt6996.1.2.3 switch=y enabled=y phases=3 Linecode=padswitch_3_3_3_3_3

New Line.padswitch(r:p2udt1492-p2udt217)p2u_39571 Units=km Length=0.001 bus1=p2udt217.1.2.3 bus2=p2udt1492-p2udt217xx.1.2.3 switch=y enabled=y phases=3 Linecode=padswitch_3_3_3_3_3

New Line.padswitch(r:p2udt1492-p2udt217)p2u_39572 Units=km Length=0.001 bus1=p2udt1492-p2udt217x.1.2.3 bus2=p2udt1492.1.2.3 switch=y enabled=y phases=3 Linecode=padswitch_3_3_3_3_3

New Line.padswitch(r:p2udt217-p2udt438)p2u_39573 Units=km Length=0.001 bus1=p2udt438.1.2.3 bus2=p2udt217-p2udt438xx.1.2.3 switch=y enabled=y phases=3 Linecode=padswitch_3_3_3_3_3

New Line.padswitch(r:p2udt217-p2udt438)p2u_39574 Units=km Length=0.001 bus1=p2udt217-p2udt438x.1.2.3 bus2=p2udt217.1.2.3 switch=y enabled=y phases=3 Linecode=padswitch_3_3_3_3_3

New Line.padswitch(r:p2udt1880-p2udt438)p2u_39575 Units=km Length=0.001 bus1=p2udt1880.1.2.3 bus2=p2udt1880-p2udt438x.1.2.3 switch=y enabled=y phases=3 Linecode=padswitch_3_3_3_3_3

New Line.padswitch(r:p2udt1880-p2udt438)p2u_39576 Units=km Length=0.001 bus1=p2udt1880-p2udt438xx.1.2.3 bus2=p2udt438.1.2.3 switch=y enabled=y phases=3 Linecode=padswitch_3_3_3_3_3

New Line.padswitch(r:p2udt1880-p2udt4022)p2u_39577 Units=km Length=0.001 bus1=p2udt4022.1.2.3 bus2=p2udt1880-p2udt4022xxxx.1.2.3 switch=y enabled=y phases=3 Linecode=padswitch_3_3_3_1_3_3

New Line.padswitch(r:p2udt1880-p2udt4022)p2u_39578 Units=km Length=0.001 bus1=p2udt1880-p2udt4022x.1.2.3 bus2=p2udt1880.1.2.3 switch=y enabled=y phases=3 Linecode=padswitch_3_3_3_3_3

New Line.fuse(r:p2udt3197-p2udt8228)p2u_45832 Units=km Length=0.001 bus1=p2udt3197.3 bus2=p2udt3197-p2udt8228x.3 switch=n enabled=y phases=1 Linecode=fuse_1_1_1_1

New Fuse.Fuse_fuse(r:p2udt3197-p2udt8228)p2u_45832 monitoredobj=Line.fuse(r:p2udt3197-p2udt8228)p2u_45832 enabled=y ratedcurrent=100.0

New Line.fuse(r:p2udt6406-p2udt6613)p2u_46218 Units=km Length=0.001 bus1=p2udt6613.3 bus2=p2udt6406-p2udt6613x.3 switch=n enabled=y phases=1 Linecode=fuse_1_1_1_1

New Fuse.Fuse_fuse(r:p2udt6406-p2udt6613)p2u_46218 monitoredobj=Line.fuse(r:p2udt6406-p2udt6613)p2u_46218 enabled=y ratedcurrent=100.0

New Line.fuse(r:p2udt4425-p2udt8180)p2u_46395 Units=km Length=0.001 bus1=p2udt8180.1 bus2=p2udt4425-p2udt8180xx.1 switch=n enabled=y phases=1 Linecode=fuse_1_1_1_1

New Fuse.Fuse_fuse(r:p2udt4425-p2udt8180)p2u_46395 monitoredobj=Line.fuse(r:p2udt4425-p2udt8180)p2u_46395 enabled=y ratedcurrent=100.0

New Line.fuse(r:p2udt8180-p2udt8908)p2u_46396 Units=km Length=0.001 bus1=p2udt8180.1 bus2=p2udt8180-p2udt8908x.1 switch=n enabled=y phases=1 Linecode=fuse_1_1_1_1

New Fuse.Fuse_fuse(r:p2udt8180-p2udt8908)p2u_46396 monitoredobj=Line.fuse(r:p2udt8180-p2udt8908)p2u_46396 enabled=y ratedcurrent=100.0
