New Capacitor.p2uc49 Bus1=p2umv10 phases=3 Kv=12.47 conn=Wye Kvar=300.0

New CapControl.p2uc49 Capacitor=p2uc49 Element=Line.l(r:p2udt8475-p2umv10) Terminal=1 delay=100.0 Type=voltage Vmin=120.5 Vmax=125.0 Ptratio=59.99631547328862 Ctratio=100.0
