Clear

New Circuit.substation_p2uhs8_69 bus1=p2uhs8_69 pu=1.0 basekV=69.0 R1=1e-05 X1=1e-05 R0=1e-05 X0=1e-05

Redirect Transformers.dss
Redirect p2uhs8_1247--p2udt5538/Transformers.dss
Redirect p2uhs8_1247--p2udt4184/Transformers.dss
Redirect p2uhs8_1247--p2udt6561/Transformers.dss
Redirect p2uhs8_1247--p2udt6424/Transformers.dss
Redirect Regulators.dss
Redirect p2uhs8_1247--p2udt6424/Loads.dss
Redirect p2uhs8_1247--p2udt5538/Loads.dss
Redirect p2uhs8_1247--p2udt4184/Loads.dss
Redirect p2uhs8_1247--p2udt6561/Loads.dss
Redirect LineCodes.dss
Redirect p2uhs8_1247--p2udt5538/LineCodes.dss
Redirect p2uhs8_1247--p2udt4184/LineCodes.dss
Redirect p2uhs8_1247--p2udt6561/LineCodes.dss
Redirect p2uhs8_1247--p2udt6424/LineCodes.dss
Redirect Lines.dss
Redirect p2uhs8_1247--p2udt5538/Lines.dss
Redirect p2uhs8_1247--p2udt4184/Lines.dss
Redirect p2uhs8_1247--p2udt6561/Lines.dss
Redirect p2uhs8_1247--p2udt6424/Lines.dss
Redirect p2uhs8_1247--p2udt6424/Capacitors.dss
Redirect p2uhs8_1247--p2udt4184/Capacitors.dss

Set Voltagebases=[0.2080002494301389, 0.48, 7.199560000000001, 12.47, 69.0]

Calcvoltagebases

Buscoords Buscoords.dss

Solve
