New Line.l(r:p2udt487lv-p2ulv511) Units=km Length=0.009487180000000001 bus1=p2udt487lv.1.2 bus2=p2ulv511.1.2 switch=n enabled=y phases=2 Linecode=1P_OH_AL_2/0_Rucina_0_416_0_2_2_2_2

New Line.l(r:p2udt949lv-p2ulv1014) Units=km Length=0.0484207 bus1=p2udt949lv.1.2 bus2=p2ulv1014.1.2 switch=n enabled=y phases=2 Linecode=1P_OH_AL_4/0_Zuzara_0_416_0_2_2_2_2

New Line.l(r:p2udt949lv-p2ulv5612) Units=km Length=0.091419 bus1=p2udt949lv.1.2 bus2=p2ulv5612.1.2 switch=n enabled=y phases=2 Linecode=1P_OH_AL_4/0_Zuzara_0_416_0_2_2_2_2

New Line.l(r:p2udt949lv-p2ulv23194) Units=km Length=0.0412216 bus1=p2udt949lv.1.2 bus2=p2ulv23194.1.2 switch=n enabled=y phases=2 Linecode=1P_OH_AL_4/0_Zuzara_0_416_0_2_2_2_2

New Line.l(r:p2udt949lv-p2ulv23383) Units=km Length=0.0678803 bus1=p2udt949lv.1.2 bus2=p2ulv23383.1.2 switch=n enabled=y phases=2 Linecode=1P_OH_AL_4/0_Zuzara_0_416_0_2_2_2_2

New Line.l(r:p2udt4328lv-p2ulv6089) Units=km Length=0.05408980000000001 bus1=p2udt4328lv.1.2 bus2=p2ulv6089.1.2 switch=n enabled=y phases=2 Linecode=1P_OH_AL_4/0_Zuzara_0_416_0_2_2_2_2

New Line.l(r:p2udt5450lv-p2ulv8696) Units=km Length=0.05095630000000001 bus1=p2udt5450lv.1.2 bus2=p2ulv8696.1.2 switch=n enabled=y phases=2 Linecode=1P_OH_AL_4/0_Zuzara_0_416_0_2_2_2_2

New Line.l(r:p2udt5538lv-p2ulv19106) Units=km Length=0.0531764 bus1=p2udt5538lv.1.2 bus2=p2ulv19106.1.2 switch=n enabled=y phases=2 Linecode=1P_OH_AL_4/0_Zuzara_0_416_0_2_2_2_2

New Line.l(r:p2udm17648-p2ulv8925) Units=km Length=0.0245606 bus1=p2udm17648.1.2 bus2=p2ulv8925.1.2 switch=n enabled=y phases=2 Linecode=1P_OH_AL_2/0_Rucina_0_416_0_2_2_2_2

New Line.l(r:p2udm17648-p2udt5538lv) Units=km Length=0.019847100000000003 bus1=p2udt5538lv.1.2 bus2=p2udm17648.1.2 switch=n enabled=y phases=2 Linecode=1P_OH_AL_2/0_Rucina_0_416_0_2_2_2_2

New Line.l(r:p2udt6699lv-p2ulv12474) Units=km Length=0.0406466 bus1=p2udt6699lv.1.2 bus2=p2ulv12474.1.2 switch=n enabled=y phases=2 Linecode=1P_OH_AL_4/0_Zuzara_0_416_0_2_2_2_2

New Line.l(r:p2udt6759lv-p2ulv14540) Units=km Length=0.0548234 bus1=p2udt6759lv.1.2 bus2=p2ulv14540.1.2 switch=n enabled=y phases=2 Linecode=1P_OH_AL_4/0_Zuzara_0_416_0_2_2_2_2

New Line.l(r:p2udm20329-p2ulv12724) Units=km Length=0.00532902 bus1=p2udm20329.1.2 bus2=p2ulv12724.1.2 switch=n enabled=y phases=2 Linecode=1P_OH_AL_2/0_Rucina_0_416_0_2_2_2_2

New Line.l(r:p2udm20329-p2udt6759lv) Units=km Length=0.0196449 bus1=p2udt6759lv.1.2 bus2=p2udm20329.1.2 switch=n enabled=y phases=2 Linecode=1P_OH_AL_2/0_Rucina_0_416_0_2_2_2_2

New Line.l(r:p2udt7759lv-p2ulv16869) Units=km Length=0.0380784 bus1=p2udt7759lv.1.2 bus2=p2ulv16869.1.2 switch=n enabled=y phases=2 Linecode=1P_OH_AL_4/0_Zuzara_0_416_0_2_2_2_2

New Line.l(r:p2udt8000lv-p2ulv18220) Units=km Length=0.0539878 bus1=p2udt8000lv.1.2 bus2=p2ulv18220.1.2 switch=n enabled=y phases=2 Linecode=1P_OH_AL_4/0_Zuzara_0_416_0_2_2_2_2

New Line.l(r:p2udt8288lv-p2ulv19815) Units=km Length=0.0795382 bus1=p2udt8288lv.1.2 bus2=p2ulv19815.1.2 switch=n enabled=y phases=2 Linecode=1P_OH_AL_4/0_Zuzara_0_416_0_2_2_2_2

New Line.l(r:p2udt8468lv-p2ulv20900) Units=km Length=0.0149938 bus1=p2udt8468lv.1.2 bus2=p2ulv20900.1.2 switch=n enabled=y phases=2 Linecode=1P_OH_AL_2/0_Rucina_0_416_0_2_2_2_2

New Line.l(r:p2udt8822lv-p2ulv23193) Units=km Length=0.001 bus1=p2udt8822lv.1.2 bus2=p2ulv23193.1.2 switch=n enabled=y phases=2 Linecode=1P_OH_AL_4_Periwinkle_0_416_0_2_2_2_2

New Line.l(r:p2udt8896lv-p2ulv23836) Units=km Length=0.042351 bus1=p2udt8896lv.1.2 bus2=p2ulv23836.1.2 switch=n enabled=y phases=2 Linecode=1P_OH_AL_4/0_Zuzara_0_416_0_2_2_2_2

New Line.l(r:p2udt5450-p2udt949)_s0 Units=km Length=0.0867601 bus1=p2udt949.2 bus2=p2udt5450-p2udt949xx.2 switch=n enabled=y phases=1 Linecode=1P_OH_AL_ACSR_#2_Sparrow_12_47_0_1_1_1_1

New Line.l(r:p2udt5450-p2udt949)_s1 Units=km Length=0.102642 bus1=p2udt5450-p2udt949xx.2 bus2=p2udt5450-p2udt949x.2 switch=n enabled=y phases=1 Linecode=1P_OH_AL_ACSR_#2_Sparrow_12_47_0_1_1_1_1

New Line.l(r:p2udt5450-p2udt949)_s2 Units=km Length=0.2651160000000001 bus1=p2udt5450-p2udt949x.2 bus2=p2udt5450.2 switch=n enabled=y phases=1 Linecode=1P_OH_AL_ACSR_#2_Sparrow_12_47_0_1_1_1_1

New Line.l(r:p2udt5538-p2udt949)_s0 Units=km Length=0.836892 bus1=p2udt5538-p2udt949x.2 bus2=p2udt5538-p2udt949xx.2 switch=n enabled=y phases=1 Linecode=1P_OH_AL_ACSR_#2_Sparrow_12_47_0_1_1_1_1

New Line.l(r:p2udt5538-p2udt949)_s1 Units=km Length=0.001 bus1=p2udt5538-p2udt949xx.2 bus2=p2udt5538-p2udt949xxx.2 switch=n enabled=y phases=1 Linecode=1P_OH_AL_ACSR_#2_Sparrow_12_47_0_1_1_1_1

New Line.l(r:p2udt5538-p2udt949)_s2 Units=km Length=0.107529 bus1=p2udt5538-p2udt949xxx.2 bus2=p2udt949.2 switch=n enabled=y phases=1 Linecode=1P_OH_AL_ACSR_#2_Sparrow_12_47_0_1_1_1_1

New Line.l(r:p2udt487-p2udt6699) Units=km Length=0.0588543 bus1=p2udt487.1 bus2=p2udt6699.1 switch=n enabled=y phases=1 Linecode=1P_OH_AL_ACSR_#2_Sparrow_12_47_0_1_1_1_1

New Line.l(r:p2udt1359-p2udt487) Units=km Length=0.170659 bus1=p2udt1359-p2udt487x.1 bus2=p2udt487.1 switch=n enabled=y phases=1 Linecode=1P_OH_AL_ACSR_#2_Sparrow_12_47_0_1_1_1_1

New Line.l(r:p2udt4328-p2udt8000) Units=km Length=0.146134 bus1=p2udt8000.3 bus2=p2udt4328.3 switch=n enabled=y phases=1 Linecode=1P_OH_AL_ACSR_#2_Sparrow_12_47_0_1_1_1_1

New Line.l(r:p2udt8000-p2udt8288) Units=km Length=0.168993 bus1=p2udt8000.3 bus2=p2udt8288.3 switch=n enabled=y phases=1 Linecode=1P_OH_AL_ACSR_#2_Sparrow_12_47_0_1_1_1_1

New Line.l(r:p2udt8000-p2udt8468) Units=km Length=0.136659 bus1=p2udt8468.3 bus2=p2udt8000.3 switch=n enabled=y phases=1 Linecode=1P_OH_AL_ACSR_#2_Sparrow_12_47_0_1_1_1_1

New Line.l(r:p2udt1359-p2udt8468) Units=km Length=0.329355 bus1=p2udt1359-p2udt8468x.3 bus2=p2udt8468.3 switch=n enabled=y phases=1 Linecode=1P_OH_AL_ACSR_#2_Sparrow_12_47_0_1_1_1_1

New Line.l(r:p2udt295-p2udt6759) Units=km Length=0.131396 bus1=p2udt295-p2udt6759x.1 bus2=p2udt6759.1 switch=n enabled=y phases=1 Linecode=1P_OH_AL_ACSR_#2_Sparrow_12_47_0_1_1_1_1

New Line.l(r:p2udt4460lv-p2ulv6349) Units=km Length=0.0198409 bus1=p2udt4460lv.1.2.3 bus2=p2ulv6349.1.2.3 switch=n enabled=y phases=3 Linecode=3P_UG_AL_350kcmil_15_0_416_0_3_3_3_3

New Line.l(r:p2udt4460lv-p2ulv17540) Units=km Length=0.0198409 bus1=p2udt4460lv.1.2.3 bus2=p2ulv17540.1.2.3 switch=n enabled=y phases=3 Linecode=3P_UG_AL_350kcmil_15_0_416_0_3_3_3_3

New Line.l(r:p2udt3537lv-p2ulv4654) Units=km Length=0.001 bus1=p2udt3537lv.1.2.3 bus2=p2ulv4654.1.2.3 switch=n enabled=y phases=3 Linecode=3P_UG_AL_350kcmil_15_0_416_0_3_3_3_3

New Line.l(r:p2udt1359lv-p2ulv1499) Units=km Length=0.029110600000000004 bus1=p2udt1359lv.1.2.3 bus2=p2ulv1499.1.2.3 switch=n enabled=y phases=3 Linecode=3P_UG_AL_350kcmil_15_0_416_0_3_3_3_3

New Line.l(r:p2udt1359-p2udt8822)_s0 Units=km Length=0.131364 bus1=p2udt8822.1.2.3 bus2=p2udt1359-p2udt8822x.1.2.3 switch=n enabled=y phases=3 Linecode=3P_OH_AL_ACSR_4/0_Penguin_12_47_0_3_3_3_3

New Line.l(r:p2udt1359-p2udt8822)_s1 Units=km Length=1.00545 bus1=p2udt1359-p2udt8822x.1.2.3 bus2=p2udt1359.1.2.3 switch=n enabled=y phases=3 Linecode=3P_OH_AL_ACSR_4/0_Penguin_12_47_0_3_3_3_3

New Line.l(r:p2udt3537-p2udt8822) Units=km Length=0.0880974 bus1=p2udt3537.1.2.3 bus2=p2udt8822.1.2.3 switch=n enabled=y phases=3 Linecode=3P_OH_AL_ACSR_4/0_Penguin_12_47_0_3_3_3_3

New Line.l(r:p2udt3537-p2udt4460) Units=km Length=0.0900143 bus1=p2udt4460.1.2.3 bus2=p2udt3537.1.2.3 switch=n enabled=y phases=3 Linecode=3P_OH_AL_ACSR_4/0_Penguin_12_47_0_3_3_3_3

New Line.l(r:p2udt4460-p2udt7759)_s0 Units=km Length=0.279518 bus1=p2udt7759.1.2.3 bus2=p2udt4460-p2udt7759x.1.2.3 switch=n enabled=y phases=3 Linecode=3P_OH_AL_ACSR_4/0_Penguin_12_47_0_3_3_3_3

New Line.l(r:p2udt4460-p2udt7759)_s1 Units=km Length=0.0514139 bus1=p2udt4460-p2udt7759x.1.2.3 bus2=p2udt4460.1.2.3 switch=n enabled=y phases=3 Linecode=3P_OH_AL_ACSR_4/0_Penguin_12_47_0_3_3_3_3

New Line.l(r:p2udt295lv-p2ulv303) Units=km Length=0.022997400000000005 bus1=p2udt295lv.1.2.3 bus2=p2ulv303.1.2.3 switch=n enabled=y phases=3 Linecode=3P_UG_AL_350kcmil_15_0_416_0_3_3_3_3

New Line.l(r:p2udt8578lv-p2ulv21586) Units=km Length=0.0164202 bus1=p2udt8578lv.1.2.3 bus2=p2ulv21586.1.2.3 switch=n enabled=y phases=3 Linecode=3P_UG_AL_350kcmil_15_0_416_0_3_3_3_3

New Line.l(r:p2udt295-p2udt8578) Units=km Length=0.23712 bus1=p2udt295.1.2.3 bus2=p2udt8578.1.2.3 switch=n enabled=y phases=3 Linecode=3P_OH_AL_ACSR_4/0_Penguin_12_47_0_3_3_3_3

New Line.l(r:p2udt295-p2udt8896) Units=km Length=0.226974 bus1=p2udt8896.1.2.3 bus2=p2udt295.1.2.3 switch=n enabled=y phases=3 Linecode=3P_OH_AL_ACSR_4/0_Penguin_12_47_0_3_3_3_3

New Line.l(r:p2udt7759-p2udt8896) Units=km Length=0.37170200000000003 bus1=p2udt7759.1.2.3 bus2=p2udt8896.1.2.3 switch=n enabled=y phases=3 Linecode=3P_OH_AL_ACSR_4/0_Penguin_12_47_0_3_3_3_3

New Line.l(r:p2udt5538-p2udt7759) Units=km Length=0.16045900000000002 bus1=p2udt5538.1.2.3 bus2=p2udt7759.1.2.3 switch=n enabled=y phases=3 Linecode=3P_OH_AL_ACSR_4/0_Penguin_12_47_0_3_3_3_3

New Line.l(r:p2udt5538-p2uhs8_1247) Units=km Length=0.16473300000000002 bus1=p2udt5538-p2uhs8_1247x.1.2.3 bus2=p2udt5538-p2uhs8_1247x_b1_1.1.2.3 switch=n enabled=y phases=3 Linecode=3P_OH_AL_ACSR_4/0_Penguin_12_47_0_3_3_3_3

New Line.fuse(r:p2udt295-p2udt6759)p2u_45537 Units=km Length=0.001 bus1=p2udt295.1 bus2=p2udt295-p2udt6759x.1 switch=n enabled=y phases=1 Linecode=fuse_1_1_1_1

New Fuse.Fuse_fuse(r:p2udt295-p2udt6759)p2u_45537 monitoredobj=Line.fuse(r:p2udt295-p2udt6759)p2u_45537 enabled=y ratedcurrent=100.0

New Line.fuse(r:p2udt1359-p2udt487)p2u_45638 Units=km Length=0.001 bus1=p2udt1359.1 bus2=p2udt1359-p2udt487x.1 switch=n enabled=y phases=1 Linecode=fuse_1_1_1_1

New Fuse.Fuse_fuse(r:p2udt1359-p2udt487)p2u_45638 monitoredobj=Line.fuse(r:p2udt1359-p2udt487)p2u_45638 enabled=y ratedcurrent=100.0

New Line.fuse(r:p2udt1359-p2udt8468)p2u_45639 Units=km Length=0.001 bus1=p2udt1359.3 bus2=p2udt1359-p2udt8468x.3 switch=n enabled=y phases=1 Linecode=fuse_1_1_1_1

New Fuse.Fuse_fuse(r:p2udt1359-p2udt8468)p2u_45639 monitoredobj=Line.fuse(r:p2udt1359-p2udt8468)p2u_45639 enabled=y ratedcurrent=100.0

New Line.fuse(r:p2udt5538-p2udt949)p2u_46089 Units=km Length=0.001 bus1=p2udt5538.2 bus2=p2udt5538-p2udt949x.2 switch=n enabled=y phases=1 Linecode=fuse_1_1_1_1

New Fuse.Fuse_fuse(r:p2udt5538-p2udt949)p2u_46089 monitoredobj=Line.fuse(r:p2udt5538-p2udt949)p2u_46089 enabled=y ratedcurrent=100.0

New Line.l(r:p2udt5538-p2uhs8_1247)_disconnect Units=km Length=0.001 bus1=p2udt5538-p2uhs8_1247x_b1_1.1.2.3 bus2=p2udt5538-p2uhs8_1247x_b2_1.1.2.3 switch=y enabled=y phases=3 Linecode=3P_OH_AL_ACSR_4/0_Penguin_12_47_0_3_3_3_3

New Line.l(r:p2udt5538-p2uhs8_1247)_cont Units=km Length=1.491597 bus1=p2udt5538-p2uhs8_1247x_b2_1.1.2.3 bus2=p2udt5538.1.2.3 switch=n enabled=y phases=3 Linecode=3P_OH_AL_ACSR_4/0_Penguin_12_47_0_3_3_3_3
