New Line.l(r:p2udt132lv-p2ulv137) Units=km Length=0.0163392 bus1=p2udt132lv.1.2 bus2=p2ulv137.1.2 switch=n enabled=y phases=2 Linecode=1P_UG_AL_1/0_Brenau_0_416_0_2_2_2_2

New Line.l(r:p2udm498-p2ulv16978) Units=km Length=0.0160123 bus1=p2udm498.1.2 bus2=p2ulv16978.1.2 switch=n enabled=y phases=2 Linecode=1P_UG_AL_1/0_Brenau_0_416_0_2_2_2_2

New Line.l(r:p2udm496-p2ulv1350) Units=km Length=0.0156014 bus1=p2udm496.1.2 bus2=p2ulv1350.1.2 switch=n enabled=y phases=2 Linecode=1P_UG_AL_4/0_Sweetbriar_0_416_0_2_2_2_2

New Line.l(r:p2udm496-p2udm498) Units=km Length=0.00939777 bus1=p2udm498.1.2 bus2=p2udm496.1.2 switch=n enabled=y phases=2 Linecode=1P_UG_AL_4/0_Sweetbriar_0_416_0_2_2_2_2

New Line.l(r:p2udm498-p2udt132lv) Units=km Length=0.00940479 bus1=p2udt132lv.1.2 bus2=p2udm498.1.2 switch=n enabled=y phases=2 Linecode=1P_UG_AL_4/0_Sweetbriar_0_416_0_2_2_2_2

New Line.l(r:p2udm499-p2ulv21453) Units=km Length=0.0111725 bus1=p2udm499.1.2 bus2=p2ulv21453.1.2 switch=n enabled=y phases=2 Linecode=1P_UG_AL_1/0_Brenau_0_416_0_2_2_2_2

New Line.l(r:p2udm497-p2ulv16725) Units=km Length=0.0164221 bus1=p2udm497.1.2 bus2=p2ulv16725.1.2 switch=n enabled=y phases=2 Linecode=1P_UG_AL_1/0_Brenau_0_416_0_2_2_2_2

New Line.l(r:p2udm497-p2udm499) Units=km Length=0.0094049 bus1=p2udm499.1.2 bus2=p2udm497.1.2 switch=n enabled=y phases=2 Linecode=1P_UG_AL_1/0_Brenau_0_416_0_2_2_2_2

New Line.l(r:p2udm499-p2udt132lv) Units=km Length=0.00940479 bus1=p2udt132lv.1.2 bus2=p2udm499.1.2 switch=n enabled=y phases=2 Linecode=1P_UG_AL_4/0_Sweetbriar_0_416_0_2_2_2_2

New Line.l(r:p2udt133lv-p2ulv18525) Units=km Length=0.0147701 bus1=p2udt133lv.1.2 bus2=p2ulv18525.1.2 switch=n enabled=y phases=2 Linecode=1P_UG_AL_4/0_Sweetbriar_0_416_0_2_2_2_2

New Line.l(r:p2udm500-p2ulv138) Units=km Length=0.0147483 bus1=p2udm500.1.2 bus2=p2ulv138.1.2 switch=n enabled=y phases=2 Linecode=1P_UG_AL_1/0_Brenau_0_416_0_2_2_2_2

New Line.l(r:p2udm500-p2ulv22137) Units=km Length=0.0149481 bus1=p2udm500.1.2 bus2=p2ulv22137.1.2 switch=n enabled=y phases=2 Linecode=1P_UG_AL_1/0_Brenau_0_416_0_2_2_2_2

New Line.l(r:p2udm500-p2udt133lv) Units=km Length=0.00970062 bus1=p2udt133lv.1.2 bus2=p2udm500.1.2 switch=n enabled=y phases=2 Linecode=1P_UG_AL_4/0_Sweetbriar_0_416_0_2_2_2_2

New Line.l(r:p2udm502-p2ulv21911) Units=km Length=0.0155543 bus1=p2udm502.1.2 bus2=p2ulv21911.1.2 switch=n enabled=y phases=2 Linecode=1P_UG_AL_1/0_Brenau_0_416_0_2_2_2_2

New Line.l(r:p2udm502-p2udt133lv) Units=km Length=0.00969331 bus1=p2udt133lv.1.2 bus2=p2udm502.1.2 switch=n enabled=y phases=2 Linecode=1P_UG_AL_1/0_Brenau_0_416_0_2_2_2_2

New Line.l(r:p2udm718-p2ulv200) Units=km Length=0.00996255 bus1=p2udm718.1.2 bus2=p2ulv200.1.2 switch=n enabled=y phases=2 Linecode=1P_UG_AL_1/0_Brenau_0_416_0_2_2_2_2

New Line.l(r:p2udm718-p2ulv6737) Units=km Length=0.00944075 bus1=p2udm718.1.2 bus2=p2ulv6737.1.2 switch=n enabled=y phases=2 Linecode=1P_UG_AL_1/0_Brenau_0_416_0_2_2_2_2

New Line.l(r:p2udm722-p2ulv7232) Units=km Length=0.010091 bus1=p2udm722.1.2 bus2=p2ulv7232.1.2 switch=n enabled=y phases=2 Linecode=1P_UG_AL_2/0_Converse_0_416_0_2_2_2_2

New Line.l(r:p2udm720-p2ulv4572) Units=km Length=0.00971019 bus1=p2udm720.1.2 bus2=p2ulv4572.1.2 switch=n enabled=y phases=2 Linecode=1P_UG_AL_1/0_Brenau_0_416_0_2_2_2_2

New Line.l(r:p2udm720-p2udm722) Units=km Length=0.009841 bus1=p2udm722.1.2 bus2=p2udm720.1.2 switch=n enabled=y phases=2 Linecode=1P_UG_AL_1/0_Brenau_0_416_0_2_2_2_2

New Line.l(r:p2udm718-p2udm722) Units=km Length=0.0196674 bus1=p2udm718.1.2 bus2=p2udm722.1.2 switch=n enabled=y phases=2 Linecode=1P_UG_AL_4/0_Sweetbriar_0_416_0_2_2_2_2

New Line.l(r:p2udm718-p2udt195lv) Units=km Length=0.009841 bus1=p2udt195lv.1.2 bus2=p2udm718.1.2 switch=n enabled=y phases=2 Linecode=1P_UG_AL_4/0_Sweetbriar_0_416_0_2_2_2_2

New Line.l(r:p2udm724-p2ulv15843) Units=km Length=0.0095794 bus1=p2udm724.1.2 bus2=p2ulv15843.1.2 switch=n enabled=y phases=2 Linecode=1P_UG_AL_1/0_Brenau_0_416_0_2_2_2_2

New Line.l(r:p2udm723-p2ulv10020) Units=km Length=0.0104278 bus1=p2udm723.1.2 bus2=p2ulv10020.1.2 switch=n enabled=y phases=2 Linecode=1P_UG_AL_1/0_Brenau_0_416_0_2_2_2_2

New Line.l(r:p2udm719-p2ulv2888) Units=km Length=0.00957037 bus1=p2udm719.1.2 bus2=p2ulv2888.1.2 switch=n enabled=y phases=2 Linecode=1P_UG_AL_1/0_Brenau_0_416_0_2_2_2_2

New Line.l(r:p2udm719-p2udm723) Units=km Length=0.009841 bus1=p2udm723.1.2 bus2=p2udm719.1.2 switch=n enabled=y phases=2 Linecode=1P_UG_AL_1/0_Brenau_0_416_0_2_2_2_2

New Line.l(r:p2udm723-p2udm724) Units=km Length=0.00983371 bus1=p2udm724.1.2 bus2=p2udm723.1.2 switch=n enabled=y phases=2 Linecode=1P_UG_AL_2/0_Converse_0_416_0_2_2_2_2

New Line.l(r:p2udm724-p2udt195lv) Units=km Length=0.00983371 bus1=p2udt195lv.1.2 bus2=p2udm724.1.2 switch=n enabled=y phases=2 Linecode=1P_UG_AL_4/0_Sweetbriar_0_416_0_2_2_2_2

New Line.l(r:p2udm725-p2ulv201) Units=km Length=0.00904005 bus1=p2udm725.1.2 bus2=p2ulv201.1.2 switch=n enabled=y phases=2 Linecode=1P_UG_AL_1/0_Brenau_0_416_0_2_2_2_2

New Line.l(r:p2udm725-p2ulv10255) Units=km Length=0.008872320000000001 bus1=p2udm725.1.2 bus2=p2ulv10255.1.2 switch=n enabled=y phases=2 Linecode=1P_UG_AL_1/0_Brenau_0_416_0_2_2_2_2

New Line.l(r:p2udm732-p2ulv23998) Units=km Length=0.00932507 bus1=p2udm732.1.2 bus2=p2ulv23998.1.2 switch=n enabled=y phases=2 Linecode=1P_UG_AL_1/0_Brenau_0_416_0_2_2_2_2

New Line.l(r:p2udm729-p2ulv11935) Units=km Length=0.0092772 bus1=p2udm729.1.2 bus2=p2ulv11935.1.2 switch=n enabled=y phases=2 Linecode=1P_UG_AL_1/0_Brenau_0_416_0_2_2_2_2

New Line.l(r:p2udm729-p2udm732) Units=km Length=0.009463870000000001 bus1=p2udm732.1.2 bus2=p2udm729.1.2 switch=n enabled=y phases=2 Linecode=1P_UG_AL_1/0_Brenau_0_416_0_2_2_2_2

New Line.l(r:p2udm725-p2udm732) Units=km Length=0.0189352 bus1=p2udm725.1.2 bus2=p2udm732.1.2 switch=n enabled=y phases=2 Linecode=1P_UG_AL_1/0_Brenau_0_416_0_2_2_2_2

New Line.l(r:p2udm725-p2udt196lv) Units=km Length=0.009463870000000001 bus1=p2udt196lv.1.2 bus2=p2udm725.1.2 switch=n enabled=y phases=2 Linecode=1P_UG_AL_4/0_Sweetbriar_0_416_0_2_2_2_2

New Line.l(r:p2udm731-p2ulv22192) Units=km Length=0.00657 bus1=p2udm731.1.2 bus2=p2ulv22192.1.2 switch=n enabled=y phases=2 Linecode=1P_UG_AL_1/0_Brenau_0_416_0_2_2_2_2

New Line.l(r:p2udm727-p2ulv6005) Units=km Length=0.00623654 bus1=p2udm727.1.2 bus2=p2ulv6005.1.2 switch=n enabled=y phases=2 Linecode=1P_UG_AL_1/0_Brenau_0_416_0_2_2_2_2

New Line.l(r:p2udm726-p2ulv1167) Units=km Length=0.00638549 bus1=p2udm726.1.2 bus2=p2ulv1167.1.2 switch=n enabled=y phases=2 Linecode=1P_UG_AL_1/0_Brenau_0_416_0_2_2_2_2

New Line.l(r:p2udm730-p2ulv17694) Units=km Length=0.00708678 bus1=p2udm730.1.2 bus2=p2ulv17694.1.2 switch=n enabled=y phases=2 Linecode=1P_UG_AL_1/0_Brenau_0_416_0_2_2_2_2

New Line.l(r:p2udm726-p2udm730) Units=km Length=0.0068687800000000005 bus1=p2udm726.1.2 bus2=p2udm730.1.2 switch=n enabled=y phases=2 Linecode=1P_UG_AL_1/0_Brenau_0_416_0_2_2_2_2

New Line.l(r:p2udm726-p2udm727) Units=km Length=0.0189419 bus1=p2udm727.1.2 bus2=p2udm726.1.2 switch=n enabled=y phases=2 Linecode=1P_UG_AL_1/0_Brenau_0_416_0_2_2_2_2

New Line.l(r:p2udm727-p2udm731) Units=km Length=0.009463870000000001 bus1=p2udm731.1.2 bus2=p2udm727.1.2 switch=n enabled=y phases=2 Linecode=1P_UG_AL_4/0_Sweetbriar_0_416_0_2_2_2_2

New Line.l(r:p2udm731-p2udt196lv) Units=km Length=0.009463870000000001 bus1=p2udt196lv.1.2 bus2=p2udm731.1.2 switch=n enabled=y phases=2 Linecode=1P_UG_AL_4/0_Sweetbriar_0_416_0_2_2_2_2

New Line.l(r:p2udt197lv-p2ulv442) Units=km Length=0.011484 bus1=p2udt197lv.1.2 bus2=p2ulv442.1.2 switch=n enabled=y phases=2 Linecode=1P_UG_AL_1/0_Brenau_0_416_0_2_2_2_2

New Line.l(r:p2udt197lv-p2ulv1423) Units=km Length=0.00559519 bus1=p2udt197lv.1.2 bus2=p2ulv1423.1.2 switch=n enabled=y phases=2 Linecode=1P_UG_AL_1/0_Brenau_0_416_0_2_2_2_2

New Line.l(r:p2udt197lv-p2ulv8842) Units=km Length=0.0242242 bus1=p2udt197lv.1.2 bus2=p2ulv8842.1.2 switch=n enabled=y phases=2 Linecode=1P_UG_AL_1/0_Brenau_0_416_0_2_2_2_2

New Line.l(r:p2udm733-p2ulv202) Units=km Length=0.0116326 bus1=p2udm733.1.2 bus2=p2ulv202.1.2 switch=n enabled=y phases=2 Linecode=1P_UG_AL_1/0_Brenau_0_416_0_2_2_2_2

New Line.l(r:p2udm733-p2ulv9777) Units=km Length=0.006453290000000001 bus1=p2udm733.1.2 bus2=p2ulv9777.1.2 switch=n enabled=y phases=2 Linecode=1P_UG_AL_1/0_Brenau_0_416_0_2_2_2_2

New Line.l(r:p2udm733-p2udt197lv) Units=km Length=0.0195179 bus1=p2udt197lv.1.2 bus2=p2udm733.1.2 switch=n enabled=y phases=2 Linecode=1P_UG_AL_1/0_Brenau_0_416_0_2_2_2_2

New Line.l(r:p2udt198lv-p2ulv203) Units=km Length=0.0124281 bus1=p2udt198lv.1.2 bus2=p2ulv203.1.2 switch=n enabled=y phases=2 Linecode=1P_UG_AL_1/0_Brenau_0_416_0_2_2_2_2

New Line.l(r:p2udt198lv-p2ulv5282) Units=km Length=0.0162565 bus1=p2udt198lv.1.2 bus2=p2ulv5282.1.2 switch=n enabled=y phases=2 Linecode=1P_UG_AL_1/0_Brenau_0_416_0_2_2_2_2

New Line.l(r:p2udt378lv-p2ulv7167) Units=km Length=0.0147858 bus1=p2udt378lv.1.2 bus2=p2ulv7167.1.2 switch=n enabled=y phases=2 Linecode=1P_UG_AL_1/0_Brenau_0_416_0_2_2_2_2

New Line.l(r:p2udm1388-p2ulv391) Units=km Length=0.0150425 bus1=p2udm1388.1.2 bus2=p2ulv391.1.2 switch=n enabled=y phases=2 Linecode=1P_UG_AL_1/0_Brenau_0_416_0_2_2_2_2

New Line.l(r:p2udm1388-p2ulv14864) Units=km Length=0.0150301 bus1=p2udm1388.1.2 bus2=p2ulv14864.1.2 switch=n enabled=y phases=2 Linecode=1P_UG_AL_1/0_Brenau_0_416_0_2_2_2_2

New Line.l(r:p2udm1388-p2udt378lv) Units=km Length=0.00970062 bus1=p2udt378lv.1.2 bus2=p2udm1388.1.2 switch=n enabled=y phases=2 Linecode=1P_UG_AL_2/0_Converse_0_416_0_2_2_2_2

New Line.l(r:p2udm1393-p2ulv15567) Units=km Length=0.0150552 bus1=p2udm1393.1.2 bus2=p2ulv15567.1.2 switch=n enabled=y phases=2 Linecode=1P_UG_AL_1/0_Brenau_0_416_0_2_2_2_2

New Line.l(r:p2udm1389-p2ulv2314) Units=km Length=0.0160197 bus1=p2udm1389.1.2 bus2=p2ulv2314.1.2 switch=n enabled=y phases=2 Linecode=1P_UG_AL_1/0_Brenau_0_416_0_2_2_2_2

New Line.l(r:p2udm1389-p2ulv7166) Units=km Length=0.014704000000000002 bus1=p2udm1389.1.2 bus2=p2ulv7166.1.2 switch=n enabled=y phases=2 Linecode=1P_UG_AL_1/0_Brenau_0_416_0_2_2_2_2

New Line.l(r:p2udm1389-p2udm1393) Units=km Length=0.00969331 bus1=p2udm1393.1.2 bus2=p2udm1389.1.2 switch=n enabled=y phases=2 Linecode=1P_UG_AL_2/0_Converse_0_416_0_2_2_2_2

New Line.l(r:p2udm1393-p2udt378lv) Units=km Length=0.00970062 bus1=p2udt378lv.1.2 bus2=p2udm1393.1.2 switch=n enabled=y phases=2 Linecode=1P_UG_AL_4/0_Sweetbriar_0_416_0_2_2_2_2

New Line.l(r:p2udt426lv-p2ulv8187) Units=km Length=0.0174148 bus1=p2udt426lv.1.2 bus2=p2ulv8187.1.2 switch=n enabled=y phases=2 Linecode=1P_OH_AL_2/0_Rucina_0_416_0_2_2_2_2

New Line.l(r:p2udt426lv-p2ulv14927) Units=km Length=0.0182907 bus1=p2udt426lv.1.2 bus2=p2ulv14927.1.2 switch=n enabled=y phases=2 Linecode=1P_OH_AL_2/0_Rucina_0_416_0_2_2_2_2

New Line.l(r:p2udm1571-p2ulv441) Units=km Length=0.0114843 bus1=p2udm1571.1.2 bus2=p2ulv441.1.2 switch=n enabled=y phases=2 Linecode=1P_OH_AL_2/0_Rucina_0_416_0_2_2_2_2

New Line.l(r:p2udm1571-p2udt426lv) Units=km Length=0.0111192 bus1=p2udt426lv.1.2 bus2=p2udm1571.1.2 switch=n enabled=y phases=2 Linecode=1P_OH_AL_2/0_Rucina_0_416_0_2_2_2_2

New Line.l(r:p2udt427lv-p2ulv21728) Units=km Length=0.00731613 bus1=p2udt427lv.1.2 bus2=p2ulv21728.1.2 switch=n enabled=y phases=2 Linecode=1P_UG_AL_1/0_Brenau_0_416_0_2_2_2_2

New Line.l(r:p2udm1575-p2ulv679) Units=km Length=0.0118109 bus1=p2udm1575.1.2 bus2=p2ulv679.1.2 switch=n enabled=y phases=2 Linecode=1P_UG_AL_1/0_Brenau_0_416_0_2_2_2_2

New Line.l(r:p2udm1577-p2ulv16323) Units=km Length=0.00924418 bus1=p2udm1577.1.2 bus2=p2ulv16323.1.2 switch=n enabled=y phases=2 Linecode=1P_UG_AL_1/0_Brenau_0_416_0_2_2_2_2

New Line.l(r:p2udm1575-p2udm1577) Units=km Length=0.00969489 bus1=p2udm1575.1.2 bus2=p2udm1577.1.2 switch=n enabled=y phases=2 Linecode=1P_UG_AL_1/0_Brenau_0_416_0_2_2_2_2

New Line.l(r:p2udm1575-p2udt427lv) Units=km Length=0.019383000000000004 bus1=p2udt427lv.1.2 bus2=p2udm1575.1.2 switch=n enabled=y phases=2 Linecode=1P_UG_AL_2/0_Converse_0_416_0_2_2_2_2

New Line.l(r:p2udm1576-p2ulv1168) Units=km Length=0.00856057 bus1=p2udm1576.1.2 bus2=p2ulv1168.1.2 switch=n enabled=y phases=2 Linecode=1P_UG_AL_1/0_Brenau_0_416_0_2_2_2_2

New Line.l(r:p2udm1574-p2ulv443) Units=km Length=0.00993723 bus1=p2udm1574.1.2 bus2=p2ulv443.1.2 switch=n enabled=y phases=2 Linecode=1P_UG_AL_1/0_Brenau_0_416_0_2_2_2_2

New Line.l(r:p2udm1574-p2udm1576) Units=km Length=0.019383000000000004 bus1=p2udm1576.1.2 bus2=p2udm1574.1.2 switch=n enabled=y phases=2 Linecode=1P_UG_AL_1/0_Brenau_0_416_0_2_2_2_2

New Line.l(r:p2udm1576-p2udt427lv) Units=km Length=0.0193903 bus1=p2udt427lv.1.2 bus2=p2udm1576.1.2 switch=n enabled=y phases=2 Linecode=1P_UG_AL_2/0_Converse_0_416_0_2_2_2_2

New Line.l(r:p2udm1579-p2ulv444) Units=km Length=0.0127777 bus1=p2udm1579.1.2 bus2=p2ulv444.1.2 switch=n enabled=y phases=2 Linecode=1P_UG_AL_1/0_Brenau_0_416_0_2_2_2_2

New Line.l(r:p2udm1580-p2ulv12646) Units=km Length=0.028915 bus1=p2udm1580.1.2 bus2=p2ulv12646.1.2 switch=n enabled=y phases=2 Linecode=1P_UG_AL_1/0_Brenau_0_416_0_2_2_2_2

New Line.l(r:p2udm1579-p2udm1580) Units=km Length=0.0392777 bus1=p2udm1579.1.2 bus2=p2udm1580.1.2 switch=n enabled=y phases=2 Linecode=1P_UG_AL_1/0_Brenau_0_416_0_2_2_2_2

New Line.l(r:p2udm1579-p2udt428lv) Units=km Length=0.00982833 bus1=p2udt428lv.1.2 bus2=p2udm1579.1.2 switch=n enabled=y phases=2 Linecode=1P_UG_AL_1/0_Brenau_0_416_0_2_2_2_2

New Line.l(r:p2udm1581-p2ulv14453) Units=km Length=0.025678000000000003 bus1=p2udm1581.1.2 bus2=p2ulv14453.1.2 switch=n enabled=y phases=2 Linecode=1P_UG_AL_1/0_Brenau_0_416_0_2_2_2_2

New Line.l(r:p2udm1581-p2udt428lv) Units=km Length=0.05892030000000001 bus1=p2udt428lv.1.2 bus2=p2udm1581.1.2 switch=n enabled=y phases=2 Linecode=1P_UG_AL_1/0_Brenau_0_416_0_2_2_2_2

New Line.l(r:p2udm2182-p2ulv620) Units=km Length=0.015467500000000002 bus1=p2udm2182.1.2 bus2=p2ulv620.1.2 switch=n enabled=y phases=2 Linecode=1P_UG_AL_1/0_Brenau_0_416_0_2_2_2_2

New Line.l(r:p2udm2182-p2ulv23698) Units=km Length=0.011998400000000001 bus1=p2udm2182.1.2 bus2=p2ulv23698.1.2 switch=n enabled=y phases=2 Linecode=1P_UG_AL_1/0_Brenau_0_416_0_2_2_2_2

New Line.l(r:p2udm2182-p2udt585lv) Units=km Length=0.00824122 bus1=p2udt585lv.1.2 bus2=p2udm2182.1.2 switch=n enabled=y phases=2 Linecode=1P_UG_AL_4/0_Sweetbriar_0_416_0_2_2_2_2

New Line.l(r:p2udm2183-p2ulv7164) Units=km Length=0.0157864 bus1=p2udm2183.1.2 bus2=p2ulv7164.1.2 switch=n enabled=y phases=2 Linecode=1P_UG_AL_4/0_Sweetbriar_0_416_0_2_2_2_2

New Line.l(r:p2udm2183-p2udt585lv) Units=km Length=0.00824122 bus1=p2udt585lv.1.2 bus2=p2udm2183.1.2 switch=n enabled=y phases=2 Linecode=1P_UG_AL_4/0_Sweetbriar_0_416_0_2_2_2_2

New Line.l(r:p2udt586lv-p2ulv4015) Units=km Length=0.0219933 bus1=p2udt586lv.1.2 bus2=p2ulv4015.1.2 switch=n enabled=y phases=2 Linecode=1P_UG_AL_1/0_Brenau_0_416_0_2_2_2_2

New Line.l(r:p2udt586lv-p2ulv8586) Units=km Length=0.023547 bus1=p2udt586lv.1.2 bus2=p2ulv8586.1.2 switch=n enabled=y phases=2 Linecode=1P_UG_AL_1/0_Brenau_0_416_0_2_2_2_2

New Line.l(r:p2udt586lv-p2ulv13301) Units=km Length=0.0205437 bus1=p2udt586lv.1.2 bus2=p2ulv13301.1.2 switch=n enabled=y phases=2 Linecode=1P_UG_AL_1/0_Brenau_0_416_0_2_2_2_2

New Line.l(r:p2udt586lv-p2ulv14863) Units=km Length=0.0205709 bus1=p2udt586lv.1.2 bus2=p2ulv14863.1.2 switch=n enabled=y phases=2 Linecode=1P_UG_AL_1/0_Brenau_0_416_0_2_2_2_2

New Line.l(r:p2udm2185-p2ulv621) Units=km Length=0.0179292 bus1=p2udm2185.1.2 bus2=p2ulv621.1.2 switch=n enabled=y phases=2 Linecode=1P_UG_AL_1/0_Brenau_0_416_0_2_2_2_2

New Line.l(r:p2udm2185-p2udt586lv) Units=km Length=0.008892610000000002 bus1=p2udt586lv.1.2 bus2=p2udm2185.1.2 switch=n enabled=y phases=2 Linecode=1P_UG_AL_1/0_Brenau_0_416_0_2_2_2_2

New Line.l(r:p2udm2384-p2ulv677) Units=km Length=0.0143731 bus1=p2udm2384.1.2 bus2=p2ulv677.1.2 switch=n enabled=y phases=2 Linecode=1P_UG_AL_1/0_Brenau_0_416_0_2_2_2_2

New Line.l(r:p2udm2384-p2udt640lv) Units=km Length=0.00987689 bus1=p2udt640lv.1.2 bus2=p2udm2384.1.2 switch=n enabled=y phases=2 Linecode=1P_UG_AL_1/0_Brenau_0_416_0_2_2_2_2

New Line.l(r:p2udm2385-p2ulv13821) Units=km Length=0.0170379 bus1=p2udm2385.1.2 bus2=p2ulv13821.1.2 switch=n enabled=y phases=2 Linecode=1P_UG_AL_1/0_Brenau_0_416_0_2_2_2_2

New Line.l(r:p2udm2385-p2udt640lv) Units=km Length=0.00987689 bus1=p2udt640lv.1.2 bus2=p2udm2385.1.2 switch=n enabled=y phases=2 Linecode=1P_UG_AL_1/0_Brenau_0_416_0_2_2_2_2

New Line.l(r:p2udm2387-p2ulv2116) Units=km Length=0.0112161 bus1=p2udm2387.1.2 bus2=p2ulv2116.1.2 switch=n enabled=y phases=2 Linecode=1P_UG_AL_1/0_Brenau_0_416_0_2_2_2_2

New Line.l(r:p2udm2388-p2ulv7233) Units=km Length=0.0110402 bus1=p2udm2388.1.2 bus2=p2ulv7233.1.2 switch=n enabled=y phases=2 Linecode=1P_UG_AL_1/0_Brenau_0_416_0_2_2_2_2

New Line.l(r:p2udm2387-p2udm2388) Units=km Length=0.009463870000000001 bus1=p2udm2387.1.2 bus2=p2udm2388.1.2 switch=n enabled=y phases=2 Linecode=1P_UG_AL_1/0_Brenau_0_416_0_2_2_2_2

New Line.l(r:p2udm2387-p2udt641lv) Units=km Length=0.00947051 bus1=p2udt641lv.1.2 bus2=p2udm2387.1.2 switch=n enabled=y phases=2 Linecode=1P_UG_AL_1/0_Brenau_0_416_0_2_2_2_2

New Line.l(r:p2udm2389-p2ulv14452) Units=km Length=0.00666821 bus1=p2udm2389.1.2 bus2=p2ulv14452.1.2 switch=n enabled=y phases=2 Linecode=1P_UG_AL_1/0_Brenau_0_416_0_2_2_2_2

New Line.l(r:p2udm2386-p2ulv678) Units=km Length=0.0105139 bus1=p2udm2386.1.2 bus2=p2ulv678.1.2 switch=n enabled=y phases=2 Linecode=1P_UG_AL_1/0_Brenau_0_416_0_2_2_2_2

New Line.l(r:p2udm2386-p2udm2389) Units=km Length=0.0189352 bus1=p2udm2389.1.2 bus2=p2udm2386.1.2 switch=n enabled=y phases=2 Linecode=1P_UG_AL_1/0_Brenau_0_416_0_2_2_2_2

New Line.l(r:p2udm2389-p2udt641lv) Units=km Length=0.009463870000000001 bus1=p2udt641lv.1.2 bus2=p2udm2389.1.2 switch=n enabled=y phases=2 Linecode=1P_UG_AL_1/0_Brenau_0_416_0_2_2_2_2

New Line.l(r:p2udt792lv-p2ulv23699) Units=km Length=0.0164685 bus1=p2udt792lv.1.2 bus2=p2ulv23699.1.2 switch=n enabled=y phases=2 Linecode=1P_UG_AL_1/0_Brenau_0_416_0_2_2_2_2

New Line.l(r:p2udm2936-p2ulv1606) Units=km Length=0.0152352 bus1=p2udm2936.1.2 bus2=p2ulv1606.1.2 switch=n enabled=y phases=2 Linecode=1P_UG_AL_1/0_Brenau_0_416_0_2_2_2_2

New Line.l(r:p2udm2935-p2ulv846) Units=km Length=0.0154578 bus1=p2udm2935.1.2 bus2=p2ulv846.1.2 switch=n enabled=y phases=2 Linecode=1P_UG_AL_1/0_Brenau_0_416_0_2_2_2_2

New Line.l(r:p2udm2935-p2ulv14643) Units=km Length=0.0147345 bus1=p2udm2935.1.2 bus2=p2ulv14643.1.2 switch=n enabled=y phases=2 Linecode=1P_UG_AL_1/0_Brenau_0_416_0_2_2_2_2

New Line.l(r:p2udm2935-p2udm2936) Units=km Length=0.00969331 bus1=p2udm2936.1.2 bus2=p2udm2935.1.2 switch=n enabled=y phases=2 Linecode=1P_UG_AL_4/0_Sweetbriar_0_416_0_2_2_2_2

New Line.l(r:p2udm2936-p2udt792lv) Units=km Length=0.00970062 bus1=p2udt792lv.1.2 bus2=p2udm2936.1.2 switch=n enabled=y phases=2 Linecode=1P_UG_AL_4/0_Sweetbriar_0_416_0_2_2_2_2

New Line.l(r:p2udm2937-p2ulv5003) Units=km Length=0.0157826 bus1=p2udm2937.1.2 bus2=p2ulv5003.1.2 switch=n enabled=y phases=2 Linecode=1P_UG_AL_1/0_Brenau_0_416_0_2_2_2_2

New Line.l(r:p2udm2937-p2ulv14196) Units=km Length=0.0156207 bus1=p2udm2937.1.2 bus2=p2ulv14196.1.2 switch=n enabled=y phases=2 Linecode=1P_UG_AL_1/0_Brenau_0_416_0_2_2_2_2

New Line.l(r:p2udm2937-p2udt792lv) Units=km Length=0.00970062 bus1=p2udt792lv.1.2 bus2=p2udm2937.1.2 switch=n enabled=y phases=2 Linecode=1P_UG_AL_4/0_Sweetbriar_0_416_0_2_2_2_2

New Line.l(r:p2udt858lv-p2ulv918) Units=km Length=0.00880569 bus1=p2udt858lv.1.2 bus2=p2ulv918.1.2 switch=n enabled=y phases=2 Linecode=1P_UG_AL_1/0_Brenau_0_416_0_2_2_2_2

New Line.l(r:p2udm3170-p2ulv2633) Units=km Length=0.009666570000000001 bus1=p2udm3170.1.2 bus2=p2ulv2633.1.2 switch=n enabled=y phases=2 Linecode=1P_UG_AL_1/0_Brenau_0_416_0_2_2_2_2

New Line.l(r:p2udm3170-p2udt858lv) Units=km Length=0.00969545 bus1=p2udt858lv.1.2 bus2=p2udm3170.1.2 switch=n enabled=y phases=2 Linecode=1P_UG_AL_1/0_Brenau_0_416_0_2_2_2_2

New Line.l(r:p2udm3171-p2ulv19506) Units=km Length=0.00664939 bus1=p2udm3171.1.2 bus2=p2ulv19506.1.2 switch=n enabled=y phases=2 Linecode=1P_UG_AL_1/0_Brenau_0_416_0_2_2_2_2

New Line.l(r:p2udm3171-p2udt858lv) Units=km Length=0.00969489 bus1=p2udt858lv.1.2 bus2=p2udm3171.1.2 switch=n enabled=y phases=2 Linecode=1P_UG_AL_1/0_Brenau_0_416_0_2_2_2_2

New Line.l(r:p2udt1077lv-p2ulv14032) Units=km Length=0.07527770000000002 bus1=p2udt1077lv.1.2 bus2=p2ulv14032.1.2 switch=n enabled=y phases=2 Linecode=1P_OH_AL_4/0_Zuzara_0_416_0_2_2_2_2

New Line.l(r:p2udm3968-p2ulv1170) Units=km Length=0.0856174 bus1=p2udm3968.1.2 bus2=p2ulv1170.1.2 switch=n enabled=y phases=2 Linecode=1P_OH_AL_4/0_Zuzara_0_416_0_2_2_2_2

New Line.l(r:p2udm3968-p2udt1077lv) Units=km Length=0.017583300000000003 bus1=p2udt1077lv.1.2 bus2=p2udm3968.1.2 switch=n enabled=y phases=2 Linecode=1P_OH_AL_2/0_Rucina_0_416_0_2_2_2_2

New Line.l(r:p2udm4759-p2ulv1420) Units=km Length=0.0630325 bus1=p2udm4759.1.2 bus2=p2ulv1420.1.2 switch=n enabled=y phases=2 Linecode=1P_OH_AL_4/0_Zuzara_0_416_0_2_2_2_2

New Line.l(r:p2udm4759-p2udt1289lv) Units=km Length=0.0183593 bus1=p2udt1289lv.1.2 bus2=p2udm4759.1.2 switch=n enabled=y phases=2 Linecode=1P_OH_AL_2/0_Rucina_0_416_0_2_2_2_2

New Line.l(r:p2udm4760-p2ulv5527) Units=km Length=0.0703638 bus1=p2udm4760.1.2 bus2=p2ulv5527.1.2 switch=n enabled=y phases=2 Linecode=1P_OH_AL_4/0_Zuzara_0_416_0_2_2_2_2

New Line.l(r:p2udm4760-p2udt1289lv) Units=km Length=0.0183593 bus1=p2udt1289lv.1.2 bus2=p2udm4760.1.2 switch=n enabled=y phases=2 Linecode=1P_OH_AL_2/0_Rucina_0_416_0_2_2_2_2

New Line.l(r:p2udt1290lv-p2ulv1421) Units=km Length=0.015308800000000001 bus1=p2udt1290lv.1.2 bus2=p2ulv1421.1.2 switch=n enabled=y phases=2 Linecode=1P_UG_AL_1/0_Brenau_0_416_0_2_2_2_2

New Line.l(r:p2udm4762-p2ulv1422) Units=km Length=0.017096 bus1=p2udm4762.1.2 bus2=p2ulv1422.1.2 switch=n enabled=y phases=2 Linecode=1P_UG_AL_1/0_Brenau_0_416_0_2_2_2_2

New Line.l(r:p2udm4762-p2udt1291lv) Units=km Length=0.00987036 bus1=p2udt1291lv.1.2 bus2=p2udm4762.1.2 switch=n enabled=y phases=2 Linecode=1P_UG_AL_1/0_Brenau_0_416_0_2_2_2_2

New Line.l(r:p2udm4763-p2ulv3586) Units=km Length=0.0272218 bus1=p2udm4763.1.2 bus2=p2ulv3586.1.2 switch=n enabled=y phases=2 Linecode=1P_UG_AL_1/0_Brenau_0_416_0_2_2_2_2

New Line.l(r:p2udm4763-p2udt1291lv) Units=km Length=0.00987689 bus1=p2udt1291lv.1.2 bus2=p2udm4763.1.2 switch=n enabled=y phases=2 Linecode=1P_UG_AL_1/0_Brenau_0_416_0_2_2_2_2

New Line.l(r:p2udt1480lv-p2ulv1646) Units=km Length=0.0135969 bus1=p2udt1480lv.1.2 bus2=p2ulv1646.1.2 switch=n enabled=y phases=2 Linecode=1P_OH_AL_2/0_Rucina_0_416_0_2_2_2_2

New Line.l(r:p2udt1480lv-p2ulv19735) Units=km Length=0.0135969 bus1=p2udt1480lv.1.2 bus2=p2ulv19735.1.2 switch=n enabled=y phases=2 Linecode=1P_OH_AL_2/0_Rucina_0_416_0_2_2_2_2

New Line.l(r:p2udt1481lv-p2ulv1647) Units=km Length=0.0304981 bus1=p2udt1481lv.1.2 bus2=p2ulv1647.1.2 switch=n enabled=y phases=2 Linecode=1P_OH_AL_4/0_Zuzara_0_416_0_2_2_2_2

New Line.l(r:p2udt1481lv-p2ulv2379) Units=km Length=0.0279299 bus1=p2udt1481lv.1.2 bus2=p2ulv2379.1.2 switch=n enabled=y phases=2 Linecode=1P_OH_AL_4/0_Zuzara_0_416_0_2_2_2_2

New Line.l(r:p2udt1481lv-p2ulv14698) Units=km Length=0.0161225 bus1=p2udt1481lv.1.2 bus2=p2ulv14698.1.2 switch=n enabled=y phases=2 Linecode=1P_OH_AL_2/0_Rucina_0_416_0_2_2_2_2

New Line.l(r:p2udm5443-p2ulv22666) Units=km Length=0.0394217 bus1=p2udm5443.1.2 bus2=p2ulv22666.1.2 switch=n enabled=y phases=2 Linecode=1P_OH_AL_4/0_Zuzara_0_416_0_2_2_2_2

New Line.l(r:p2udm5443-p2udt1481lv) Units=km Length=0.0193174 bus1=p2udt1481lv.1.2 bus2=p2udm5443.1.2 switch=n enabled=y phases=2 Linecode=1P_OH_AL_2/0_Rucina_0_416_0_2_2_2_2

New Line.l(r:p2udt1682lv-p2ulv16074) Units=km Length=0.0713916 bus1=p2udt1682lv.1.2 bus2=p2ulv16074.1.2 switch=n enabled=y phases=2 Linecode=1P_OH_AL_4/0_Zuzara_0_416_0_2_2_2_2

New Line.l(r:p2udt1682lv-p2ulv21726) Units=km Length=0.0432161 bus1=p2udt1682lv.1.2 bus2=p2ulv21726.1.2 switch=n enabled=y phases=2 Linecode=1P_OH_AL_4/0_Zuzara_0_416_0_2_2_2_2

New Line.l(r:p2udm6124-p2ulv1895) Units=km Length=0.0830439 bus1=p2udm6124.1.2 bus2=p2ulv1895.1.2 switch=n enabled=y phases=2 Linecode=1P_OH_AL_4/0_Zuzara_0_416_0_2_2_2_2

New Line.l(r:p2udm6124-p2ulv21035) Units=km Length=0.0571445 bus1=p2udm6124.1.2 bus2=p2ulv21035.1.2 switch=n enabled=y phases=2 Linecode=1P_OH_AL_4/0_Zuzara_0_416_0_2_2_2_2

New Line.l(r:p2udm6124-p2udt1682lv) Units=km Length=0.0193117 bus1=p2udt1682lv.1.2 bus2=p2udm6124.1.2 switch=n enabled=y phases=2 Linecode=1P_OH_AL_2/0_Rucina_0_416_0_2_2_2_2

New Line.l(r:p2udt1862lv-p2ulv10021) Units=km Length=0.0116424 bus1=p2udt1862lv.1.2 bus2=p2ulv10021.1.2 switch=n enabled=y phases=2 Linecode=1P_UG_AL_4/0_Sweetbriar_0_416_0_2_2_2_2

New Line.l(r:p2udm6768-p2ulv2115) Units=km Length=0.0114766 bus1=p2udm6768.1.2 bus2=p2ulv2115.1.2 switch=n enabled=y phases=2 Linecode=1P_UG_AL_1/0_Brenau_0_416_0_2_2_2_2

New Line.l(r:p2udm6768-p2udt1862lv) Units=km Length=0.00983371 bus1=p2udt1862lv.1.2 bus2=p2udm6768.1.2 switch=n enabled=y phases=2 Linecode=1P_UG_AL_1/0_Brenau_0_416_0_2_2_2_2

New Line.l(r:p2udt1863lv-p2ulv20169) Units=km Length=0.005806730000000001 bus1=p2udt1863lv.1.2 bus2=p2ulv20169.1.2 switch=n enabled=y phases=2 Linecode=1P_UG_AL_1/0_Brenau_0_416_0_2_2_2_2

New Line.l(r:p2udm6770-p2ulv2117) Units=km Length=0.0143518 bus1=p2udm6770.1.2 bus2=p2ulv2117.1.2 switch=n enabled=y phases=2 Linecode=1P_UG_AL_1/0_Brenau_0_416_0_2_2_2_2

New Line.l(r:p2udm6772-p2ulv6739) Units=km Length=0.00496118 bus1=p2udm6772.1.2 bus2=p2ulv6739.1.2 switch=n enabled=y phases=2 Linecode=1P_UG_AL_1/0_Brenau_0_416_0_2_2_2_2

New Line.l(r:p2udm6770-p2udm6772) Units=km Length=0.00975531 bus1=p2udm6770.1.2 bus2=p2udm6772.1.2 switch=n enabled=y phases=2 Linecode=1P_UG_AL_1/0_Brenau_0_416_0_2_2_2_2

New Line.l(r:p2udm6770-p2udt1863lv) Units=km Length=0.00975531 bus1=p2udt1863lv.1.2 bus2=p2udm6770.1.2 switch=n enabled=y phases=2 Linecode=1P_UG_AL_1/0_Brenau_0_416_0_2_2_2_2

New Line.l(r:p2udm6773-p2ulv13115) Units=km Length=0.008287470000000002 bus1=p2udm6773.1.2 bus2=p2ulv13115.1.2 switch=n enabled=y phases=2 Linecode=1P_UG_AL_1/0_Brenau_0_416_0_2_2_2_2

New Line.l(r:p2udm6771-p2ulv2118) Units=km Length=0.00812294 bus1=p2udm6771.1.2 bus2=p2ulv2118.1.2 switch=n enabled=y phases=2 Linecode=1P_UG_AL_1/0_Brenau_0_416_0_2_2_2_2

New Line.l(r:p2udm6771-p2udm6773) Units=km Length=0.00976217 bus1=p2udm6773.1.2 bus2=p2udm6771.1.2 switch=n enabled=y phases=2 Linecode=1P_UG_AL_1/0_Brenau_0_416_0_2_2_2_2

New Line.l(r:p2udm6773-p2udt1863lv) Units=km Length=0.00976259 bus1=p2udt1863lv.1.2 bus2=p2udm6773.1.2 switch=n enabled=y phases=2 Linecode=1P_UG_AL_2/0_Converse_0_416_0_2_2_2_2

New Line.l(r:p2udt2422lv-p2ulv2889) Units=km Length=0.0946451 bus1=p2udt2422lv.1.2 bus2=p2ulv2889.1.2 switch=n enabled=y phases=2 Linecode=1P_OH_AL_4/0_Zuzara_0_416_0_2_2_2_2

New Line.l(r:p2udm8650-p2ulv13117) Units=km Length=0.0800054 bus1=p2udm8650.1.2 bus2=p2ulv13117.1.2 switch=n enabled=y phases=2 Linecode=1P_OH_AL_4/0_Zuzara_0_416_0_2_2_2_2

New Line.l(r:p2udm8650-p2udt2422lv) Units=km Length=0.0164077 bus1=p2udt2422lv.1.2 bus2=p2udm8650.1.2 switch=n enabled=y phases=2 Linecode=1P_OH_AL_2/0_Rucina_0_416_0_2_2_2_2

New Line.l(r:p2udt2586lv-p2ulv16543) Units=km Length=0.00843665 bus1=p2udt2586lv.1.2 bus2=p2ulv16543.1.2 switch=n enabled=y phases=2 Linecode=1P_OH_AL_2/0_Rucina_0_416_0_2_2_2_2

New Line.l(r:p2udm9181-p2ulv3128) Units=km Length=0.020537 bus1=p2udm9181.1.2 bus2=p2ulv3128.1.2 switch=n enabled=y phases=2 Linecode=1P_OH_AL_2/0_Rucina_0_416_0_2_2_2_2

New Line.l(r:p2udm9181-p2udt2586lv) Units=km Length=0.05680430000000001 bus1=p2udt2586lv.1.2 bus2=p2udm9181.1.2 switch=n enabled=y phases=2 Linecode=1P_OH_AL_4/0_Zuzara_0_416_0_2_2_2_2

New Line.l(r:p2udm9184-p2ulv3130) Units=km Length=0.0218526 bus1=p2udm9184.1.2 bus2=p2ulv3130.1.2 switch=n enabled=y phases=2 Linecode=1P_OH_AL_2/0_Rucina_0_416_0_2_2_2_2

New Line.l(r:p2udm9184-p2udt2588lv) Units=km Length=0.0182703 bus1=p2udt2588lv.1.2 bus2=p2udm9184.1.2 switch=n enabled=y phases=2 Linecode=1P_OH_AL_2/0_Rucina_0_416_0_2_2_2_2

New Line.l(r:p2udm9185-p2ulv7460) Units=km Length=0.0172739 bus1=p2udm9185.1.2 bus2=p2ulv7460.1.2 switch=n enabled=y phases=2 Linecode=1P_OH_AL_2/0_Rucina_0_416_0_2_2_2_2

New Line.l(r:p2udm9185-p2udt2588lv) Units=km Length=0.037363 bus1=p2udt2588lv.1.2 bus2=p2udm9185.1.2 switch=n enabled=y phases=2 Linecode=1P_OH_AL_4/0_Zuzara_0_416_0_2_2_2_2

New Line.l(r:p2udt2589lv-p2ulv18782) Units=km Length=0.032573200000000004 bus1=p2udt2589lv.1.2 bus2=p2ulv18782.1.2 switch=n enabled=y phases=2 Linecode=1P_UG_AL_1/0_Brenau_0_416_0_2_2_2_2

New Line.l(r:p2udm9186-p2ulv3131) Units=km Length=0.016099000000000002 bus1=p2udm9186.1.2 bus2=p2ulv3131.1.2 switch=n enabled=y phases=2 Linecode=1P_UG_AL_1/0_Brenau_0_416_0_2_2_2_2

New Line.l(r:p2udm9186-p2ulv21729) Units=km Length=0.0121449 bus1=p2udm9186.1.2 bus2=p2ulv21729.1.2 switch=n enabled=y phases=2 Linecode=1P_UG_AL_1/0_Brenau_0_416_0_2_2_2_2

New Line.l(r:p2udm9186-p2udt2589lv) Units=km Length=0.00999277 bus1=p2udt2589lv.1.2 bus2=p2udm9186.1.2 switch=n enabled=y phases=2 Linecode=1P_UG_AL_2/0_Converse_0_416_0_2_2_2_2

New Line.l(r:p2udm9187-p2ulv16079) Units=km Length=0.017526 bus1=p2udm9187.1.2 bus2=p2ulv16079.1.2 switch=n enabled=y phases=2 Linecode=1P_UG_AL_1/0_Brenau_0_416_0_2_2_2_2

New Line.l(r:p2udm9187-p2udt2589lv) Units=km Length=0.00999277 bus1=p2udt2589lv.1.2 bus2=p2udm9187.1.2 switch=n enabled=y phases=2 Linecode=1P_UG_AL_1/0_Brenau_0_416_0_2_2_2_2

New Line.l(r:p2udt2840lv-p2ulv12335) Units=km Length=0.0161209 bus1=p2udt2840lv.1.2 bus2=p2ulv12335.1.2 switch=n enabled=y phases=2 Linecode=1P_UG_AL_4/0_Sweetbriar_0_416_0_2_2_2_2

New Line.l(r:p2udt2840lv-p2ulv13061) Units=km Length=0.0144546 bus1=p2udt2840lv.1.2 bus2=p2ulv13061.1.2 switch=n enabled=y phases=2 Linecode=1P_UG_AL_1/0_Brenau_0_416_0_2_2_2_2

New Line.l(r:p2udm10033-p2ulv3527) Units=km Length=0.0139868 bus1=p2udm10033.1.2 bus2=p2ulv3527.1.2 switch=n enabled=y phases=2 Linecode=1P_UG_AL_1/0_Brenau_0_416_0_2_2_2_2

New Line.l(r:p2udm10033-p2udt2840lv) Units=km Length=0.00996821 bus1=p2udt2840lv.1.2 bus2=p2udm10033.1.2 switch=n enabled=y phases=2 Linecode=1P_UG_AL_1/0_Brenau_0_416_0_2_2_2_2

New Line.l(r:p2udm11031-p2ulv4014) Units=km Length=0.013486 bus1=p2udm11031.1.2 bus2=p2ulv4014.1.2 switch=n enabled=y phases=2 Linecode=1P_UG_AL_1/0_Brenau_0_416_0_2_2_2_2

New Line.l(r:p2udm11031-p2udt3146lv) Units=km Length=0.007082130000000001 bus1=p2udt3146lv.1.2 bus2=p2udm11031.1.2 switch=n enabled=y phases=2 Linecode=1P_UG_AL_1/0_Brenau_0_416_0_2_2_2_2

New Line.l(r:p2udm11032-p2ulv7165) Units=km Length=0.0147806 bus1=p2udm11032.1.2 bus2=p2ulv7165.1.2 switch=n enabled=y phases=2 Linecode=1P_UG_AL_1/0_Brenau_0_416_0_2_2_2_2

New Line.l(r:p2udm11032-p2udt3146lv) Units=km Length=0.0137181 bus1=p2udt3146lv.1.2 bus2=p2udm11032.1.2 switch=n enabled=y phases=2 Linecode=1P_UG_AL_1/0_Brenau_0_416_0_2_2_2_2

New Line.l(r:p2udt3185lv-p2ulv4083) Units=km Length=0.0196492 bus1=p2udt3185lv.1.2 bus2=p2ulv4083.1.2 switch=n enabled=y phases=2 Linecode=1P_OH_AL_2/0_Rucina_0_416_0_2_2_2_2

New Line.l(r:p2udt3478lv-p2ulv20170) Units=km Length=0.00634962 bus1=p2udt3478lv.1.2 bus2=p2ulv20170.1.2 switch=n enabled=y phases=2 Linecode=1P_UG_AL_1/0_Brenau_0_416_0_2_2_2_2

New Line.l(r:p2udm12071-p2ulv18783) Units=km Length=0.00583123 bus1=p2udm12071.1.2 bus2=p2ulv18783.1.2 switch=n enabled=y phases=2 Linecode=1P_UG_AL_1/0_Brenau_0_416_0_2_2_2_2

New Line.l(r:p2udm12070-p2ulv4573) Units=km Length=0.0065759 bus1=p2udm12070.1.2 bus2=p2ulv4573.1.2 switch=n enabled=y phases=2 Linecode=1P_UG_AL_1/0_Brenau_0_416_0_2_2_2_2

New Line.l(r:p2udm12070-p2udm12071) Units=km Length=0.0195179 bus1=p2udm12071.1.2 bus2=p2udm12070.1.2 switch=n enabled=y phases=2 Linecode=1P_UG_AL_1/0_Brenau_0_416_0_2_2_2_2

New Line.l(r:p2udm12071-p2udt3478lv) Units=km Length=0.00976217 bus1=p2udt3478lv.1.2 bus2=p2udm12071.1.2 switch=n enabled=y phases=2 Linecode=1P_UG_AL_2/0_Converse_0_416_0_2_2_2_2

New Line.l(r:p2udm12073-p2ulv22194) Units=km Length=0.00906789 bus1=p2udm12073.1.2 bus2=p2ulv22194.1.2 switch=n enabled=y phases=2 Linecode=1P_UG_AL_1/0_Brenau_0_416_0_2_2_2_2

New Line.l(r:p2udm12074-p2ulv22195) Units=km Length=0.00997277 bus1=p2udm12074.1.2 bus2=p2ulv22195.1.2 switch=n enabled=y phases=2 Linecode=1P_UG_AL_1/0_Brenau_0_416_0_2_2_2_2

New Line.l(r:p2udm12073-p2udm12074) Units=km Length=0.0195248 bus1=p2udm12073.1.2 bus2=p2udm12074.1.2 switch=n enabled=y phases=2 Linecode=1P_UG_AL_1/0_Brenau_0_416_0_2_2_2_2

New Line.l(r:p2udm12073-p2udt3478lv) Units=km Length=0.0195179 bus1=p2udt3478lv.1.2 bus2=p2udm12073.1.2 switch=n enabled=y phases=2 Linecode=1P_UG_AL_2/0_Converse_0_416_0_2_2_2_2

New Line.l(r:p2udt3618lv-p2ulv4822) Units=km Length=0.0157708 bus1=p2udt3618lv.1.2 bus2=p2ulv4822.1.2 switch=n enabled=y phases=2 Linecode=1P_UG_AL_1/0_Brenau_0_416_0_2_2_2_2

New Line.l(r:p2udt3618lv-p2ulv7965) Units=km Length=0.0110315 bus1=p2udt3618lv.1.2 bus2=p2ulv7965.1.2 switch=n enabled=y phases=2 Linecode=1P_UG_AL_1/0_Brenau_0_416_0_2_2_2_2

New Line.l(r:p2udm12493-p2ulv9779) Units=km Length=0.0182381 bus1=p2udm12493.1.2 bus2=p2ulv9779.1.2 switch=n enabled=y phases=2 Linecode=1P_UG_AL_1/0_Brenau_0_416_0_2_2_2_2

New Line.l(r:p2udm12493-p2udt3618lv) Units=km Length=0.0392783 bus1=p2udt3618lv.1.2 bus2=p2udm12493.1.2 switch=n enabled=y phases=2 Linecode=1P_UG_AL_1/0_Brenau_0_416_0_2_2_2_2

New Line.l(r:p2udm12494-p2ulv19950) Units=km Length=0.0105287 bus1=p2udm12494.1.2 bus2=p2ulv19950.1.2 switch=n enabled=y phases=2 Linecode=1P_UG_AL_1/0_Brenau_0_416_0_2_2_2_2

New Line.l(r:p2udm12494-p2udt3618lv) Units=km Length=0.019642500000000004 bus1=p2udt3618lv.1.2 bus2=p2udm12494.1.2 switch=n enabled=y phases=2 Linecode=1P_UG_AL_1/0_Brenau_0_416_0_2_2_2_2

New Line.l(r:p2udm13235-p2ulv5283) Units=km Length=0.0101178 bus1=p2udm13235.1.2 bus2=p2ulv5283.1.2 switch=n enabled=y phases=2 Linecode=1P_UG_AL_1/0_Brenau_0_416_0_2_2_2_2

New Line.l(r:p2udm13235-p2udt3881lv) Units=km Length=0.00999277 bus1=p2udt3881lv.1.2 bus2=p2udm13235.1.2 switch=n enabled=y phases=2 Linecode=1P_UG_AL_1/0_Brenau_0_416_0_2_2_2_2

New Line.l(r:p2udm13236-p2ulv19507) Units=km Length=0.0138977 bus1=p2udm13236.1.2 bus2=p2ulv19507.1.2 switch=n enabled=y phases=2 Linecode=1P_UG_AL_1/0_Brenau_0_416_0_2_2_2_2

New Line.l(r:p2udm13236-p2udt3881lv) Units=km Length=0.0199923 bus1=p2udt3881lv.1.2 bus2=p2udm13236.1.2 switch=n enabled=y phases=2 Linecode=1P_UG_AL_1/0_Brenau_0_416_0_2_2_2_2

New Line.l(r:p2udt3980lv-p2ulv5468) Units=km Length=0.0115033 bus1=p2udt3980lv.1.2 bus2=p2ulv5468.1.2 switch=n enabled=y phases=2 Linecode=1P_UG_AL_1/0_Brenau_0_416_0_2_2_2_2

New Line.l(r:p2udt3980lv-p2ulv6200) Units=km Length=0.016837800000000003 bus1=p2udt3980lv.1.2 bus2=p2ulv6200.1.2 switch=n enabled=y phases=2 Linecode=1P_UG_AL_1/0_Brenau_0_416_0_2_2_2_2

New Line.l(r:p2udt4541lv-p2ulv23121) Units=km Length=0.007287740000000001 bus1=p2udt4541lv.1.2 bus2=p2ulv23121.1.2 switch=n enabled=y phases=2 Linecode=1P_UG_AL_1/0_Brenau_0_416_0_2_2_2_2

New Line.l(r:p2udm15119-p2ulv6508) Units=km Length=0.0257381 bus1=p2udm15119.1.2 bus2=p2ulv6508.1.2 switch=n enabled=y phases=2 Linecode=1P_UG_AL_4/0_Sweetbriar_0_416_0_2_2_2_2

New Line.l(r:p2udm15119-p2udt4541lv) Units=km Length=0.00754881 bus1=p2udt4541lv.1.2 bus2=p2udm15119.1.2 switch=n enabled=y phases=2 Linecode=1P_UG_AL_4/0_Sweetbriar_0_416_0_2_2_2_2

New Line.l(r:p2udm15120-p2ulv16788) Units=km Length=0.0131917 bus1=p2udm15120.1.2 bus2=p2ulv16788.1.2 switch=n enabled=y phases=2 Linecode=1P_UG_AL_1/0_Brenau_0_416_0_2_2_2_2

New Line.l(r:p2udm15120-p2udt4541lv) Units=km Length=0.015097600000000001 bus1=p2udt4541lv.1.2 bus2=p2udm15120.1.2 switch=n enabled=y phases=2 Linecode=1P_UG_AL_1/0_Brenau_0_416_0_2_2_2_2

New Line.l(r:p2udt4627lv-p2ulv7405) Units=km Length=0.0148804 bus1=p2udt4627lv.1.2 bus2=p2ulv7405.1.2 switch=n enabled=y phases=2 Linecode=1P_UG_AL_1/0_Brenau_0_416_0_2_2_2_2

New Line.l(r:p2udm15345-p2ulv6683) Units=km Length=0.0156301 bus1=p2udm15345.1.2 bus2=p2ulv6683.1.2 switch=n enabled=y phases=2 Linecode=1P_UG_AL_1/0_Brenau_0_416_0_2_2_2_2

New Line.l(r:p2udm15345-p2udt4627lv) Units=km Length=0.00889306 bus1=p2udt4627lv.1.2 bus2=p2udm15345.1.2 switch=n enabled=y phases=2 Linecode=1P_UG_AL_1/0_Brenau_0_416_0_2_2_2_2

New Line.l(r:p2udm15347-p2ulv8374) Units=km Length=0.0118348 bus1=p2udm15347.1.2 bus2=p2ulv8374.1.2 switch=n enabled=y phases=2 Linecode=1P_UG_AL_1/0_Brenau_0_416_0_2_2_2_2

New Line.l(r:p2udm15347-p2udt4627lv) Units=km Length=0.008892610000000002 bus1=p2udt4627lv.1.2 bus2=p2udm15347.1.2 switch=n enabled=y phases=2 Linecode=1P_UG_AL_1/0_Brenau_0_416_0_2_2_2_2

New Line.l(r:p2udm15597-p2ulv6904) Units=km Length=0.0324561 bus1=p2udm15597.1.2 bus2=p2ulv6904.1.2 switch=n enabled=y phases=2 Linecode=1P_OH_AL_4/0_Zuzara_0_416_0_2_2_2_2

New Line.l(r:p2udm15597-p2udt4723lv) Units=km Length=0.0194783 bus1=p2udt4723lv.1.2 bus2=p2udm15597.1.2 switch=n enabled=y phases=2 Linecode=1P_OH_AL_2/0_Rucina_0_416_0_2_2_2_2

New Line.l(r:p2udm15598-p2ulv14031) Units=km Length=0.0262486 bus1=p2udm15598.1.2 bus2=p2ulv14031.1.2 switch=n enabled=y phases=2 Linecode=1P_OH_AL_2/0_Rucina_0_416_0_2_2_2_2

New Line.l(r:p2udm15598-p2udt4723lv) Units=km Length=0.01947 bus1=p2udt4723lv.1.2 bus2=p2udm15598.1.2 switch=n enabled=y phases=2 Linecode=1P_OH_AL_2/0_Rucina_0_416_0_2_2_2_2

New Line.l(r:p2udt4724lv-p2ulv6905) Units=km Length=0.0152295 bus1=p2udt4724lv.1.2 bus2=p2ulv6905.1.2 switch=n enabled=y phases=2 Linecode=1P_UG_AL_1/0_Brenau_0_416_0_2_2_2_2

New Line.l(r:p2udt4724lv-p2ulv18081) Units=km Length=0.0151489 bus1=p2udt4724lv.1.2 bus2=p2ulv18081.1.2 switch=n enabled=y phases=2 Linecode=1P_UG_AL_1/0_Brenau_0_416_0_2_2_2_2

New Line.l(r:p2udm15600-p2ulv14642) Units=km Length=0.0150475 bus1=p2udm15600.1.2 bus2=p2ulv14642.1.2 switch=n enabled=y phases=2 Linecode=1P_UG_AL_1/0_Brenau_0_416_0_2_2_2_2

New Line.l(r:p2udm15600-p2udt4724lv) Units=km Length=0.00970062 bus1=p2udt4724lv.1.2 bus2=p2udm15600.1.2 switch=n enabled=y phases=2 Linecode=1P_UG_AL_1/0_Brenau_0_416_0_2_2_2_2

New Line.l(r:p2udm15602-p2ulv18730) Units=km Length=0.015609100000000002 bus1=p2udm15602.1.2 bus2=p2ulv18730.1.2 switch=n enabled=y phases=2 Linecode=1P_UG_AL_1/0_Brenau_0_416_0_2_2_2_2

New Line.l(r:p2udm15602-p2udt4724lv) Units=km Length=0.00970062 bus1=p2udt4724lv.1.2 bus2=p2udm15602.1.2 switch=n enabled=y phases=2 Linecode=1P_UG_AL_1/0_Brenau_0_416_0_2_2_2_2

New Line.l(r:p2udt4863lv-p2ulv7234) Units=km Length=0.0320247 bus1=p2udt4863lv.1.2 bus2=p2ulv7234.1.2 switch=n enabled=y phases=2 Linecode=1P_UG_AL_1/0_Brenau_0_416_0_2_2_2_2

New Line.l(r:p2udt4863lv-p2ulv16081) Units=km Length=0.0123215 bus1=p2udt4863lv.1.2 bus2=p2ulv16081.1.2 switch=n enabled=y phases=2 Linecode=1P_UG_AL_1/0_Brenau_0_416_0_2_2_2_2

New Line.l(r:p2udm15943-p2ulv24198) Units=km Length=0.00993228 bus1=p2udm15943.1.2 bus2=p2ulv24198.1.2 switch=n enabled=y phases=2 Linecode=1P_UG_AL_1/0_Brenau_0_416_0_2_2_2_2

New Line.l(r:p2udm15943-p2udt4863lv) Units=km Length=0.00908646 bus1=p2udt4863lv.1.2 bus2=p2udm15943.1.2 switch=n enabled=y phases=2 Linecode=1P_UG_AL_1/0_Brenau_0_416_0_2_2_2_2

New Line.l(r:p2udt4934lv-p2ulv7406) Units=km Length=0.0154238 bus1=p2udt4934lv.1.2 bus2=p2ulv7406.1.2 switch=n enabled=y phases=2 Linecode=1P_UG_AL_1/0_Brenau_0_416_0_2_2_2_2

New Line.l(r:p2udm16121-p2ulv15339) Units=km Length=0.0152541 bus1=p2udm16121.1.2 bus2=p2ulv15339.1.2 switch=n enabled=y phases=2 Linecode=1P_UG_AL_1/0_Brenau_0_416_0_2_2_2_2

New Line.l(r:p2udm16121-p2udt4934lv) Units=km Length=0.00996821 bus1=p2udt4934lv.1.2 bus2=p2udm16121.1.2 switch=n enabled=y phases=2 Linecode=1P_UG_AL_1/0_Brenau_0_416_0_2_2_2_2

New Line.l(r:p2udt4955lv-p2ulv14027) Units=km Length=0.0221385 bus1=p2udt4955lv.1.2 bus2=p2ulv14027.1.2 switch=n enabled=y phases=2 Linecode=1P_UG_AL_1/0_Brenau_0_416_0_2_2_2_2

New Line.l(r:p2udt4955lv-p2ulv19022) Units=km Length=0.00922395 bus1=p2udt4955lv.1.2 bus2=p2ulv19022.1.2 switch=n enabled=y phases=2 Linecode=1P_UG_AL_1/0_Brenau_0_416_0_2_2_2_2

New Line.l(r:p2udt4955lv-p2ulv23323) Units=km Length=0.0299324 bus1=p2udt4955lv.1.2 bus2=p2ulv23323.1.2 switch=n enabled=y phases=2 Linecode=1P_UG_AL_1/0_Brenau_0_416_0_2_2_2_2

New Line.l(r:p2udm16186-p2ulv7463) Units=km Length=0.00825126 bus1=p2udm16186.1.2 bus2=p2ulv7463.1.2 switch=n enabled=y phases=2 Linecode=1P_UG_AL_1/0_Brenau_0_416_0_2_2_2_2

New Line.l(r:p2udm16186-p2udt4955lv) Units=km Length=0.0441469 bus1=p2udt4955lv.1.2 bus2=p2udm16186.1.2 switch=n enabled=y phases=2 Linecode=1P_UG_AL_1/0_Brenau_0_416_0_2_2_2_2

New Line.l(r:p2udt5058lv-p2ulv7712) Units=km Length=0.0255825 bus1=p2udt5058lv.1.2 bus2=p2ulv7712.1.2 switch=n enabled=y phases=2 Linecode=1P_UG_AL_4/0_Sweetbriar_0_416_0_2_2_2_2

New Line.l(r:p2udt5059lv-p2ulv7713) Units=km Length=0.0276537 bus1=p2udt5059lv.1.2 bus2=p2ulv7713.1.2 switch=n enabled=y phases=2 Linecode=1P_UG_AL_1/0_Brenau_0_416_0_2_2_2_2

New Line.l(r:p2udm17212-p2ulv8423) Units=km Length=0.028904200000000005 bus1=p2udm17212.1.2 bus2=p2ulv8423.1.2 switch=n enabled=y phases=2 Linecode=1P_OH_AL_4/0_Zuzara_0_416_0_2_2_2_2

New Line.l(r:p2udm17212-p2udt5355lv) Units=km Length=0.0199696 bus1=p2udt5355lv.1.2 bus2=p2udm17212.1.2 switch=n enabled=y phases=2 Linecode=1P_OH_AL_2/0_Rucina_0_416_0_2_2_2_2

New Line.l(r:p2udm17213-p2ulv16787) Units=km Length=0.0287164 bus1=p2udm17213.1.2 bus2=p2ulv16787.1.2 switch=n enabled=y phases=2 Linecode=1P_OH_AL_4/0_Zuzara_0_416_0_2_2_2_2

New Line.l(r:p2udm17213-p2udt5355lv) Units=km Length=0.0199642 bus1=p2udt5355lv.1.2 bus2=p2udm17213.1.2 switch=n enabled=y phases=2 Linecode=1P_OH_AL_2/0_Rucina_0_416_0_2_2_2_2

New Line.l(r:p2udt5605lv-p2ulv9088) Units=km Length=0.0705614 bus1=p2udt5605lv.1.2 bus2=p2ulv9088.1.2 switch=n enabled=y phases=2 Linecode=1P_OH_AL_4/0_Zuzara_0_416_0_2_2_2_2

New Line.l(r:p2udt5670lv-p2ulv9276) Units=km Length=0.0156291 bus1=p2udt5670lv.1.2 bus2=p2ulv9276.1.2 switch=n enabled=y phases=2 Linecode=1P_UG_AL_1/0_Brenau_0_416_0_2_2_2_2

New Line.l(r:p2udt5670lv-p2ulv22135) Units=km Length=0.0145792 bus1=p2udt5670lv.1.2 bus2=p2ulv22135.1.2 switch=n enabled=y phases=2 Linecode=1P_UG_AL_1/0_Brenau_0_416_0_2_2_2_2

New Line.l(r:p2udm18011-p2ulv22825) Units=km Length=0.013975 bus1=p2udm18011.1.2 bus2=p2ulv22825.1.2 switch=n enabled=y phases=2 Linecode=1P_UG_AL_1/0_Brenau_0_416_0_2_2_2_2

New Line.l(r:p2udm18011-p2ulv22826) Units=km Length=0.0152223 bus1=p2udm18011.1.2 bus2=p2ulv22826.1.2 switch=n enabled=y phases=2 Linecode=1P_UG_AL_1/0_Brenau_0_416_0_2_2_2_2

New Line.l(r:p2udm18011-p2udt5670lv) Units=km Length=0.00996821 bus1=p2udt5670lv.1.2 bus2=p2udm18011.1.2 switch=n enabled=y phases=2 Linecode=1P_UG_AL_4/0_Sweetbriar_0_416_0_2_2_2_2

New Line.l(r:p2udt5832lv-p2ulv9715) Units=km Length=0.0142179 bus1=p2udt5832lv.1.2 bus2=p2ulv9715.1.2 switch=n enabled=y phases=2 Linecode=1P_UG_AL_1/0_Brenau_0_416_0_2_2_2_2

New Line.l(r:p2udt5832lv-p2ulv11880) Units=km Length=0.0122315 bus1=p2udt5832lv.1.2 bus2=p2ulv11880.1.2 switch=n enabled=y phases=2 Linecode=1P_UG_AL_1/0_Brenau_0_416_0_2_2_2_2

New Line.l(r:p2udm18384-p2ulv15790) Units=km Length=0.0142729 bus1=p2udm18384.1.2 bus2=p2ulv15790.1.2 switch=n enabled=y phases=2 Linecode=1P_UG_AL_1/0_Brenau_0_416_0_2_2_2_2

New Line.l(r:p2udm18384-p2udt5832lv) Units=km Length=0.00761615 bus1=p2udt5832lv.1.2 bus2=p2udm18384.1.2 switch=n enabled=y phases=2 Linecode=1P_UG_AL_1/0_Brenau_0_416_0_2_2_2_2

New Line.l(r:p2udt5855lv-p2ulv9778) Units=km Length=0.0187177 bus1=p2udt5855lv.1.2 bus2=p2ulv9778.1.2 switch=n enabled=y phases=2 Linecode=1P_OH_AL_2/0_Rucina_0_416_0_2_2_2_2

New Line.l(r:p2udt6281lv-p2ulv10986) Units=km Length=0.030552200000000005 bus1=p2udt6281lv.1.2 bus2=p2ulv10986.1.2 switch=n enabled=y phases=2 Linecode=1P_OH_AL_4/0_Zuzara_0_416_0_2_2_2_2

New Line.l(r:p2udt6347lv-p2ulv11219) Units=km Length=0.0578977 bus1=p2udt6347lv.1.2 bus2=p2ulv11219.1.2 switch=n enabled=y phases=2 Linecode=1P_OH_AL_4/0_Zuzara_0_416_0_2_2_2_2

New Line.l(r:p2udt6347lv-p2ulv13820) Units=km Length=0.0117513 bus1=p2udt6347lv.1.2 bus2=p2ulv13820.1.2 switch=n enabled=y phases=2 Linecode=1P_OH_AL_2/0_Rucina_0_416_0_2_2_2_2

New Line.l(r:p2udt6347lv-p2ulv19020) Units=km Length=0.0347758 bus1=p2udt6347lv.1.2 bus2=p2ulv19020.1.2 switch=n enabled=y phases=2 Linecode=1P_OH_AL_4/0_Zuzara_0_416_0_2_2_2_2

New Line.l(r:p2udm20181-p2ulv12393) Units=km Length=0.05356120000000001 bus1=p2udm20181.1.2 bus2=p2ulv12393.1.2 switch=n enabled=y phases=2 Linecode=1P_OH_AL_4/0_Zuzara_0_416_0_2_2_2_2

New Line.l(r:p2udm20181-p2ulv15388) Units=km Length=0.0125868 bus1=p2udm20181.1.2 bus2=p2ulv15388.1.2 switch=n enabled=y phases=2 Linecode=1P_OH_AL_2/0_Rucina_0_416_0_2_2_2_2

New Line.l(r:p2udm20181-p2udt6676lv) Units=km Length=0.0145924 bus1=p2udt6676lv.1.2 bus2=p2udm20181.1.2 switch=n enabled=y phases=2 Linecode=1P_OH_AL_2/0_Rucina_0_416_0_2_2_2_2

New Line.l(r:p2udm20185-p2ulv23119) Units=km Length=0.00721591 bus1=p2udm20185.1.2 bus2=p2ulv23119.1.2 switch=n enabled=y phases=2 Linecode=1P_OH_AL_2/0_Rucina_0_416_0_2_2_2_2

New Line.l(r:p2udm20183-p2ulv20402) Units=km Length=0.00834693 bus1=p2udm20183.1.2 bus2=p2ulv20402.1.2 switch=n enabled=y phases=2 Linecode=1P_OH_AL_2/0_Rucina_0_416_0_2_2_2_2

New Line.l(r:p2udm20183-p2udm20185) Units=km Length=0.0110691 bus1=p2udm20185.1.2 bus2=p2udm20183.1.2 switch=n enabled=y phases=2 Linecode=1P_OH_AL_2/0_Rucina_0_416_0_2_2_2_2

New Line.l(r:p2udm20184-p2ulv20615) Units=km Length=0.0100466 bus1=p2udm20184.1.2 bus2=p2ulv20615.1.2 switch=n enabled=y phases=2 Linecode=1P_OH_AL_2/0_Rucina_0_416_0_2_2_2_2

New Line.l(r:p2udm20184-p2udm20185) Units=km Length=0.014997200000000002 bus1=p2udm20185.1.2 bus2=p2udm20184.1.2 switch=n enabled=y phases=2 Linecode=1P_OH_AL_2/0_Rucina_0_416_0_2_2_2_2

New Line.l(r:p2udm20185-p2udt6676lv) Units=km Length=0.014605500000000002 bus1=p2udt6676lv.1.2 bus2=p2udm20185.1.2 switch=n enabled=y phases=2 Linecode=1P_OH_AL_2/0_Rucina_0_416_0_2_0_2_2_2

New Line.l(r:p2udt6808lv-p2ulv12888) Units=km Length=0.0452211 bus1=p2udt6808lv.1.2 bus2=p2ulv12888.1.2 switch=n enabled=y phases=2 Linecode=1P_OH_AL_4/0_Zuzara_0_416_0_2_2_2_2

New Line.l(r:p2udt6854lv-p2ulv22613) Units=km Length=0.014887300000000001 bus1=p2udt6854lv.1.2 bus2=p2ulv22613.1.2 switch=n enabled=y phases=2 Linecode=1P_UG_AL_1/0_Brenau_0_416_0_2_2_2_2

New Line.l(r:p2udm20534-p2ulv13062) Units=km Length=0.0163882 bus1=p2udm20534.1.2 bus2=p2ulv13062.1.2 switch=n enabled=y phases=2 Linecode=1P_UG_AL_1/0_Brenau_0_416_0_2_2_2_2

New Line.l(r:p2udm20534-p2udt6854lv) Units=km Length=0.00996821 bus1=p2udt6854lv.1.2 bus2=p2udm20534.1.2 switch=n enabled=y phases=2 Linecode=1P_UG_AL_1/0_Brenau_0_416_0_2_2_2_2

New Line.l(r:p2udm20535-p2ulv15102) Units=km Length=0.0146052 bus1=p2udm20535.1.2 bus2=p2ulv15102.1.2 switch=n enabled=y phases=2 Linecode=1P_UG_AL_1/0_Brenau_0_416_0_2_2_2_2

New Line.l(r:p2udm20535-p2ulv18526) Units=km Length=0.0163777 bus1=p2udm20535.1.2 bus2=p2ulv18526.1.2 switch=n enabled=y phases=2 Linecode=1P_UG_AL_1/0_Brenau_0_416_0_2_2_2_2

New Line.l(r:p2udm20535-p2udt6854lv) Units=km Length=0.00996138 bus1=p2udt6854lv.1.2 bus2=p2udm20535.1.2 switch=n enabled=y phases=2 Linecode=1P_UG_AL_4/0_Sweetbriar_0_416_0_2_2_2_2

New Line.l(r:p2udt6871lv-p2ulv13113) Units=km Length=0.0415973 bus1=p2udt6871lv.1.2 bus2=p2ulv13113.1.2 switch=n enabled=y phases=2 Linecode=1P_OH_AL_4/0_Zuzara_0_416_0_2_2_2_2

New Line.l(r:p2udt6937lv-p2ulv13362) Units=km Length=0.0393931 bus1=p2udt6937lv.1.2 bus2=p2ulv13362.1.2 switch=n enabled=y phases=2 Linecode=1P_OH_AL_4/0_Zuzara_0_416_0_2_2_2_2

New Line.l(r:p2udm20993-p2ulv14029) Units=km Length=0.0200824 bus1=p2udm20993.1.2 bus2=p2ulv14029.1.2 switch=n enabled=y phases=2 Linecode=1P_UG_AL_1/0_Brenau_0_416_0_2_2_2_2

New Line.l(r:p2udm20993-p2ulv22193) Units=km Length=0.0143194 bus1=p2udm20993.1.2 bus2=p2ulv22193.1.2 switch=n enabled=y phases=2 Linecode=1P_UG_AL_1/0_Brenau_0_416_0_2_2_2_2

New Line.l(r:p2udm20993-p2udt7108lv) Units=km Length=0.00999277 bus1=p2udt7108lv.1.2 bus2=p2udm20993.1.2 switch=n enabled=y phases=2 Linecode=1P_UG_AL_2/0_Converse_0_416_0_2_2_2_2

New Line.l(r:p2udm20994-p2ulv14701) Units=km Length=0.0177772 bus1=p2udm20994.1.2 bus2=p2ulv14701.1.2 switch=n enabled=y phases=2 Linecode=1P_UG_AL_1/0_Brenau_0_416_0_2_2_2_2

New Line.l(r:p2udm20994-p2ulv18370) Units=km Length=0.00846325 bus1=p2udm20994.1.2 bus2=p2ulv18370.1.2 switch=n enabled=y phases=2 Linecode=1P_UG_AL_1/0_Brenau_0_416_0_2_2_2_2

New Line.l(r:p2udm20994-p2udt7108lv) Units=km Length=0.00999277 bus1=p2udt7108lv.1.2 bus2=p2udm20994.1.2 switch=n enabled=y phases=2 Linecode=1P_UG_AL_4/0_Sweetbriar_0_416_0_2_2_2_2

New Line.l(r:p2udt7109lv-p2ulv14030) Units=km Length=0.0110083 bus1=p2udt7109lv.1.2 bus2=p2ulv14030.1.2 switch=n enabled=y phases=2 Linecode=1P_UG_AL_1/0_Brenau_0_416_0_2_2_2_2

New Line.l(r:p2udt7109lv-p2ulv16325) Units=km Length=0.0117026 bus1=p2udt7109lv.1.2 bus2=p2ulv16325.1.2 switch=n enabled=y phases=2 Linecode=1P_UG_AL_1/0_Brenau_0_416_0_2_2_2_2

New Line.l(r:p2udt7160lv-p2ulv14239) Units=km Length=0.00565022 bus1=p2udt7160lv.1.2 bus2=p2ulv14239.1.2 switch=n enabled=y phases=2 Linecode=1P_UG_AL_2/0_Converse_0_416_0_2_2_2_2

New Line.l(r:p2udt7211lv-p2ulv14451) Units=km Length=0.0408333 bus1=p2udt7211lv.1.2 bus2=p2ulv14451.1.2 switch=n enabled=y phases=2 Linecode=1P_OH_AL_4/0_Zuzara_0_416_0_2_2_2_2

New Line.l(r:p2udt7308lv-p2ulv14928) Units=km Length=0.0223793 bus1=p2udt7308lv.1.2 bus2=p2ulv14928.1.2 switch=n enabled=y phases=2 Linecode=1P_OH_AL_2/0_Rucina_0_416_0_2_2_2_2

New Line.l(r:p2udt7364lv-p2ulv15154) Units=km Length=0.0218632 bus1=p2udt7364lv.1.2 bus2=p2ulv15154.1.2 switch=n enabled=y phases=2 Linecode=1P_OH_AL_2/0_Rucina_0_416_0_2_2_2_2

New Line.l(r:p2udt7562lv-p2ulv16076) Units=km Length=0.0111325 bus1=p2udt7562lv.1.2 bus2=p2ulv16076.1.2 switch=n enabled=y phases=2 Linecode=1P_UG_AL_1/0_Brenau_0_416_0_2_2_2_2

New Line.l(r:p2udt7563lv-p2ulv16078) Units=km Length=0.015911 bus1=p2udt7563lv.1.2 bus2=p2ulv16078.1.2 switch=n enabled=y phases=2 Linecode=1P_UG_AL_1/0_Brenau_0_416_0_2_2_2_2

New Line.l(r:p2udm21738-p2ulv16080) Units=km Length=0.0172749 bus1=p2udm21738.1.2 bus2=p2ulv16080.1.2 switch=n enabled=y phases=2 Linecode=1P_UG_AL_1/0_Brenau_0_416_0_2_2_2_2

New Line.l(r:p2udm21738-p2udt7564lv) Units=km Length=0.0399711 bus1=p2udt7564lv.1.2 bus2=p2udm21738.1.2 switch=n enabled=y phases=2 Linecode=1P_UG_AL_1/0_Brenau_0_416_0_2_2_2_2

New Line.l(r:p2udm21739-p2ulv20405) Units=km Length=0.0159121 bus1=p2udm21739.1.2 bus2=p2ulv20405.1.2 switch=n enabled=y phases=2 Linecode=1P_UG_AL_1/0_Brenau_0_416_0_2_2_2_2

New Line.l(r:p2udm21739-p2udt7564lv) Units=km Length=0.0399711 bus1=p2udt7564lv.1.2 bus2=p2udm21739.1.2 switch=n enabled=y phases=2 Linecode=1P_UG_AL_1/0_Brenau_0_416_0_2_2_2_2

New Line.l(r:p2udt7679lv-p2ulv16544) Units=km Length=0.00980876 bus1=p2udt7679lv.1.2 bus2=p2ulv16544.1.2 switch=n enabled=y phases=2 Linecode=1P_OH_AL_2/0_Rucina_0_416_0_2_2_2_2

New Line.l(r:p2udt7680lv-p2ulv16545) Units=km Length=0.0178259 bus1=p2udt7680lv.1.2 bus2=p2ulv16545.1.2 switch=n enabled=y phases=2 Linecode=1P_UG_AL_2/0_Converse_0_416_0_2_2_2_2

New Line.l(r:p2udt7819lv-p2ulv17239) Units=km Length=0.0146408 bus1=p2udt7819lv.1.2 bus2=p2ulv17239.1.2 switch=n enabled=y phases=2 Linecode=1P_UG_AL_1/0_Brenau_0_416_0_2_2_2_2

New Line.l(r:p2udt7894lv-p2ulv24196) Units=km Length=0.0424305 bus1=p2udt7894lv.1.2 bus2=p2ulv24196.1.2 switch=n enabled=y phases=2 Linecode=1P_OH_AL_4/0_Zuzara_0_416_0_2_2_2_2

New Line.l(r:p2udm22254-p2ulv17693) Units=km Length=0.0489289 bus1=p2udm22254.1.2 bus2=p2ulv17693.1.2 switch=n enabled=y phases=2 Linecode=1P_OH_AL_4/0_Zuzara_0_416_0_2_2_2_2

New Line.l(r:p2udm22254-p2udt7894lv) Units=km Length=0.0181517 bus1=p2udt7894lv.1.2 bus2=p2udm22254.1.2 switch=n enabled=y phases=2 Linecode=1P_OH_AL_2/0_Rucina_0_416_0_2_2_2_2

New Line.l(r:p2udt7963lv-p2ulv18079) Units=km Length=0.014624500000000002 bus1=p2udt7963lv.1.2 bus2=p2ulv18079.1.2 switch=n enabled=y phases=2 Linecode=1P_UG_AL_1/0_Brenau_0_416_0_2_2_2_2

New Line.l(r:p2udm22354-p2ulv19207) Units=km Length=0.0151297 bus1=p2udm22354.1.2 bus2=p2ulv19207.1.2 switch=n enabled=y phases=2 Linecode=1P_UG_AL_1/0_Brenau_0_416_0_2_2_2_2

New Line.l(r:p2udm22354-p2udt7963lv) Units=km Length=0.00772231 bus1=p2udt7963lv.1.2 bus2=p2udm22354.1.2 switch=n enabled=y phases=2 Linecode=1P_UG_AL_1/0_Brenau_0_416_0_2_2_2_2

New Line.l(r:p2udt8144lv-p2ulv19021) Units=km Length=0.03647750000000001 bus1=p2udt8144lv.1.2 bus2=p2ulv19021.1.2 switch=n enabled=y phases=2 Linecode=1P_OH_AL_4/0_Zuzara_0_416_0_2_2_2_2

New Line.l(r:p2udt8679lv-p2ulv22197) Units=km Length=0.0277111 bus1=p2udt8679lv.1.2 bus2=p2ulv22197.1.2 switch=n enabled=y phases=2 Linecode=1P_OH_AL_4/0_Zuzara_0_416_0_2_2_2_2

New Line.l(r:p2udt195-p2udt7160) Units=km Length=0.0557231 bus1=p2udt195-p2udt7160x.2 bus2=p2udt195-p2udt7160xx.2 switch=n enabled=y phases=1 Linecode=1P_UG_AL_#2_15_12_47_0_1_1_1_1

New Line.l(r:p2udt195-p2udt7562) Units=km Length=0.009841 bus1=p2udt195-p2udt7562xx.2 bus2=p2udt195-p2udt7562x.2 switch=n enabled=y phases=1 Linecode=1P_UG_AL_#2_15_12_47_0_1_1_1_1

New Line.l(r:p2udt1862-p2udt7562) Units=km Length=0.0393421 bus1=p2udt1862-p2udt7562x.2 bus2=p2udt1862-p2udt7562xx.2 switch=n enabled=y phases=1 Linecode=1P_UG_AL_#2_15_12_47_0_1_1_1_1

New Line.l(r:p2udt1862-p2udt5057) Units=km Length=0.0691425 bus1=p2udt1862-p2udt5057xx.2 bus2=p2udt1862-p2udt5057x.2 switch=n enabled=y phases=1 Linecode=1P_UG_AL_#2_15_12_47_0_1_1_1_1

New Line.l(r:p2udt5670-p2udt6854) Units=km Length=0.0199364 bus1=p2udt5670-p2udt6854x.3 bus2=p2udt5670-p2udt6854xx.3 switch=n enabled=y phases=1 Linecode=1P_UG_AL_#2_15_12_47_0_1_1_1_1

New Line.l(r:p2udt2840-p2udt5670) Units=km Length=0.0299046 bus1=p2udt2840-p2udt5670x.3 bus2=p2udt2840-p2udt5670xx.3 switch=n enabled=y phases=1 Linecode=1P_UG_AL_#2_15_12_47_0_1_1_1_1

New Line.l(r:p2udt2840-p2udt4934) Units=km Length=0.029897800000000002 bus1=p2udt2840-p2udt4934xx.3 bus2=p2udt2840-p2udt4934x.3 switch=n enabled=y phases=1 Linecode=1P_UG_AL_#2_15_12_47_0_1_1_1_1

New Line.l(r:p2udt132-p2udt3980) Units=km Length=0.0376193 bus1=p2udt132-p2udt3980xx.3 bus2=p2udt132-p2udt3980x.3 switch=n enabled=y phases=1 Linecode=1P_UG_AL_#2_15_12_47_0_1_1_1_1

New Line.l(r:p2udt3980-p2udt586) Units=km Length=0.0188026 bus1=p2udt3980-p2udt586xx.3 bus2=p2udt3980-p2udt586x.3 switch=n enabled=y phases=1 Linecode=1P_UG_AL_#2_15_12_47_0_1_1_1_1

New Line.l(r:p2udt4627-p2udt586) Units=km Length=0.0355709 bus1=p2udt4627-p2udt586x.3 bus2=p2udt4627-p2udt586xx.3 switch=n enabled=y phases=1 Linecode=1P_UG_AL_#2_15_12_47_0_1_1_1_1

New Line.l(r:p2udt4627-p2udt4934) Units=km Length=0.0266856 bus1=p2udt4627-p2udt4934xx.3 bus2=p2udt4627-p2udt4934x.3 switch=n enabled=y phases=1 Linecode=1P_UG_AL_#2_15_12_47_0_1_1_1_1

New Line.l(r:p2udt4934-p2udt5832) Units=km Length=0.03482930000000001 bus1=p2udt4934-p2udt5832xx.3 bus2=p2udt4934-p2udt5832x.3 switch=n enabled=y phases=1 Linecode=1P_UG_AL_#2_15_12_47_0_1_1_1_1

New Line.l(r:p2udt5832-p2udt585) Units=km Length=0.0350116 bus1=p2udt5832-p2udt585xx.3 bus2=p2udt5832-p2udt585x.3 switch=n enabled=y phases=1 Linecode=1P_UG_AL_#2_15_12_47_0_1_1_1_1

New Line.l(r:p2udt3146-p2udt585) Units=km Length=0.0282602 bus1=p2udt3146-p2udt585x.3 bus2=p2udt3146-p2udt585xx.3 switch=n enabled=y phases=1 Linecode=1P_UG_AL_#2_15_12_47_0_1_1_1_1

New Line.l(r:p2udt133-p2udt792) Units=km Length=0.0387952 bus1=p2udt133-p2udt792x.3 bus2=p2udt133-p2udt792xx.3 switch=n enabled=y phases=1 Linecode=1P_UG_AL_#2_15_12_47_0_1_1_1_1

New Line.l(r:p2udt133-p2udt4724) Units=km Length=0.029094600000000005 bus1=p2udt133-p2udt4724xx.3 bus2=p2udt133-p2udt4724x.3 switch=n enabled=y phases=1 Linecode=1P_UG_AL_#2_15_12_47_0_1_1_1_1

New Line.l(r:p2udt378-p2udt4724) Units=km Length=0.029094600000000005 bus1=p2udt378-p2udt4724x.3 bus2=p2udt378-p2udt4724xx.3 switch=n enabled=y phases=1 Linecode=1P_UG_AL_#2_15_12_47_0_1_1_1_1

New Line.l(r:p2udt378-p2udt7963) Units=km Length=0.029094600000000005 bus1=p2udt378-p2udt7963xx.3 bus2=p2udt378-p2udt7963x.3 switch=n enabled=y phases=1 Linecode=1P_UG_AL_#2_15_12_47_0_1_1_1_1

New Line.l(r:p2udt3146-p2udt7963) Units=km Length=0.0358775 bus1=p2udt3146-p2udt7963x.3 bus2=p2udt3146-p2udt7963xx.3 switch=n enabled=y phases=1 Linecode=1P_UG_AL_#2_15_12_47_0_1_1_1_1

New Line.l(r:p2udt3146-p2udt5855) Units=km Length=0.188349 bus1=p2udt5855.3 bus2=p2udt3146.3 switch=n enabled=y phases=1 Linecode=1P_OH_AL_ACSR_#2_Sparrow_12_47_0_1_1_1_1

New Line.l(r:p2udt1863-p2udt197) Units=km Length=0.0585533 bus1=p2udt1863-p2udt197x.3 bus2=p2udt1863-p2udt197xx.3 switch=n enabled=y phases=1 Linecode=1P_UG_AL_#2_15_12_47_0_1_1_1_1

New Line.l(r:p2udt1863-p2udt3478) Units=km Length=0.0585602 bus1=p2udt1863-p2udt3478xx.3 bus2=p2udt1863-p2udt3478x.3 switch=n enabled=y phases=1 Linecode=1P_UG_AL_#2_15_12_47_0_1_1_1_1

New Line.l(r:p2udt3478-p2udt5059) Units=km Length=0.048798 bus1=p2udt3478-p2udt5059xx.3 bus2=p2udt3478-p2udt5059x.3 switch=n enabled=y phases=1 Linecode=1P_UG_AL_#2_15_12_47_0_1_1_1_1

New Line.l(r:p2udt4863-p2udt5059) Units=km Length=0.0181659 bus1=p2udt4863-p2udt5059x.3 bus2=p2udt4863-p2udt5059xx.3 switch=n enabled=y phases=1 Linecode=1P_UG_AL_#2_15_12_47_0_1_1_1_1

New Line.l(r:p2udt4863-p2udt5855) Units=km Length=0.24103900000000003 bus1=p2udt5855.3 bus2=p2udt4863.3 switch=n enabled=y phases=1 Linecode=1P_OH_AL_ACSR_#2_Sparrow_12_47_0_1_1_1_1

New Line.l(r:p2udt3881-p2udt5855) Units=km Length=0.104021 bus1=p2udt3881-p2udt5855x.3 bus2=p2udt5855.3 switch=n enabled=y phases=1 Linecode=1P_OH_AL_ACSR_#2_Sparrow_12_47_0_1_1_1_1

New Line.l(r:p2udt640-p2udt7680) Units=km Length=0.029624100000000004 bus1=p2udt640-p2udt7680xx.1 bus2=p2udt640-p2udt7680x.1 switch=n enabled=y phases=1 Linecode=1P_UG_AL_#2_15_12_47_0_1_1_1_1

New Line.l(r:p2udt7364-p2udt7680) Units=km Length=0.389433 bus1=p2udt7680.1 bus2=p2udt7364.1 switch=n enabled=y phases=1 Linecode=1P_OH_AL_ACSR_#2_Sparrow_12_47_0_1_1_1_1

New Line.l(r:p2udt1291-p2udt7680) Units=km Length=0.03950100000000001 bus1=p2udt1291-p2udt7680x.1 bus2=p2udt1291-p2udt7680xx.1 switch=n enabled=y phases=1 Linecode=1P_UG_AL_#2_15_12_47_0_1_1_1_1

New Line.l(r:p2udt1291-p2udt7563) Units=km Length=0.0394945 bus1=p2udt1291-p2udt7563xx.1 bus2=p2udt1291-p2udt7563x.1 switch=n enabled=y phases=1 Linecode=1P_UG_AL_#2_15_12_47_0_1_1_1_1

New Line.l(r:p2udt428-p2udt7563) Units=km Length=0.0883911 bus1=p2udt428-p2udt7563x.1 bus2=p2udt428-p2udt7563xx.1 switch=n enabled=y phases=1 Linecode=1P_UG_AL_#2_15_12_47_0_1_1_1_1

New Line.l(r:p2udt3618-p2udt428) Units=km Length=0.0982053 bus1=p2udt3618-p2udt428x.1 bus2=p2udt3618-p2udt428xx.1 switch=n enabled=y phases=1 Linecode=1P_UG_AL_#2_15_12_47_0_1_1_1_1

New Line.l(r:p2udt3618-p2udt8679) Units=km Length=0.172558 bus1=p2udt8679.1 bus2=p2udt3618.1 switch=n enabled=y phases=1 Linecode=1P_OH_AL_ACSR_#2_Sparrow_12_47_0_1_1_1_1

New Line.l(r:p2udt4723-p2udt8679) Units=km Length=0.104831 bus1=p2udt8679.1 bus2=p2udt4723.1 switch=n enabled=y phases=1 Linecode=1P_OH_AL_ACSR_#2_Sparrow_12_47_0_1_1_1_1

New Line.l(r:p2udt3881-p2udt8679) Units=km Length=0.138003 bus1=p2udt3881-p2udt8679x.1 bus2=p2udt8679.1 switch=n enabled=y phases=1 Linecode=1P_OH_AL_ACSR_#2_Sparrow_12_47_0_1_1_1_1

New Line.l(r:p2udt1480-p2udt1682) Units=km Length=0.138389 bus1=p2udt1480-p2udt1682x.3 bus2=p2udt1480.3 switch=n enabled=y phases=1 Linecode=1P_OH_AL_ACSR_#2_Sparrow_12_47_0_1_1_1_1

New Line.l(r:p2udt4418-p2udt5605) Units=km Length=0.001 bus1=p2udt4418-p2udt5605x.1 bus2=p2udt5605.1 switch=n enabled=y phases=1 Linecode=1P_OH_AL_ACSR_#2_Sparrow_12_47_0_1_1_1_1

New Line.l(r:p2udt4418-p2udt6281) Units=km Length=0.001 bus1=p2udt4418-p2udt6281x.3 bus2=p2udt6281.3 switch=n enabled=y phases=1 Linecode=1P_OH_AL_ACSR_#2_Sparrow_12_47_0_1_1_1_1

New Line.l(r:p2udt1289-p2udt6937) Units=km Length=0.0183593 bus1=p2udt6937.2 bus2=p2udt1289.2 switch=n enabled=y phases=1 Linecode=1P_OH_AL_ACSR_#2_Sparrow_12_47_0_1_1_1_1

New Line.l(r:p2udt2422-p2udt6937) Units=km Length=0.586988 bus1=p2udt6937.2 bus2=p2udt2422.2 switch=n enabled=y phases=1 Linecode=1P_OH_AL_ACSR_#2_Sparrow_12_47_0_1_1_1_1

New Line.l(r:p2udt6347-p2udt6937) Units=km Length=0.160791 bus1=p2udt6347.2 bus2=p2udt6937.2 switch=n enabled=y phases=1 Linecode=1P_OH_AL_ACSR_#2_Sparrow_12_47_0_1_1_1_1

New Line.l(r:p2udt4418-p2udt6347) Units=km Length=0.0386291 bus1=p2udt4418-p2udt6347x.2 bus2=p2udt6347.2 switch=n enabled=y phases=1 Linecode=1P_OH_AL_ACSR_#2_Sparrow_12_47_0_1_1_1_1

New Line.l(r:p2udt426-p2udt6676) Units=km Length=0.07191 bus1=p2udt6676.1 bus2=p2udt426.1 switch=n enabled=y phases=1 Linecode=1P_OH_AL_ACSR_#2_Sparrow_12_47_0_1_1_1_1

New Line.l(r:p2udt5056-p2udt6676) Units=km Length=0.054933 bus1=p2udt5056-p2udt6676x.1 bus2=p2udt6676.1 switch=n enabled=y phases=1 Linecode=1P_OH_AL_ACSR_#2_Sparrow_12_47_0_1_1_1_1

New Line.l(r:p2udt2588-p2udt7894) Units=km Length=0.385563 bus1=p2udt2588-p2udt7894x.3 bus2=p2udt7894.3 switch=n enabled=y phases=1 Linecode=1P_OH_AL_ACSR_#2_Sparrow_12_47_0_1_1_1_1

New Line.l(r:p2udt8144-p2udt8866) Units=km Length=0.27443 bus1=p2udt8144-p2udt8866x.2 bus2=p2udt8144.2 switch=n enabled=y phases=1 Linecode=1P_OH_AL_ACSR_#2_Sparrow_12_47_0_1_1_1_1

New Line.l(r:p2udt5497-p2udt6808) Units=km Length=0.410442 bus1=p2udt5497-p2udt6808x.1 bus2=p2udt6808.1 switch=n enabled=y phases=1 Linecode=1P_OH_AL_ACSR_#2_Sparrow_12_47_0_1_1_1_1

New Line.l(r:p2udt1077-p2udt5772) Units=km Length=0.220495 bus1=p2udt1077-p2udt5772x.1 bus2=p2udt1077.1 switch=n enabled=y phases=1 Linecode=1P_OH_AL_ACSR_#2_Sparrow_12_47_0_1_1_1_1

New Line.l(r:p2udt196-p2udt641) Units=km Length=0.0757259 bus1=p2udt196-p2udt641xx.2 bus2=p2udt196-p2udt641x.2 switch=n enabled=y phases=1 Linecode=1P_UG_AL_#2_15_12_47_0_1_1_1_1

New Line.l(r:p2udt4541-p2udt641) Units=km Length=0.0671158 bus1=p2udt4541-p2udt641xx.2 bus2=p2udt4541-p2udt641xxx.2 switch=n enabled=y phases=1 Linecode=1P_UG_AL_#2_15_12_47_0_1_1_1_1

New Line.l(r:p2udt198-p2udt3881) Units=km Length=0.0499706 bus1=p2udt198-p2udt3881x.1.2.3 bus2=p2udt198-p2udt3881xx.1.2.3 switch=n enabled=y phases=3 Linecode=3P_UG_AL_4/0_25_12_47_0_3_3_3_3

New Line.l(r:p2udt198-p2udt2589) Units=km Length=0.0699494 bus1=p2udt198-p2udt2589xx.1.2.3 bus2=p2udt198-p2udt2589x.1.2.3 switch=n enabled=y phases=3 Linecode=3P_UG_AL_4/0_25_12_47_0_3_3_3_3

New Line.l(r:p2udt2589-p2udt7564) Units=km Length=0.00999277 bus1=p2udt2589-p2udt7564xx.1.2.3 bus2=p2udt2589-p2udt7564x.1.2.3 switch=n enabled=y phases=3 Linecode=3P_UG_AL_4/0_25_12_47_0_3_3_3_3

New Line.l(r:p2udt7564-p2udt7819) Units=km Length=0.059956600000000006 bus1=p2udt7564-p2udt7819xx.1.2.3 bus2=p2udt7564-p2udt7819x.1.2.3 switch=n enabled=y phases=3 Linecode=3P_UG_AL_4/0_25_12_47_0_3_3_3_3

New Line.l(r:p2udt7108-p2udt7819) Units=km Length=0.029978300000000003 bus1=p2udt7108-p2udt7819x.1.2.3 bus2=p2udt7108-p2udt7819xx.1.2.3 switch=n enabled=y phases=3 Linecode=3P_UG_AL_4/0_25_12_47_0_3_3_3_3

New Line.l(r:p2udt4955-p2udt7108) Units=km Length=0.0299851 bus1=p2udt4955-p2udt7108x.1.2.3 bus2=p2udt4955-p2udt7108xx.1.2.3 switch=n enabled=y phases=3 Linecode=3P_UG_AL_4/0_25_12_47_0_3_3_3_3

New Line.l(r:p2udt4955-p2udt5057) Units=km Length=0.0627612 bus1=p2udt4955-p2udt5057xx.1.2.3 bus2=p2udt4955-p2udt5057x.1.2.3 switch=n enabled=y phases=3 Linecode=3P_UG_AL_4/0_25_12_47_0_3_3_3_3

New Line.l(r:p2udt5057-p2udt5058) Units=km Length=0.0930966 bus1=p2udt5057-p2udt5058xx.1.2.3 bus2=p2udt5057-p2udt5058x.1.2.3 switch=n enabled=y phases=3 Linecode=3P_UG_AL_4/0_25_12_47_0_3_3_3_3

New Line.l(r:p2udt5058-p2udt8865) Units=km Length=0.08317090000000002 bus1=p2udt8865.1.2.3 bus2=p2udt8865_b1_1.1.2.3 switch=n enabled=y phases=3 Linecode=3P_OH_AL_ACSR_4/0_Penguin_12_47_0_3_3_3_3

New Line.l(r:p2udt3477-p2udt8865) Units=km Length=0.161447 bus1=p2udt3477.1.2.3 bus2=p2udt8865.1.2.3 switch=n enabled=y phases=3 Linecode=3P_OH_AL_ACSR_4/0_Penguin_12_47_0_3_3_3_3

New Line.l(r:p2udt1861-p2udt3477) Units=km Length=0.168214 bus1=p2udt1861.1.2.3 bus2=p2udt3477.1.2.3 switch=n enabled=y phases=3 Linecode=3P_OH_AL_ACSR_4/0_Penguin_12_47_0_3_3_3_3

New Line.l(r:p2udt5690-p2udt8680) Units=km Length=0.11616700000000002 bus1=p2udt5690.1.2.3 bus2=p2udt5690_b1_1.1.2.3 switch=n enabled=y phases=3 Linecode=3P_OH_AL_ACSR_4/0_Penguin_12_47_0_3_3_3_3

New Line.l(r:p2udt5690-p2udt5772) Units=km Length=0.49483 bus1=p2udt5772.1.2.3 bus2=p2udt5690.1.2.3 switch=n enabled=y phases=3 Linecode=3P_OH_AL_ACSR_4/0_Penguin_12_47_0_3_3_3_3

New Line.l(r:p2udt5496-p2udt5772) Units=km Length=0.417754 bus1=p2udt5496.1.2.3 bus2=p2udt5772.1.2.3 switch=n enabled=y phases=3 Linecode=3P_OH_AL_ACSR_4/0_Penguin_12_47_0_3_3_3_3

New Line.l(r:p2udt1861-p2udt5496) Units=km Length=0.29227400000000003 bus1=p2udt1861.1.2.3 bus2=p2udt5496.1.2.3 switch=n enabled=y phases=3 Linecode=3P_OH_AL_ACSR_4/0_Penguin_12_47_0_3_3_3_3

New Line.l(r:p2udt1861-p2udt7211) Units=km Length=0.720993 bus1=p2udt1861.1.2.3 bus2=p2udt7211.1.2.3 switch=n enabled=y phases=3 Linecode=3P_OH_AL_ACSR_4/0_Penguin_12_47_0_3_3_3_3

New Line.l(r:p2udt1683-p2udt1861) Units=km Length=0.190183 bus1=p2udt1683.1.2.3 bus2=p2udt1861.1.2.3 switch=n enabled=y phases=3 Linecode=3P_OH_AL_ACSR_4/0_Penguin_12_47_0_3_3_3_3

New Line.l(r:p2udt1683-p2udt3884) Units=km Length=0.0632142 bus1=p2udt3884.1.2.3 bus2=p2udt1683.1.2.3 switch=n enabled=y phases=3 Linecode=3P_OH_AL_ACSR_4/0_Penguin_12_47_0_3_3_3_3

New Line.l(r:p2udt3884-p2udt4954) Units=km Length=0.236289 bus1=p2udt3884.1.2.3 bus2=p2udt4954.1.2.3 switch=n enabled=y phases=3 Linecode=3P_OH_AL_ACSR_4/0_Penguin_12_47_0_3_3_3_3

New Line.l(r:p2udt3884-p2uhs9_1247) Units=km Length=0.234176 bus1=p2udt3884-p2uhs9_1247x.1.2.3 bus2=p2udt3884.1.2.3 switch=n enabled=y phases=3 Linecode=3P_OH_AL_ACSR_4/0_Penguin_12_47_0_3_3_3_3

New Line.l(r:p2udt3884lv-p2ulv5289) Units=km Length=0.0124091 bus1=p2udt3884lv.1.2.3 bus2=p2ulv5289.1.2.3 switch=n enabled=y phases=3 Linecode=3P_UG_AL_350kcmil_15_0_416_0_3_3_3_3

New Line.l(r:p2udt1683lv-p2ulv1896) Units=km Length=0.0207485 bus1=p2udt1683lv.1.2.3 bus2=p2ulv1896.1.2.3 switch=n enabled=y phases=3 Linecode=3P_UG_AL_350kcmil_15_0_416_0_3_3_3_3

New Line.l(r:p2udt1861lv-p2ulv2114) Units=km Length=0.0284118 bus1=p2udt1861lv.1.2.3 bus2=p2ulv2114.1.2.3 switch=n enabled=y phases=3 Linecode=3P_UG_AL_350kcmil_15_0_416_0_3_3_3_3

New Line.l(r:p2udt3477lv-p2ulv4571) Units=km Length=0.00986882 bus1=p2udt3477lv.1.2.3 bus2=p2ulv4571.1.2.3 switch=n enabled=y phases=3 Linecode=3P_UG_AL_350kcmil_15_0_416_0_3_3_3_3

New Line.l(r:p2udt4862lv-p2ulv7231) Units=km Length=0.0189761 bus1=p2udt4862lv.1.2.3 bus2=p2ulv7231.1.2.3 switch=n enabled=y phases=3 Linecode=3P_UG_AL_750kcmil_25_0_416_0_3_3_3_3

New Line.l(r:p2udt3477-p2udt4862) Units=km Length=0.110447 bus1=p2udt3477.1.2.3 bus2=p2udt4862.1.2.3 switch=n enabled=y phases=3 Linecode=3P_OH_AL_ACSR_4/0_Penguin_12_47_0_3_3_3_3

New Line.l(r:p2udt8865lv-p2ulv23510) Units=km Length=0.00971854 bus1=p2udt8865lv.1.2.3 bus2=p2ulv23510.1.2.3 switch=n enabled=y phases=3 Linecode=3P_UG_AL_750kcmil_25_0_416_0_3_3_3_3

New Line.l(r:p2udt5057lv-p2ulv7711) Units=km Length=0.0114069 bus1=p2udt5057lv.1.2.3 bus2=p2ulv7711.1.2.3 switch=n enabled=y phases=3 Linecode=3P_UG_AL_350kcmil_15_0_416_0_3_3_3_3

New Line.l(r:p2udt8866lv-p2ulv23511) Units=km Length=0.00681575 bus1=p2udt8866lv.1.2.3 bus2=p2ulv23511.1.2.3 switch=n enabled=y phases=3 Linecode=3P_UG_AL_350kcmil_15_0_416_0_3_3_3_3

New Line.l(r:p2udt4418lv-p2ulv6271) Units=km Length=0.0767754 bus1=p2udt4418lv.1.2.3 bus2=p2ulv6271.1.2.3 switch=n enabled=y phases=3 Linecode=3P_UG_AL_350kcmil_15_0_416_0_3_3_3_3

New Line.l(r:p2udt4418lv-p2ulv15387) Units=km Length=0.0869896 bus1=p2udt4418lv.1.2.3 bus2=p2ulv15387.1.2.3 switch=n enabled=y phases=3 Linecode=3P_UG_AL_350kcmil_15_0_416_0_3_3_3_3

New Line.l(r:p2udt1682-p2udt4418) Units=km Length=0.0386161 bus1=p2udt1682.1.2.3 bus2=p2udt4418.1.2.3 switch=n enabled=y phases=3 Linecode=3P_OH_AL_ACSR_4/0_Penguin_12_47_0_3_3_3_3

New Line.l(r:p2udt1481-p2udt1682) Units=km Length=0.0193117 bus1=p2udt1481.1.2.3 bus2=p2udt1682.1.2.3 switch=n enabled=y phases=3 Linecode=3P_OH_AL_ACSR_4/0_Penguin_12_47_0_3_3_3_3

New Line.l(r:p2udt1481-p2udt3185) Units=km Length=0.134755 bus1=p2udt3185.1.2.3 bus2=p2udt1481.1.2.3 switch=n enabled=y phases=3 Linecode=3P_OH_AL_ACSR_4/0_Penguin_12_47_0_3_3_3_3

New Line.l(r:p2udt5056lv-p2ulv7710) Units=km Length=0.0159658 bus1=p2udt5056lv.1.2.3 bus2=p2ulv7710.1.2.3 switch=n enabled=y phases=3 Linecode=3P_UG_AL_350kcmil_15_0_416_0_3_3_3_3

New Line.l(r:p2udt2586-p2udt5056) Units=km Length=0.0181662 bus1=p2udt2586.1.2.3 bus2=p2udt5056.1.2.3 switch=n enabled=y phases=3 Linecode=3P_OH_AL_ACSR_4/0_Penguin_12_47_0_3_3_3_3

New Line.l(r:p2udt2586-p2udt3185) Units=km Length=0.04461760000000001 bus1=p2udt3185.1.2.3 bus2=p2udt2586.1.2.3 switch=n enabled=y phases=3 Linecode=3P_OH_AL_ACSR_4/0_Penguin_12_47_0_3_3_3_3

New Line.l(r:p2udt2588-p2udt3185) Units=km Length=0.0564593 bus1=p2udt2588.1.2.3 bus2=p2udt3185.1.2.3 switch=n enabled=y phases=3 Linecode=3P_OH_AL_ACSR_4/0_Penguin_12_47_0_3_3_3_3

New Line.l(r:p2udt2588-p2udt8866) Units=km Length=0.42192 bus1=p2udt8866.1.2.3 bus2=p2udt2588.1.2.3 switch=n enabled=y phases=3 Linecode=3P_OH_AL_ACSR_4/0_Penguin_12_47_0_3_3_3_3

New Line.l(r:p2udt7679-p2udt8866) Units=km Length=0.307879 bus1=p2udt7679.1.2.3 bus2=p2udt8866.1.2.3 switch=n enabled=y phases=3 Linecode=3P_OH_AL_ACSR_4/0_Penguin_12_47_0_3_3_3_3

New Line.l(r:p2udt6871-p2udt7679) Units=km Length=0.222408 bus1=p2udt6871.1.2.3 bus2=p2udt7679.1.2.3 switch=n enabled=y phases=3 Linecode=3P_OH_AL_ACSR_4/0_Penguin_12_47_0_3_3_3_3

New Line.l(r:p2udt5058-p2udt6871) Units=km Length=0.119622 bus1=p2udt5058.1.2.3 bus2=p2udt6871.1.2.3 switch=n enabled=y phases=3 Linecode=3P_OH_AL_ACSR_4/0_Penguin_12_47_0_3_3_3_3

New Line.l(r:p2udt8524lv-p2ulv21264) Units=km Length=0.0115863 bus1=p2udt8524lv.1.2.3 bus2=p2ulv21264.1.2.3 switch=n enabled=y phases=3 Linecode=3P_UG_AL_750kcmil_25_0_416_0_3_3_3_3

New Line.l(r:p2udt5497lv-p2ulv8841) Units=km Length=0.0160795 bus1=p2udt5497lv.1.2.3 bus2=p2ulv8841.1.2.3 switch=n enabled=y phases=3 Linecode=3P_UG_AL_750kcmil_25_0_416_0_3_3_3_3

New Line.l(r:p2udt5497-p2udt8524) Units=km Length=0.07167820000000001 bus1=p2udt8524.1.2.3 bus2=p2udt5497.1.2.3 switch=n enabled=y phases=3 Linecode=3P_OH_AL_ACSR_4/0_Penguin_12_47_0_3_3_3_3

New Line.l(r:p2udt8524-p2udt8865) Units=km Length=0.174244 bus1=p2udt8865.1.2.3 bus2=p2udt8524.1.2.3 switch=n enabled=y phases=3 Linecode=3P_OH_AL_ACSR_4/0_Penguin_12_47_0_3_3_3_3

New Line.l(r:p2udt5496lv-p2ulv8840) Units=km Length=0.00727001 bus1=p2udt5496lv.1.2.3 bus2=p2ulv8840.1.2.3 switch=n enabled=y phases=3 Linecode=3P_UG_AL_750kcmil_25_0_416_0_3_3_3_3

New Line.l(r:p2udt5772lv-p2ulv9550) Units=km Length=0.028671200000000004 bus1=p2udt5772lv.1.2.3 bus2=p2ulv9550.1.2.3 switch=n enabled=y phases=3 Linecode=3P_UG_AL_750kcmil_25_0_416_0_3_3_3_3

New Line.l(r:p2udt5690lv-p2ulv9334) Units=km Length=0.0260269 bus1=p2udt5690lv.1.2.3 bus2=p2ulv9334.1.2.3 switch=n enabled=y phases=3 Linecode=3P_UG_AL_750kcmil_25_0_416_0_3_3_3_3

New Line.l(r:p2udt5690-p2umv22) Units=km Length=0.75815 bus1=p2udt5690.1.2.3 bus2=p2umv22.1.2.3 switch=n enabled=y phases=3 Linecode=3P_OH_AL_ACSR_4/0_Penguin_12_47_0_3_3_3_3

New Line.l(r:p2udt8680lv-p2ulv22198) Units=km Length=0.0313541 bus1=p2udt8680lv.1.2.3 bus2=p2ulv22198.1.2.3 switch=n enabled=y phases=3 Linecode=3P_UG_AL_750kcmil_25_0_416_0_3_3_3_3

New Line.l(r:p2udt8681lv-p2ulv22199) Units=km Length=0.0152273 bus1=p2udt8681lv.1.2.3 bus2=p2ulv22199.1.2.3 switch=n enabled=y phases=3 Linecode=3P_UG_AL_350kcmil_15_0_416_0_3_3_3_3

New Line.l(r:p2udt3036lv-p2ulv3832) Units=km Length=0.0128472 bus1=p2udt3036lv.1.2.3 bus2=p2ulv3832.1.2.3 switch=n enabled=y phases=3 Linecode=3P_UG_AL_750kcmil_25_0_416_0_3_3_3_3

New Line.l(r:p2udt3036-p2udt8681) Units=km Length=0.20057400000000003 bus1=p2udt8681.1.2.3 bus2=p2udt3036.1.2.3 switch=n enabled=y phases=3 Linecode=3P_OH_AL_ACSR_4/0_Penguin_12_47_0_3_3_3_3

New Line.l(r:p2udt8680-p2udt8681) Units=km Length=0.3277 bus1=p2udt8680.1.2.3 bus2=p2udt8681.1.2.3 switch=n enabled=y phases=3 Linecode=3P_OH_AL_ACSR_4/0_Penguin_12_47_0_3_3_3_3

New Line.l(r:p2udt7211-p2umv21) Units=km Length=0.061957200000000004 bus1=p2udt7211.1.2.3 bus2=p2umv21.1.2.3 switch=n enabled=y phases=3 Linecode=3P_OH_AL_ACSR_4/0_Penguin_12_47_0_3_3_3_3

New Line.l(r:p2udm16184-p2ulv7462) Units=km Length=0.00715218 bus1=p2udm16184.1.2.3 bus2=p2ulv7462.1.2.3 switch=n enabled=y phases=3 Linecode=3P_UG_AL_350kcmil_15_0_416_0_3_3_3_3

New Line.l(r:p2udm16184-p2udt4954lv) Units=km Length=0.0794422 bus1=p2udt4954lv.1.2.3 bus2=p2udm16184.1.2.3 switch=n enabled=y phases=3 Linecode=3P_UG_AL_350kcmil_15_0_416_0_3_3_3_3

New Line.l(r:p2udm16185-p2ulv24197) Units=km Length=0.00252507 bus1=p2udm16185.1.2.3 bus2=p2ulv24197.1.2.3 switch=n enabled=y phases=3 Linecode=3P_UG_AL_750kcmil_25_0_416_0_3_3_3_3

New Line.l(r:p2udm16185-p2udt4954lv) Units=km Length=0.043059 bus1=p2udt4954lv.1.2.3 bus2=p2udm16185.1.2.3 switch=n enabled=y phases=3 Linecode=3P_UG_AL_750kcmil_25_0_416_0_3_3_3_3

New Line.l(r:p2udt7624lv-p2ulv16324) Units=km Length=0.0270186 bus1=p2udt7624lv.1.2.3 bus2=p2ulv16324.1.2.3 switch=n enabled=y phases=3 Linecode=3P_UG_AL_350kcmil_15_0_416_0_3_3_3_3

New Line.l(r:p2udt1290-p2udt7624) Units=km Length=0.001 bus1=p2udt1290-p2udt7624x.1.2.3 bus2=p2udt1290-p2udt7624xx.1.2.3 switch=n enabled=y phases=3 Linecode=3P_UG_AL_4/0_25_12_47_0_3_3_3_3

New Line.l(r:p2udt1290-p2udt858) Units=km Length=0.0381089 bus1=p2udt1290-p2udt858xx.1.2.3 bus2=p2udt1290-p2udt858x.1.2.3 switch=n enabled=y phases=3 Linecode=3P_UG_AL_4/0_25_12_47_0_3_3_3_3

New Line.l(r:p2udt427-p2udt858) Units=km Length=0.0484682 bus1=p2udt427-p2udt858x.1.2.3 bus2=p2udt427-p2udt858xx.1.2.3 switch=n enabled=y phases=3 Linecode=3P_UG_AL_4/0_25_12_47_0_3_3_3_3

New Line.l(r:p2udt427-p2udt7109) Units=km Length=0.0678585 bus1=p2udt427-p2udt7109xx.1.2.3 bus2=p2udt427-p2udt7109x.1.2.3 switch=n enabled=y phases=3 Linecode=3P_UG_AL_4/0_25_12_47_0_3_3_3_3

New Line.l(r:p2udt4541-p2udt7109) Units=km Length=0.0323321 bus1=p2udt4541-p2udt7109x.1.2.3 bus2=p2udt4541-p2udt7109xx.1.2.3 switch=n enabled=y phases=3 Linecode=3P_UG_AL_4/0_25_12_47_0_3_3_3_3

New Line.l(r:p2udt4541-p2udt7308) Units=km Length=0.158804 bus1=p2udt7308.1.2.3 bus2=p2udt4541.1.2.3 switch=n enabled=y phases=3 Linecode=3P_OH_AL_ACSR_4/0_Penguin_12_47_0_3_3_3_3

New Line.l(r:p2udt5355-p2udt7308) Units=km Length=0.09962700000000001 bus1=p2udt5355.1.2.3 bus2=p2udt5355_b1_1.1.2.3 switch=n enabled=y phases=3 Linecode=3P_OH_AL_ACSR_4/0_Penguin_12_47_0_3_3_3_3

New Line.l(r:p2udt8382lv-p2ulv20406) Units=km Length=0.010958 bus1=p2udt8382lv.1.2.3 bus2=p2ulv20406.1.2.3 switch=n enabled=y phases=3 Linecode=3P_UG_AL_750kcmil_25_0_416_0_3_3_3_3

New Line.l(r:p2udt5355-p2udt8382) Units=km Length=0.220108 bus1=p2udt5355.1.2.3 bus2=p2udt8382.1.2.3 switch=n enabled=y phases=3 Linecode=3P_OH_AL_ACSR_4/0_Penguin_12_47_0_3_3_3_3

New Line.l(r:p2udt4954-p2udt5355) Units=km Length=0.290887 bus1=p2udt4954.1.2.3 bus2=p2udt5355.1.2.3 switch=n enabled=y phases=3 Linecode=3P_OH_AL_ACSR_4/0_Penguin_12_47_0_3_3_3_3

New Line.padswitch(r:p2udt195-p2udt7160)p2u_42718 Units=km Length=0.001 bus1=p2udt195.2 bus2=p2udt195-p2udt7160x.2 switch=y enabled=y phases=1 Linecode=padswitch_1_1_1_1

New Line.padswitch(r:p2udt195-p2udt7160)p2u_42719 Units=km Length=0.001 bus1=p2udt195-p2udt7160xx.2 bus2=p2udt7160.2 switch=y enabled=y phases=1 Linecode=padswitch_1_2_1_1_1

New Line.padswitch(r:p2udt195-p2udt7562)p2u_42720 Units=km Length=0.001 bus1=p2udt7562.2 bus2=p2udt195-p2udt7562xx.2 switch=y enabled=y phases=1 Linecode=padswitch_1_2_1_0_1_1

New Line.padswitch(r:p2udt195-p2udt7562)p2u_42721 Units=km Length=0.001 bus1=p2udt195-p2udt7562x.2 bus2=p2udt195.2 switch=y enabled=y phases=1 Linecode=padswitch_1_2_1_0_1_1

New Line.padswitch(r:p2udt1862-p2udt7562)p2u_42722 Units=km Length=0.001 bus1=p2udt1862.2 bus2=p2udt1862-p2udt7562x.2 switch=y enabled=y phases=1 Linecode=padswitch_1_2_1_0_1_1

New Line.padswitch(r:p2udt1862-p2udt7562)p2u_42723 Units=km Length=0.001 bus1=p2udt1862-p2udt7562xx.2 bus2=p2udt7562.2 switch=y enabled=y phases=1 Linecode=padswitch_1_2_1_0_1_1

New Line.padswitch(r:p2udt1862-p2udt5057)p2u_42724 Units=km Length=0.001 bus1=p2udt1862-p2udt5057xxx.2 bus2=p2udt1862-p2udt5057xx.2 switch=y enabled=y phases=1 Linecode=padswitch_1_2_1_0_1_0_1

New Line.padswitch(r:p2udt1862-p2udt5057)p2u_42725 Units=km Length=0.001 bus1=p2udt1862-p2udt5057x.2 bus2=p2udt1862.2 switch=y enabled=y phases=1 Linecode=padswitch_1_2_1_0_1_1

New Line.padswitch(r:p2udt5670-p2udt6854)p2u_42726 Units=km Length=0.001 bus1=p2udt5670.3 bus2=p2udt5670-p2udt6854x.3 switch=y enabled=y phases=1 Linecode=padswitch_1_2_1_0_1_0_1

New Line.padswitch(r:p2udt5670-p2udt6854)p2u_42727 Units=km Length=0.001 bus1=p2udt5670-p2udt6854xx.3 bus2=p2udt6854.3 switch=y enabled=y phases=1 Linecode=padswitch_1_2_1_0_1_1

New Line.padswitch(r:p2udt2840-p2udt5670)p2u_42728 Units=km Length=0.001 bus1=p2udt2840.3 bus2=p2udt2840-p2udt5670x.3 switch=y enabled=y phases=1 Linecode=padswitch_1_2_1_0_1_1

New Line.padswitch(r:p2udt2840-p2udt5670)p2u_42729 Units=km Length=0.001 bus1=p2udt2840-p2udt5670xx.3 bus2=p2udt5670.3 switch=y enabled=y phases=1 Linecode=padswitch_1_2_1_0_1_1

New Line.padswitch(r:p2udt2840-p2udt4934)p2u_42730 Units=km Length=0.001 bus1=p2udt4934.3 bus2=p2udt2840-p2udt4934xx.3 switch=y enabled=y phases=1 Linecode=padswitch_1_2_1_0_1_1

New Line.padswitch(r:p2udt2840-p2udt4934)p2u_42731 Units=km Length=0.001 bus1=p2udt2840-p2udt4934x.3 bus2=p2udt2840.3 switch=y enabled=y phases=1 Linecode=padswitch_1_2_1_0_1_1

New Line.padswitch(r:p2udt132-p2udt3980)p2u_42732 Units=km Length=0.001 bus1=p2udt3980.3 bus2=p2udt132-p2udt3980xx.3 switch=y enabled=y phases=1 Linecode=padswitch_1_2_1_0_1_1

New Line.padswitch(r:p2udt132-p2udt3980)p2u_42733 Units=km Length=0.001 bus1=p2udt132-p2udt3980x.3 bus2=p2udt132.3 switch=y enabled=y phases=1 Linecode=padswitch_1_2_1_0_1_0_1_0

New Line.padswitch(r:p2udt3980-p2udt586)p2u_42734 Units=km Length=0.001 bus1=p2udt586.3 bus2=p2udt3980-p2udt586xx.3 switch=y enabled=y phases=1 Linecode=padswitch_1_2_1_0_1_1

New Line.padswitch(r:p2udt3980-p2udt586)p2u_42735 Units=km Length=0.001 bus1=p2udt3980-p2udt586x.3 bus2=p2udt3980.3 switch=y enabled=y phases=1 Linecode=padswitch_1_2_1_0_1_1

New Line.padswitch(r:p2udt4627-p2udt586)p2u_42736 Units=km Length=0.001 bus1=p2udt4627.3 bus2=p2udt4627-p2udt586x.3 switch=y enabled=y phases=1 Linecode=padswitch_1_2_1_0_1_0_1

New Line.padswitch(r:p2udt4627-p2udt586)p2u_42737 Units=km Length=0.001 bus1=p2udt4627-p2udt586xx.3 bus2=p2udt586.3 switch=y enabled=y phases=1 Linecode=padswitch_1_2_1_0_1_1

New Line.padswitch(r:p2udt4627-p2udt4934)p2u_42738 Units=km Length=0.001 bus1=p2udt4934.3 bus2=p2udt4627-p2udt4934xx.3 switch=y enabled=y phases=1 Linecode=padswitch_1_2_1_0_1_1

New Line.padswitch(r:p2udt4627-p2udt4934)p2u_42739 Units=km Length=0.001 bus1=p2udt4627-p2udt4934x.3 bus2=p2udt4627.3 switch=y enabled=y phases=1 Linecode=padswitch_1_2_1_0_1_1

New Line.padswitch(r:p2udt4934-p2udt5832)p2u_42740 Units=km Length=0.001 bus1=p2udt5832.3 bus2=p2udt4934-p2udt5832xx.3 switch=y enabled=y phases=1 Linecode=padswitch_1_2_1_0_1_1

New Line.padswitch(r:p2udt4934-p2udt5832)p2u_42741 Units=km Length=0.001 bus1=p2udt4934-p2udt5832x.3 bus2=p2udt4934.3 switch=y enabled=y phases=1 Linecode=padswitch_1_2_1_0_1_1

New Line.padswitch(r:p2udt5832-p2udt585)p2u_42742 Units=km Length=0.001 bus1=p2udt585.3 bus2=p2udt5832-p2udt585xx.3 switch=y enabled=y phases=1 Linecode=padswitch_1_2_1_0_1_1

New Line.padswitch(r:p2udt5832-p2udt585)p2u_42743 Units=km Length=0.001 bus1=p2udt5832-p2udt585x.3 bus2=p2udt5832.3 switch=y enabled=y phases=1 Linecode=padswitch_1_2_1_0_1_1

New Line.padswitch(r:p2udt3146-p2udt585)p2u_42744 Units=km Length=0.001 bus1=p2udt3146.3 bus2=p2udt3146-p2udt585x.3 switch=y enabled=y phases=1 Linecode=padswitch_1_2_1_0_1_1

New Line.padswitch(r:p2udt3146-p2udt585)p2u_42745 Units=km Length=0.001 bus1=p2udt3146-p2udt585xx.3 bus2=p2udt585.3 switch=y enabled=y phases=1 Linecode=padswitch_1_2_1_0_1_1

New Line.padswitch(r:p2udt133-p2udt792)p2u_42746 Units=km Length=0.001 bus1=p2udt133.3 bus2=p2udt133-p2udt792x.3 switch=y enabled=y phases=1 Linecode=padswitch_1_2_1_0_1_1

New Line.padswitch(r:p2udt133-p2udt792)p2u_42747 Units=km Length=0.001 bus1=p2udt133-p2udt792xx.3 bus2=p2udt792.3 switch=y enabled=y phases=1 Linecode=padswitch_1_2_1_0_1_0_1

New Line.padswitch(r:p2udt133-p2udt4724)p2u_42748 Units=km Length=0.001 bus1=p2udt4724.3 bus2=p2udt133-p2udt4724xx.3 switch=y enabled=y phases=1 Linecode=padswitch_1_2_1_0_1_0_1_0

New Line.padswitch(r:p2udt133-p2udt4724)p2u_42749 Units=km Length=0.001 bus1=p2udt133-p2udt4724x.3 bus2=p2udt133.3 switch=y enabled=y phases=1 Linecode=padswitch_1_2_1_0_1_0_1

New Line.padswitch(r:p2udt378-p2udt4724)p2u_42750 Units=km Length=0.001 bus1=p2udt378.3 bus2=p2udt378-p2udt4724x.3 switch=y enabled=y phases=1 Linecode=padswitch_1_2_1_0_1_1

New Line.padswitch(r:p2udt378-p2udt4724)p2u_42751 Units=km Length=0.001 bus1=p2udt378-p2udt4724xx.3 bus2=p2udt4724.3 switch=y enabled=y phases=1 Linecode=padswitch_1_2_1_0_1_0_1

New Line.padswitch(r:p2udt378-p2udt7963)p2u_42752 Units=km Length=0.001 bus1=p2udt7963.3 bus2=p2udt378-p2udt7963xx.3 switch=y enabled=y phases=1 Linecode=padswitch_1_2_1_0_1_1

New Line.padswitch(r:p2udt378-p2udt7963)p2u_42753 Units=km Length=0.001 bus1=p2udt378-p2udt7963x.3 bus2=p2udt378.3 switch=y enabled=y phases=1 Linecode=padswitch_1_2_1_0_1_1

New Line.padswitch(r:p2udt3146-p2udt7963)p2u_42754 Units=km Length=0.001 bus1=p2udt3146.3 bus2=p2udt3146-p2udt7963x.3 switch=y enabled=y phases=1 Linecode=padswitch_1_2_1_0_1_1

New Line.padswitch(r:p2udt3146-p2udt7963)p2u_42755 Units=km Length=0.001 bus1=p2udt3146-p2udt7963xx.3 bus2=p2udt7963.3 switch=y enabled=y phases=1 Linecode=padswitch_1_2_1_0_1_1

New Line.padswitch(r:p2udt1863-p2udt197)p2u_42756 Units=km Length=0.001 bus1=p2udt1863.3 bus2=p2udt1863-p2udt197x.3 switch=y enabled=y phases=1 Linecode=padswitch_1_2_1_0_1_1

New Line.padswitch(r:p2udt1863-p2udt197)p2u_42757 Units=km Length=0.001 bus1=p2udt1863-p2udt197xx.3 bus2=p2udt197.3 switch=y enabled=y phases=1 Linecode=padswitch_1_2_1_0_1_0_1

New Line.padswitch(r:p2udt1863-p2udt3478)p2u_42758 Units=km Length=0.001 bus1=p2udt3478.3 bus2=p2udt1863-p2udt3478xx.3 switch=y enabled=y phases=1 Linecode=padswitch_1_2_1_0_1_1

New Line.padswitch(r:p2udt1863-p2udt3478)p2u_42759 Units=km Length=0.001 bus1=p2udt1863-p2udt3478x.3 bus2=p2udt1863.3 switch=y enabled=y phases=1 Linecode=padswitch_1_2_1_0_1_1

New Line.padswitch(r:p2udt3478-p2udt5059)p2u_42760 Units=km Length=0.001 bus1=p2udt5059.3 bus2=p2udt3478-p2udt5059xx.3 switch=y enabled=y phases=1 Linecode=padswitch_1_2_1_0_1_1

New Line.padswitch(r:p2udt3478-p2udt5059)p2u_42761 Units=km Length=0.001 bus1=p2udt3478-p2udt5059x.3 bus2=p2udt3478.3 switch=y enabled=y phases=1 Linecode=padswitch_1_2_1_0_1_1

New Line.padswitch(r:p2udt4863-p2udt5059)p2u_42762 Units=km Length=0.001 bus1=p2udt4863.3 bus2=p2udt4863-p2udt5059x.3 switch=y enabled=y phases=1 Linecode=padswitch_1_2_1_1_1

New Line.padswitch(r:p2udt4863-p2udt5059)p2u_42763 Units=km Length=0.001 bus1=p2udt4863-p2udt5059xx.3 bus2=p2udt5059.3 switch=y enabled=y phases=1 Linecode=padswitch_1_2_1_0_1_1

New Line.padswitch(r:p2udt640-p2udt7680)p2u_42764 Units=km Length=0.001 bus1=p2udt7680.1 bus2=p2udt640-p2udt7680xx.1 switch=y enabled=y phases=1 Linecode=padswitch_1_2_1_1_1

New Line.padswitch(r:p2udt640-p2udt7680)p2u_42765 Units=km Length=0.001 bus1=p2udt640-p2udt7680x.1 bus2=p2udt640.1 switch=y enabled=y phases=1 Linecode=padswitch_1_2_1_0_1_0_1

New Line.padswitch(r:p2udt1291-p2udt7680)p2u_42766 Units=km Length=0.001 bus1=p2udt1291.1 bus2=p2udt1291-p2udt7680x.1 switch=y enabled=y phases=1 Linecode=padswitch_1_2_1_1_1

New Line.padswitch(r:p2udt1291-p2udt7680)p2u_42767 Units=km Length=0.001 bus1=p2udt1291-p2udt7680xx.1 bus2=p2udt7680.1 switch=y enabled=y phases=1 Linecode=padswitch_1_2_1_1_1

New Line.padswitch(r:p2udt1291-p2udt7563)p2u_42768 Units=km Length=0.001 bus1=p2udt7563.1 bus2=p2udt1291-p2udt7563xx.1 switch=y enabled=y phases=1 Linecode=padswitch_1_2_1_1_1

New Line.padswitch(r:p2udt1291-p2udt7563)p2u_42769 Units=km Length=0.001 bus1=p2udt1291-p2udt7563x.1 bus2=p2udt1291.1 switch=y enabled=y phases=1 Linecode=padswitch_1_2_1_0_1_1

New Line.padswitch(r:p2udt428-p2udt7563)p2u_42770 Units=km Length=0.001 bus1=p2udt428.1 bus2=p2udt428-p2udt7563x.1 switch=y enabled=y phases=1 Linecode=padswitch_1_2_1_0_1_1

New Line.padswitch(r:p2udt428-p2udt7563)p2u_42771 Units=km Length=0.001 bus1=p2udt428-p2udt7563xx.1 bus2=p2udt7563.1 switch=y enabled=y phases=1 Linecode=padswitch_1_2_1_0_1_1

New Line.padswitch(r:p2udt3618-p2udt428)p2u_42772 Units=km Length=0.001 bus1=p2udt3618.1 bus2=p2udt3618-p2udt428x.1 switch=y enabled=y phases=1 Linecode=padswitch_1_2_1_0_1_1

New Line.padswitch(r:p2udt3618-p2udt428)p2u_42773 Units=km Length=0.001 bus1=p2udt3618-p2udt428xx.1 bus2=p2udt428.1 switch=y enabled=y phases=1 Linecode=padswitch_1_2_1_0_1_1

New Line.padswitch(r:p2udt196-p2udt641)p2u_42790 Units=km Length=0.001 bus1=p2udt641.2 bus2=p2udt196-p2udt641xx.2 switch=y enabled=y phases=1 Linecode=padswitch_1_2_1_0_1_1

New Line.padswitch(r:p2udt196-p2udt641)p2u_42791 Units=km Length=0.001 bus1=p2udt196-p2udt641x.2 bus2=p2udt196.2 switch=y enabled=y phases=1 Linecode=padswitch_1_2_1_0_1_0_1_0

New Line.padswitch(r:p2udt4541-p2udt641)p2u_42792 Units=km Length=0.001 bus1=p2udt4541-p2udt641x.2 bus2=p2udt4541-p2udt641xx.2 switch=y enabled=y phases=1 Linecode=padswitch_1_2_1_0_1_0_1_0

New Line.padswitch(r:p2udt4541-p2udt641)p2u_42793 Units=km Length=0.001 bus1=p2udt4541-p2udt641xxx.2 bus2=p2udt641.2 switch=y enabled=y phases=1 Linecode=padswitch_1_2_1_0_1_1

New Line.padswitch(r:p2udt198-p2udt3881)p2u_42774 Units=km Length=0.001 bus1=p2udt198.1.2.3 bus2=p2udt198-p2udt3881x.1.2.3 switch=y enabled=y phases=3 Linecode=padswitch_3_3_3_3

New Line.padswitch(r:p2udt198-p2udt3881)p2u_42775 Units=km Length=0.001 bus1=p2udt198-p2udt3881xx.1.2.3 bus2=p2udt3881.1.2.3 switch=y enabled=y phases=3 Linecode=padswitch_3_3_3_3_3

New Line.padswitch(r:p2udt198-p2udt2589)p2u_42776 Units=km Length=0.001 bus1=p2udt2589.1.2.3 bus2=p2udt198-p2udt2589xx.1.2.3 switch=y enabled=y phases=3 Linecode=padswitch_3_3_3_3_3

New Line.padswitch(r:p2udt198-p2udt2589)p2u_42777 Units=km Length=0.001 bus1=p2udt198-p2udt2589x.1.2.3 bus2=p2udt198.1.2.3 switch=y enabled=y phases=3 Linecode=padswitch_3_3_3_3_3

New Line.padswitch(r:p2udt2589-p2udt7564)p2u_42778 Units=km Length=0.001 bus1=p2udt7564.1.2.3 bus2=p2udt2589-p2udt7564xx.1.2.3 switch=y enabled=y phases=3 Linecode=padswitch_3_3_3_1_3_3

New Line.padswitch(r:p2udt2589-p2udt7564)p2u_42779 Units=km Length=0.001 bus1=p2udt2589-p2udt7564x.1.2.3 bus2=p2udt2589.1.2.3 switch=y enabled=y phases=3 Linecode=padswitch_3_3_3_3_3

New Line.padswitch(r:p2udt7564-p2udt7819)p2u_42780 Units=km Length=0.001 bus1=p2udt7819.1.2.3 bus2=p2udt7564-p2udt7819xx.1.2.3 switch=y enabled=y phases=3 Linecode=padswitch_3_3_3_1_3_1_3

New Line.padswitch(r:p2udt7564-p2udt7819)p2u_42781 Units=km Length=0.001 bus1=p2udt7564-p2udt7819x.1.2.3 bus2=p2udt7564.1.2.3 switch=y enabled=y phases=3 Linecode=padswitch_3_3_3_3_3

New Line.padswitch(r:p2udt7108-p2udt7819)p2u_42782 Units=km Length=0.001 bus1=p2udt7108.1.2.3 bus2=p2udt7108-p2udt7819x.1.2.3 switch=y enabled=y phases=3 Linecode=padswitch_3_3_3_3_3

New Line.padswitch(r:p2udt7108-p2udt7819)p2u_42783 Units=km Length=0.001 bus1=p2udt7108-p2udt7819xx.1.2.3 bus2=p2udt7819.1.2.3 switch=y enabled=y phases=3 Linecode=padswitch_3_3_3_1_3_1_3_1

New Line.padswitch(r:p2udt4955-p2udt7108)p2u_42784 Units=km Length=0.001 bus1=p2udt4955.1.2.3 bus2=p2udt4955-p2udt7108x.1.2.3 switch=y enabled=y phases=3 Linecode=padswitch_3_3_3_3_3

New Line.padswitch(r:p2udt4955-p2udt7108)p2u_42785 Units=km Length=0.001 bus1=p2udt4955-p2udt7108xx.1.2.3 bus2=p2udt7108.1.2.3 switch=y enabled=y phases=3 Linecode=padswitch_3_3_3_3_3

New Line.padswitch(r:p2udt4955-p2udt5057)p2u_42786 Units=km Length=0.001 bus1=p2udt5057.1.2.3 bus2=p2udt4955-p2udt5057xx.1.2.3 switch=y enabled=y phases=3 Linecode=padswitch_3_3_3_3_3

New Line.padswitch(r:p2udt4955-p2udt5057)p2u_42787 Units=km Length=0.001 bus1=p2udt4955-p2udt5057x.1.2.3 bus2=p2udt4955.1.2.3 switch=y enabled=y phases=3 Linecode=padswitch_3_3_3_3_3

New Line.padswitch(r:p2udt5057-p2udt5058)p2u_42788 Units=km Length=0.001 bus1=p2udt5058.1.2.3 bus2=p2udt5057-p2udt5058xx.1.2.3 switch=y enabled=y phases=3 Linecode=padswitch_3_3_3_3_3

New Line.padswitch(r:p2udt5057-p2udt5058)p2u_42789 Units=km Length=0.001 bus1=p2udt5057-p2udt5058x.1.2.3 bus2=p2udt5057.1.2.3 switch=y enabled=y phases=3 Linecode=padswitch_3_3_3_3_3

New Line.padswitch(r:p2udt1290-p2udt7624)p2u_42794 Units=km Length=0.001 bus1=p2udt1290.1.2.3 bus2=p2udt1290-p2udt7624x.1.2.3 switch=y enabled=y phases=3 Linecode=padswitch_3_3_3_3_3

New Line.padswitch(r:p2udt1290-p2udt7624)p2u_42795 Units=km Length=0.001 bus1=p2udt1290-p2udt7624xx.1.2.3 bus2=p2udt7624.1.2.3 switch=y enabled=y phases=3 Linecode=padswitch_3_3_3_1_3_1_3_1

New Line.padswitch(r:p2udt1290-p2udt858)p2u_42796 Units=km Length=0.001 bus1=p2udt858.1.2.3 bus2=p2udt1290-p2udt858xx.1.2.3 switch=y enabled=y phases=3 Linecode=padswitch_3_3_3_3_3

New Line.padswitch(r:p2udt1290-p2udt858)p2u_42797 Units=km Length=0.001 bus1=p2udt1290-p2udt858x.1.2.3 bus2=p2udt1290.1.2.3 switch=y enabled=y phases=3 Linecode=padswitch_3_3_3_3_3

New Line.padswitch(r:p2udt427-p2udt858)p2u_42798 Units=km Length=0.001 bus1=p2udt427.1.2.3 bus2=p2udt427-p2udt858x.1.2.3 switch=y enabled=y phases=3 Linecode=padswitch_3_3_3_3_3

New Line.padswitch(r:p2udt427-p2udt858)p2u_42799 Units=km Length=0.001 bus1=p2udt427-p2udt858xx.1.2.3 bus2=p2udt858.1.2.3 switch=y enabled=y phases=3 Linecode=padswitch_3_3_3_3_3

New Line.padswitch(r:p2udt427-p2udt7109)p2u_42800 Units=km Length=0.001 bus1=p2udt7109.1.2.3 bus2=p2udt427-p2udt7109xx.1.2.3 switch=y enabled=y phases=3 Linecode=padswitch_3_3_3_3_3

New Line.padswitch(r:p2udt427-p2udt7109)p2u_42801 Units=km Length=0.001 bus1=p2udt427-p2udt7109x.1.2.3 bus2=p2udt427.1.2.3 switch=y enabled=y phases=3 Linecode=padswitch_3_3_3_3_3

New Line.padswitch(r:p2udt4541-p2udt7109)p2u_42802 Units=km Length=0.001 bus1=p2udt4541.1.2.3 bus2=p2udt4541-p2udt7109x.1.2.3 switch=y enabled=y phases=3 Linecode=padswitch_3_3_3_3_3

New Line.padswitch(r:p2udt4541-p2udt7109)p2u_42803 Units=km Length=0.001 bus1=p2udt4541-p2udt7109xx.1.2.3 bus2=p2udt7109.1.2.3 switch=y enabled=y phases=3 Linecode=padswitch_3_3_3_3_3

New Line.fuse(r:p2udt1480-p2udt1682)p2u_45663 Units=km Length=0.001 bus1=p2udt1682.3 bus2=p2udt1480-p2udt1682x.3 switch=n enabled=y phases=1 Linecode=fuse_1_1_1_1

New Fuse.Fuse_fuse(r:p2udt1480-p2udt1682)p2u_45663 monitoredobj=Line.fuse(r:p2udt1480-p2udt1682)p2u_45663 enabled=y ratedcurrent=100.0

New Line.fuse(r:p2udt2588-p2udt7894)p2u_45765 Units=km Length=0.001 bus1=p2udt2588.3 bus2=p2udt2588-p2udt7894x.3 switch=n enabled=y phases=1 Linecode=fuse_1_1_1_1

New Fuse.Fuse_fuse(r:p2udt2588-p2udt7894)p2u_45765 monitoredobj=Line.fuse(r:p2udt2588-p2udt7894)p2u_45765 enabled=y ratedcurrent=100.0

New Line.fuse(r:p2udt3881-p2udt5855)p2u_45913 Units=km Length=0.001 bus1=p2udt3881.3 bus2=p2udt3881-p2udt5855x.3 switch=n enabled=y phases=1 Linecode=fuse_1_6_1_1_1

New Fuse.Fuse_fuse(r:p2udt3881-p2udt5855)p2u_45913 monitoredobj=Line.fuse(r:p2udt3881-p2udt5855)p2u_45913 enabled=y ratedcurrent=100.0

New Line.fuse(r:p2udt3881-p2udt8679)p2u_45914 Units=km Length=0.001 bus1=p2udt3881.1 bus2=p2udt3881-p2udt8679x.1 switch=n enabled=y phases=1 Linecode=fuse_1_6_1_3_1_1

New Fuse.Fuse_fuse(r:p2udt3881-p2udt8679)p2u_45914 monitoredobj=Line.fuse(r:p2udt3881-p2udt8679)p2u_45914 enabled=y ratedcurrent=100.0

New Line.fuse(r:p2udt4418-p2udt5605)p2u_45968 Units=km Length=0.001 bus1=p2udt4418.1 bus2=p2udt4418-p2udt5605x.1 switch=n enabled=y phases=1 Linecode=fuse_1_6_1_3_1_3_1

New Fuse.Fuse_fuse(r:p2udt4418-p2udt5605)p2u_45968 monitoredobj=Line.fuse(r:p2udt4418-p2udt5605)p2u_45968 enabled=y ratedcurrent=100.0

New Line.fuse(r:p2udt4418-p2udt6281)p2u_45969 Units=km Length=0.001 bus1=p2udt4418.3 bus2=p2udt4418-p2udt6281x.3 switch=n enabled=y phases=1 Linecode=fuse_1_6_1_1_1

New Fuse.Fuse_fuse(r:p2udt4418-p2udt6281)p2u_45969 monitoredobj=Line.fuse(r:p2udt4418-p2udt6281)p2u_45969 enabled=y ratedcurrent=100.0

New Line.fuse(r:p2udt4418-p2udt6347)p2u_45970 Units=km Length=0.001 bus1=p2udt4418.2 bus2=p2udt4418-p2udt6347x.2 switch=n enabled=y phases=1 Linecode=fuse_1_6_1_1_1

New Fuse.Fuse_fuse(r:p2udt4418-p2udt6347)p2u_45970 monitoredobj=Line.fuse(r:p2udt4418-p2udt6347)p2u_45970 enabled=y ratedcurrent=100.0

New Line.fuse(r:p2udt4541-p2udt641)p2u_45979 Units=km Length=0.001 bus1=p2udt4541.2 bus2=p2udt4541-p2udt641x.2 switch=n enabled=y phases=1 Linecode=fuse_1_6_1_3_1_3_1_3

New Fuse.Fuse_fuse(r:p2udt4541-p2udt641)p2u_45979 monitoredobj=Line.fuse(r:p2udt4541-p2udt641)p2u_45979 enabled=y ratedcurrent=100.0

New Line.fuse(r:p2udt5056-p2udt6676)p2u_46042 Units=km Length=0.001 bus1=p2udt5056.1 bus2=p2udt5056-p2udt6676x.1 switch=n enabled=y phases=1 Linecode=fuse_1_6_1_1_1

New Fuse.Fuse_fuse(r:p2udt5056-p2udt6676)p2u_46042 monitoredobj=Line.fuse(r:p2udt5056-p2udt6676)p2u_46042 enabled=y ratedcurrent=100.0

New Line.fuse(r:p2udt1862-p2udt5057)p2u_46043 Units=km Length=0.001 bus1=p2udt5057.2 bus2=p2udt1862-p2udt5057xxx.2 switch=n enabled=y phases=1 Linecode=fuse_1_6_1_3_1_3_1

New Fuse.Fuse_fuse(r:p2udt1862-p2udt5057)p2u_46043 monitoredobj=Line.fuse(r:p2udt1862-p2udt5057)p2u_46043 enabled=y ratedcurrent=100.0

New Line.fuse(r:p2udt5497-p2udt6808)p2u_46083 Units=km Length=0.001 bus1=p2udt5497.1 bus2=p2udt5497-p2udt6808x.1 switch=n enabled=y phases=1 Linecode=fuse_1_6_1_1_1

New Fuse.Fuse_fuse(r:p2udt5497-p2udt6808)p2u_46083 monitoredobj=Line.fuse(r:p2udt5497-p2udt6808)p2u_46083 enabled=y ratedcurrent=100.0

New Line.fuse(r:p2udt1077-p2udt5772)p2u_46118 Units=km Length=0.001 bus1=p2udt5772.1 bus2=p2udt1077-p2udt5772x.1 switch=n enabled=y phases=1 Linecode=fuse_1_1_1_1

New Fuse.Fuse_fuse(r:p2udt1077-p2udt5772)p2u_46118 monitoredobj=Line.fuse(r:p2udt1077-p2udt5772)p2u_46118 enabled=y ratedcurrent=100.0

New Line.fuse(r:p2udt8144-p2udt8866)p2u_46502 Units=km Length=0.001 bus1=p2udt8866.2 bus2=p2udt8144-p2udt8866x.2 switch=n enabled=y phases=1 Linecode=fuse_1_1_1_1

New Fuse.Fuse_fuse(r:p2udt8144-p2udt8866)p2u_46502 monitoredobj=Line.fuse(r:p2udt8144-p2udt8866)p2u_46502 enabled=y ratedcurrent=100.0

New Line.l(r:p2udt5058-p2udt8865)_disconnect Units=km Length=0.001 bus1=p2udt8865_b1_1.1.2.3 bus2=p2udt8865_b2_1.1.2.3 switch=y enabled=y phases=3 Linecode=3P_OH_AL_ACSR_4/0_Penguin_12_47_0_3_3_3_3

New Line.l(r:p2udt5058-p2udt8865)_cont Units=km Length=0.7575381000000001 bus1=p2udt8865_b2_1.1.2.3 bus2=p2udt5058.1.2.3 switch=n enabled=y phases=3 Linecode=3P_OH_AL_ACSR_4/0_Penguin_12_47_0_3_3_3_3

New Line.l(r:p2udt5690-p2udt8680)_disconnect Units=km Length=0.001 bus1=p2udt5690_b1_1.1.2.3 bus2=p2udt5690_b2_1.1.2.3 switch=y enabled=y phases=3 Linecode=3P_OH_AL_ACSR_4/0_Penguin_12_47_0_3_3_3_3

New Line.l(r:p2udt5690-p2udt8680)_cont Units=km Length=1.0545030000000002 bus1=p2udt5690_b2_1.1.2.3 bus2=p2udt8680.1.2.3 switch=n enabled=y phases=3 Linecode=3P_OH_AL_ACSR_4/0_Penguin_12_47_0_3_3_3_3

New Line.l(r:p2udt5355-p2udt7308)_disconnect Units=km Length=0.001 bus1=p2udt5355_b1_1.1.2.3 bus2=p2udt5355_b2_1.1.2.3 switch=y enabled=y phases=3 Linecode=3P_OH_AL_ACSR_4/0_Penguin_12_47_0_3_3_3_3

New Line.l(r:p2udt5355-p2udt7308)_cont Units=km Length=0.9056430000000001 bus1=p2udt5355_b2_1.1.2.3 bus2=p2udt7308.1.2.3 switch=n enabled=y phases=3 Linecode=3P_OH_AL_ACSR_4/0_Penguin_12_47_0_3_3_3_3
