New Capacitor.p2uc60 Bus1=p2udt5933 phases=3 Kv=12.47 conn=Wye Kvar=300.0

New CapControl.p2uc60 Capacitor=p2uc60 Element=Line.l(r:p2udt5933-p2udt8406) Terminal=1 delay=100.0 Type=voltage Vmin=120.5 Vmax=125.0 Ptratio=59.99631547328862 Ctratio=100.0
