New Line.l(r:p2udt642lv-p2ulv21972) Units=km Length=0.00684926 bus1=p2udt642lv.1.2 bus2=p2ulv21972.1.2 switch=n enabled=y phases=2 Linecode=1P_UG_AL_1/0_Brenau_0_416_0_2_2_2_2

New Line.l(r:p2udm2390-p2ulv680) Units=km Length=0.00572808 bus1=p2udm2390.1.2 bus2=p2ulv680.1.2 switch=n enabled=y phases=2 Linecode=1P_UG_AL_1/0_Brenau_0_416_0_2_2_2_2

New Line.l(r:p2udm2390-p2udt642lv) Units=km Length=0.00981115 bus1=p2udt642lv.1.2 bus2=p2udm2390.1.2 switch=n enabled=y phases=2 Linecode=1P_UG_AL_1/0_Brenau_0_416_0_2_2_2_2

New Line.l(r:p2udm3195-p2ulv927) Units=km Length=0.0064277 bus1=p2udm3195.1.2 bus2=p2ulv927.1.2 switch=n enabled=y phases=2 Linecode=1P_UG_AL_1/0_Brenau_0_416_0_2_2_2_2

New Line.l(r:p2udm3195-p2ulv12894) Units=km Length=0.00346146 bus1=p2udm3195.1.2 bus2=p2ulv12894.1.2 switch=n enabled=y phases=2 Linecode=1P_UG_AL_1/0_Brenau_0_416_0_2_2_2_2

New Line.l(r:p2udm3195-p2udt867lv) Units=km Length=0.00847416 bus1=p2udt867lv.1.2 bus2=p2udm3195.1.2 switch=n enabled=y phases=2 Linecode=1P_UG_AL_4/0_Sweetbriar_0_416_0_2_2_2_2

New Line.l(r:p2udm3198-p2ulv14461) Units=km Length=0.00466725 bus1=p2udm3198.1.2 bus2=p2ulv14461.1.2 switch=n enabled=y phases=2 Linecode=1P_UG_AL_1/0_Brenau_0_416_0_2_2_2_2

New Line.l(r:p2udm3196-p2ulv5533) Units=km Length=0.004443650000000001 bus1=p2udm3196.1.2 bus2=p2ulv5533.1.2 switch=n enabled=y phases=2 Linecode=1P_UG_AL_1/0_Brenau_0_416_0_2_2_2_2

New Line.l(r:p2udm3196-p2udm3198) Units=km Length=0.009684630000000001 bus1=p2udm3198.1.2 bus2=p2udm3196.1.2 switch=n enabled=y phases=2 Linecode=1P_UG_AL_1/0_Brenau_0_416_0_2_2_2_2

New Line.l(r:p2udm3198-p2udt867lv) Units=km Length=0.00847455 bus1=p2udt867lv.1.2 bus2=p2udm3198.1.2 switch=n enabled=y phases=2 Linecode=1P_UG_AL_1/0_Brenau_0_416_0_2_2_2_2

New Line.l(r:p2udt868lv-p2ulv928) Units=km Length=0.00487026 bus1=p2udt868lv.1.2 bus2=p2ulv928.1.2 switch=n enabled=y phases=2 Linecode=1P_UG_AL_1/0_Brenau_0_416_0_2_2_2_2

New Line.l(r:p2udt868lv-p2ulv2127) Units=km Length=0.00562532 bus1=p2udt868lv.1.2 bus2=p2ulv2127.1.2 switch=n enabled=y phases=2 Linecode=1P_UG_AL_4/0_Sweetbriar_0_416_0_2_2_2_2

New Line.l(r:p2udm3974-p2ulv1173) Units=km Length=0.009649070000000001 bus1=p2udm3974.1.2 bus2=p2ulv1173.1.2 switch=n enabled=y phases=2 Linecode=1P_UG_AL_1/0_Brenau_0_416_0_2_2_2_2

New Line.l(r:p2udm3977-p2ulv24208) Units=km Length=0.014678900000000002 bus1=p2udm3977.1.2 bus2=p2ulv24208.1.2 switch=n enabled=y phases=2 Linecode=1P_OH_AL_2/0_Rucina_0_416_0_2_2_2_2

New Line.l(r:p2udm3974-p2udm3977) Units=km Length=0.00849947 bus1=p2udm3974.1.2 bus2=p2udm3977.1.2 switch=n enabled=y phases=2 Linecode=1P_OH_AL_2/0_Rucina_0_416_0_2_2_2_2

New Line.l(r:p2udm3974-p2udt1079lv) Units=km Length=0.017012 bus1=p2udt1079lv.1.2 bus2=p2udm3974.1.2 switch=n enabled=y phases=2 Linecode=1P_UG_AL_1/0_Brenau_0_416_0_2_2_2_2

New Line.l(r:p2udm3976-p2ulv10999) Units=km Length=0.00623238 bus1=p2udm3976.1.2 bus2=p2ulv10999.1.2 switch=n enabled=y phases=2 Linecode=1P_UG_AL_2/0_Converse_0_416_0_2_2_2_2

New Line.l(r:p2udm3975-p2ulv2383) Units=km Length=0.00719817 bus1=p2udm3975.1.2 bus2=p2ulv2383.1.2 switch=n enabled=y phases=2 Linecode=1P_UG_AL_1/0_Brenau_0_416_0_2_2_2_2

New Line.l(r:p2udm3975-p2udm3976) Units=km Length=0.00955377 bus1=p2udm3976.1.2 bus2=p2udm3975.1.2 switch=n enabled=y phases=2 Linecode=1P_UG_AL_1/0_Brenau_0_416_0_2_2_2_2

New Line.l(r:p2udm3976-p2udt1079lv) Units=km Length=0.009562260000000001 bus1=p2udt1079lv.1.2 bus2=p2udm3976.1.2 switch=n enabled=y phases=2 Linecode=1P_UG_AL_4/0_Sweetbriar_0_416_0_2_2_2_2

New Line.l(r:p2udt1294lv-p2ulv1426) Units=km Length=0.005972 bus1=p2udt1294lv.1.2 bus2=p2ulv1426.1.2 switch=n enabled=y phases=2 Linecode=1P_UG_AL_1/0_Brenau_0_416_0_2_2_2_2

New Line.l(r:p2udt1294lv-p2ulv8848) Units=km Length=0.00661502 bus1=p2udt1294lv.1.2 bus2=p2ulv8848.1.2 switch=n enabled=y phases=2 Linecode=1P_UG_AL_2/0_Converse_0_416_0_2_2_2_2

New Line.l(r:p2udm4773-p2ulv11705) Units=km Length=0.00678107 bus1=p2udm4773.1.2 bus2=p2ulv11705.1.2 switch=n enabled=y phases=2 Linecode=1P_UG_AL_1/0_Brenau_0_416_0_2_2_2_2

New Line.l(r:p2udm4773-p2udt1294lv) Units=km Length=0.00951009 bus1=p2udt1294lv.1.2 bus2=p2udm4773.1.2 switch=n enabled=y phases=2 Linecode=1P_UG_AL_1/0_Brenau_0_416_0_2_2_2_2

New Line.l(r:p2udm6164-p2ulv1904) Units=km Length=0.00646842 bus1=p2udm6164.1.2 bus2=p2ulv1904.1.2 switch=n enabled=y phases=2 Linecode=1P_UG_AL_1/0_Brenau_0_416_0_2_2_2_2

New Line.l(r:p2udm6164-p2udt1691lv) Units=km Length=0.0290202 bus1=p2udt1691lv.1.2 bus2=p2udm6164.1.2 switch=n enabled=y phases=2 Linecode=1P_UG_AL_1/0_Brenau_0_416_0_2_2_2_2

New Line.l(r:p2udm6165-p2ulv14463) Units=km Length=0.00942602 bus1=p2udm6165.1.2 bus2=p2ulv14463.1.2 switch=n enabled=y phases=2 Linecode=1P_UG_AL_1/0_Brenau_0_416_0_2_2_2_2

New Line.l(r:p2udm6165-p2udt1691lv) Units=km Length=0.0294227 bus1=p2udt1691lv.1.2 bus2=p2udm6165.1.2 switch=n enabled=y phases=2 Linecode=1P_UG_AL_1/0_Brenau_0_416_0_2_2_2_2

New Line.l(r:p2udt2060lv-p2ulv2382) Units=km Length=0.00669264 bus1=p2udt2060lv.1.2 bus2=p2ulv2382.1.2 switch=n enabled=y phases=2 Linecode=1P_UG_AL_4/0_Sweetbriar_0_416_0_2_2_2_2

New Line.l(r:p2udm7437-p2ulv9786) Units=km Length=0.00471105 bus1=p2udm7437.1.2 bus2=p2ulv9786.1.2 switch=n enabled=y phases=2 Linecode=1P_UG_AL_1/0_Brenau_0_416_0_2_2_2_2

New Line.l(r:p2udm7437-p2udt2060lv) Units=km Length=0.0067479 bus1=p2udt2060lv.1.2 bus2=p2udm7437.1.2 switch=n enabled=y phases=2 Linecode=1P_UG_AL_1/0_Brenau_0_416_0_2_2_2_2

New Line.l(r:p2udm7438-p2ulv15395) Units=km Length=0.0200321 bus1=p2udm7438.1.2 bus2=p2ulv15395.1.2 switch=n enabled=y phases=2 Linecode=1P_UG_AL_4/0_Sweetbriar_0_416_0_2_2_2_2

New Line.l(r:p2udm7438-p2udt2060lv) Units=km Length=0.0116989 bus1=p2udt2060lv.1.2 bus2=p2udm7438.1.2 switch=n enabled=y phases=2 Linecode=1P_UG_AL_4/0_Sweetbriar_0_416_0_2_2_2_2

New Line.l(r:p2udt2247lv-p2ulv3135) Units=km Length=0.0105375 bus1=p2udt2247lv.1.2 bus2=p2ulv3135.1.2 switch=n enabled=y phases=2 Linecode=1P_UG_AL_1/0_Brenau_0_416_0_2_2_2_2

New Line.l(r:p2udm8070-p2ulv2641) Units=km Length=0.00379297 bus1=p2udm8070.1.2 bus2=p2ulv2641.1.2 switch=n enabled=y phases=2 Linecode=1P_UG_AL_1/0_Brenau_0_416_0_2_2_2_2

New Line.l(r:p2udm8070-p2udt2247lv) Units=km Length=0.027580000000000004 bus1=p2udt2247lv.1.2 bus2=p2udm8070.1.2 switch=n enabled=y phases=2 Linecode=1P_UG_AL_1/0_Brenau_0_416_0_2_2_2_2

New Line.l(r:p2udm8072-p2ulv14462) Units=km Length=0.00373149 bus1=p2udm8072.1.2 bus2=p2ulv14462.1.2 switch=n enabled=y phases=2 Linecode=1P_UG_AL_4/0_Sweetbriar_0_416_0_2_2_2_2

New Line.l(r:p2udm8072-p2udt2247lv) Units=km Length=0.0392446 bus1=p2udt2247lv.1.2 bus2=p2udm8072.1.2 switch=n enabled=y phases=2 Linecode=1P_UG_AL_4/0_Sweetbriar_0_416_0_2_2_2_2

New Line.l(r:p2udt2248lv-p2ulv18138) Units=km Length=0.006207520000000001 bus1=p2udt2248lv.1.2 bus2=p2ulv18138.1.2 switch=n enabled=y phases=2 Linecode=1P_UG_AL_1/0_Brenau_0_416_0_2_2_2_2

New Line.l(r:p2udm8075-p2ulv7466) Units=km Length=0.00594085 bus1=p2udm8075.1.2 bus2=p2ulv7466.1.2 switch=n enabled=y phases=2 Linecode=1P_UG_AL_1/0_Brenau_0_416_0_2_2_2_2

New Line.l(r:p2udm8075-p2ulv15849) Units=km Length=0.00556644 bus1=p2udm8075.1.2 bus2=p2ulv15849.1.2 switch=n enabled=y phases=2 Linecode=1P_UG_AL_1/0_Brenau_0_416_0_2_2_2_2

New Line.l(r:p2udm8073-p2ulv2642) Units=km Length=0.00479026 bus1=p2udm8073.1.2 bus2=p2ulv2642.1.2 switch=n enabled=y phases=2 Linecode=1P_UG_AL_1/0_Brenau_0_416_0_2_2_2_2

New Line.l(r:p2udm8073-p2udm8075) Units=km Length=0.0190061 bus1=p2udm8075.1.2 bus2=p2udm8073.1.2 switch=n enabled=y phases=2 Linecode=1P_UG_AL_1/0_Brenau_0_416_0_2_2_2_2

New Line.l(r:p2udm8075-p2udt2248lv) Units=km Length=0.009495960000000001 bus1=p2udt2248lv.1.2 bus2=p2udm8075.1.2 switch=n enabled=y phases=2 Linecode=1P_UG_AL_4/0_Sweetbriar_0_416_0_2_2_2_2

New Line.l(r:p2udm8076-p2ulv14711) Units=km Length=0.00545595 bus1=p2udm8076.1.2 bus2=p2ulv14711.1.2 switch=n enabled=y phases=2 Linecode=1P_UG_AL_1/0_Brenau_0_416_0_2_2_2_2

New Line.l(r:p2udm8074-p2ulv5535) Units=km Length=0.00683749 bus1=p2udm8074.1.2 bus2=p2ulv5535.1.2 switch=n enabled=y phases=2 Linecode=1P_UG_AL_1/0_Brenau_0_416_0_2_2_2_2

New Line.l(r:p2udm8074-p2udm8076) Units=km Length=0.0371323 bus1=p2udm8076.1.2 bus2=p2udm8074.1.2 switch=n enabled=y phases=2 Linecode=1P_UG_AL_1/0_Brenau_0_416_0_2_2_2_2

New Line.l(r:p2udm8076-p2udt2248lv) Units=km Length=0.00950276 bus1=p2udt2248lv.1.2 bus2=p2udm8076.1.2 switch=n enabled=y phases=2 Linecode=1P_UG_AL_4/0_Sweetbriar_0_416_0_2_2_2_2

New Line.l(r:p2udm9676-p2ulv3360) Units=km Length=0.0070644 bus1=p2udm9676.1.2 bus2=p2ulv3360.1.2 switch=n enabled=y phases=2 Linecode=1P_UG_AL_1/0_Brenau_0_416_0_2_2_2_2

New Line.l(r:p2udm9676-p2ulv3597) Units=km Length=0.00660019 bus1=p2udm9676.1.2 bus2=p2ulv3597.1.2 switch=n enabled=y phases=2 Linecode=1P_UG_AL_1/0_Brenau_0_416_0_2_2_2_2

New Line.l(r:p2udm9676-p2udt2736lv) Units=km Length=0.00981115 bus1=p2udt2736lv.1.2 bus2=p2udm9676.1.2 switch=n enabled=y phases=2 Linecode=1P_UG_AL_4/0_Sweetbriar_0_416_0_2_2_2_2

New Line.l(r:p2udm9678-p2ulv5536) Units=km Length=0.00733093 bus1=p2udm9678.1.2 bus2=p2ulv5536.1.2 switch=n enabled=y phases=2 Linecode=1P_UG_AL_1/0_Brenau_0_416_0_2_2_2_2

New Line.l(r:p2udm9678-p2ulv13368) Units=km Length=0.00537023 bus1=p2udm9678.1.2 bus2=p2ulv13368.1.2 switch=n enabled=y phases=2 Linecode=1P_UG_AL_4/0_Sweetbriar_0_416_0_2_2_2_2

New Line.l(r:p2udm9678-p2udt2736lv) Units=km Length=0.0196223 bus1=p2udt2736lv.1.2 bus2=p2udm9678.1.2 switch=n enabled=y phases=2 Linecode=1P_UG_AL_4/0_Sweetbriar_0_416_0_2_2_2_2

New Line.l(r:p2udt2880lv-p2ulv10761) Units=km Length=0.00708865 bus1=p2udt2880lv.1.2 bus2=p2ulv10761.1.2 switch=n enabled=y phases=2 Linecode=1P_UG_AL_4/0_Sweetbriar_0_416_0_2_2_2_2

New Line.l(r:p2udm10186-p2ulv13826) Units=km Length=0.00645387 bus1=p2udm10186.1.2 bus2=p2ulv13826.1.2 switch=n enabled=y phases=2 Linecode=1P_UG_AL_1/0_Brenau_0_416_0_2_2_2_2

New Line.l(r:p2udm10186-p2udt2880lv) Units=km Length=0.0192822 bus1=p2udt2880lv.1.2 bus2=p2udm10186.1.2 switch=n enabled=y phases=2 Linecode=1P_UG_AL_1/0_Brenau_0_416_0_2_2_2_2

New Line.l(r:p2udm10187-p2ulv24005) Units=km Length=0.00598716 bus1=p2udm10187.1.2 bus2=p2ulv24005.1.2 switch=n enabled=y phases=2 Linecode=1P_UG_AL_4/0_Sweetbriar_0_416_0_2_2_2_2

New Line.l(r:p2udm10184-p2ulv3595) Units=km Length=0.008231680000000002 bus1=p2udm10184.1.2 bus2=p2ulv3595.1.2 switch=n enabled=y phases=2 Linecode=1P_UG_AL_1/0_Brenau_0_416_0_2_2_2_2

New Line.l(r:p2udm10184-p2udm10187) Units=km Length=0.00965117 bus1=p2udm10187.1.2 bus2=p2udm10184.1.2 switch=n enabled=y phases=2 Linecode=1P_UG_AL_1/0_Brenau_0_416_0_2_2_2_2

New Line.l(r:p2udm10187-p2udt2880lv) Units=km Length=0.00964117 bus1=p2udt2880lv.1.2 bus2=p2udm10187.1.2 switch=n enabled=y phases=2 Linecode=1P_UG_AL_4/0_Sweetbriar_0_416_0_2_2_2_2

New Line.l(r:p2udt2881lv-p2ulv3596) Units=km Length=0.00570349 bus1=p2udt2881lv.1.2 bus2=p2ulv3596.1.2 switch=n enabled=y phases=2 Linecode=1P_UG_AL_4/0_Sweetbriar_0_416_0_2_2_2_2

New Line.l(r:p2udm10189-p2ulv6515) Units=km Length=0.0128675 bus1=p2udm10189.1.2 bus2=p2ulv6515.1.2 switch=n enabled=y phases=2 Linecode=1P_UG_AL_1/0_Brenau_0_416_0_2_2_2_2

New Line.l(r:p2udm10189-p2ulv13595) Units=km Length=0.006022 bus1=p2udm10189.1.2 bus2=p2ulv13595.1.2 switch=n enabled=y phases=2 Linecode=1P_UG_AL_1/0_Brenau_0_416_0_2_2_2_2

New Line.l(r:p2udm10189-p2udt2881lv) Units=km Length=0.009684630000000001 bus1=p2udt2881lv.1.2 bus2=p2udm10189.1.2 switch=n enabled=y phases=2 Linecode=1P_UG_AL_2/0_Converse_0_416_0_2_2_2_2

New Line.l(r:p2udm10190-p2ulv13124) Units=km Length=0.006369050000000001 bus1=p2udm10190.1.2 bus2=p2ulv13124.1.2 switch=n enabled=y phases=2 Linecode=1P_UG_AL_1/0_Brenau_0_416_0_2_2_2_2

New Line.l(r:p2udm10190-p2udt2881lv) Units=km Length=0.00969149 bus1=p2udt2881lv.1.2 bus2=p2udm10190.1.2 switch=n enabled=y phases=2 Linecode=1P_UG_AL_1/0_Brenau_0_416_0_2_2_2_2

New Line.l(r:p2udm10687-p2ulv3836) Units=km Length=0.00550565 bus1=p2udm10687.1.2 bus2=p2ulv3836.1.2 switch=n enabled=y phases=2 Linecode=1P_UG_AL_1/0_Brenau_0_416_0_2_2_2_2

New Line.l(r:p2udm10687-p2udt3039lv) Units=km Length=0.009684630000000001 bus1=p2udt3039lv.1.2 bus2=p2udm10687.1.2 switch=n enabled=y phases=2 Linecode=1P_UG_AL_1/0_Brenau_0_416_0_2_2_2_2

New Line.l(r:p2udm10688-p2ulv22205) Units=km Length=0.00518062 bus1=p2udm10688.1.2 bus2=p2ulv22205.1.2 switch=n enabled=y phases=2 Linecode=1P_UG_AL_1/0_Brenau_0_416_0_2_2_2_2

New Line.l(r:p2udm10688-p2udt3039lv) Units=km Length=0.009684630000000001 bus1=p2udt3039lv.1.2 bus2=p2udm10688.1.2 switch=n enabled=y phases=2 Linecode=1P_UG_AL_1/0_Brenau_0_416_0_2_2_2_2

New Line.l(r:p2udm11167-p2ulv4327) Units=km Length=0.00626573 bus1=p2udm11167.1.2 bus2=p2ulv4327.1.2 switch=n enabled=y phases=2 Linecode=1P_UG_AL_1/0_Brenau_0_416_0_2_2_2_2

New Line.l(r:p2udm11167-p2ulv23758) Units=km Length=0.0041331 bus1=p2udm11167.1.2 bus2=p2ulv23758.1.2 switch=n enabled=y phases=2 Linecode=1P_UG_AL_4/0_Sweetbriar_0_416_0_2_2_2_2

New Line.l(r:p2udm11166-p2ulv4086) Units=km Length=0.00431807 bus1=p2udm11166.1.2 bus2=p2ulv4086.1.2 switch=n enabled=y phases=2 Linecode=1P_UG_AL_1/0_Brenau_0_416_0_2_2_2_2

New Line.l(r:p2udm11166-p2udm11167) Units=km Length=0.00981115 bus1=p2udm11167.1.2 bus2=p2udm11166.1.2 switch=n enabled=y phases=2 Linecode=1P_UG_AL_1/0_Brenau_0_416_0_2_2_2_2

New Line.l(r:p2udm11167-p2udt3188lv) Units=km Length=0.00981115 bus1=p2udt3188lv.1.2 bus2=p2udm11167.1.2 switch=n enabled=y phases=2 Linecode=1P_UG_AL_4/0_Sweetbriar_0_416_0_2_2_2_2

New Line.l(r:p2udm11168-p2ulv18789) Units=km Length=0.00582445 bus1=p2udm11168.1.2 bus2=p2ulv18789.1.2 switch=n enabled=y phases=2 Linecode=1P_UG_AL_1/0_Brenau_0_416_0_2_2_2_2

New Line.l(r:p2udm11168-p2udt3188lv) Units=km Length=0.0196225 bus1=p2udt3188lv.1.2 bus2=p2udm11168.1.2 switch=n enabled=y phases=2 Linecode=1P_UG_AL_1/0_Brenau_0_416_0_2_2_2_2

New Line.l(r:p2udt3189lv-p2ulv13125) Units=km Length=0.0065349100000000005 bus1=p2udt3189lv.1.2 bus2=p2ulv13125.1.2 switch=n enabled=y phases=2 Linecode=1P_UG_AL_1/0_Brenau_0_416_0_2_2_2_2

New Line.l(r:p2udm11170-p2ulv4087) Units=km Length=0.005519760000000001 bus1=p2udm11170.1.2 bus2=p2ulv4087.1.2 switch=n enabled=y phases=2 Linecode=1P_UG_AL_1/0_Brenau_0_416_0_2_2_2_2

New Line.l(r:p2udm11170-p2udt3189lv) Units=km Length=0.0196223 bus1=p2udt3189lv.1.2 bus2=p2udm11170.1.2 switch=n enabled=y phases=2 Linecode=1P_UG_AL_1/0_Brenau_0_416_0_2_2_2_2

New Line.l(r:p2udm11171-p2ulv12895) Units=km Length=0.00513721 bus1=p2udm11171.1.2 bus2=p2ulv12895.1.2 switch=n enabled=y phases=2 Linecode=1P_UG_AL_2/0_Converse_0_416_0_2_2_2_2

New Line.l(r:p2udm11171-p2udt3189lv) Units=km Length=0.00981115 bus1=p2udt3189lv.1.2 bus2=p2udm11171.1.2 switch=n enabled=y phases=2 Linecode=1P_UG_AL_2/0_Converse_0_416_0_2_2_2_2

New Line.l(r:p2udm12089-p2ulv17700) Units=km Length=0.00586003 bus1=p2udm12089.1.2 bus2=p2ulv17700.1.2 switch=n enabled=y phases=2 Linecode=1P_UG_AL_4/0_Sweetbriar_0_416_0_2_2_2_2

New Line.l(r:p2udm12091-p2ulv21277) Units=km Length=0.0051011 bus1=p2udm12091.1.2 bus2=p2ulv21277.1.2 switch=n enabled=y phases=2 Linecode=1P_UG_AL_1/0_Brenau_0_416_0_2_2_2_2

New Line.l(r:p2udm12089-p2udm12091) Units=km Length=0.009562260000000001 bus1=p2udm12089.1.2 bus2=p2udm12091.1.2 switch=n enabled=y phases=2 Linecode=1P_UG_AL_1/0_Brenau_0_416_0_2_2_2_2

New Line.l(r:p2udm12089-p2udt3483lv) Units=km Length=0.009562260000000001 bus1=p2udt3483lv.1.2 bus2=p2udm12089.1.2 switch=n enabled=y phases=2 Linecode=1P_UG_AL_4/0_Sweetbriar_0_416_0_2_2_2_2

New Line.l(r:p2udm12092-p2ulv24006) Units=km Length=0.006776350000000001 bus1=p2udm12092.1.2 bus2=p2ulv24006.1.2 switch=n enabled=y phases=2 Linecode=1P_UG_AL_1/0_Brenau_0_416_0_2_2_2_2

New Line.l(r:p2udm12088-p2ulv4580) Units=km Length=0.00609355 bus1=p2udm12088.1.2 bus2=p2ulv4580.1.2 switch=n enabled=y phases=2 Linecode=1P_UG_AL_1/0_Brenau_0_416_0_2_2_2_2

New Line.l(r:p2udm12088-p2ulv19032) Units=km Length=0.00704347 bus1=p2udm12088.1.2 bus2=p2ulv19032.1.2 switch=n enabled=y phases=2 Linecode=1P_UG_AL_1/0_Brenau_0_416_0_2_2_2_2

New Line.l(r:p2udm12088-p2udm12092) Units=km Length=0.009562260000000001 bus1=p2udm12092.1.2 bus2=p2udm12088.1.2 switch=n enabled=y phases=2 Linecode=1P_UG_AL_2/0_Converse_0_416_0_2_2_2_2

New Line.l(r:p2udm12092-p2udt3483lv) Units=km Length=0.00955377 bus1=p2udt3483lv.1.2 bus2=p2udm12092.1.2 switch=n enabled=y phases=2 Linecode=1P_UG_AL_4/0_Sweetbriar_0_416_0_2_2_2_2

New Line.l(r:p2udt3622lv-p2ulv12651) Units=km Length=0.0118663 bus1=p2udt3622lv.1.2 bus2=p2ulv12651.1.2 switch=n enabled=y phases=2 Linecode=1P_UG_AL_1/0_Brenau_0_416_0_2_2_2_2

New Line.l(r:p2udm12501-p2ulv4830) Units=km Length=0.00717597 bus1=p2udm12501.1.2 bus2=p2ulv4830.1.2 switch=n enabled=y phases=2 Linecode=1P_UG_AL_1/0_Brenau_0_416_0_2_2_2_2

New Line.l(r:p2udm12501-p2ulv15158) Units=km Length=0.007347610000000001 bus1=p2udm12501.1.2 bus2=p2ulv15158.1.2 switch=n enabled=y phases=2 Linecode=1P_UG_AL_1/0_Brenau_0_416_0_2_2_2_2

New Line.l(r:p2udm12501-p2udt3622lv) Units=km Length=0.00940688 bus1=p2udt3622lv.1.2 bus2=p2udm12501.1.2 switch=n enabled=y phases=2 Linecode=1P_UG_AL_2/0_Converse_0_416_0_2_2_2_2

New Line.l(r:p2udm12504-p2ulv23125) Units=km Length=0.005416790000000001 bus1=p2udm12504.1.2 bus2=p2ulv23125.1.2 switch=n enabled=y phases=2 Linecode=1P_UG_AL_1/0_Brenau_0_416_0_2_2_2_2

New Line.l(r:p2udm12504-p2udt3622lv) Units=km Length=0.00941455 bus1=p2udt3622lv.1.2 bus2=p2udm12504.1.2 switch=n enabled=y phases=2 Linecode=1P_UG_AL_1/0_Brenau_0_416_0_2_2_2_2

New Line.l(r:p2udt3623lv-p2ulv4831) Units=km Length=0.00603419 bus1=p2udt3623lv.1.2 bus2=p2ulv4831.1.2 switch=n enabled=y phases=2 Linecode=1P_OH_AL_2/0_Rucina_0_416_0_2_2_2_2

New Line.l(r:p2udt3623lv-p2ulv21973) Units=km Length=0.00491009 bus1=p2udt3623lv.1.2 bus2=p2ulv21973.1.2 switch=n enabled=y phases=2 Linecode=1P_OH_AL_2/0_Rucina_0_416_0_2_2_2_2

New Line.l(r:p2udm12506-p2ulv21733) Units=km Length=0.00383338 bus1=p2udm12506.1.2 bus2=p2ulv21733.1.2 switch=n enabled=y phases=2 Linecode=1P_OH_AL_4_Periwinkle_0_416_0_2_2_2_2

New Line.l(r:p2udm12506-p2udt3623lv) Units=km Length=0.0130415 bus1=p2udt3623lv.1.2 bus2=p2udm12506.1.2 switch=n enabled=y phases=2 Linecode=1P_OH_AL_2/0_Rucina_0_416_0_2_2_2_2

New Line.l(r:p2udt3756lv-p2ulv5073) Units=km Length=0.00584822 bus1=p2udt3756lv.1.2 bus2=p2ulv5073.1.2 switch=n enabled=y phases=2 Linecode=1P_OH_AL_2/0_Rucina_0_416_0_2_2_2_2

New Line.l(r:p2udm12884-p2ulv5074) Units=km Length=0.010140000000000001 bus1=p2udm12884.1.2 bus2=p2ulv5074.1.2 switch=n enabled=y phases=2 Linecode=1P_UG_AL_1/0_Brenau_0_416_0_2_2_2_2

New Line.l(r:p2udm12884-p2udt3757lv) Units=km Length=0.0195514 bus1=p2udt3757lv.1.2 bus2=p2udm12884.1.2 switch=n enabled=y phases=2 Linecode=1P_UG_AL_1/0_Brenau_0_416_0_2_2_2_2

New Line.l(r:p2udm12885-p2ulv14712) Units=km Length=0.00939878 bus1=p2udm12885.1.2 bus2=p2ulv14712.1.2 switch=n enabled=y phases=2 Linecode=1P_UG_AL_2/0_Converse_0_416_0_2_2_2_2

New Line.l(r:p2udm12885-p2udt3757lv) Units=km Length=0.0195612 bus1=p2udt3757lv.1.2 bus2=p2udm12885.1.2 switch=n enabled=y phases=2 Linecode=1P_UG_AL_2/0_Converse_0_416_0_2_2_2_2

New Line.l(r:p2udm14439-p2ulv10760) Units=km Length=0.00544832 bus1=p2udm14439.1.2 bus2=p2ulv10760.1.2 switch=n enabled=y phases=2 Linecode=1P_UG_AL_1/0_Brenau_0_416_0_2_2_2_2

New Line.l(r:p2udm14440-p2ulv14710) Units=km Length=0.00752639 bus1=p2udm14440.1.2 bus2=p2ulv14710.1.2 switch=n enabled=y phases=2 Linecode=1P_UG_AL_1/0_Brenau_0_416_0_2_2_2_2

New Line.l(r:p2udm14439-p2udm14440) Units=km Length=0.0193834 bus1=p2udm14439.1.2 bus2=p2udm14440.1.2 switch=n enabled=y phases=2 Linecode=1P_UG_AL_1/0_Brenau_0_416_0_2_2_2_2

New Line.l(r:p2udm14439-p2udt4290lv) Units=km Length=0.009684630000000001 bus1=p2udt4290lv.1.2 bus2=p2udm14439.1.2 switch=n enabled=y phases=2 Linecode=1P_UG_AL_2/0_Converse_0_416_0_2_2_2_2

New Line.l(r:p2udm14441-p2ulv14930) Units=km Length=0.00727617 bus1=p2udm14441.1.2 bus2=p2ulv14930.1.2 switch=n enabled=y phases=2 Linecode=1P_UG_AL_1/0_Brenau_0_416_0_2_2_2_2

New Line.l(r:p2udm14441-p2ulv22206) Units=km Length=0.00536981 bus1=p2udm14441.1.2 bus2=p2ulv22206.1.2 switch=n enabled=y phases=2 Linecode=1P_UG_AL_1/0_Brenau_0_416_0_2_2_2_2

New Line.l(r:p2udm14437-p2ulv6015) Units=km Length=0.0118135 bus1=p2udm14437.1.2 bus2=p2ulv6015.1.2 switch=n enabled=y phases=2 Linecode=1P_UG_AL_1/0_Brenau_0_416_0_2_2_2_2

New Line.l(r:p2udm14438-p2ulv9558) Units=km Length=0.00538454 bus1=p2udm14438.1.2 bus2=p2ulv9558.1.2 switch=n enabled=y phases=2 Linecode=1P_UG_AL_1/0_Brenau_0_416_0_2_2_2_2

New Line.l(r:p2udm14437-p2udm14438) Units=km Length=0.00969149 bus1=p2udm14437.1.2 bus2=p2udm14438.1.2 switch=n enabled=y phases=2 Linecode=1P_UG_AL_1/0_Brenau_0_416_0_2_2_2_2

New Line.l(r:p2udm14437-p2udm14441) Units=km Length=0.00969191 bus1=p2udm14441.1.2 bus2=p2udm14437.1.2 switch=n enabled=y phases=2 Linecode=1P_UG_AL_1/0_Brenau_0_416_0_2_2_2_2

New Line.l(r:p2udm14441-p2udt4290lv) Units=km Length=0.009684630000000001 bus1=p2udt4290lv.1.2 bus2=p2udm14441.1.2 switch=n enabled=y phases=2 Linecode=1P_UG_AL_4/0_Sweetbriar_0_416_0_2_2_2_2

New Line.l(r:p2udt4394lv-p2ulv6219) Units=km Length=0.0170475 bus1=p2udt4394lv.1.2 bus2=p2ulv6219.1.2 switch=n enabled=y phases=2 Linecode=1P_OH_AL_2/0_Rucina_0_416_0_2_2_2_2

New Line.l(r:p2udt4394lv-p2ulv8804) Units=km Length=0.0170475 bus1=p2udt4394lv.1.2 bus2=p2ulv8804.1.2 switch=n enabled=y phases=2 Linecode=1P_OH_AL_2/0_Rucina_0_416_0_2_2_2_2

New Line.l(r:p2udm14782-p2ulv6275) Units=km Length=0.00530187 bus1=p2udm14782.1.2 bus2=p2ulv6275.1.2 switch=n enabled=y phases=2 Linecode=1P_UG_AL_2/0_Converse_0_416_0_2_2_2_2

New Line.l(r:p2udm14782-p2ulv24207) Units=km Length=0.007090180000000001 bus1=p2udm14782.1.2 bus2=p2ulv24207.1.2 switch=n enabled=y phases=2 Linecode=1P_UG_AL_1/0_Brenau_0_416_0_2_2_2_2

New Line.l(r:p2udm14782-p2udt4420lv) Units=km Length=0.0198027 bus1=p2udt4420lv.1.2 bus2=p2udm14782.1.2 switch=n enabled=y phases=2 Linecode=1P_UG_AL_4/0_Sweetbriar_0_416_0_2_2_2_2

New Line.l(r:p2udm14783-p2ulv6516) Units=km Length=0.00567825 bus1=p2udm14783.1.2 bus2=p2ulv6516.1.2 switch=n enabled=y phases=2 Linecode=1P_UG_AL_1/0_Brenau_0_416_0_2_2_2_2

New Line.l(r:p2udm14784-p2ulv23327) Units=km Length=0.00658738 bus1=p2udm14784.1.2 bus2=p2ulv23327.1.2 switch=n enabled=y phases=2 Linecode=1P_UG_AL_1/0_Brenau_0_416_0_2_2_2_2

New Line.l(r:p2udm14783-p2udm14784) Units=km Length=0.009901360000000001 bus1=p2udm14783.1.2 bus2=p2udm14784.1.2 switch=n enabled=y phases=2 Linecode=1P_UG_AL_1/0_Brenau_0_416_0_2_2_2_2

New Line.l(r:p2udm14783-p2udt4420lv) Units=km Length=0.00990202 bus1=p2udt4420lv.1.2 bus2=p2udm14783.1.2 switch=n enabled=y phases=2 Linecode=1P_UG_AL_4/0_Sweetbriar_0_416_0_2_2_2_2

New Line.l(r:p2udt5063lv-p2ulv22456) Units=km Length=0.007667370000000001 bus1=p2udt5063lv.1.2 bus2=p2ulv22456.1.2 switch=n enabled=y phases=2 Linecode=1P_UG_AL_1/0_Brenau_0_416_0_2_2_2_2

New Line.l(r:p2udm16481-p2ulv7719) Units=km Length=0.00487863 bus1=p2udm16481.1.2 bus2=p2ulv7719.1.2 switch=n enabled=y phases=2 Linecode=1P_UG_AL_1/0_Brenau_0_416_0_2_2_2_2

New Line.l(r:p2udm16481-p2ulv10502) Units=km Length=0.00570793 bus1=p2udm16481.1.2 bus2=p2ulv10502.1.2 switch=n enabled=y phases=2 Linecode=1P_UG_AL_1/0_Brenau_0_416_0_2_2_2_2

New Line.l(r:p2udm16481-p2udt5063lv) Units=km Length=0.00950276 bus1=p2udt5063lv.1.2 bus2=p2udm16481.1.2 switch=n enabled=y phases=2 Linecode=1P_UG_AL_4/0_Sweetbriar_0_416_0_2_2_2_2

New Line.l(r:p2udm16482-p2ulv8646) Units=km Length=0.00480563 bus1=p2udm16482.1.2 bus2=p2ulv8646.1.2 switch=n enabled=y phases=2 Linecode=1P_UG_AL_1/0_Brenau_0_416_0_2_2_2_2

New Line.l(r:p2udm16482-p2udt5063lv) Units=km Length=0.028502 bus1=p2udt5063lv.1.2 bus2=p2udm16482.1.2 switch=n enabled=y phases=2 Linecode=1P_UG_AL_1/0_Brenau_0_416_0_2_2_2_2

New Line.l(r:p2udm17225-p2ulv11706) Units=km Length=0.0057621 bus1=p2udm17225.1.2 bus2=p2ulv11706.1.2 switch=n enabled=y phases=2 Linecode=1P_UG_AL_1/0_Brenau_0_416_0_2_2_2_2

New Line.l(r:p2udm17225-p2udt5361lv) Units=km Length=0.0195338 bus1=p2udt5361lv.1.2 bus2=p2udm17225.1.2 switch=n enabled=y phases=2 Linecode=1P_UG_AL_1/0_Brenau_0_416_0_2_2_2_2

New Line.l(r:p2udm17226-p2ulv22207) Units=km Length=0.00593709 bus1=p2udm17226.1.2 bus2=p2ulv22207.1.2 switch=n enabled=y phases=2 Linecode=1P_UG_AL_2/0_Converse_0_416_0_2_2_2_2

New Line.l(r:p2udm17224-p2ulv8432) Units=km Length=0.00585317 bus1=p2udm17224.1.2 bus2=p2ulv8432.1.2 switch=n enabled=y phases=2 Linecode=1P_UG_AL_1/0_Brenau_0_416_0_2_2_2_2

New Line.l(r:p2udm17224-p2udm17226) Units=km Length=0.0136301 bus1=p2udm17226.1.2 bus2=p2udm17224.1.2 switch=n enabled=y phases=2 Linecode=1P_UG_AL_1/0_Brenau_0_416_0_2_2_2_2

New Line.l(r:p2udm17226-p2udt5361lv) Units=km Length=0.00607543 bus1=p2udt5361lv.1.2 bus2=p2udm17226.1.2 switch=n enabled=y phases=2 Linecode=1P_UG_AL_4/0_Sweetbriar_0_416_0_2_2_2_2

New Line.l(r:p2udm17557-p2ulv8846) Units=km Length=0.00778402 bus1=p2udm17557.1.2 bus2=p2ulv8846.1.2 switch=n enabled=y phases=2 Linecode=1P_UG_AL_1/0_Brenau_0_416_0_2_2_2_2

New Line.l(r:p2udm17557-p2udt5498lv) Units=km Length=0.00962033 bus1=p2udt5498lv.1.2 bus2=p2udm17557.1.2 switch=n enabled=y phases=2 Linecode=1P_UG_AL_1/0_Brenau_0_416_0_2_2_2_2

New Line.l(r:p2udm17558-p2ulv17477) Units=km Length=0.0069971600000000005 bus1=p2udm17558.1.2 bus2=p2ulv17477.1.2 switch=n enabled=y phases=2 Linecode=1P_UG_AL_2/0_Converse_0_416_0_2_2_2_2

New Line.l(r:p2udm17558-p2udt5498lv) Units=km Length=0.00963033 bus1=p2udt5498lv.1.2 bus2=p2udm17558.1.2 switch=n enabled=y phases=2 Linecode=1P_UG_AL_2/0_Converse_0_416_0_2_2_2_2

New Line.l(r:p2udt5608lv-p2ulv9338) Units=km Length=0.00774273 bus1=p2udt5608lv.1.2 bus2=p2ulv9338.1.2 switch=n enabled=y phases=2 Linecode=1P_UG_AL_1/0_Brenau_0_416_0_2_2_2_2

New Line.l(r:p2udm17855-p2ulv9095) Units=km Length=0.00578081 bus1=p2udm17855.1.2 bus2=p2ulv9095.1.2 switch=n enabled=y phases=2 Linecode=1P_UG_AL_2/0_Converse_0_416_0_2_2_2_2

New Line.l(r:p2udm17858-p2ulv19740) Units=km Length=0.00558342 bus1=p2udm17858.1.2 bus2=p2ulv19740.1.2 switch=n enabled=y phases=2 Linecode=1P_UG_AL_1/0_Brenau_0_416_0_2_2_2_2

New Line.l(r:p2udm17855-p2udm17858) Units=km Length=0.0193765 bus1=p2udm17855.1.2 bus2=p2udm17858.1.2 switch=n enabled=y phases=2 Linecode=1P_UG_AL_1/0_Brenau_0_416_0_2_2_2_2

New Line.l(r:p2udm17855-p2udt5608lv) Units=km Length=0.009684630000000001 bus1=p2udt5608lv.1.2 bus2=p2udm17855.1.2 switch=n enabled=y phases=2 Linecode=1P_UG_AL_4/0_Sweetbriar_0_416_0_2_2_2_2

New Line.l(r:p2udm17857-p2ulv12398) Units=km Length=0.00560972 bus1=p2udm17857.1.2 bus2=p2ulv12398.1.2 switch=n enabled=y phases=2 Linecode=1P_UG_AL_1/0_Brenau_0_416_0_2_2_2_2

New Line.l(r:p2udm17857-p2udt5608lv) Units=km Length=0.0193834 bus1=p2udt5608lv.1.2 bus2=p2udm17857.1.2 switch=n enabled=y phases=2 Linecode=1P_UG_AL_1/0_Brenau_0_416_0_2_2_2_2

New Line.l(r:p2udt5776lv-p2ulv9559) Units=km Length=0.00599633 bus1=p2udt5776lv.1.2 bus2=p2ulv9559.1.2 switch=n enabled=y phases=2 Linecode=1P_OH_AL_2/0_Rucina_0_416_0_2_2_2_2

New Line.l(r:p2udt5776lv-p2ulv20847) Units=km Length=0.00732777 bus1=p2udt5776lv.1.2 bus2=p2ulv20847.1.2 switch=n enabled=y phases=2 Linecode=1P_OH_AL_2/0_Rucina_0_416_0_2_2_2_2

New Line.l(r:p2udm18260-p2ulv12164) Units=km Length=0.00463113 bus1=p2udm18260.1.2 bus2=p2ulv12164.1.2 switch=n enabled=y phases=2 Linecode=1P_UG_AL_1/0_Brenau_0_416_0_2_2_2_2

New Line.l(r:p2udm18260-p2udt5776lv) Units=km Length=0.017970700000000003 bus1=p2udt5776lv.1.2 bus2=p2udm18260.1.2 switch=n enabled=y phases=2 Linecode=1P_OH_AL_2/0_Rucina_0_416_0_2_2_2_2

New Line.l(r:p2udt7499lv-p2ulv15805) Units=km Length=0.001 bus1=p2udt7499lv.1.2 bus2=p2ulv15805.1.2 switch=n enabled=y phases=2 Linecode=1P_OH_AL_4_Periwinkle_0_416_0_2_2_2_2

New Line.l(r:p2udt7510lv-p2ulv15850) Units=km Length=0.0064464 bus1=p2udt7510lv.1.2 bus2=p2ulv15850.1.2 switch=n enabled=y phases=2 Linecode=1P_UG_AL_4/0_Sweetbriar_0_416_0_2_2_2_2

New Line.l(r:p2udt8099lv-p2ulv18790) Units=km Length=0.00733368 bus1=p2udt8099lv.1.2 bus2=p2ulv18790.1.2 switch=n enabled=y phases=2 Linecode=1P_UG_AL_1/0_Brenau_0_416_0_2_2_2_2

New Line.l(r:p2udm22534-p2ulv20845) Units=km Length=0.0063602 bus1=p2udm22534.1.2 bus2=p2ulv20845.1.2 switch=n enabled=y phases=2 Linecode=1P_UG_AL_4/0_Sweetbriar_0_416_0_2_2_2_2

New Line.l(r:p2udm22534-p2udt8099lv) Units=km Length=0.009495960000000001 bus1=p2udt8099lv.1.2 bus2=p2udm22534.1.2 switch=n enabled=y phases=2 Linecode=1P_UG_AL_4/0_Sweetbriar_0_416_0_2_2_2_2

New Line.l(r:p2udt8454lv-p2ulv20846) Units=km Length=0.00632978 bus1=p2udt8454lv.1.2 bus2=p2ulv20846.1.2 switch=n enabled=y phases=2 Linecode=1P_UG_AL_2/0_Converse_0_416_0_2_2_2_2

New Line.l(r:p2udt8737lv-p2ulv22625) Units=km Length=0.00824291 bus1=p2udt8737lv.1.2 bus2=p2ulv22625.1.2 switch=n enabled=y phases=2 Linecode=1P_OH_AL_2/0_Rucina_0_416_0_2_2_2_2

New Line.l(r:p2udt2247-p2udt3188) Units=km Length=0.0981116 bus1=p2udt2247-p2udt3188x.1 bus2=p2udt2247-p2udt3188xx.1 switch=n enabled=y phases=1 Linecode=1P_UG_AL_#2_15_12_47_0_1_1_1_1

New Line.l(r:p2udt2247-p2udt867) Units=km Length=0.09536 bus1=p2udt2247-p2udt867xx.1 bus2=p2udt2247-p2udt867x.1 switch=n enabled=y phases=1 Linecode=1P_UG_AL_#2_15_12_47_0_1_1_1_1

New Line.l(r:p2udt2248-p2udt2880) Units=km Length=0.08523040000000001 bus1=p2udt2248-p2udt2880x.1 bus2=p2udt2248-p2udt2880xx.1 switch=n enabled=y phases=1 Linecode=1P_UG_AL_#2_15_12_47_0_1_1_1_1

New Line.l(r:p2udt2248-p2udt7510) Units=km Length=0.0475013 bus1=p2udt2248-p2udt7510xx.1 bus2=p2udt2248-p2udt7510x.1 switch=n enabled=y phases=1 Linecode=1P_UG_AL_#2_15_12_47_0_1_1_1_1

New Line.l(r:p2udt5063-p2udt7510) Units=km Length=0.0380053 bus1=p2udt5063-p2udt7510x.1 bus2=p2udt5063-p2udt7510xx.1 switch=n enabled=y phases=1 Linecode=1P_UG_AL_#2_15_12_47_0_1_1_1_1

New Line.l(r:p2udt1294-p2udt5063) Units=km Length=0.0380121 bus1=p2udt1294-p2udt5063x.1 bus2=p2udt1294-p2udt5063xx.1 switch=n enabled=y phases=1 Linecode=1P_UG_AL_#2_15_12_47_0_1_1_1_1

New Line.l(r:p2udt1294-p2udt8099) Units=km Length=0.009495960000000001 bus1=p2udt1294-p2udt8099xx.1 bus2=p2udt1294-p2udt8099x.1 switch=n enabled=y phases=1 Linecode=1P_UG_AL_#2_15_12_47_0_1_1_1_1

New Line.l(r:p2udt2736-p2udt642) Units=km Length=0.0196223 bus1=p2udt2736-p2udt642xx.3 bus2=p2udt2736-p2udt642x.3 switch=n enabled=y phases=1 Linecode=1P_UG_AL_#2_15_12_47_0_1_1_1_1

New Line.l(r:p2udt3189-p2udt642) Units=km Length=0.0392446 bus1=p2udt3189-p2udt642x.3 bus2=p2udt3189-p2udt642xx.3 switch=n enabled=y phases=1 Linecode=1P_UG_AL_#2_15_12_47_0_1_1_1_1

New Line.l(r:p2udt3189-p2udt8454) Units=km Length=0.0563242 bus1=p2udt3189-p2udt8454xx.3 bus2=p2udt3189-p2udt8454x.3 switch=n enabled=y phases=1 Linecode=1P_UG_AL_#2_15_12_47_0_1_1_1_1

New Line.l(r:p2udt2060-p2udt4420) Units=km Length=0.036442 bus1=p2udt2060-p2udt4420xx.3 bus2=p2udt2060-p2udt4420x.3 switch=n enabled=y phases=1 Linecode=1P_UG_AL_#2_15_12_47_0_1_1_1_1

New Line.l(r:p2udt4420-p2udt8454) Units=km Length=0.0466942 bus1=p2udt4420-p2udt8454xx.3 bus2=p2udt4420-p2udt8454x.3 switch=n enabled=y phases=1 Linecode=1P_UG_AL_#2_15_12_47_0_1_1_1_1

New Line.l(r:p2udt5361-p2udt8454) Units=km Length=0.0362261 bus1=p2udt5361-p2udt8454xx.3 bus2=p2udt5361-p2udt8454xxx.3 switch=n enabled=y phases=1 Linecode=1P_UG_AL_#2_15_12_47_0_1_1_1_1

New Line.l(r:p2udt3757-p2udt8559) Units=km Length=0.00978062 bus1=p2udt3757-p2udt8559xx.1 bus2=p2udt3757-p2udt8559x.1 switch=n enabled=y phases=1 Linecode=1P_UG_AL_#2_15_12_47_0_1_1_1_1

New Line.l(r:p2udt3622-p2udt5776) Units=km Length=0.042700600000000005 bus1=p2udt5776.2 bus2=p2udt3622.2 switch=n enabled=y phases=1 Linecode=1P_OH_AL_ACSR_#2_Sparrow_12_47_0_1_1_1_1

New Line.l(r:p2udt3623-p2udt5776) Units=km Length=0.0318865 bus1=p2udt3623.2 bus2=p2udt5776.2 switch=n enabled=y phases=1 Linecode=1P_OH_AL_ACSR_#2_Sparrow_12_47_0_1_1_1_1

New Line.l(r:p2udt1079-p2udt3623) Units=km Length=0.070939 bus1=p2udt1079.2 bus2=p2udt3623.2 switch=n enabled=y phases=1 Linecode=1P_OH_AL_ACSR_#2_Sparrow_12_47_0_1_1_1_1

New Line.l(r:p2udt1079-p2udt3483) Units=km Length=0.06691570000000001 bus1=p2udt1079-p2udt3483xx.2 bus2=p2udt1079-p2udt3483x.2 switch=n enabled=y phases=1 Linecode=1P_UG_AL_#2_15_12_47_0_1_1_1_1

New Line.l(r:p2udt3483-p2udt8099) Units=km Length=0.121858 bus1=p2udt3483-p2udt8099xx.2 bus2=p2udt3483-p2udt8099x.2 switch=n enabled=y phases=1 Linecode=1P_UG_AL_#2_15_12_47_0_1_1_1_1

New Line.l(r:p2udt1827-p2udt7499) Units=km Length=0.0779077 bus1=p2udt1827-p2udt7499x.3 bus2=p2udt7499.3 switch=n enabled=y phases=1 Linecode=1P_OH_AL_ACSR_#2_Sparrow_12_47_0_1_1_1_1

New Line.l(r:p2udt4394-p2udt7147) Units=km Length=0.170237 bus1=p2udt4394-p2udt7147x.2 bus2=p2udt4394.2 switch=n enabled=y phases=1 Linecode=1P_OH_AL_ACSR_#2_Sparrow_12_47_0_1_1_1_1

New Line.l(r:p2udt3990-p2udt8737) Units=km Length=0.111057 bus1=p2udt3990-p2udt8737x.1 bus2=p2udt8737.1 switch=n enabled=y phases=1 Linecode=1P_OH_AL_ACSR_#2_Sparrow_12_47_0_1_1_1_1

New Line.l(r:p2udt2881-p2udt3756) Units=km Length=0.298728 bus1=p2udt3756.1.2.3 bus2=p2udt2881.1.2.3 switch=n enabled=y phases=3 Linecode=3P_OH_AL_ACSR_4/0_Penguin_12_47_0_3_3_3_3

New Line.l(r:p2udt5933-p2udt8406) Units=km Length=0.170994 bus1=p2udt8406.1.2.3 bus2=p2udt5933.1.2.3 switch=n enabled=y phases=3 Linecode=3P_OH_AL_ACSR_4/0_Penguin_12_47_0_3_3_3_3

New Line.l(r:p2udt8406-p2umv16) Units=km Length=0.291574 bus1=p2umv16.1.2.3 bus2=p2udt8406.1.2.3 switch=n enabled=y phases=3 Linecode=3P_OH_AL_ACSR_4/0_Penguin_12_47_0_3_3_3_3

New Line.l(r:p2udt8301-p2umv16) Units=km Length=0.311877 bus1=p2udt8301.1.2.3 bus2=p2umv16.1.2.3 switch=n enabled=y phases=3 Linecode=3P_OH_AL_ACSR_4/0_Penguin_12_47_0_3_3_3_3

New Line.l(r:p2udt7112-p2udt8301) Units=km Length=0.0902502 bus1=p2udt7112.1.2.3 bus2=p2udt7112_b1_1.1.2.3 switch=n enabled=y phases=3 Linecode=3P_OH_AL_ACSR_4/0_Penguin_12_47_0_3_3_3_3

New Line.l(r:p2udt3756-p2udt7112) Units=km Length=0.09486940000000002 bus1=p2udt3756.1.2.3 bus2=p2udt7112.1.2.3 switch=n enabled=y phases=3 Linecode=3P_OH_AL_ACSR_4/0_Penguin_12_47_0_3_3_3_3

New Line.l(r:p2udt2249-p2udt3756) Units=km Length=0.04514050000000001 bus1=p2udt2249.1.2.3 bus2=p2udt3756.1.2.3 switch=n enabled=y phases=3 Linecode=3P_OH_AL_ACSR_4/0_Penguin_12_47_0_3_3_3_3

New Line.l(r:p2udt2249-p2udt5858) Units=km Length=0.150905 bus1=p2udt5858.1.2.3 bus2=p2udt2249.1.2.3 switch=n enabled=y phases=3 Linecode=3P_OH_AL_ACSR_4/0_Penguin_12_47_0_3_3_3_3

New Line.l(r:p2udt5858-p2uhs9_1247) Units=km Length=0.11416 bus1=p2udt5858-p2uhs9_1247x.1.2.3 bus2=p2udt5858.1.2.3 switch=n enabled=y phases=3 Linecode=3P_OH_AL_ACSR_4/0_Penguin_12_47_0_3_3_3_3

New Line.l(r:p2udt5858lv-p2ulv9785) Units=km Length=0.0181113 bus1=p2udt5858lv.1.2.3 bus2=p2ulv9785.1.2.3 switch=n enabled=y phases=3 Linecode=3P_UG_AL_350kcmil_15_0_416_0_3_3_3_3

New Line.l(r:p2udt2249lv-p2ulv2643) Units=km Length=0.027025000000000004 bus1=p2udt2249lv.1.2.3 bus2=p2ulv2643.1.2.3 switch=n enabled=y phases=3 Linecode=3P_UG_AL_350kcmil_15_0_416_0_3_3_3_3

New Line.l(r:p2udm8080-p2ulv14709) Units=km Length=0.00623732 bus1=p2udm8080.1.2.3 bus2=p2ulv14709.1.2.3 switch=n enabled=y phases=3 Linecode=3P_UG_AL_750kcmil_25_0_416_0_3_3_3_3

New Line.l(r:p2udm8080-p2udt2249lv) Units=km Length=0.0714636 bus1=p2udt2249lv.1.2.3 bus2=p2udm8080.1.2.3 switch=n enabled=y phases=3 Linecode=3P_UG_AL_750kcmil_25_0_416_0_3_3_3_3

New Line.l(r:p2udt6115lv-p2ulv10501) Units=km Length=0.00513697 bus1=p2udt6115lv.1.2.3 bus2=p2ulv10501.1.2.3 switch=n enabled=y phases=3 Linecode=3P_UG_AL_350kcmil_15_0_416_0_3_3_3_3

New Line.l(r:p2udt5498-p2udt6115) Units=km Length=0.0192406 bus1=p2udt5498-p2udt6115x.1.2.3 bus2=p2udt5498-p2udt6115xx.1.2.3 switch=n enabled=y phases=3 Linecode=3P_UG_AL_4/0_25_12_47_0_3_3_3_3

New Line.l(r:p2udt5498-p2udt868) Units=km Length=0.0192507 bus1=p2udt5498-p2udt868xx.1.2.3 bus2=p2udt5498-p2udt868x.1.2.3 switch=n enabled=y phases=3 Linecode=3P_UG_AL_4/0_25_12_47_0_3_3_3_3

New Line.l(r:p2udt867-p2udt868) Units=km Length=0.0307903 bus1=p2udt867-p2udt868x.1.2.3 bus2=p2udt867-p2udt868xx.1.2.3 switch=n enabled=y phases=3 Linecode=3P_UG_AL_4/0_25_12_47_0_3_3_3_3

New Line.l(r:p2udt3039-p2udt867) Units=km Length=0.0569118 bus1=p2udt3039-p2udt867x.1.2.3 bus2=p2udt3039-p2udt867xx.1.2.3 switch=n enabled=y phases=3 Linecode=3P_UG_AL_4/0_25_12_47_0_3_3_3_3

New Line.l(r:p2udt3039-p2udt4290) Units=km Length=0.0484373 bus1=p2udt3039-p2udt4290xx.1.2.3 bus2=p2udt3039-p2udt4290x.1.2.3 switch=n enabled=y phases=3 Linecode=3P_UG_AL_4/0_25_12_47_0_3_3_3_3

New Line.l(r:p2udt4290-p2udt5608) Units=km Length=0.07750530000000001 bus1=p2udt4290-p2udt5608xx.1.2.3 bus2=p2udt4290-p2udt5608x.1.2.3 switch=n enabled=y phases=3 Linecode=3P_UG_AL_4/0_25_12_47_0_3_3_3_3

New Line.l(r:p2udt2881-p2udt5608) Units=km Length=0.0484373 bus1=p2udt2881-p2udt5608x.1.2.3 bus2=p2udt2881-p2udt5608xx.1.2.3 switch=n enabled=y phases=3 Linecode=3P_UG_AL_4/0_25_12_47_0_3_3_3_3

New Line.l(r:p2udt8559lv-p2ulv21518) Units=km Length=0.0112419 bus1=p2udt8559lv.1.2.3 bus2=p2ulv21518.1.2.3 switch=n enabled=y phases=3 Linecode=3P_UG_AL_350kcmil_15_0_416_0_3_3_3_3

New Line.l(r:p2udt5361-p2udt8559) Units=km Length=0.0489461 bus1=p2udt5361-p2udt8559x.1.2.3 bus2=p2udt5361-p2udt8559xx.1.2.3 switch=n enabled=y phases=3 Linecode=3P_UG_AL_4/0_25_12_47_0_3_3_3_3

New Line.l(r:p2udt1691-p2udt5361) Units=km Length=0.0782467 bus1=p2udt1691-p2udt5361x.1.2.3 bus2=p2udt1691-p2udt5361xx.1.2.3 switch=n enabled=y phases=3 Linecode=3P_UG_AL_4/0_25_12_47_0_3_3_3_3

New Line.l(r:p2udt1691-p2udt8099) Units=km Length=0.119075 bus1=p2udt1691-p2udt8099xx.1.2.3 bus2=p2udt1691-p2udt8099x.1.2.3 switch=n enabled=y phases=3 Linecode=3P_UG_AL_4/0_25_12_47_0_3_3_3_3

New Line.l(r:p2udt2881-p2udt8099) Units=km Length=0.0982971 bus1=p2udt2881-p2udt8099x.1.2.3 bus2=p2udt2881-p2udt8099xx.1.2.3 switch=n enabled=y phases=3 Linecode=3P_UG_AL_4/0_25_12_47_0_3_3_3_3

New Line.l(r:p2udt7112lv-p2ulv14041) Units=km Length=0.007906 bus1=p2udt7112lv.1.2.3 bus2=p2ulv14041.1.2.3 switch=n enabled=y phases=3 Linecode=3P_UG_AL_350kcmil_15_0_416_0_3_3_3_3

New Line.l(r:p2udt8301lv-p2ulv19910) Units=km Length=0.0114781 bus1=p2udt8301lv.1.2.3 bus2=p2ulv19910.1.2.3 switch=n enabled=y phases=3 Linecode=3P_UG_AL_750kcmil_25_0_416_0_3_3_3_3

New Line.l(r:p2udt8406lv-p2ulv20572) Units=km Length=0.00775209 bus1=p2udt8406lv.1.2.3 bus2=p2ulv20572.1.2.3 switch=n enabled=y phases=3 Linecode=3P_UG_AL_350kcmil_15_0_416_0_3_3_3_3

New Line.l(r:p2udt5933lv-p2ulv9964) Units=km Length=0.006239550000000001 bus1=p2udt5933lv.1.2.3 bus2=p2ulv9964.1.2.3 switch=n enabled=y phases=3 Linecode=3P_UG_AL_750kcmil_25_0_416_0_3_3_3_3

New Line.l(r:p2udt7550lv-p2ulv16031) Units=km Length=0.015917 bus1=p2udt7550lv.1.2.3 bus2=p2ulv16031.1.2.3 switch=n enabled=y phases=3 Linecode=3P_UG_AL_350kcmil_15_0_416_0_3_3_3_3

New Line.l(r:p2udt7249lv-p2ulv14656) Units=km Length=0.00553087 bus1=p2udt7249lv.1.2.3 bus2=p2ulv14656.1.2.3 switch=n enabled=y phases=3 Linecode=3P_UG_AL_750kcmil_25_0_416_0_3_3_3_3

New Line.l(r:p2udt1827lv-p2ulv2067) Units=km Length=0.001 bus1=p2udt1827lv.1.2.3 bus2=p2ulv2067.1.2.3 switch=n enabled=y phases=3 Linecode=3P_UG_AL_350kcmil_15_0_416_0_3_3_3_3

New Line.l(r:p2udt1827-p2udt7249) Units=km Length=0.119909 bus1=p2udt7249.1.2.3 bus2=p2udt1827.1.2.3 switch=n enabled=y phases=3 Linecode=3P_OH_AL_ACSR_4/0_Penguin_12_47_0_3_3_3_3

New Line.l(r:p2udt3600lv-p2ulv4783) Units=km Length=0.0558545 bus1=p2udt3600lv.1.2.3 bus2=p2ulv4783.1.2.3 switch=n enabled=y phases=3 Linecode=3P_UG_AL_350kcmil_15_0_416_0_3_3_3_3

New Line.l(r:p2udt3990lv-p2ulv5484) Units=km Length=0.010228 bus1=p2udt3990lv.1.2.3 bus2=p2ulv5484.1.2.3 switch=n enabled=y phases=3 Linecode=3P_UG_AL_750kcmil_25_0_416_0_3_3_3_3

New Line.l(r:p2udt7147lv-p2ulv14203) Units=km Length=0.0100229 bus1=p2udt7147lv.1.2.3 bus2=p2ulv14203.1.2.3 switch=n enabled=y phases=3 Linecode=3P_UG_AL_350kcmil_15_0_416_0_3_3_3_3

New Line.l(r:p2udt3990-p2udt7147) Units=km Length=0.113392 bus1=p2udt3990.1.2.3 bus2=p2udt7147.1.2.3 switch=n enabled=y phases=3 Linecode=3P_OH_AL_ACSR_4/0_Penguin_12_47_0_3_3_3_3

New Line.l(r:p2udt3600-p2udt3990) Units=km Length=0.217239 bus1=p2udt3600.1.2.3 bus2=p2udt3990.1.2.3 switch=n enabled=y phases=3 Linecode=3P_OH_AL_ACSR_4/0_Penguin_12_47_0_3_3_3_3

New Line.l(r:p2udt3600-p2udt7249) Units=km Length=0.0162036 bus1=p2udt7249.1.2.3 bus2=p2udt3600.1.2.3 switch=n enabled=y phases=3 Linecode=3P_OH_AL_ACSR_4/0_Penguin_12_47_0_3_3_3_3

New Line.l(r:p2udt7249-p2udt7550) Units=km Length=0.169663 bus1=p2udt7550.1.2.3 bus2=p2udt7249.1.2.3 switch=n enabled=y phases=3 Linecode=3P_OH_AL_ACSR_4/0_Penguin_12_47_0_3_3_3_3

New Line.l(r:p2udt5933-p2udt7550) Units=km Length=0.0782419 bus1=p2udt5933.1.2.3 bus2=p2udt7550.1.2.3 switch=n enabled=y phases=3 Linecode=3P_OH_AL_ACSR_4/0_Penguin_12_47_0_3_3_3_3

New Line.l(r:p2udt6458lv-p2ulv11655) Units=km Length=0.00877602 bus1=p2udt6458lv.1.2.3 bus2=p2ulv11655.1.2.3 switch=n enabled=y phases=3 Linecode=3P_UG_AL_750kcmil_25_0_416_0_3_3_3_3

New Line.l(r:p2udt6458-p2udt8406) Units=km Length=0.182796 bus1=p2udt8406.1.2.3 bus2=p2udt6458.1.2.3 switch=n enabled=y phases=3 Linecode=3P_OH_AL_ACSR_4/0_Penguin_12_47_0_3_3_3_3

New Line.l(r:p2udm13623-p2ulv5534) Units=km Length=0.0138461 bus1=p2udm13623.1.2.3 bus2=p2ulv5534.1.2.3 switch=n enabled=y phases=3 Linecode=3P_UG_AL_350kcmil_15_0_416_0_3_3_3_3

New Line.l(r:p2udm13623-p2udt4016lv) Units=km Length=0.0356729 bus1=p2udt4016lv.1.2.3 bus2=p2udm13623.1.2.3 switch=n enabled=y phases=3 Linecode=3P_UG_AL_350kcmil_15_0_416_0_3_3_3_3

New Line.l(r:p2udm13624-p2ulv6014) Units=km Length=0.0046612 bus1=p2udm13624.1.2.3 bus2=p2ulv6014.1.2.3 switch=n enabled=y phases=3 Linecode=3P_UG_AL_750kcmil_25_0_416_0_3_3_3_3

New Line.l(r:p2udm13624-p2udt4016lv) Units=km Length=0.0762999 bus1=p2udt4016lv.1.2.3 bus2=p2udm13624.1.2.3 switch=n enabled=y phases=3 Linecode=3P_UG_AL_750kcmil_25_0_416_0_3_3_3_3

New Line.l(r:p2udt6197lv-p2ulv10759) Units=km Length=0.0039025400000000003 bus1=p2udt6197lv.1.2.3 bus2=p2ulv10759.1.2.3 switch=n enabled=y phases=3 Linecode=3P_UG_AL_350kcmil_15_0_416_0_3_3_3_3

New Line.l(r:p2udt4016-p2udt6197) Units=km Length=0.0820869 bus1=p2udt4016.1.2.3 bus2=p2udt6197.1.2.3 switch=n enabled=y phases=3 Linecode=3P_OH_AL_ACSR_4/0_Penguin_12_47_0_3_3_3_3

New Line.l(r:p2udt2249-p2udt4016) Units=km Length=0.129681 bus1=p2udt2249.1.2.3 bus2=p2udt4016.1.2.3 switch=n enabled=y phases=3 Linecode=3P_OH_AL_ACSR_4/0_Penguin_12_47_0_3_3_3_3

New Line.l(r:p2udt5360lv-p2ulv8431) Units=km Length=0.0046900100000000005 bus1=p2udt5360lv.1.2.3 bus2=p2ulv8431.1.2.3 switch=n enabled=y phases=3 Linecode=3P_UG_AL_750kcmil_25_0_416_0_3_3_3_3

New Line.l(r:p2udt5360-p2udt5858) Units=km Length=0.153292 bus1=p2udt5858.1.2.3 bus2=p2udt5360.1.2.3 switch=n enabled=y phases=3 Linecode=3P_OH_AL_ACSR_4/0_Penguin_12_47_0_3_3_3_3

New Line.l(r:p2udt3990-p2udt8374) Units=km Length=0.642775 bus1=p2udt3990-p2udt8374x.1.2.3 bus2=p2udt3990.1.2.3 switch=n enabled=y phases=3 Linecode=3P_OH_AL_ACSR_1033kcmil_Curlew_12.47_1_3_3_3_3

New Line.padswitch(r:p2udt2247-p2udt3188)p2u_42811 Units=km Length=0.001 bus1=p2udt2247.1 bus2=p2udt2247-p2udt3188x.1 switch=y enabled=y phases=1 Linecode=padswitch_1_1_1_1

New Line.padswitch(r:p2udt2247-p2udt3188)p2u_42812 Units=km Length=0.001 bus1=p2udt2247-p2udt3188xx.1 bus2=p2udt3188.1 switch=y enabled=y phases=1 Linecode=padswitch_1_2_1_1_1

New Line.padswitch(r:p2udt2247-p2udt867)p2u_42813 Units=km Length=0.001 bus1=p2udt2247-p2udt867xxx.1 bus2=p2udt2247-p2udt867xx.1 switch=y enabled=y phases=1 Linecode=padswitch_1_2_1_0_1_1

New Line.padswitch(r:p2udt2247-p2udt867)p2u_42814 Units=km Length=0.001 bus1=p2udt2247-p2udt867x.1 bus2=p2udt2247.1 switch=y enabled=y phases=1 Linecode=padswitch_1_2_1_0_1_1

New Line.padswitch(r:p2udt2248-p2udt2880)p2u_42823 Units=km Length=0.001 bus1=p2udt2248.1 bus2=p2udt2248-p2udt2880x.1 switch=y enabled=y phases=1 Linecode=padswitch_1_2_1_0_1_0_1

New Line.padswitch(r:p2udt2248-p2udt2880)p2u_42824 Units=km Length=0.001 bus1=p2udt2248-p2udt2880xx.1 bus2=p2udt2880.1 switch=y enabled=y phases=1 Linecode=padswitch_1_2_1_0_1_0_1_0

New Line.padswitch(r:p2udt2248-p2udt7510)p2u_42825 Units=km Length=0.001 bus1=p2udt7510.1 bus2=p2udt2248-p2udt7510xx.1 switch=y enabled=y phases=1 Linecode=padswitch_1_2_1_0_1_1

New Line.padswitch(r:p2udt2248-p2udt7510)p2u_42826 Units=km Length=0.001 bus1=p2udt2248-p2udt7510x.1 bus2=p2udt2248.1 switch=y enabled=y phases=1 Linecode=padswitch_1_2_1_0_1_1

New Line.padswitch(r:p2udt5063-p2udt7510)p2u_42827 Units=km Length=0.001 bus1=p2udt5063.1 bus2=p2udt5063-p2udt7510x.1 switch=y enabled=y phases=1 Linecode=padswitch_1_2_1_0_1_1

New Line.padswitch(r:p2udt5063-p2udt7510)p2u_42828 Units=km Length=0.001 bus1=p2udt5063-p2udt7510xx.1 bus2=p2udt7510.1 switch=y enabled=y phases=1 Linecode=padswitch_1_2_1_0_1_1

New Line.padswitch(r:p2udt1294-p2udt5063)p2u_42829 Units=km Length=0.001 bus1=p2udt1294.1 bus2=p2udt1294-p2udt5063x.1 switch=y enabled=y phases=1 Linecode=padswitch_1_2_1_0_1_1

New Line.padswitch(r:p2udt1294-p2udt5063)p2u_42830 Units=km Length=0.001 bus1=p2udt1294-p2udt5063xx.1 bus2=p2udt5063.1 switch=y enabled=y phases=1 Linecode=padswitch_1_2_1_0_1_1

New Line.padswitch(r:p2udt1294-p2udt8099)p2u_42831 Units=km Length=0.001 bus1=p2udt1294-p2udt8099xxx.1 bus2=p2udt1294-p2udt8099xx.1 switch=y enabled=y phases=1 Linecode=padswitch_1_2_1_0_1_1

New Line.padswitch(r:p2udt1294-p2udt8099)p2u_42832 Units=km Length=0.001 bus1=p2udt1294-p2udt8099x.1 bus2=p2udt1294.1 switch=y enabled=y phases=1 Linecode=padswitch_1_2_1_0_1_1

New Line.padswitch(r:p2udt2736-p2udt642)p2u_42833 Units=km Length=0.001 bus1=p2udt642.3 bus2=p2udt2736-p2udt642xx.3 switch=y enabled=y phases=1 Linecode=padswitch_1_2_1_0_1_1

New Line.padswitch(r:p2udt2736-p2udt642)p2u_42834 Units=km Length=0.001 bus1=p2udt2736-p2udt642x.3 bus2=p2udt2736.3 switch=y enabled=y phases=1 Linecode=padswitch_1_2_1_0_1_0_1_0

New Line.padswitch(r:p2udt3189-p2udt642)p2u_42835 Units=km Length=0.001 bus1=p2udt3189.3 bus2=p2udt3189-p2udt642x.3 switch=y enabled=y phases=1 Linecode=padswitch_1_2_1_0_1_0_1_0

New Line.padswitch(r:p2udt3189-p2udt642)p2u_42836 Units=km Length=0.001 bus1=p2udt3189-p2udt642xx.3 bus2=p2udt642.3 switch=y enabled=y phases=1 Linecode=padswitch_1_2_1_0_1_1

New Line.padswitch(r:p2udt3189-p2udt8454)p2u_42837 Units=km Length=0.001 bus1=p2udt8454.3 bus2=p2udt3189-p2udt8454xx.3 switch=y enabled=y phases=1 Linecode=padswitch_1_2_1_0_1_1

New Line.padswitch(r:p2udt3189-p2udt8454)p2u_42838 Units=km Length=0.001 bus1=p2udt3189-p2udt8454x.3 bus2=p2udt3189.3 switch=y enabled=y phases=1 Linecode=padswitch_1_2_1_0_1_1

New Line.padswitch(r:p2udt2060-p2udt4420)p2u_42839 Units=km Length=0.001 bus1=p2udt4420.3 bus2=p2udt2060-p2udt4420xx.3 switch=y enabled=y phases=1 Linecode=padswitch_1_2_1_0_1_1

New Line.padswitch(r:p2udt2060-p2udt4420)p2u_42840 Units=km Length=0.001 bus1=p2udt2060-p2udt4420x.3 bus2=p2udt2060.3 switch=y enabled=y phases=1 Linecode=padswitch_1_2_1_0_1_0_1_0

New Line.padswitch(r:p2udt4420-p2udt8454)p2u_42841 Units=km Length=0.001 bus1=p2udt8454.3 bus2=p2udt4420-p2udt8454xx.3 switch=y enabled=y phases=1 Linecode=padswitch_1_2_1_0_1_1

New Line.padswitch(r:p2udt4420-p2udt8454)p2u_42842 Units=km Length=0.001 bus1=p2udt4420-p2udt8454x.3 bus2=p2udt4420.3 switch=y enabled=y phases=1 Linecode=padswitch_1_2_1_0_1_1

New Line.padswitch(r:p2udt5361-p2udt8454)p2u_42843 Units=km Length=0.001 bus1=p2udt5361-p2udt8454x.3 bus2=p2udt5361-p2udt8454xx.3 switch=y enabled=y phases=1 Linecode=padswitch_1_2_1_0_1_1

New Line.padswitch(r:p2udt5361-p2udt8454)p2u_42844 Units=km Length=0.001 bus1=p2udt5361-p2udt8454xxx.3 bus2=p2udt8454.3 switch=y enabled=y phases=1 Linecode=padswitch_1_2_1_0_1_1

New Line.padswitch(r:p2udt3757-p2udt8559)p2u_42845 Units=km Length=0.001 bus1=p2udt3757-p2udt8559xxx.1 bus2=p2udt3757-p2udt8559xx.1 switch=y enabled=y phases=1 Linecode=padswitch_1_2_1_0_1_0_1_0

New Line.padswitch(r:p2udt3757-p2udt8559)p2u_42846 Units=km Length=0.001 bus1=p2udt3757-p2udt8559x.1 bus2=p2udt3757.1 switch=y enabled=y phases=1 Linecode=padswitch_1_2_1_0_1_0_1

New Line.padswitch(r:p2udt1079-p2udt3483)p2u_42853 Units=km Length=0.001 bus1=p2udt3483.2 bus2=p2udt1079-p2udt3483xx.2 switch=y enabled=y phases=1 Linecode=padswitch_1_2_1_0_1_1

New Line.padswitch(r:p2udt1079-p2udt3483)p2u_42854 Units=km Length=0.001 bus1=p2udt1079-p2udt3483x.2 bus2=p2udt1079.2 switch=y enabled=y phases=1 Linecode=padswitch_1_2_1_1_1

New Line.padswitch(r:p2udt3483-p2udt8099)p2u_42855 Units=km Length=0.001 bus1=p2udt3483-p2udt8099xxx.2 bus2=p2udt3483-p2udt8099xx.2 switch=y enabled=y phases=1 Linecode=padswitch_1_2_1_0_1_1

New Line.padswitch(r:p2udt3483-p2udt8099)p2u_42856 Units=km Length=0.001 bus1=p2udt3483-p2udt8099x.2 bus2=p2udt3483.2 switch=y enabled=y phases=1 Linecode=padswitch_1_2_1_1_1

New Line.padswitch(r:p2udt5498-p2udt6115)p2u_42805 Units=km Length=0.001 bus1=p2udt5498.1.2.3 bus2=p2udt5498-p2udt6115x.1.2.3 switch=y enabled=y phases=3 Linecode=padswitch_3_3_3_3

New Line.padswitch(r:p2udt5498-p2udt6115)p2u_42806 Units=km Length=0.001 bus1=p2udt5498-p2udt6115xx.1.2.3 bus2=p2udt6115.1.2.3 switch=y enabled=y phases=3 Linecode=padswitch_3_3_3_3_3

New Line.padswitch(r:p2udt5498-p2udt868)p2u_42807 Units=km Length=0.001 bus1=p2udt868.1.2.3 bus2=p2udt5498-p2udt868xx.1.2.3 switch=y enabled=y phases=3 Linecode=padswitch_3_3_3_3_3

New Line.padswitch(r:p2udt5498-p2udt868)p2u_42808 Units=km Length=0.001 bus1=p2udt5498-p2udt868x.1.2.3 bus2=p2udt5498.1.2.3 switch=y enabled=y phases=3 Linecode=padswitch_3_3_3_1_3_3

New Line.padswitch(r:p2udt867-p2udt868)p2u_42809 Units=km Length=0.001 bus1=p2udt867.1.2.3 bus2=p2udt867-p2udt868x.1.2.3 switch=y enabled=y phases=3 Linecode=padswitch_3_3_3_3_3

New Line.padswitch(r:p2udt867-p2udt868)p2u_42810 Units=km Length=0.001 bus1=p2udt867-p2udt868xx.1.2.3 bus2=p2udt868.1.2.3 switch=y enabled=y phases=3 Linecode=padswitch_3_3_3_3_3

New Line.padswitch(r:p2udt3039-p2udt867)p2u_42815 Units=km Length=0.001 bus1=p2udt3039.1.2.3 bus2=p2udt3039-p2udt867x.1.2.3 switch=y enabled=y phases=3 Linecode=padswitch_3_3_3_3_3

New Line.padswitch(r:p2udt3039-p2udt867)p2u_42816 Units=km Length=0.001 bus1=p2udt3039-p2udt867xx.1.2.3 bus2=p2udt867.1.2.3 switch=y enabled=y phases=3 Linecode=padswitch_3_3_3_3_3

New Line.padswitch(r:p2udt3039-p2udt4290)p2u_42817 Units=km Length=0.001 bus1=p2udt4290.1.2.3 bus2=p2udt3039-p2udt4290xx.1.2.3 switch=y enabled=y phases=3 Linecode=padswitch_3_3_3_1_3_1_3

New Line.padswitch(r:p2udt3039-p2udt4290)p2u_42818 Units=km Length=0.001 bus1=p2udt3039-p2udt4290x.1.2.3 bus2=p2udt3039.1.2.3 switch=y enabled=y phases=3 Linecode=padswitch_3_3_3_3_3

New Line.padswitch(r:p2udt4290-p2udt5608)p2u_42819 Units=km Length=0.001 bus1=p2udt5608.1.2.3 bus2=p2udt4290-p2udt5608xx.1.2.3 switch=y enabled=y phases=3 Linecode=padswitch_3_3_3_1_3_1_3_1

New Line.padswitch(r:p2udt4290-p2udt5608)p2u_42820 Units=km Length=0.001 bus1=p2udt4290-p2udt5608x.1.2.3 bus2=p2udt4290.1.2.3 switch=y enabled=y phases=3 Linecode=padswitch_3_3_3_3_3

New Line.padswitch(r:p2udt2881-p2udt5608)p2u_42821 Units=km Length=0.001 bus1=p2udt2881.1.2.3 bus2=p2udt2881-p2udt5608x.1.2.3 switch=y enabled=y phases=3 Linecode=padswitch_3_3_3_3_3

New Line.padswitch(r:p2udt2881-p2udt5608)p2u_42822 Units=km Length=0.001 bus1=p2udt2881-p2udt5608xx.1.2.3 bus2=p2udt5608.1.2.3 switch=y enabled=y phases=3 Linecode=padswitch_3_3_3_3_3

New Line.padswitch(r:p2udt5361-p2udt8559)p2u_42847 Units=km Length=0.001 bus1=p2udt5361.1.2.3 bus2=p2udt5361-p2udt8559x.1.2.3 switch=y enabled=y phases=3 Linecode=padswitch_3_3_3_3_3

New Line.padswitch(r:p2udt5361-p2udt8559)p2u_42848 Units=km Length=0.001 bus1=p2udt5361-p2udt8559xx.1.2.3 bus2=p2udt8559.1.2.3 switch=y enabled=y phases=3 Linecode=padswitch_3_3_3_1_3_1_3_1

New Line.padswitch(r:p2udt1691-p2udt5361)p2u_42849 Units=km Length=0.001 bus1=p2udt1691.1.2.3 bus2=p2udt1691-p2udt5361x.1.2.3 switch=y enabled=y phases=3 Linecode=padswitch_3_3_3_3_3

New Line.padswitch(r:p2udt1691-p2udt5361)p2u_42850 Units=km Length=0.001 bus1=p2udt1691-p2udt5361xx.1.2.3 bus2=p2udt5361.1.2.3 switch=y enabled=y phases=3 Linecode=padswitch_3_3_3_1_3_1_3_1

New Line.padswitch(r:p2udt1691-p2udt8099)p2u_42851 Units=km Length=0.001 bus1=p2udt8099.1.2.3 bus2=p2udt1691-p2udt8099xx.1.2.3 switch=y enabled=y phases=3 Linecode=padswitch_3_3_3_3_3

New Line.padswitch(r:p2udt1691-p2udt8099)p2u_42852 Units=km Length=0.001 bus1=p2udt1691-p2udt8099x.1.2.3 bus2=p2udt1691.1.2.3 switch=y enabled=y phases=3 Linecode=padswitch_3_3_3_3_3

New Line.padswitch(r:p2udt2881-p2udt8099)p2u_42857 Units=km Length=0.001 bus1=p2udt2881.1.2.3 bus2=p2udt2881-p2udt8099x.1.2.3 switch=y enabled=y phases=3 Linecode=padswitch_3_3_3_3_3

New Line.padswitch(r:p2udt2881-p2udt8099)p2u_42858 Units=km Length=0.001 bus1=p2udt2881-p2udt8099xx.1.2.3 bus2=p2udt8099.1.2.3 switch=y enabled=y phases=3 Linecode=padswitch_3_3_3_3_3

New Line.fuse(r:p2udt2247-p2udt867)p2u_45590 Units=km Length=0.001 bus1=p2udt867.1 bus2=p2udt2247-p2udt867xxx.1 switch=n enabled=y phases=1 Linecode=fuse_1_1_1_1

New Fuse.Fuse_fuse(r:p2udt2247-p2udt867)p2u_45590 monitoredobj=Line.fuse(r:p2udt2247-p2udt867)p2u_45590 enabled=y ratedcurrent=100.0

New Line.fuse(r:p2udt1827-p2udt7499)p2u_45682 Units=km Length=0.001 bus1=p2udt1827.3 bus2=p2udt1827-p2udt7499x.3 switch=n enabled=y phases=1 Linecode=fuse_1_6_1_1_1

New Fuse.Fuse_fuse(r:p2udt1827-p2udt7499)p2u_45682 monitoredobj=Line.fuse(r:p2udt1827-p2udt7499)p2u_45682 enabled=y ratedcurrent=100.0

New Line.fuse(r:p2udt3990-p2udt8737)p2u_45924 Units=km Length=0.001 bus1=p2udt3990.1 bus2=p2udt3990-p2udt8737x.1 switch=n enabled=y phases=1 Linecode=fuse_1_1_1_1

New Fuse.Fuse_fuse(r:p2udt3990-p2udt8737)p2u_45924 monitoredobj=Line.fuse(r:p2udt3990-p2udt8737)p2u_45924 enabled=y ratedcurrent=100.0

New Line.fuse(r:p2udt5361-p2udt8454)p2u_46070 Units=km Length=0.001 bus1=p2udt5361.3 bus2=p2udt5361-p2udt8454x.3 switch=n enabled=y phases=1 Linecode=fuse_1_6_1_3_1_1

New Fuse.Fuse_fuse(r:p2udt5361-p2udt8454)p2u_46070 monitoredobj=Line.fuse(r:p2udt5361-p2udt8454)p2u_46070 enabled=y ratedcurrent=100.0

New Line.fuse(r:p2udt4394-p2udt7147)p2u_46286 Units=km Length=0.001 bus1=p2udt7147.2 bus2=p2udt4394-p2udt7147x.2 switch=n enabled=y phases=1 Linecode=fuse_1_6_1_3_1_3_1

New Fuse.Fuse_fuse(r:p2udt4394-p2udt7147)p2u_46286 monitoredobj=Line.fuse(r:p2udt4394-p2udt7147)p2u_46286 enabled=y ratedcurrent=100.0

New Line.fuse(r:p2udt1294-p2udt8099)p2u_46382 Units=km Length=0.001 bus1=p2udt8099.1 bus2=p2udt1294-p2udt8099xxx.1 switch=n enabled=y phases=1 Linecode=fuse_1_6_1_3_1_3_1

New Fuse.Fuse_fuse(r:p2udt1294-p2udt8099)p2u_46382 monitoredobj=Line.fuse(r:p2udt1294-p2udt8099)p2u_46382 enabled=y ratedcurrent=100.0

New Line.fuse(r:p2udt3483-p2udt8099)p2u_46383 Units=km Length=0.001 bus1=p2udt8099.2 bus2=p2udt3483-p2udt8099xxx.2 switch=n enabled=y phases=1 Linecode=fuse_1_6_1_3_1_3_1

New Fuse.Fuse_fuse(r:p2udt3483-p2udt8099)p2u_46383 monitoredobj=Line.fuse(r:p2udt3483-p2udt8099)p2u_46383 enabled=y ratedcurrent=100.0

New Line.fuse(r:p2udt3757-p2udt8559)p2u_46459 Units=km Length=0.001 bus1=p2udt8559.1 bus2=p2udt3757-p2udt8559xxx.1 switch=n enabled=y phases=1 Linecode=fuse_1_6_1_3_1_1

New Fuse.Fuse_fuse(r:p2udt3757-p2udt8559)p2u_46459 monitoredobj=Line.fuse(r:p2udt3757-p2udt8559)p2u_46459 enabled=y ratedcurrent=100.0

New Line.l(r:p2udt7112-p2udt8301)_disconnect Units=km Length=0.001 bus1=p2udt7112_b1_1.1.2.3 bus2=p2udt7112_b2_1.1.2.3 switch=y enabled=y phases=3 Linecode=3P_OH_AL_ACSR_4/0_Penguin_12_47_0_3_3_3_3

New Line.l(r:p2udt7112-p2udt8301)_cont Units=km Length=0.8212518000000001 bus1=p2udt7112_b2_1.1.2.3 bus2=p2udt8301.1.2.3 switch=n enabled=y phases=3 Linecode=3P_OH_AL_ACSR_4/0_Penguin_12_47_0_3_3_3_3
