New Capacitor.p2uc57 Bus1=p2udt2424 phases=3 Kv=12.47 conn=Wye Kvar=300.0

New CapControl.p2uc57 Capacitor=p2uc57 Element=Line.padswitch(r:p2udt2424-p2udt3754)p2u_43027 Terminal=1 delay=100.0 Type=voltage Vmin=120.5 Vmax=125.0 Ptratio=59.99631547328862 Ctratio=100.0

New Capacitor.p2uc58 Bus1=p2udt6873 phases=3 Kv=12.47 conn=Wye Kvar=300.0

New CapControl.p2uc58 Capacitor=p2uc58 Element=Line.l(r:p2udt5436-p2udt6873) Terminal=1 delay=100.0 Type=voltage Vmin=120.5 Vmax=125.0 Ptratio=59.99631547328862 Ctratio=100.0
