Clear

New Circuit.substation_p3uhs0_69 bus1=p3uhs0_69 pu=1.0 basekV=69.0 R1=1e-05 X1=1e-05 R0=1e-05 X0=1e-05

Redirect p3uhs0_1247--p3udt31121/Transformers.dss
Redirect Transformers.dss
Redirect p3uhs0_1247--p3udt28845/Transformers.dss
Redirect p3uhs0_1247--p3udt22485/Transformers.dss
Redirect Regulators.dss
Redirect p3uhs0_1247--p3udt31121/Loads.dss
Redirect p3uhs0_1247--p3udt28845/Loads.dss
Redirect p3uhs0_1247--p3udt22485/Loads.dss
Redirect p3uhs0_1247--p3udt31121/LineCodes.dss
Redirect LineCodes.dss
Redirect p3uhs0_1247--p3udt28845/LineCodes.dss
Redirect p3uhs0_1247--p3udt22485/LineCodes.dss
Redirect p3uhs0_1247--p3udt31121/Lines.dss
Redirect Lines.dss
Redirect p3uhs0_1247--p3udt28845/Lines.dss
Redirect p3uhs0_1247--p3udt22485/Lines.dss
Redirect p3uhs0_1247--p3udt31121/Capacitors.dss
Redirect p3uhs0_1247--p3udt28845/Capacitors.dss
Redirect p3uhs0_1247--p3udt22485/Capacitors.dss

Set Voltagebases=[0.2080002494301389, 0.48, 7.199560000000001, 12.47, 69.0]

Calcvoltagebases

Buscoords Buscoords.dss

Solve
