New Capacitor.p3uc3 Bus1=p3udt11986 phases=3 Kv=12.47 conn=Wye Kvar=300.0

New CapControl.p3uc3 Capacitor=p3uc3 Element=Line.l(r:p3udt11986-p3udt31660) Terminal=1 delay=100.0 Type=voltage Vmin=120.5 Vmax=125.0 Ptratio=59.99631547328862 Ctratio=100.0
