New Capacitor.p3uc1 Bus1=p3umv1 phases=3 Kv=12.47 conn=Wye Kvar=300.0

New CapControl.p3uc1 Capacitor=p3uc1 Element=Line.l(r:p3udt5890-p3umv1) Terminal=1 delay=100.0 Type=voltage Vmin=120.5 Vmax=125.0 Ptratio=59.99631547328862 Ctratio=100.0

New Capacitor.p3uc4 Bus1=p3udt20322 phases=3 Kv=12.47 conn=Wye Kvar=300.0

New CapControl.p3uc4 Capacitor=p3uc4 Element=Line.l(r:p3udt15384-p3udt20322) Terminal=1 delay=100.0 Type=voltage Vmin=120.5 Vmax=125.0 Ptratio=59.99631547328862 Ctratio=100.0
