New Capacitor.p3uc0 Bus1=p3udt15021 phases=3 Kv=12.47 conn=Wye Kvar=450.0

New CapControl.p3uc0 Capacitor=p3uc0 Element=Line.padswitch(r:p3udt15021-p3udt30392)p3u_167897 Terminal=1 delay=100.0 Type=voltage Vmin=120.5 Vmax=125.0 Ptratio=59.99631547328862 Ctratio=100.0

New Capacitor.p3uc2 Bus1=p3udt19095 phases=3 Kv=12.47 conn=Wye Kvar=450.0

New CapControl.p3uc2 Capacitor=p3uc2 Element=Line.padswitch(r:p3udt19095-p3udt19757)p3u_167769 Terminal=1 delay=100.0 Type=voltage Vmin=120.5 Vmax=125.0 Ptratio=59.99631547328862 Ctratio=100.0
