New Capacitor.p3uc67 Bus1=p3udt15965 phases=3 Kv=12.47 conn=Wye Kvar=300.0

New CapControl.p3uc67 Capacitor=p3uc67 Element=Line.padswitch(r:p3udt15965-p3udt20429)p3u_181616 Terminal=1 delay=100.0 Type=voltage Vmin=120.5 Vmax=125.0 Ptratio=59.99631547328862 Ctratio=100.0
