New Capacitor.p3uc68 Bus1=p3udt12199 phases=3 Kv=12.47 conn=Wye Kvar=300.0

New CapControl.p3uc68 Capacitor=p3uc68 Element=Line.l(r:p3udt12199-p3udt20779) Terminal=1 delay=100.0 Type=voltage Vmin=120.5 Vmax=125.0 Ptratio=59.99631547328862 Ctratio=100.0
