New Capacitor.p3uc72 Bus1=p3udt21228 phases=3 Kv=12.47 conn=Wye Kvar=450.0

New CapControl.p3uc72 Capacitor=p3uc72 Element=Line.l(r:p3udt13408-p3udt21228) Terminal=1 delay=100.0 Type=voltage Vmin=120.5 Vmax=125.0 Ptratio=59.99631547328862 Ctratio=100.0
