New Capacitor.p3uc79 Bus1=p3udt26699 phases=3 Kv=12.47 conn=Wye Kvar=300.0

New CapControl.p3uc79 Capacitor=p3uc79 Element=Line.padswitch(r:p3udt26699-p3udt7569)p3u_184245 Terminal=1 delay=100.0 Type=voltage Vmin=120.5 Vmax=125.0 Ptratio=59.99631547328862 Ctratio=100.0
