New Capacitor.p3uc76 Bus1=p3udt19312 phases=3 Kv=12.47 conn=Wye Kvar=450.0

New CapControl.p3uc76 Capacitor=p3uc76 Element=Line.padswitch(r:p3udt19312-p3udt28300)p3u_185180 Terminal=1 delay=100.0 Type=voltage Vmin=120.5 Vmax=125.0 Ptratio=59.99631547328862 Ctratio=100.0
