New Capacitor.p3uc75 Bus1=p3udt17266 phases=3 Kv=12.47 conn=Wye Kvar=300.0

New CapControl.p3uc75 Capacitor=p3uc75 Element=Line.padswitch(r:p3udt17266-p3udt19334)p3u_185966 Terminal=1 delay=100.0 Type=voltage Vmin=120.5 Vmax=125.0 Ptratio=59.99631547328862 Ctratio=100.0

New Capacitor.p3uc78 Bus1=p3udt16131 phases=3 Kv=12.47 conn=Wye Kvar=300.0

New CapControl.p3uc78 Capacitor=p3uc78 Element=Line.l(r:p3udt16131-p3udt16476) Terminal=1 delay=100.0 Type=voltage Vmin=120.5 Vmax=125.0 Ptratio=59.99631547328862 Ctratio=100.0
