New Capacitor.p3uc84 Bus1=p3udt20202 phases=3 Kv=12.47 conn=Wye Kvar=450.0

New CapControl.p3uc84 Capacitor=p3uc84 Element=Line.padswitch(r:p3udt10212-p3udt20202)p3u_186459 Terminal=1 delay=100.0 Type=voltage Vmin=120.5 Vmax=125.0 Ptratio=59.99631547328862 Ctratio=100.0
