Clear

New Circuit.substation_p3uhs15_69 bus1=p3uhs15_69 pu=1.0 basekV=69.0 R1=1e-05 X1=1e-05 R0=1e-05 X0=1e-05

Redirect Transformers.dss
Redirect p3uhs15_1247--p3udt21571/Transformers.dss
Redirect p3uhs15_1247--p3udt27016/Transformers.dss
Redirect p3uhs15_1247--p3udt2707/Transformers.dss
Redirect p3uhs15_1247--p3udt29990/Transformers.dss
Redirect p3uhs15_1247--p3udt10674/Transformers.dss
Redirect Regulators.dss
Redirect p3uhs15_1247--p3udt21571/Loads.dss
Redirect p3uhs15_1247--p3udt27016/Loads.dss
Redirect p3uhs15_1247--p3udt2707/Loads.dss
Redirect p3uhs15_1247--p3udt29990/Loads.dss
Redirect p3uhs15_1247--p3udt10674/Loads.dss
Redirect LineCodes.dss
Redirect p3uhs15_1247--p3udt21571/LineCodes.dss
Redirect p3uhs15_1247--p3udt27016/LineCodes.dss
Redirect p3uhs15_1247--p3udt2707/LineCodes.dss
Redirect p3uhs15_1247--p3udt29990/LineCodes.dss
Redirect p3uhs15_1247--p3udt10674/LineCodes.dss
Redirect Lines.dss
Redirect p3uhs15_1247--p3udt21571/Lines.dss
Redirect p3uhs15_1247--p3udt27016/Lines.dss
Redirect p3uhs15_1247--p3udt2707/Lines.dss
Redirect p3uhs15_1247--p3udt29990/Lines.dss
Redirect p3uhs15_1247--p3udt10674/Lines.dss
Redirect p3uhs15_1247--p3udt29990/Capacitors.dss
Redirect p3uhs15_1247--p3udt10674/Capacitors.dss
Redirect p3uhs15_1247--p3udt27016/Capacitors.dss
Redirect p3uhs15_1247--p3udt2707/Capacitors.dss

Set Voltagebases=[0.2080002494301389, 0.48, 7.199560000000001, 12.47, 69.0]

Calcvoltagebases

Buscoords Buscoords.dss

Solve
