New Capacitor.p3uc100 Bus1=p3udt23852 phases=3 Kv=12.47 conn=Wye Kvar=450.0

New CapControl.p3uc100 Capacitor=p3uc100 Element=Line.padswitch(r:p3udt19210-p3udt23852)p3u_192537 Terminal=1 delay=100.0 Type=voltage Vmin=120.5 Vmax=125.0 Ptratio=59.99631547328862 Ctratio=100.0
