New Capacitor.p3uc95 Bus1=p3udt3676 phases=3 Kv=12.47 conn=Wye Kvar=300.0

New CapControl.p3uc95 Capacitor=p3uc95 Element=Line.padswitch(r:p3udt28478-p3udt3676)p3u_193917 Terminal=1 delay=100.0 Type=voltage Vmin=120.5 Vmax=125.0 Ptratio=59.99631547328862 Ctratio=100.0

New Capacitor.p3uc97 Bus1=p3udt21591 phases=3 Kv=12.47 conn=Wye Kvar=450.0

New CapControl.p3uc97 Capacitor=p3uc97 Element=Line.l(r:p3udt15635-p3udt21591) Terminal=1 delay=100.0 Type=voltage Vmin=120.5 Vmax=125.0 Ptratio=59.99631547328862 Ctratio=100.0
