New Line.l(r:p3udt148lv-p3ulv39297) Units=km Length=0.020271400000000002 bus1=p3udt148lv.1.2 bus2=p3ulv39297.1.2 switch=n enabled=y phases=2 Linecode=1P_UG_AL_1/0_Brenau_0_416_0_2_2_2_2

New Line.l(r:p3udm389-p3ulv293) Units=km Length=0.0205032 bus1=p3udm389.1.2 bus2=p3ulv293.1.2 switch=n enabled=y phases=2 Linecode=1P_UG_AL_1/0_Brenau_0_416_0_2_2_2_2

New Line.l(r:p3udm389-p3udt148lv) Units=km Length=0.027896400000000002 bus1=p3udt148lv.1.2 bus2=p3udm389.1.2 switch=n enabled=y phases=2 Linecode=1P_UG_AL_1/0_Brenau_0_416_0_2_2_2_2

New Line.l(r:p3udm390-p3ulv1844) Units=km Length=0.0191283 bus1=p3udm390.1.2 bus2=p3ulv1844.1.2 switch=n enabled=y phases=2 Linecode=1P_UG_AL_1/0_Brenau_0_416_0_2_2_2_2

New Line.l(r:p3udm390-p3udt148lv) Units=km Length=0.00929139 bus1=p3udt148lv.1.2 bus2=p3udm390.1.2 switch=n enabled=y phases=2 Linecode=1P_UG_AL_1/0_Brenau_0_416_0_2_2_2_2

New Line.l(r:p3udt149lv-p3ulv294) Units=km Length=0.0557839 bus1=p3udt149lv.1.2 bus2=p3ulv294.1.2 switch=n enabled=y phases=2 Linecode=1P_OH_AL_4/0_Zuzara_0_416_0_2_2_2_2

New Line.l(r:p3udt149lv-p3ulv31585) Units=km Length=0.0478711 bus1=p3udt149lv.1.2 bus2=p3ulv31585.1.2 switch=n enabled=y phases=2 Linecode=1P_OH_AL_4/0_Zuzara_0_416_0_2_2_2_2

New Line.l(r:p3udt150lv-p3ulv295) Units=km Length=0.0232922 bus1=p3udt150lv.1.2 bus2=p3ulv295.1.2 switch=n enabled=y phases=2 Linecode=1P_OH_AL_2/0_Rucina_0_416_0_2_2_2_2

New Line.l(r:p3udt895lv-p3ulv1054) Units=km Length=0.00787524 bus1=p3udt895lv.1.2 bus2=p3ulv1054.1.2 switch=n enabled=y phases=2 Linecode=1P_OH_AL_2/0_Rucina_0_416_0_2_2_2_2

New Line.l(r:p3udt3095lv-p3ulv3413) Units=km Length=0.026893 bus1=p3udt3095lv.1.2 bus2=p3ulv3413.1.2 switch=n enabled=y phases=2 Linecode=1P_OH_AL_2/0_Rucina_0_416_0_2_2_2_2

New Line.l(r:p3udt3095lv-p3ulv25394) Units=km Length=0.0224122 bus1=p3udt3095lv.1.2 bus2=p3ulv25394.1.2 switch=n enabled=y phases=2 Linecode=1P_OH_AL_2/0_Rucina_0_416_0_2_2_2_2

New Line.l(r:p3udt3095lv-p3ulv33923) Units=km Length=0.0234989 bus1=p3udt3095lv.1.2 bus2=p3ulv33923.1.2 switch=n enabled=y phases=2 Linecode=1P_OH_AL_2/0_Rucina_0_416_0_2_2_2_2

New Line.l(r:p3udt3097lv-p3ulv3415) Units=km Length=0.0324028 bus1=p3udt3097lv.1.2 bus2=p3ulv3415.1.2 switch=n enabled=y phases=2 Linecode=1P_OH_AL_4/0_Zuzara_0_416_0_2_2_2_2

New Line.l(r:p3udt3098lv-p3ulv3416) Units=km Length=0.0282281 bus1=p3udt3098lv.1.2 bus2=p3ulv3416.1.2 switch=n enabled=y phases=2 Linecode=1P_UG_AL_1/0_Brenau_0_416_0_2_2_2_2

New Line.l(r:p3udt3098lv-p3ulv22990) Units=km Length=0.0398877 bus1=p3udt3098lv.1.2 bus2=p3ulv22990.1.2 switch=n enabled=y phases=2 Linecode=1P_UG_AL_1/0_Brenau_0_416_0_2_2_2_2

New Line.l(r:p3udt3098lv-p3ulv23754) Units=km Length=0.05991500000000001 bus1=p3udt3098lv.1.2 bus2=p3ulv23754.1.2 switch=n enabled=y phases=2 Linecode=1P_UG_AL_1/0_Brenau_0_416_0_2_2_2_2

New Line.l(r:p3udt3098lv-p3ulv34721) Units=km Length=0.027569 bus1=p3udt3098lv.1.2 bus2=p3ulv34721.1.2 switch=n enabled=y phases=2 Linecode=1P_UG_AL_2/0_Converse_0_416_0_2_2_2_2

New Line.l(r:p3udt3099lv-p3ulv50187) Units=km Length=0.0518603 bus1=p3udt3099lv.1.2 bus2=p3ulv50187.1.2 switch=n enabled=y phases=2 Linecode=1P_OH_AL_4/0_Zuzara_0_416_0_2_2_2_2

New Line.l(r:p3udt3099lv-p3ulv68579) Units=km Length=0.0568052 bus1=p3udt3099lv.1.2 bus2=p3ulv68579.1.2 switch=n enabled=y phases=2 Linecode=1P_OH_AL_4/0_Zuzara_0_416_0_2_2_2_2

New Line.l(r:p3udm10760-p3ulv3417) Units=km Length=0.0155261 bus1=p3udm10760.1.2 bus2=p3ulv3417.1.2 switch=n enabled=y phases=2 Linecode=1P_OH_AL_2/0_Rucina_0_416_0_2_2_2_2

New Line.l(r:p3udm10760-p3udt3099lv) Units=km Length=0.05261400000000001 bus1=p3udt3099lv.1.2 bus2=p3udm10760.1.2 switch=n enabled=y phases=2 Linecode=1P_OH_AL_4/0_Zuzara_0_416_0_2_2_2_2

New Line.l(r:p3udt3795lv-p3ulv4213) Units=km Length=0.0299218 bus1=p3udt3795lv.1.2 bus2=p3ulv4213.1.2 switch=n enabled=y phases=2 Linecode=1P_OH_AL_4/0_Zuzara_0_416_0_2_2_2_2

New Line.l(r:p3udt3796lv-p3ulv4214) Units=km Length=0.0248486 bus1=p3udt3796lv.1.2 bus2=p3ulv4214.1.2 switch=n enabled=y phases=2 Linecode=1P_OH_AL_2/0_Rucina_0_416_0_2_2_2_2

New Line.l(r:p3udt3797lv-p3ulv4215) Units=km Length=0.0299421 bus1=p3udt3797lv.1.2 bus2=p3ulv4215.1.2 switch=n enabled=y phases=2 Linecode=1P_OH_AL_4/0_Zuzara_0_416_0_2_2_2_2

New Line.l(r:p3udm15578-p3ulv5003) Units=km Length=0.0156676 bus1=p3udm15578.1.2 bus2=p3ulv5003.1.2 switch=n enabled=y phases=2 Linecode=1P_UG_AL_1/0_Brenau_0_416_0_2_2_2_2

New Line.l(r:p3udm15578-p3ulv60082) Units=km Length=0.0197909 bus1=p3udm15578.1.2 bus2=p3ulv60082.1.2 switch=n enabled=y phases=2 Linecode=1P_UG_AL_1/0_Brenau_0_416_0_2_2_2_2

New Line.l(r:p3udm15578-p3udt4505lv) Units=km Length=0.009992200000000001 bus1=p3udt4505lv.1.2 bus2=p3udm15578.1.2 switch=n enabled=y phases=2 Linecode=1P_UG_AL_4/0_Sweetbriar_0_416_0_2_2_2_2

New Line.l(r:p3udm15579-p3ulv38499) Units=km Length=0.019747 bus1=p3udm15579.1.2 bus2=p3ulv38499.1.2 switch=n enabled=y phases=2 Linecode=1P_UG_AL_1/0_Brenau_0_416_0_2_2_2_2

New Line.l(r:p3udm15579-p3udt4505lv) Units=km Length=0.0099947 bus1=p3udt4505lv.1.2 bus2=p3udm15579.1.2 switch=n enabled=y phases=2 Linecode=1P_UG_AL_1/0_Brenau_0_416_0_2_2_2_2

New Line.l(r:p3udt4509lv-p3ulv5007) Units=km Length=0.0214887 bus1=p3udt4509lv.1.2 bus2=p3ulv5007.1.2 switch=n enabled=y phases=2 Linecode=1P_UG_AL_2/0_Converse_0_416_0_2_2_2_2

New Line.l(r:p3udt5198lv-p3ulv73937) Units=km Length=0.0162852 bus1=p3udt5198lv.1.2 bus2=p3ulv73937.1.2 switch=n enabled=y phases=2 Linecode=1P_OH_AL_2/0_Rucina_0_416_0_2_2_2_2

New Line.l(r:p3udm17910-p3ulv5827) Units=km Length=0.019632100000000003 bus1=p3udm17910.1.2 bus2=p3ulv5827.1.2 switch=n enabled=y phases=2 Linecode=1P_OH_AL_2/0_Rucina_0_416_0_2_2_2_2

New Line.l(r:p3udm17910-p3udt5198lv) Units=km Length=0.0197188 bus1=p3udt5198lv.1.2 bus2=p3udm17910.1.2 switch=n enabled=y phases=2 Linecode=1P_OH_AL_2/0_Rucina_0_416_0_2_2_2_2

New Line.l(r:p3udt5203lv-p3ulv5833) Units=km Length=0.0579932 bus1=p3udt5203lv.1.2 bus2=p3ulv5833.1.2 switch=n enabled=y phases=2 Linecode=1P_OH_AL_4/0_Zuzara_0_416_0_2_2_2_2

New Line.l(r:p3udt5203lv-p3ulv20612) Units=km Length=0.0424931 bus1=p3udt5203lv.1.2 bus2=p3ulv20612.1.2 switch=n enabled=y phases=2 Linecode=1P_OH_AL_4/0_Zuzara_0_416_0_2_2_2_2

New Line.l(r:p3udt5203lv-p3ulv52481) Units=km Length=0.0518706 bus1=p3udt5203lv.1.2 bus2=p3ulv52481.1.2 switch=n enabled=y phases=2 Linecode=1P_OH_AL_4/0_Zuzara_0_416_0_2_2_2_2

New Line.l(r:p3udt5204lv-p3ulv5834) Units=km Length=0.0613561 bus1=p3udt5204lv.1.2 bus2=p3ulv5834.1.2 switch=n enabled=y phases=2 Linecode=1P_OH_AL_4/0_Zuzara_0_416_0_2_2_2_2

New Line.l(r:p3udt5204lv-p3ulv50186) Units=km Length=0.0414132 bus1=p3udt5204lv.1.2 bus2=p3ulv50186.1.2 switch=n enabled=y phases=2 Linecode=1P_OH_AL_4/0_Zuzara_0_416_0_2_2_2_2

New Line.l(r:p3udt5204lv-p3ulv59369) Units=km Length=0.030925500000000005 bus1=p3udt5204lv.1.2 bus2=p3ulv59369.1.2 switch=n enabled=y phases=2 Linecode=1P_OH_AL_4/0_Zuzara_0_416_0_2_2_2_2

New Line.l(r:p3udm17927-p3ulv39305) Units=km Length=0.0328401 bus1=p3udm17927.1.2 bus2=p3ulv39305.1.2 switch=n enabled=y phases=2 Linecode=1P_OH_AL_4/0_Zuzara_0_416_0_2_2_2_2

New Line.l(r:p3udm17928-p3ulv47938) Units=km Length=0.037720100000000006 bus1=p3udm17928.1.2 bus2=p3ulv47938.1.2 switch=n enabled=y phases=2 Linecode=1P_OH_AL_4/0_Zuzara_0_416_0_2_2_2_2

New Line.l(r:p3udm17927-p3udm17928) Units=km Length=0.06452850000000002 bus1=p3udm17927.1.2 bus2=p3udm17928.1.2 switch=n enabled=y phases=2 Linecode=1P_OH_AL_4/0_Zuzara_0_416_0_2_2_2_2

New Line.l(r:p3udm17927-p3udt5204lv) Units=km Length=0.00630506 bus1=p3udt5204lv.1.2 bus2=p3udm17927.1.2 switch=n enabled=y phases=2 Linecode=1P_OH_AL_2/0_Rucina_0_416_0_2_2_2_2

New Line.l(r:p3udt5845lv-p3ulv6618) Units=km Length=0.06999 bus1=p3udt5845lv.1.2 bus2=p3ulv6618.1.2 switch=n enabled=y phases=2 Linecode=1P_OH_AL_4/0_Zuzara_0_416_0_2_2_2_2

New Line.l(r:p3udt5845lv-p3ulv48642) Units=km Length=0.0407803 bus1=p3udt5845lv.1.2 bus2=p3ulv48642.1.2 switch=n enabled=y phases=2 Linecode=1P_OH_AL_4/0_Zuzara_0_416_0_2_2_2_2

New Line.l(r:p3udt5846lv-p3ulv6619) Units=km Length=0.0554513 bus1=p3udt5846lv.1.2 bus2=p3ulv6619.1.2 switch=n enabled=y phases=2 Linecode=1P_OH_AL_4/0_Zuzara_0_416_0_2_2_2_2

New Line.l(r:p3udt6469lv-p3ulv7412) Units=km Length=0.001 bus1=p3udt6469lv.1.2 bus2=p3ulv7412.1.2 switch=n enabled=y phases=2 Linecode=1P_OH_AL_4_Periwinkle_0_416_0_2_2_2_2

New Line.l(r:p3udm22105-p3ulv7418) Units=km Length=0.0258611 bus1=p3udm22105.1.2 bus2=p3ulv7418.1.2 switch=n enabled=y phases=2 Linecode=1P_OH_AL_2/0_Rucina_0_416_0_2_2_2_2

New Line.l(r:p3udm22105-p3udt6474lv) Units=km Length=0.0372 bus1=p3udt6474lv.1.2 bus2=p3udm22105.1.2 switch=n enabled=y phases=2 Linecode=1P_OH_AL_4/0_Zuzara_0_416_0_2_2_2_2

New Line.l(r:p3udm22106-p3ulv70921) Units=km Length=0.018703 bus1=p3udm22106.1.2 bus2=p3ulv70921.1.2 switch=n enabled=y phases=2 Linecode=1P_OH_AL_2/0_Rucina_0_416_0_2_2_2_2

New Line.l(r:p3udm22106-p3udt6474lv) Units=km Length=0.0372 bus1=p3udt6474lv.1.2 bus2=p3udm22106.1.2 switch=n enabled=y phases=2 Linecode=1P_OH_AL_4/0_Zuzara_0_416_0_2_2_2_2

New Line.l(r:p3udm24283-p3ulv30030) Units=km Length=0.0176235 bus1=p3udm24283.1.2 bus2=p3ulv30030.1.2 switch=n enabled=y phases=2 Linecode=1P_UG_AL_1/0_Brenau_0_416_0_2_2_2_2

New Line.l(r:p3udm24283-p3ulv76222) Units=km Length=0.019086 bus1=p3udm24283.1.2 bus2=p3ulv76222.1.2 switch=n enabled=y phases=2 Linecode=1P_UG_AL_1/0_Brenau_0_416_0_2_2_2_2

New Line.l(r:p3udm24282-p3ulv9711) Units=km Length=0.0189223 bus1=p3udm24282.1.2 bus2=p3ulv9711.1.2 switch=n enabled=y phases=2 Linecode=1P_UG_AL_1/0_Brenau_0_416_0_2_2_2_2

New Line.l(r:p3udm24282-p3udm24283) Units=km Length=0.0174404 bus1=p3udm24283.1.2 bus2=p3udm24282.1.2 switch=n enabled=y phases=2 Linecode=1P_UG_AL_1/0_Brenau_0_416_0_2_2_2_2

New Line.l(r:p3udm24283-p3udt7114lv) Units=km Length=0.00814344 bus1=p3udt7114lv.1.2 bus2=p3udm24283.1.2 switch=n enabled=y phases=2 Linecode=1P_UG_AL_4/0_Sweetbriar_0_416_0_2_2_2_2

New Line.l(r:p3udm24284-p3ulv50910) Units=km Length=0.0210611 bus1=p3udm24284.1.2 bus2=p3ulv50910.1.2 switch=n enabled=y phases=2 Linecode=1P_UG_AL_1/0_Brenau_0_416_0_2_2_2_2

New Line.l(r:p3udm24281-p3ulv8226) Units=km Length=0.0176187 bus1=p3udm24281.1.2 bus2=p3ulv8226.1.2 switch=n enabled=y phases=2 Linecode=1P_UG_AL_2/0_Converse_0_416_0_2_2_2_2

New Line.l(r:p3udm24281-p3udm24284) Units=km Length=0.00891507 bus1=p3udm24284.1.2 bus2=p3udm24281.1.2 switch=n enabled=y phases=2 Linecode=1P_UG_AL_2/0_Converse_0_416_0_2_2_2_2

New Line.l(r:p3udm24284-p3udt7114lv) Units=km Length=0.0170571 bus1=p3udt7114lv.1.2 bus2=p3udm24284.1.2 switch=n enabled=y phases=2 Linecode=1P_UG_AL_4/0_Sweetbriar_0_416_0_2_2_2_2

New Line.l(r:p3udt7117lv-p3ulv26213) Units=km Length=0.0282388 bus1=p3udt7117lv.1.2 bus2=p3ulv26213.1.2 switch=n enabled=y phases=2 Linecode=1P_OH_AL_4/0_Zuzara_0_416_0_2_2_2_2

New Line.l(r:p3udm24289-p3ulv8229) Units=km Length=0.0286044 bus1=p3udm24289.1.2 bus2=p3ulv8229.1.2 switch=n enabled=y phases=2 Linecode=1P_OH_AL_4/0_Zuzara_0_416_0_2_2_2_2

New Line.l(r:p3udm24289-p3udt7117lv) Units=km Length=0.0355974 bus1=p3udt7117lv.1.2 bus2=p3udm24289.1.2 switch=n enabled=y phases=2 Linecode=1P_OH_AL_4/0_Zuzara_0_416_0_2_2_2_2

New Line.l(r:p3udm24291-p3ulv73175) Units=km Length=0.0276513 bus1=p3udm24291.1.2 bus2=p3ulv73175.1.2 switch=n enabled=y phases=2 Linecode=1P_OH_AL_4/0_Zuzara_0_416_0_2_2_2_2

New Line.l(r:p3udm24291-p3udt7117lv) Units=km Length=0.0175204 bus1=p3udt7117lv.1.2 bus2=p3udm24291.1.2 switch=n enabled=y phases=2 Linecode=1P_OH_AL_2/0_Rucina_0_416_0_2_2_2_2

New Line.l(r:p3udt7696lv-p3ulv8984) Units=km Length=0.018260500000000002 bus1=p3udt7696lv.1.2 bus2=p3ulv8984.1.2 switch=n enabled=y phases=2 Linecode=1P_OH_AL_2/0_Rucina_0_416_0_2_2_2_2

New Line.l(r:p3udt7698lv-p3ulv8986) Units=km Length=0.001 bus1=p3udt7698lv.1.2 bus2=p3ulv8986.1.2 switch=n enabled=y phases=2 Linecode=1P_OH_AL_4_Periwinkle_0_416_0_2_2_2_2

New Line.l(r:p3udt8254lv-p3ulv9712) Units=km Length=0.0204824 bus1=p3udt8254lv.1.2 bus2=p3ulv9712.1.2 switch=n enabled=y phases=2 Linecode=1P_UG_AL_1/0_Brenau_0_416_0_2_2_2_2

New Line.l(r:p3udt8256lv-p3ulv9714) Units=km Length=0.0339738 bus1=p3udt8256lv.1.2 bus2=p3ulv9714.1.2 switch=n enabled=y phases=2 Linecode=1P_OH_AL_4/0_Zuzara_0_416_0_2_2_2_2

New Line.l(r:p3udt8256lv-p3ulv15223) Units=km Length=0.0803007 bus1=p3udt8256lv.1.2 bus2=p3ulv15223.1.2 switch=n enabled=y phases=2 Linecode=1P_OH_AL_4/0_Zuzara_0_416_0_2_2_2_2

New Line.l(r:p3udt8256lv-p3ulv22988) Units=km Length=0.0383591 bus1=p3udt8256lv.1.2 bus2=p3ulv22988.1.2 switch=n enabled=y phases=2 Linecode=1P_OH_AL_4/0_Zuzara_0_416_0_2_2_2_2

New Line.l(r:p3udt8258lv-p3ulv9716) Units=km Length=0.0371491 bus1=p3udt8258lv.1.2 bus2=p3ulv9716.1.2 switch=n enabled=y phases=2 Linecode=1P_OH_AL_4/0_Zuzara_0_416_0_2_2_2_2

New Line.l(r:p3udt8258lv-p3ulv55553) Units=km Length=0.0422735 bus1=p3udt8258lv.1.2 bus2=p3ulv55553.1.2 switch=n enabled=y phases=2 Linecode=1P_OH_AL_4/0_Zuzara_0_416_0_2_2_2_2

New Line.l(r:p3udt8258lv-p3ulv57855) Units=km Length=0.035346 bus1=p3udt8258lv.1.2 bus2=p3ulv57855.1.2 switch=n enabled=y phases=2 Linecode=1P_OH_AL_4/0_Zuzara_0_416_0_2_2_2_2

New Line.l(r:p3udt8258lv-p3ulv66231) Units=km Length=0.0396235 bus1=p3udt8258lv.1.2 bus2=p3ulv66231.1.2 switch=n enabled=y phases=2 Linecode=1P_OH_AL_4/0_Zuzara_0_416_0_2_2_2_2

New Line.l(r:p3udt8262lv-p3ulv9720) Units=km Length=0.001 bus1=p3udt8262lv.1.2 bus2=p3ulv9720.1.2 switch=n enabled=y phases=2 Linecode=1P_UG_AL_1/0_Brenau_0_416_0_2_2_2_2

New Line.l(r:p3udt8829lv-p3ulv10517) Units=km Length=0.0218469 bus1=p3udt8829lv.1.2 bus2=p3ulv10517.1.2 switch=n enabled=y phases=2 Linecode=1P_OH_AL_2/0_Rucina_0_416_0_2_2_2_2

New Line.l(r:p3udt8833lv-p3ulv10521) Units=km Length=0.0402988 bus1=p3udt8833lv.1.2 bus2=p3ulv10521.1.2 switch=n enabled=y phases=2 Linecode=1P_OH_AL_4/0_Zuzara_0_416_0_2_2_2_2

New Line.l(r:p3udt8834lv-p3ulv10522) Units=km Length=0.0249336 bus1=p3udt8834lv.1.2 bus2=p3ulv10522.1.2 switch=n enabled=y phases=2 Linecode=1P_OH_AL_2/0_Rucina_0_416_0_2_2_2_2

New Line.l(r:p3udt9405lv-p3ulv11351) Units=km Length=0.0267851 bus1=p3udt9405lv.1.2 bus2=p3ulv11351.1.2 switch=n enabled=y phases=2 Linecode=1P_OH_AL_2/0_Rucina_0_416_0_2_2_2_2

New Line.l(r:p3udt9410lv-p3ulv11357) Units=km Length=0.001 bus1=p3udt9410lv.1.2 bus2=p3ulv11357.1.2 switch=n enabled=y phases=2 Linecode=1P_OH_AL_4_Periwinkle_0_416_0_2_2_2_2

New Line.l(r:p3udt9411lv-p3ulv11359) Units=km Length=0.0212797 bus1=p3udt9411lv.1.2 bus2=p3ulv11359.1.2 switch=n enabled=y phases=2 Linecode=1P_OH_AL_2/0_Rucina_0_416_0_2_2_2_2

New Line.l(r:p3udt9411lv-p3ulv18334) Units=km Length=0.0161376 bus1=p3udt9411lv.1.2 bus2=p3ulv18334.1.2 switch=n enabled=y phases=2 Linecode=1P_OH_AL_2/0_Rucina_0_416_0_2_2_2_2

New Line.l(r:p3udt9931lv-p3ulv41653) Units=km Length=0.00628399 bus1=p3udt9931lv.1.2 bus2=p3ulv41653.1.2 switch=n enabled=y phases=2 Linecode=1P_OH_AL_2/0_Rucina_0_416_0_2_2_2_2

New Line.l(r:p3udm33105-p3ulv12115) Units=km Length=0.00899355 bus1=p3udm33105.1.2 bus2=p3ulv12115.1.2 switch=n enabled=y phases=2 Linecode=1P_OH_AL_2/0_Rucina_0_416_0_2_2_2_2

New Line.l(r:p3udm33106-p3ulv25398) Units=km Length=0.008551830000000002 bus1=p3udm33106.1.2 bus2=p3ulv25398.1.2 switch=n enabled=y phases=2 Linecode=1P_OH_AL_2/0_Rucina_0_416_0_2_2_2_2

New Line.l(r:p3udm33106-p3ulv72422) Units=km Length=0.00928092 bus1=p3udm33106.1.2 bus2=p3ulv72422.1.2 switch=n enabled=y phases=2 Linecode=1P_OH_AL_2/0_Rucina_0_416_0_2_2_2_2

New Line.l(r:p3udm33105-p3udm33106) Units=km Length=0.0180942 bus1=p3udm33105.1.2 bus2=p3udm33106.1.2 switch=n enabled=y phases=2 Linecode=1P_OH_AL_2/0_Rucina_0_416_0_2_2_2_2

New Line.l(r:p3udm33105-p3udt9931lv) Units=km Length=0.018085 bus1=p3udt9931lv.1.2 bus2=p3udm33105.1.2 switch=n enabled=y phases=2 Linecode=1P_OH_AL_2/0_Rucina_0_416_0_2_2_2_2

New Line.l(r:p3udm33107-p3ulv31586) Units=km Length=0.00840236 bus1=p3udm33107.1.2 bus2=p3ulv31586.1.2 switch=n enabled=y phases=2 Linecode=1P_OH_AL_2/0_Rucina_0_416_0_2_2_2_2

New Line.l(r:p3udm33109-p3ulv51686) Units=km Length=0.0093619 bus1=p3udm33109.1.2 bus2=p3ulv51686.1.2 switch=n enabled=y phases=2 Linecode=1P_OH_AL_2/0_Rucina_0_416_0_2_2_2_2

New Line.l(r:p3udm33107-p3udm33109) Units=km Length=0.011453700000000002 bus1=p3udm33107.1.2 bus2=p3udm33109.1.2 switch=n enabled=y phases=2 Linecode=1P_OH_AL_2/0_Rucina_0_416_0_2_2_2_2

New Line.l(r:p3udm33107-p3udt9931lv) Units=km Length=0.01145 bus1=p3udt9931lv.1.2 bus2=p3udm33107.1.2 switch=n enabled=y phases=2 Linecode=1P_OH_AL_2/0_Rucina_0_416_0_2_2_2_2

New Line.l(r:p3udt9932lv-p3ulv12116) Units=km Length=0.0251757 bus1=p3udt9932lv.1.2 bus2=p3ulv12116.1.2 switch=n enabled=y phases=2 Linecode=1P_OH_AL_2/0_Rucina_0_416_0_2_2_2_2

New Line.l(r:p3udt10441lv-p3ulv12870) Units=km Length=0.0648312 bus1=p3udt10441lv.1.2 bus2=p3ulv12870.1.2 switch=n enabled=y phases=2 Linecode=1P_OH_AL_4/0_Zuzara_0_416_0_2_2_2_2

New Line.l(r:p3udm36259-p3ulv13642) Units=km Length=0.0208354 bus1=p3udm36259.1.2 bus2=p3ulv13642.1.2 switch=n enabled=y phases=2 Linecode=1P_OH_AL_2/0_Rucina_0_416_0_2_2_2_2

New Line.l(r:p3udm36259-p3udt10942lv) Units=km Length=0.0197066 bus1=p3udt10942lv.1.2 bus2=p3udm36259.1.2 switch=n enabled=y phases=2 Linecode=1P_OH_AL_2/0_Rucina_0_416_0_2_2_2_2

New Line.l(r:p3udm36260-p3ulv22984) Units=km Length=0.0270825 bus1=p3udm36260.1.2 bus2=p3ulv22984.1.2 switch=n enabled=y phases=2 Linecode=1P_OH_AL_4/0_Zuzara_0_416_0_2_2_2_2

New Line.l(r:p3udm36260-p3udt10942lv) Units=km Length=0.0197188 bus1=p3udt10942lv.1.2 bus2=p3udm36260.1.2 switch=n enabled=y phases=2 Linecode=1P_OH_AL_2/0_Rucina_0_416_0_2_2_2_2

New Line.l(r:p3udt10944lv-p3ulv13644) Units=km Length=0.0663811 bus1=p3udt10944lv.1.2 bus2=p3ulv13644.1.2 switch=n enabled=y phases=2 Linecode=1P_OH_AL_4/0_Zuzara_0_416_0_2_2_2_2

New Line.l(r:p3udm36265-p3ulv55551) Units=km Length=0.0750884 bus1=p3udm36265.1.2 bus2=p3ulv55551.1.2 switch=n enabled=y phases=2 Linecode=1P_OH_AL_4/0_Zuzara_0_416_0_2_2_2_2

New Line.l(r:p3udm36265-p3udt10944lv) Units=km Length=0.0187058 bus1=p3udt10944lv.1.2 bus2=p3udm36265.1.2 switch=n enabled=y phases=2 Linecode=1P_OH_AL_2/0_Rucina_0_416_0_2_2_2_2

New Line.l(r:p3udt11470lv-p3ulv14436) Units=km Length=0.0152753 bus1=p3udt11470lv.1.2 bus2=p3ulv14436.1.2 switch=n enabled=y phases=2 Linecode=1P_OH_AL_2/0_Rucina_0_416_0_2_2_2_2

New Line.l(r:p3udt11475lv-p3ulv14441) Units=km Length=0.0120831 bus1=p3udt11475lv.1.2 bus2=p3ulv14441.1.2 switch=n enabled=y phases=2 Linecode=1P_OH_AL_2/0_Rucina_0_416_0_2_2_2_2

New Line.l(r:p3udt11955lv-p3ulv15219) Units=km Length=0.0249447 bus1=p3udt11955lv.1.2 bus2=p3ulv15219.1.2 switch=n enabled=y phases=2 Linecode=1P_OH_AL_2/0_Rucina_0_416_0_2_2_2_2

New Line.l(r:p3udt11956lv-p3ulv15220) Units=km Length=0.0344614 bus1=p3udt11956lv.1.2 bus2=p3ulv15220.1.2 switch=n enabled=y phases=2 Linecode=1P_OH_AL_4/0_Zuzara_0_416_0_2_2_2_2

New Line.l(r:p3udt11956lv-p3ulv50184) Units=km Length=0.0277715 bus1=p3udt11956lv.1.2 bus2=p3ulv50184.1.2 switch=n enabled=y phases=2 Linecode=1P_OH_AL_4/0_Zuzara_0_416_0_2_2_2_2

New Line.l(r:p3udm39190-p3ulv16033) Units=km Length=0.0242808 bus1=p3udm39190.1.2 bus2=p3ulv16033.1.2 switch=n enabled=y phases=2 Linecode=1P_OH_AL_2/0_Rucina_0_416_0_2_2_2_2

New Line.l(r:p3udm39190-p3udt11956lv) Units=km Length=0.0197091 bus1=p3udt11956lv.1.2 bus2=p3udm39190.1.2 switch=n enabled=y phases=2 Linecode=1P_OH_AL_2/0_Rucina_0_416_0_2_2_2_2

New Line.l(r:p3udt11959lv-p3ulv15224) Units=km Length=0.0442063 bus1=p3udt11959lv.1.2 bus2=p3ulv15224.1.2 switch=n enabled=y phases=2 Linecode=1P_OH_AL_4/0_Zuzara_0_416_0_2_2_2_2

New Line.l(r:p3udt12469lv-p3ulv16032) Units=km Length=0.0212135 bus1=p3udt12469lv.1.2 bus2=p3ulv16032.1.2 switch=n enabled=y phases=2 Linecode=1P_OH_AL_2/0_Rucina_0_416_0_2_2_2_2

New Line.l(r:p3udt12928lv-p3ulv16833) Units=km Length=0.0214496 bus1=p3udt12928lv.1.2 bus2=p3ulv16833.1.2 switch=n enabled=y phases=2 Linecode=1P_OH_AL_2/0_Rucina_0_416_0_2_2_2_2

New Line.l(r:p3udt12931lv-p3ulv16836) Units=km Length=0.0167017 bus1=p3udt12931lv.1.2 bus2=p3ulv16836.1.2 switch=n enabled=y phases=2 Linecode=1P_OH_AL_2/0_Rucina_0_416_0_2_2_2_2

New Line.l(r:p3udt12932lv-p3ulv16837) Units=km Length=0.0721096 bus1=p3udt12932lv.1.2 bus2=p3ulv16837.1.2 switch=n enabled=y phases=2 Linecode=1P_OH_AL_4/0_Zuzara_0_416_0_2_2_2_2

New Line.l(r:p3udt13342lv-p3ulv17563) Units=km Length=0.03735460000000001 bus1=p3udt13342lv.1.2 bus2=p3ulv17563.1.2 switch=n enabled=y phases=2 Linecode=1P_OH_AL_4/0_Zuzara_0_416_0_2_2_2_2

New Line.l(r:p3udt13343lv-p3ulv17564) Units=km Length=0.0379007 bus1=p3udt13343lv.1.2 bus2=p3ulv17564.1.2 switch=n enabled=y phases=2 Linecode=1P_UG_AL_4/0_Sweetbriar_0_416_0_2_2_2_2

New Line.l(r:p3udt13344lv-p3ulv17565) Units=km Length=0.0175334 bus1=p3udt13344lv.1.2 bus2=p3ulv17565.1.2 switch=n enabled=y phases=2 Linecode=1P_OH_AL_2/0_Rucina_0_416_0_2_2_2_2

New Line.l(r:p3udt13344lv-p3ulv71662) Units=km Length=0.0148492 bus1=p3udt13344lv.1.2 bus2=p3ulv71662.1.2 switch=n enabled=y phases=2 Linecode=1P_OH_AL_2/0_Rucina_0_416_0_2_2_2_2

New Line.l(r:p3udt13753lv-p3ulv18331) Units=km Length=0.001 bus1=p3udt13753lv.1.2 bus2=p3ulv18331.1.2 switch=n enabled=y phases=2 Linecode=1P_OH_AL_4_Periwinkle_0_416_0_2_2_2_2

New Line.l(r:p3udt14183lv-p3ulv19102) Units=km Length=0.0246063 bus1=p3udt14183lv.1.2 bus2=p3ulv19102.1.2 switch=n enabled=y phases=2 Linecode=1P_OH_AL_2/0_Rucina_0_416_0_2_2_2_2

New Line.l(r:p3udt14184lv-p3ulv19103) Units=km Length=0.0512206 bus1=p3udt14184lv.1.2 bus2=p3ulv19103.1.2 switch=n enabled=y phases=2 Linecode=1P_OH_AL_4/0_Zuzara_0_416_0_2_2_2_2

New Line.l(r:p3udt14184lv-p3ulv30798) Units=km Length=0.0367534 bus1=p3udt14184lv.1.2 bus2=p3ulv30798.1.2 switch=n enabled=y phases=2 Linecode=1P_OH_AL_4/0_Zuzara_0_416_0_2_2_2_2

New Line.l(r:p3udt14184lv-p3ulv73946) Units=km Length=0.0551314 bus1=p3udt14184lv.1.2 bus2=p3ulv73946.1.2 switch=n enabled=y phases=2 Linecode=1P_OH_AL_4/0_Zuzara_0_416_0_2_2_2_2

New Line.l(r:p3udt14185lv-p3ulv19104) Units=km Length=0.018288000000000002 bus1=p3udt14185lv.1.2 bus2=p3ulv19104.1.2 switch=n enabled=y phases=2 Linecode=1P_OH_AL_2/0_Rucina_0_416_0_2_2_2_2

New Line.l(r:p3udt14608lv-p3ulv19868) Units=km Length=0.0367349 bus1=p3udt14608lv.1.2 bus2=p3ulv19868.1.2 switch=n enabled=y phases=2 Linecode=1P_OH_AL_4/0_Zuzara_0_416_0_2_2_2_2

New Line.l(r:p3udm46711-p3ulv47939) Units=km Length=0.0222855 bus1=p3udm46711.1.2 bus2=p3ulv47939.1.2 switch=n enabled=y phases=2 Linecode=1P_OH_AL_2/0_Rucina_0_416_0_2_2_2_2

New Line.l(r:p3udm46711-p3udt14608lv) Units=km Length=0.017906 bus1=p3udt14608lv.1.2 bus2=p3udm46711.1.2 switch=n enabled=y phases=2 Linecode=1P_OH_AL_2/0_Rucina_0_416_0_2_2_2_2

New Line.l(r:p3udt15415lv-p3ulv21403) Units=km Length=0.03220750000000001 bus1=p3udt15415lv.1.2 bus2=p3ulv21403.1.2 switch=n enabled=y phases=2 Linecode=1P_OH_AL_4/0_Zuzara_0_416_0_2_2_2_2

New Line.l(r:p3udt15418lv-p3ulv21407) Units=km Length=0.020356700000000002 bus1=p3udt15418lv.1.2 bus2=p3ulv21407.1.2 switch=n enabled=y phases=2 Linecode=1P_OH_AL_2/0_Rucina_0_416_0_2_2_2_2

New Line.l(r:p3udt15418lv-p3ulv26990) Units=km Length=0.0113504 bus1=p3udt15418lv.1.2 bus2=p3ulv26990.1.2 switch=n enabled=y phases=2 Linecode=1P_OH_AL_2/0_Rucina_0_416_0_2_2_2_2

New Line.l(r:p3udm48834-p3ulv42432) Units=km Length=0.0147174 bus1=p3udm48834.1.2 bus2=p3ulv42432.1.2 switch=n enabled=y phases=2 Linecode=1P_OH_AL_2/0_Rucina_0_416_0_2_2_2_2

New Line.l(r:p3udm48834-p3udt15418lv) Units=km Length=0.0152195 bus1=p3udt15418lv.1.2 bus2=p3udm48834.1.2 switch=n enabled=y phases=2 Linecode=1P_OH_AL_2/0_Rucina_0_416_0_2_2_2_2

New Line.l(r:p3udt15816lv-p3ulv22170)_s0 Units=km Length=0.001 bus1=p3udt15816lv.1.2 bus2=p3udt15816lv-p3ulv22170x.1.2 switch=n enabled=y phases=2 Linecode=1P_OH_AL_4_Periwinkle_0_416_0_2_2_2_2

New Line.l(r:p3udt15816lv-p3ulv22170)_s1 Units=km Length=0.001 bus1=p3udt15816lv-p3ulv22170x.1.2 bus2=p3udt15816lv-p3ulv22170xx.1.2 switch=n enabled=y phases=2 Linecode=1P_OH_AL_4_Periwinkle_0_416_0_2_2_2_2

New Line.l(r:p3udt15816lv-p3ulv22170)_s2 Units=km Length=0.0206682 bus1=p3udt15816lv-p3ulv22170xx.1.2 bus2=p3ulv22170.1.2 switch=n enabled=y phases=2 Linecode=1P_OH_AL_2/0_Rucina_0_416_0_2_2_2_2

New Line.l(r:p3udt15817lv-p3ulv22171) Units=km Length=0.0252023 bus1=p3udt15817lv.1.2 bus2=p3ulv22171.1.2 switch=n enabled=y phases=2 Linecode=1P_OH_AL_2/0_Rucina_0_416_0_2_2_2_2

New Line.l(r:p3udt15818lv-p3ulv22172) Units=km Length=0.0256372 bus1=p3udt15818lv.1.2 bus2=p3ulv22172.1.2 switch=n enabled=y phases=2 Linecode=1P_OH_AL_2/0_Rucina_0_416_0_2_2_2_2

New Line.l(r:p3udt15818lv-p3ulv55544) Units=km Length=0.0162298 bus1=p3udt15818lv.1.2 bus2=p3ulv55544.1.2 switch=n enabled=y phases=2 Linecode=1P_OH_AL_2/0_Rucina_0_416_0_2_2_2_2

New Line.l(r:p3udt15818lv-p3ulv59367) Units=km Length=0.0162302 bus1=p3udt15818lv.1.2 bus2=p3ulv59367.1.2 switch=n enabled=y phases=2 Linecode=1P_OH_AL_2/0_Rucina_0_416_0_2_2_2_2

New Line.l(r:p3udt15819lv-p3ulv22173) Units=km Length=0.0221339 bus1=p3udt15819lv.1.2 bus2=p3ulv22173.1.2 switch=n enabled=y phases=2 Linecode=1P_UG_AL_1/0_Brenau_0_416_0_2_2_2_2

New Line.l(r:p3udt16219lv-p3ulv22989) Units=km Length=0.029983100000000002 bus1=p3udt16219lv.1.2 bus2=p3ulv22989.1.2 switch=n enabled=y phases=2 Linecode=1P_UG_AL_2/0_Converse_0_416_0_2_2_2_2

New Line.l(r:p3udt16221lv-p3ulv22992) Units=km Length=0.025387 bus1=p3udt16221lv.1.2 bus2=p3ulv22992.1.2 switch=n enabled=y phases=2 Linecode=1P_OH_AL_2/0_Rucina_0_416_0_2_2_2_2

New Line.l(r:p3udt16222lv-p3ulv22993) Units=km Length=0.0177667 bus1=p3udt16222lv.1.2 bus2=p3ulv22993.1.2 switch=n enabled=y phases=2 Linecode=1P_OH_AL_2/0_Rucina_0_416_0_2_2_2_2

New Line.l(r:p3udt16572lv-p3ulv23748) Units=km Length=0.0189904 bus1=p3udt16572lv.1.2 bus2=p3ulv23748.1.2 switch=n enabled=y phases=2 Linecode=1P_OH_AL_2/0_Rucina_0_416_0_2_2_2_2

New Line.l(r:p3udt16977lv-p3ulv24626) Units=km Length=0.0429348 bus1=p3udt16977lv.1.2 bus2=p3ulv24626.1.2 switch=n enabled=y phases=2 Linecode=1P_UG_AL_1/0_Brenau_0_416_0_2_2_2_2

New Line.l(r:p3udt16977lv-p3ulv38502) Units=km Length=0.0499462 bus1=p3udt16977lv.1.2 bus2=p3ulv38502.1.2 switch=n enabled=y phases=2 Linecode=1P_UG_AL_2/0_Converse_0_416_0_2_2_2_2

New Line.l(r:p3udt17344lv-p3ulv25399) Units=km Length=0.027963600000000005 bus1=p3udt17344lv.1.2 bus2=p3ulv25399.1.2 switch=n enabled=y phases=2 Linecode=1P_OH_AL_4/0_Zuzara_0_416_0_2_2_2_2

New Line.l(r:p3udt17736lv-p3ulv26212) Units=km Length=0.0321403 bus1=p3udt17736lv.1.2 bus2=p3ulv26212.1.2 switch=n enabled=y phases=2 Linecode=1P_OH_AL_4/0_Zuzara_0_416_0_2_2_2_2

New Line.l(r:p3udt18079lv-p3ulv26991) Units=km Length=0.0358114 bus1=p3udt18079lv.1.2 bus2=p3ulv26991.1.2 switch=n enabled=y phases=2 Linecode=1P_OH_AL_4/0_Zuzara_0_416_0_2_2_2_2

New Line.l(r:p3udt18080lv-p3ulv26992) Units=km Length=0.0248771 bus1=p3udt18080lv.1.2 bus2=p3ulv26992.1.2 switch=n enabled=y phases=2 Linecode=1P_OH_AL_2/0_Rucina_0_416_0_2_2_2_2

New Line.l(r:p3udt18083lv-p3ulv26996) Units=km Length=0.0355717 bus1=p3udt18083lv.1.2 bus2=p3ulv26996.1.2 switch=n enabled=y phases=2 Linecode=1P_OH_AL_4/0_Zuzara_0_416_0_2_2_2_2

New Line.l(r:p3udt18429lv-p3ulv27746) Units=km Length=0.0182524 bus1=p3udt18429lv.1.2 bus2=p3ulv27746.1.2 switch=n enabled=y phases=2 Linecode=1P_UG_AL_1/0_Brenau_0_416_0_2_2_2_2

New Line.l(r:p3udt18429lv-p3ulv43221) Units=km Length=0.0367698 bus1=p3udt18429lv.1.2 bus2=p3ulv43221.1.2 switch=n enabled=y phases=2 Linecode=1P_UG_AL_1/0_Brenau_0_416_0_2_2_2_2

New Line.l(r:p3udt18429lv-p3ulv70919) Units=km Length=0.0359108 bus1=p3udt18429lv.1.2 bus2=p3ulv70919.1.2 switch=n enabled=y phases=2 Linecode=1P_UG_AL_1/0_Brenau_0_416_0_2_2_2_2

New Line.l(r:p3udt18751lv-p3ulv28496) Units=km Length=0.0276666 bus1=p3udt18751lv.1.2 bus2=p3ulv28496.1.2 switch=n enabled=y phases=2 Linecode=1P_UG_AL_4/0_Sweetbriar_0_416_0_2_2_2_2

New Line.l(r:p3udt19076lv-p3ulv29251) Units=km Length=0.0144013 bus1=p3udt19076lv.1.2 bus2=p3ulv29251.1.2 switch=n enabled=y phases=2 Linecode=1P_OH_AL_2/0_Rucina_0_416_0_2_2_2_2

New Line.l(r:p3udt19736lv-p3ulv30797) Units=km Length=0.0508534 bus1=p3udt19736lv.1.2 bus2=p3ulv30797.1.2 switch=n enabled=y phases=2 Linecode=1P_OH_AL_4/0_Zuzara_0_416_0_2_2_2_2

New Line.l(r:p3udt20042lv-p3ulv31587) Units=km Length=0.0647393 bus1=p3udt20042lv.1.2 bus2=p3ulv31587.1.2 switch=n enabled=y phases=2 Linecode=1P_OH_AL_4/0_Zuzara_0_416_0_2_2_2_2

New Line.l(r:p3udt20337lv-p3ulv32415) Units=km Length=0.0442746 bus1=p3udt20337lv.1.2 bus2=p3ulv32415.1.2 switch=n enabled=y phases=2 Linecode=1P_OH_AL_4/0_Zuzara_0_416_0_2_2_2_2

New Line.l(r:p3udt20915lv-p3ulv33925) Units=km Length=0.0236977 bus1=p3udt20915lv.1.2 bus2=p3ulv33925.1.2 switch=n enabled=y phases=2 Linecode=1P_OH_AL_2/0_Rucina_0_416_0_2_2_2_2

New Line.l(r:p3udt21191lv-p3ulv34717) Units=km Length=0.0365626 bus1=p3udt21191lv.1.2 bus2=p3ulv34717.1.2 switch=n enabled=y phases=2 Linecode=1P_OH_AL_4/0_Zuzara_0_416_0_2_2_2_2

New Line.l(r:p3udm62366-p3ulv49424) Units=km Length=0.0346847 bus1=p3udm62366.1.2 bus2=p3ulv49424.1.2 switch=n enabled=y phases=2 Linecode=1P_OH_AL_4/0_Zuzara_0_416_0_2_2_2_2

New Line.l(r:p3udm62366-p3udt21191lv) Units=km Length=0.0197091 bus1=p3udt21191lv.1.2 bus2=p3udm62366.1.2 switch=n enabled=y phases=2 Linecode=1P_OH_AL_2/0_Rucina_0_416_0_2_2_2_2

New Line.l(r:p3udm62367-p3ulv50909) Units=km Length=0.0427083 bus1=p3udm62367.1.2 bus2=p3ulv50909.1.2 switch=n enabled=y phases=2 Linecode=1P_OH_AL_4/0_Zuzara_0_416_0_2_2_2_2

New Line.l(r:p3udm62367-p3udt21191lv) Units=km Length=0.0197188 bus1=p3udt21191lv.1.2 bus2=p3udm62367.1.2 switch=n enabled=y phases=2 Linecode=1P_OH_AL_2/0_Rucina_0_416_0_2_2_2_2

New Line.l(r:p3udm62368-p3ulv34718) Units=km Length=0.0209833 bus1=p3udm62368.1.2 bus2=p3ulv34718.1.2 switch=n enabled=y phases=2 Linecode=1P_UG_AL_1/0_Brenau_0_416_0_2_2_2_2

New Line.l(r:p3udm62368-p3udt21192lv) Units=km Length=0.050331100000000004 bus1=p3udt21192lv.1.2 bus2=p3udm62368.1.2 switch=n enabled=y phases=2 Linecode=1P_UG_AL_1/0_Brenau_0_416_0_2_2_2_2

New Line.l(r:p3udm62369-p3ulv55546) Units=km Length=0.0225871 bus1=p3udm62369.1.2 bus2=p3ulv55546.1.2 switch=n enabled=y phases=2 Linecode=1P_UG_AL_1/0_Brenau_0_416_0_2_2_2_2

New Line.l(r:p3udm62371-p3ulv67002) Units=km Length=0.038355 bus1=p3udm62371.1.2 bus2=p3ulv67002.1.2 switch=n enabled=y phases=2 Linecode=1P_UG_AL_1/0_Brenau_0_416_0_2_2_2_2

New Line.l(r:p3udm62370-p3ulv60878) Units=km Length=0.016207000000000003 bus1=p3udm62370.1.2 bus2=p3ulv60878.1.2 switch=n enabled=y phases=2 Linecode=1P_UG_AL_1/0_Brenau_0_416_0_2_2_2_2

New Line.l(r:p3udm62370-p3udm62371) Units=km Length=0.00676457 bus1=p3udm62371.1.2 bus2=p3udm62370.1.2 switch=n enabled=y phases=2 Linecode=1P_UG_AL_1/0_Brenau_0_416_0_2_2_2_2

New Line.l(r:p3udm62369-p3udm62371) Units=km Length=0.00695508 bus1=p3udm62369.1.2 bus2=p3udm62371.1.2 switch=n enabled=y phases=2 Linecode=1P_UG_AL_1/0_Brenau_0_416_0_2_2_2_2

New Line.l(r:p3udm62369-p3udt21192lv) Units=km Length=0.00694525 bus1=p3udt21192lv.1.2 bus2=p3udm62369.1.2 switch=n enabled=y phases=2 Linecode=1P_UG_AL_4/0_Sweetbriar_0_416_0_2_2_2_2

New Line.l(r:p3udt21471lv-p3ulv35517) Units=km Length=0.041757 bus1=p3udt21471lv.1.2 bus2=p3ulv35517.1.2 switch=n enabled=y phases=2 Linecode=1P_OH_AL_4/0_Zuzara_0_416_0_2_2_2_2

New Line.l(r:p3udt21705lv-p3ulv36261) Units=km Length=0.0216583 bus1=p3udt21705lv.1.2 bus2=p3ulv36261.1.2 switch=n enabled=y phases=2 Linecode=1P_UG_AL_2/0_Converse_0_416_0_2_2_2_2

New Line.l(r:p3udt21932lv-p3ulv39301) Units=km Length=0.00967515 bus1=p3udt21932lv.1.2 bus2=p3ulv39301.1.2 switch=n enabled=y phases=2 Linecode=1P_OH_AL_2/0_Rucina_0_416_0_2_2_2_2

New Line.l(r:p3udm63832-p3ulv36965) Units=km Length=0.00866729 bus1=p3udm63832.1.2 bus2=p3ulv36965.1.2 switch=n enabled=y phases=2 Linecode=1P_OH_AL_2/0_Rucina_0_416_0_2_2_2_2

New Line.l(r:p3udm63832-p3udt21932lv) Units=km Length=0.0154077 bus1=p3udt21932lv.1.2 bus2=p3udm63832.1.2 switch=n enabled=y phases=2 Linecode=1P_OH_AL_2/0_Rucina_0_416_0_2_2_2_2

New Line.l(r:p3udm63834-p3ulv63201) Units=km Length=0.00643156 bus1=p3udm63834.1.2 bus2=p3ulv63201.1.2 switch=n enabled=y phases=2 Linecode=1P_OH_AL_2/0_Rucina_0_416_0_2_2_2_2

New Line.l(r:p3udm63834-p3udt21932lv) Units=km Length=0.0198822 bus1=p3udt21932lv.1.2 bus2=p3udm63834.1.2 switch=n enabled=y phases=2 Linecode=1P_OH_AL_2/0_Rucina_0_416_0_2_2_2_2

New Line.l(r:p3udt21933lv-p3ulv36966) Units=km Length=0.017360700000000003 bus1=p3udt21933lv.1.2 bus2=p3ulv36966.1.2 switch=n enabled=y phases=2 Linecode=1P_OH_AL_2/0_Rucina_0_416_0_2_2_2_2

New Line.l(r:p3udt22211lv-p3ulv37746) Units=km Length=0.0252569 bus1=p3udt22211lv.1.2 bus2=p3ulv37746.1.2 switch=n enabled=y phases=2 Linecode=1P_OH_AL_2/0_Rucina_0_416_0_2_2_2_2

New Line.l(r:p3udt22465lv-p3ulv38501) Units=km Length=0.0325073 bus1=p3udt22465lv.1.2 bus2=p3ulv38501.1.2 switch=n enabled=y phases=2 Linecode=1P_OH_AL_4/0_Zuzara_0_416_0_2_2_2_2

New Line.l(r:p3udm64886-p3ulv47168) Units=km Length=0.0364186 bus1=p3udm64886.1.2 bus2=p3ulv47168.1.2 switch=n enabled=y phases=2 Linecode=1P_OH_AL_4/0_Zuzara_0_416_0_2_2_2_2

New Line.l(r:p3udm64886-p3udt22465lv) Units=km Length=0.0175629 bus1=p3udt22465lv.1.2 bus2=p3udm64886.1.2 switch=n enabled=y phases=2 Linecode=1P_OH_AL_2/0_Rucina_0_416_0_2_2_2_2

New Line.l(r:p3udm65451-p3ulv39300) Units=km Length=0.0226181 bus1=p3udm65451.1.2 bus2=p3ulv39300.1.2 switch=n enabled=y phases=2 Linecode=1P_OH_AL_2/0_Rucina_0_416_0_2_2_2_2

New Line.l(r:p3udm65451-p3udt22757lv) Units=km Length=0.0562638 bus1=p3udt22757lv.1.2 bus2=p3udm65451.1.2 switch=n enabled=y phases=2 Linecode=1P_OH_AL_4/0_Zuzara_0_416_0_2_2_2_2

New Line.l(r:p3udm65452-p3ulv43220) Units=km Length=0.026104 bus1=p3udm65452.1.2 bus2=p3ulv43220.1.2 switch=n enabled=y phases=2 Linecode=1P_OH_AL_2/0_Rucina_0_416_0_2_2_2_2

New Line.l(r:p3udm65452-p3udt22757lv) Units=km Length=0.0333936 bus1=p3udt22757lv.1.2 bus2=p3udm65452.1.2 switch=n enabled=y phases=2 Linecode=1P_OH_AL_4/0_Zuzara_0_416_0_2_2_2_2

New Line.l(r:p3udt22758lv-p3ulv39302) Units=km Length=0.04086120000000001 bus1=p3udt22758lv.1.2 bus2=p3ulv39302.1.2 switch=n enabled=y phases=2 Linecode=1P_OH_AL_4/0_Zuzara_0_416_0_2_2_2_2

New Line.l(r:p3udt22759lv-p3ulv39303) Units=km Length=0.028283 bus1=p3udt22759lv.1.2 bus2=p3ulv39303.1.2 switch=n enabled=y phases=2 Linecode=1P_OH_AL_4/0_Zuzara_0_416_0_2_2_2_2

New Line.l(r:p3udt22760lv-p3ulv39304) Units=km Length=0.0420322 bus1=p3udt22760lv.1.2 bus2=p3ulv39304.1.2 switch=n enabled=y phases=2 Linecode=1P_OH_AL_4/0_Zuzara_0_416_0_2_2_2_2

New Line.l(r:p3udt23023lv-p3ulv40090) Units=km Length=0.0516891 bus1=p3udt23023lv.1.2 bus2=p3ulv40090.1.2 switch=n enabled=y phases=2 Linecode=1P_OH_AL_4/0_Zuzara_0_416_0_2_2_2_2

New Line.l(r:p3udt23510lv-p3ulv41654) Units=km Length=0.0242547 bus1=p3udt23510lv.1.2 bus2=p3ulv41654.1.2 switch=n enabled=y phases=2 Linecode=1P_OH_AL_2/0_Rucina_0_416_0_2_2_2_2

New Line.l(r:p3udm67235-p3ulv42431) Units=km Length=0.0208067 bus1=p3udm67235.1.2 bus2=p3ulv42431.1.2 switch=n enabled=y phases=2 Linecode=1P_UG_AL_4/0_Sweetbriar_0_416_0_2_2_2_2

New Line.l(r:p3udm67235-p3ulv60090) Units=km Length=0.021282 bus1=p3udm67235.1.2 bus2=p3ulv60090.1.2 switch=n enabled=y phases=2 Linecode=1P_UG_AL_4/0_Sweetbriar_0_416_0_2_2_2_2

New Line.l(r:p3udm67235-p3udt23737lv) Units=km Length=0.00949068 bus1=p3udt23737lv.1.2 bus2=p3udm67235.1.2 switch=n enabled=y phases=2 Linecode=1P_UG_AL_4/0_Sweetbriar_0_416_0_2_2_2_2

New Line.l(r:p3udm67236-p3ulv43993) Units=km Length=0.0248154 bus1=p3udm67236.1.2 bus2=p3ulv43993.1.2 switch=n enabled=y phases=2 Linecode=1P_UG_AL_2/0_Converse_0_416_0_2_2_2_2

New Line.l(r:p3udm67236-p3udt23737lv) Units=km Length=0.00950474 bus1=p3udt23737lv.1.2 bus2=p3udm67236.1.2 switch=n enabled=y phases=2 Linecode=1P_UG_AL_2/0_Converse_0_416_0_2_2_2_2

New Line.l(r:p3udt23984lv-p3ulv43222) Units=km Length=0.0402178 bus1=p3udt23984lv.1.2 bus2=p3ulv43222.1.2 switch=n enabled=y phases=2 Linecode=1P_UG_AL_2/0_Converse_0_416_0_2_2_2_2

New Line.l(r:p3udt23985lv-p3ulv43223) Units=km Length=0.0438359 bus1=p3udt23985lv.1.2 bus2=p3ulv43223.1.2 switch=n enabled=y phases=2 Linecode=1P_UG_AL_2/0_Converse_0_416_0_2_2_2_2

New Line.l(r:p3udt23986lv-p3ulv43224) Units=km Length=0.001 bus1=p3udt23986lv.1.2 bus2=p3ulv43224.1.2 switch=n enabled=y phases=2 Linecode=1P_OH_AL_4_Periwinkle_0_416_0_2_2_2_2

New Line.l(r:p3udt24225lv-p3ulv43991) Units=km Length=0.0192616 bus1=p3udt24225lv.1.2 bus2=p3ulv43991.1.2 switch=n enabled=y phases=2 Linecode=1P_OH_AL_2/0_Rucina_0_416_0_2_2_2_2

New Line.l(r:p3udt24227lv-p3ulv43994) Units=km Length=0.0316642 bus1=p3udt24227lv.1.2 bus2=p3ulv43994.1.2 switch=n enabled=y phases=2 Linecode=1P_OH_AL_4/0_Zuzara_0_416_0_2_2_2_2

New Line.l(r:p3udt24229lv-p3ulv43996) Units=km Length=0.0431569 bus1=p3udt24229lv.1.2 bus2=p3ulv43996.1.2 switch=n enabled=y phases=2 Linecode=1P_OH_AL_4/0_Zuzara_0_416_0_2_2_2_2

New Line.l(r:p3udt24230lv-p3ulv43997) Units=km Length=0.0245549 bus1=p3udt24230lv.1.2 bus2=p3ulv43997.1.2 switch=n enabled=y phases=2 Linecode=1P_OH_AL_2/0_Rucina_0_416_0_2_2_2_2

New Line.l(r:p3udm68516-p3ulv44842) Units=km Length=0.0212206 bus1=p3udm68516.1.2 bus2=p3ulv44842.1.2 switch=n enabled=y phases=2 Linecode=1P_UG_AL_1/0_Brenau_0_416_0_2_2_2_2

New Line.l(r:p3udm68516-p3udt24471lv) Units=km Length=0.0291406 bus1=p3udt24471lv.1.2 bus2=p3udm68516.1.2 switch=n enabled=y phases=2 Linecode=1P_UG_AL_1/0_Brenau_0_416_0_2_2_2_2

New Line.l(r:p3udm68517-p3ulv67795) Units=km Length=0.0204081 bus1=p3udm68517.1.2 bus2=p3ulv67795.1.2 switch=n enabled=y phases=2 Linecode=1P_UG_AL_1/0_Brenau_0_416_0_2_2_2_2

New Line.l(r:p3udm68517-p3udt24471lv) Units=km Length=0.0244777 bus1=p3udt24471lv.1.2 bus2=p3udm68517.1.2 switch=n enabled=y phases=2 Linecode=1P_UG_AL_1/0_Brenau_0_416_0_2_2_2_2

New Line.l(r:p3udt24473lv-p3ulv44846) Units=km Length=0.017932 bus1=p3udt24473lv.1.2 bus2=p3ulv44846.1.2 switch=n enabled=y phases=2 Linecode=1P_UG_AL_1/0_Brenau_0_416_0_2_2_2_2

New Line.l(r:p3udt24690lv-p3ulv45611) Units=km Length=0.0242925 bus1=p3udt24690lv.1.2 bus2=p3ulv45611.1.2 switch=n enabled=y phases=2 Linecode=1P_OH_AL_2/0_Rucina_0_416_0_2_2_2_2

New Line.l(r:p3udt24690lv-p3ulv51684) Units=km Length=0.0151783 bus1=p3udt24690lv.1.2 bus2=p3ulv51684.1.2 switch=n enabled=y phases=2 Linecode=1P_OH_AL_2/0_Rucina_0_416_0_2_2_2_2

New Line.l(r:p3udt24691lv-p3ulv45613) Units=km Length=0.0206805 bus1=p3udt24691lv.1.2 bus2=p3ulv45613.1.2 switch=n enabled=y phases=2 Linecode=1P_UG_AL_1/0_Brenau_0_416_0_2_2_2_2

New Line.l(r:p3udt24693lv-p3ulv45616) Units=km Length=0.0237127 bus1=p3udt24693lv.1.2 bus2=p3ulv45616.1.2 switch=n enabled=y phases=2 Linecode=1P_UG_AL_2/0_Converse_0_416_0_2_2_2_2

New Line.l(r:p3udt24943lv-p3ulv46412) Units=km Length=0.0130846 bus1=p3udt24943lv.1.2 bus2=p3ulv46412.1.2 switch=n enabled=y phases=2 Linecode=1P_OH_AL_2/0_Rucina_0_416_0_2_2_2_2

New Line.l(r:p3udt25387lv-p3ulv47934) Units=km Length=0.0196471 bus1=p3udt25387lv.1.2 bus2=p3ulv47934.1.2 switch=n enabled=y phases=2 Linecode=1P_OH_AL_2/0_Rucina_0_416_0_2_2_2_2

New Line.l(r:p3udt25392lv-p3ulv47942) Units=km Length=0.0152616 bus1=p3udt25392lv.1.2 bus2=p3ulv47942.1.2 switch=n enabled=y phases=2 Linecode=1P_OH_AL_2/0_Rucina_0_416_0_2_2_2_2

New Line.l(r:p3udt25772lv-p3ulv49423) Units=km Length=0.0209081 bus1=p3udt25772lv.1.2 bus2=p3ulv49423.1.2 switch=n enabled=y phases=2 Linecode=1P_OH_AL_2/0_Rucina_0_416_0_2_2_2_2

New Line.l(r:p3udt25981lv-p3ulv50183) Units=km Length=0.001 bus1=p3udt25981lv.1.2 bus2=p3ulv50183.1.2 switch=n enabled=y phases=2 Linecode=1P_OH_AL_4_Periwinkle_0_416_0_2_2_2_2

New Line.l(r:p3udt26161lv-p3ulv50912) Units=km Length=0.0199877 bus1=p3udt26161lv.1.2 bus2=p3ulv50912.1.2 switch=n enabled=y phases=2 Linecode=1P_OH_AL_2/0_Rucina_0_416_0_2_2_2_2

New Line.l(r:p3udt26563lv-p3ulv52478) Units=km Length=0.023309100000000003 bus1=p3udt26563lv.1.2 bus2=p3ulv52478.1.2 switch=n enabled=y phases=2 Linecode=1P_OH_AL_2/0_Rucina_0_416_0_2_2_2_2

New Line.l(r:p3udt26565lv-p3ulv52482) Units=km Length=0.0468051 bus1=p3udt26565lv.1.2 bus2=p3ulv52482.1.2 switch=n enabled=y phases=2 Linecode=1P_OH_AL_4/0_Zuzara_0_416_0_2_2_2_2

New Line.l(r:p3udt26567lv-p3ulv52485) Units=km Length=0.001 bus1=p3udt26567lv.1.2 bus2=p3ulv52485.1.2 switch=n enabled=y phases=2 Linecode=1P_OH_AL_4_Periwinkle_0_416_0_2_2_2_2

New Line.l(r:p3udt26752lv-p3ulv53259) Units=km Length=0.0574101 bus1=p3udt26752lv.1.2 bus2=p3ulv53259.1.2 switch=n enabled=y phases=2 Linecode=1P_OH_AL_4/0_Zuzara_0_416_0_2_2_2_2

New Line.l(r:p3udt26753lv-p3ulv53260) Units=km Length=0.0339989 bus1=p3udt26753lv.1.2 bus2=p3ulv53260.1.2 switch=n enabled=y phases=2 Linecode=1P_OH_AL_4/0_Zuzara_0_416_0_2_2_2_2

New Line.l(r:p3udt26755lv-p3ulv53262) Units=km Length=0.0187706 bus1=p3udt26755lv.1.2 bus2=p3ulv53262.1.2 switch=n enabled=y phases=2 Linecode=1P_OH_AL_2/0_Rucina_0_416_0_2_2_2_2

New Line.l(r:p3udt26756lv-p3ulv53263) Units=km Length=0.022188600000000003 bus1=p3udt26756lv.1.2 bus2=p3ulv53263.1.2 switch=n enabled=y phases=2 Linecode=1P_OH_AL_2/0_Rucina_0_416_0_2_2_2_2

New Line.l(r:p3udt27132lv-p3ulv54792) Units=km Length=0.0234681 bus1=p3udt27132lv.1.2 bus2=p3ulv54792.1.2 switch=n enabled=y phases=2 Linecode=1P_OH_AL_2/0_Rucina_0_416_0_2_2_2_2

New Line.l(r:p3udt27319lv-p3ulv55545) Units=km Length=0.0214728 bus1=p3udt27319lv.1.2 bus2=p3ulv55545.1.2 switch=n enabled=y phases=2 Linecode=1P_OH_AL_2/0_Rucina_0_416_0_2_2_2_2

New Line.l(r:p3udt27323lv-p3ulv55552) Units=km Length=0.0261481 bus1=p3udt27323lv.1.2 bus2=p3ulv55552.1.2 switch=n enabled=y phases=2 Linecode=1P_OH_AL_2/0_Rucina_0_416_0_2_2_2_2

New Line.l(r:p3udt27504lv-p3ulv56327) Units=km Length=0.0355429 bus1=p3udt27504lv.1.2 bus2=p3ulv56327.1.2 switch=n enabled=y phases=2 Linecode=1P_OH_AL_4/0_Zuzara_0_416_0_2_2_2_2

New Line.l(r:p3udt27861lv-p3ulv57853) Units=km Length=0.0223476 bus1=p3udt27861lv.1.2 bus2=p3ulv57853.1.2 switch=n enabled=y phases=2 Linecode=1P_OH_AL_2/0_Rucina_0_416_0_2_2_2_2

New Line.l(r:p3udt27862lv-p3ulv59368) Units=km Length=0.005196200000000001 bus1=p3udt27862lv.1.2 bus2=p3ulv59368.1.2 switch=n enabled=y phases=2 Linecode=1P_OH_AL_2/0_Rucina_0_416_0_2_2_2_2

New Line.l(r:p3udt27862lv-p3ulv64673) Units=km Length=0.00788237 bus1=p3udt27862lv.1.2 bus2=p3ulv64673.1.2 switch=n enabled=y phases=2 Linecode=1P_OH_AL_2/0_Rucina_0_416_0_2_2_2_2

New Line.l(r:p3udm73699-p3ulv57854) Units=km Length=0.00742499 bus1=p3udm73699.1.2 bus2=p3ulv57854.1.2 switch=n enabled=y phases=2 Linecode=1P_OH_AL_2/0_Rucina_0_416_0_2_2_2_2

New Line.l(r:p3udm73699-p3udt27862lv) Units=km Length=0.0182718 bus1=p3udt27862lv.1.2 bus2=p3udm73699.1.2 switch=n enabled=y phases=2 Linecode=1P_OH_AL_2/0_Rucina_0_416_0_2_2_2_2

New Line.l(r:p3udm73702-p3ulv74699) Units=km Length=0.00609565 bus1=p3udm73702.1.2 bus2=p3ulv74699.1.2 switch=n enabled=y phases=2 Linecode=1P_OH_AL_2/0_Rucina_0_416_0_2_2_2_2

New Line.l(r:p3udm73702-p3udt27862lv) Units=km Length=0.0807122 bus1=p3udt27862lv.1.2 bus2=p3udm73702.1.2 switch=n enabled=y phases=2 Linecode=1P_OH_AL_4/0_Zuzara_0_416_0_2_2_2_2

New Line.l(r:p3udt28194lv-p3ulv59366) Units=km Length=0.0277933 bus1=p3udt28194lv.1.2 bus2=p3ulv59366.1.2 switch=n enabled=y phases=2 Linecode=1P_OH_AL_4/0_Zuzara_0_416_0_2_2_2_2

New Line.l(r:p3udt28345lv-p3ulv60087) Units=km Length=0.0347595 bus1=p3udt28345lv.1.2 bus2=p3ulv60087.1.2 switch=n enabled=y phases=2 Linecode=1P_OH_AL_4/0_Zuzara_0_416_0_2_2_2_2

New Line.l(r:p3udt28346lv-p3ulv60089) Units=km Length=0.0182109 bus1=p3udt28346lv.1.2 bus2=p3ulv60089.1.2 switch=n enabled=y phases=2 Linecode=1P_OH_AL_2/0_Rucina_0_416_0_2_2_2_2

New Line.l(r:p3udt28836lv-p3ulv62410) Units=km Length=0.0294938 bus1=p3udt28836lv.1.2 bus2=p3ulv62410.1.2 switch=n enabled=y phases=2 Linecode=1P_OH_AL_4/0_Zuzara_0_416_0_2_2_2_2

New Line.l(r:p3udt28838lv-p3ulv62416) Units=km Length=0.0371542 bus1=p3udt28838lv.1.2 bus2=p3ulv62416.1.2 switch=n enabled=y phases=2 Linecode=1P_OH_AL_4/0_Zuzara_0_416_0_2_2_2_2

New Line.l(r:p3udt28839lv-p3ulv62417) Units=km Length=0.0259492 bus1=p3udt28839lv.1.2 bus2=p3ulv62417.1.2 switch=n enabled=y phases=2 Linecode=1P_OH_AL_2/0_Rucina_0_416_0_2_2_2_2

New Line.l(r:p3udt28997lv-p3ulv63202) Units=km Length=0.0255052 bus1=p3udt28997lv.1.2 bus2=p3ulv63202.1.2 switch=n enabled=y phases=2 Linecode=1P_OH_AL_2/0_Rucina_0_416_0_2_2_2_2

New Line.l(r:p3udt29167lv-p3ulv63929) Units=km Length=0.0197777 bus1=p3udt29167lv.1.2 bus2=p3ulv63929.1.2 switch=n enabled=y phases=2 Linecode=1P_OH_AL_2/0_Rucina_0_416_0_2_2_2_2

New Line.l(r:p3udt29168lv-p3ulv63930) Units=km Length=0.0150027 bus1=p3udt29168lv.1.2 bus2=p3ulv63930.1.2 switch=n enabled=y phases=2 Linecode=1P_OH_AL_2/0_Rucina_0_416_0_2_2_2_2

New Line.l(r:p3udt29444lv-p3ulv65439) Units=km Length=0.0388335 bus1=p3udt29444lv.1.2 bus2=p3ulv65439.1.2 switch=n enabled=y phases=2 Linecode=1P_OH_AL_4/0_Zuzara_0_416_0_2_2_2_2

New Line.l(r:p3udt29445lv-p3ulv65440) Units=km Length=0.0408248 bus1=p3udt29445lv.1.2 bus2=p3ulv65440.1.2 switch=n enabled=y phases=2 Linecode=1P_OH_AL_4/0_Zuzara_0_416_0_2_2_2_2

New Line.l(r:p3udt29603lv-p3ulv66227) Units=km Length=0.0193437 bus1=p3udt29603lv.1.2 bus2=p3ulv66227.1.2 switch=n enabled=y phases=2 Linecode=1P_UG_AL_1/0_Brenau_0_416_0_2_2_2_2

New Line.l(r:p3udt29604lv-p3ulv66230) Units=km Length=0.045731 bus1=p3udt29604lv.1.2 bus2=p3ulv66230.1.2 switch=n enabled=y phases=2 Linecode=1P_OH_AL_4/0_Zuzara_0_416_0_2_2_2_2

New Line.l(r:p3udt29764lv-p3ulv67007) Units=km Length=0.0816658 bus1=p3udt29764lv.1.2 bus2=p3ulv67007.1.2 switch=n enabled=y phases=2 Linecode=1P_UG_AL_2/0_Converse_0_416_0_2_2_2_2

New Line.l(r:p3udt29924lv-p3ulv67798) Units=km Length=0.0681779 bus1=p3udt29924lv.1.2 bus2=p3ulv67798.1.2 switch=n enabled=y phases=2 Linecode=1P_OH_AL_4/0_Zuzara_0_416_0_2_2_2_2

New Line.l(r:p3udt30086lv-p3ulv68576) Units=km Length=0.070969 bus1=p3udt30086lv.1.2 bus2=p3ulv68576.1.2 switch=n enabled=y phases=2 Linecode=1P_OH_AL_4/0_Zuzara_0_416_0_2_2_2_2

New Line.l(r:p3udt30228lv-p3ulv69340) Units=km Length=0.0127578 bus1=p3udt30228lv.1.2 bus2=p3ulv69340.1.2 switch=n enabled=y phases=2 Linecode=1P_OH_AL_2/0_Rucina_0_416_0_2_2_2_2

New Line.l(r:p3udt30382lv-p3ulv70107) Units=km Length=0.016469 bus1=p3udt30382lv.1.2 bus2=p3ulv70107.1.2 switch=n enabled=y phases=2 Linecode=1P_OH_AL_2/0_Rucina_0_416_0_2_2_2_2

New Line.l(r:p3udt30383lv-p3ulv70108) Units=km Length=0.0286478 bus1=p3udt30383lv.1.2 bus2=p3ulv70108.1.2 switch=n enabled=y phases=2 Linecode=1P_OH_AL_4/0_Zuzara_0_416_0_2_2_2_2

New Line.l(r:p3udt30974lv-p3ulv73173) Units=km Length=0.0434462 bus1=p3udt30974lv.1.2 bus2=p3ulv73173.1.2 switch=n enabled=y phases=2 Linecode=1P_OH_AL_4/0_Zuzara_0_416_0_2_2_2_2

New Line.l(r:p3udt31109lv-p3ulv73944) Units=km Length=0.0302459 bus1=p3udt31109lv.1.2 bus2=p3ulv73944.1.2 switch=n enabled=y phases=2 Linecode=1P_OH_AL_4/0_Zuzara_0_416_0_2_2_2_2

New Line.l(r:p3udt31110lv-p3ulv73945) Units=km Length=0.0296305 bus1=p3udt31110lv.1.2 bus2=p3ulv73945.1.2 switch=n enabled=y phases=2 Linecode=1P_OH_AL_4/0_Zuzara_0_416_0_2_2_2_2

New Line.l(r:p3udt31112lv-p3ulv73949) Units=km Length=0.001 bus1=p3udt31112lv.1.2 bus2=p3ulv73949.1.2 switch=n enabled=y phases=2 Linecode=1P_OH_AL_4_Periwinkle_0_416_0_2_2_2_2

New Line.l(r:p3udt31229lv-p3ulv74700) Units=km Length=0.0219845 bus1=p3udt31229lv.1.2 bus2=p3ulv74700.1.2 switch=n enabled=y phases=2 Linecode=1P_OH_AL_2/0_Rucina_0_416_0_2_2_2_2

New Line.l(r:p3udt31230lv-p3ulv74702) Units=km Length=0.0217284 bus1=p3udt31230lv.1.2 bus2=p3ulv74702.1.2 switch=n enabled=y phases=2 Linecode=1P_OH_AL_2/0_Rucina_0_416_0_2_2_2_2

New Line.l(r:p3udt31350lv-p3ulv75402) Units=km Length=0.0191093 bus1=p3udt31350lv.1.2 bus2=p3ulv75402.1.2 switch=n enabled=y phases=2 Linecode=1P_UG_AL_4/0_Sweetbriar_0_416_0_2_2_2_2

New Line.l(r:p3udt31499lv-p3ulv76221) Units=km Length=0.0347567 bus1=p3udt31499lv.1.2 bus2=p3ulv76221.1.2 switch=n enabled=y phases=2 Linecode=1P_OH_AL_4/0_Zuzara_0_416_0_2_2_2_2

New Line.l(r:p3udt31646lv-p3ulv76995) Units=km Length=0.0298601 bus1=p3udt31646lv.1.2 bus2=p3ulv76995.1.2 switch=n enabled=y phases=2 Linecode=1P_UG_AL_1/0_Brenau_0_416_0_2_2_2_2

New Line.l(r:p3udt31771lv-p3ulv77753) Units=km Length=0.0400651 bus1=p3udt31771lv.1.2 bus2=p3ulv77753.1.2 switch=n enabled=y phases=2 Linecode=1P_OH_AL_4/0_Zuzara_0_416_0_2_2_2_2

New Line.l(r:p3udt31772lv-p3ulv77754) Units=km Length=0.0345063 bus1=p3udt31772lv.1.2 bus2=p3ulv77754.1.2 switch=n enabled=y phases=2 Linecode=1P_OH_AL_4/0_Zuzara_0_416_0_2_2_2_2

New Line.l(r:p3udt31773lv-p3ulv77755) Units=km Length=0.0223679 bus1=p3udt31773lv.1.2 bus2=p3ulv77755.1.2 switch=n enabled=y phases=2 Linecode=1P_OH_AL_2/0_Rucina_0_416_0_2_2_2_2

New Line.l(r:p3udt31907lv-p3ulv78512) Units=km Length=0.0305433 bus1=p3udt31907lv.1.2 bus2=p3ulv78512.1.2 switch=n enabled=y phases=2 Linecode=1P_OH_AL_4/0_Zuzara_0_416_0_2_2_2_2

New Line.l(r:p3udt16977-p3udt23985) Units=km Length=0.001 bus1=p3udt16977-p3udt23985xx.2 bus2=p3udt16977-p3udt23985xxx.2 switch=n enabled=y phases=1 Linecode=1P_UG_AL_#2_15_12_47_0_1_1_1_1

New Line.l(r:p3udt29167-p3udt9410) Units=km Length=0.156543 bus1=p3udt29167-p3udt9410x.2 bus2=p3udt9410.2 switch=n enabled=y phases=1 Linecode=1P_OH_AL_ACSR_#2_Sparrow_12_47_0_1_1_1_1

New Line.l(r:p3udt16221-p3udt16222) Units=km Length=0.001 bus1=p3udt16221-p3udt16222x.1 bus2=p3udt16222.1 switch=n enabled=y phases=1 Linecode=1P_OH_AL_ACSR_#2_Sparrow_12_47_0_1_1_1_1

New Line.l(r:p3udt17344-p3udt19736) Units=km Length=0.001 bus1=p3udt17344.2 bus2=p3udt19736.2 switch=n enabled=y phases=1 Linecode=1P_OH_AL_ACSR_#2_Sparrow_12_47_0_1_1_1_1

New Line.l(r:p3udt17344-p3udt28838) Units=km Length=0.0189315 bus1=p3udt28838.2 bus2=p3udt17344.2 switch=n enabled=y phases=1 Linecode=1P_OH_AL_ACSR_#2_Sparrow_12_47_0_1_1_1_1

New Line.l(r:p3udt22211-p3udt28838) Units=km Length=0.0189415 bus1=p3udt22211.2 bus2=p3udt28838.2 switch=n enabled=y phases=1 Linecode=1P_OH_AL_ACSR_#2_Sparrow_12_47_0_1_1_1_1

New Line.l(r:p3udt22211-p3udt30974) Units=km Length=0.11469200000000002 bus1=p3udt22211-p3udt30974x.2 bus2=p3udt22211.2 switch=n enabled=y phases=1 Linecode=1P_OH_AL_ACSR_#2_Sparrow_12_47_0_1_1_1_1

New Line.l(r:p3udt15816-p3udt19076)_s0 Units=km Length=0.001 bus1=p3udt19076.3 bus2=p3udt15816-p3udt19076xx.3 switch=n enabled=y phases=1 Linecode=1P_OH_AL_ACSR_#2_Sparrow_12_47_0_1_1_1_1

New Line.l(r:p3udt15816-p3udt19076)_s1 Units=km Length=0.001 bus1=p3udt15816-p3udt19076xx.3 bus2=p3udt15816-p3udt19076x.3 switch=n enabled=y phases=1 Linecode=1P_OH_AL_ACSR_#2_Sparrow_12_47_0_1_1_1_1

New Line.l(r:p3udt15816-p3udt19076)_s2 Units=km Length=0.001 bus1=p3udt15816-p3udt19076x.3 bus2=p3udt15816.3 switch=n enabled=y phases=1 Linecode=1P_OH_AL_ACSR_#2_Sparrow_12_47_0_1_1_1_1

New Line.l(r:p3udt19076-p3udt24225)_s0 Units=km Length=0.001 bus1=p3udt19076.3 bus2=p3udt19076-p3udt24225x.3 switch=n enabled=y phases=1 Linecode=1P_OH_AL_ACSR_#2_Sparrow_12_47_0_1_1_1_1

New Line.l(r:p3udt19076-p3udt24225)_s1 Units=km Length=0.001 bus1=p3udt19076-p3udt24225x.3 bus2=p3udt19076-p3udt24225xx.3 switch=n enabled=y phases=1 Linecode=1P_OH_AL_ACSR_#2_Sparrow_12_47_0_1_1_1_1

New Line.l(r:p3udt19076-p3udt24225)_s2 Units=km Length=0.0278681 bus1=p3udt19076-p3udt24225xx.3 bus2=p3udt24225.3 switch=n enabled=y phases=1 Linecode=1P_OH_AL_ACSR_#2_Sparrow_12_47_0_1_1_1_1

New Line.l(r:p3udt12928-p3udt8829) Units=km Length=0.001 bus1=p3udt8829.3 bus2=p3udt12928.3 switch=n enabled=y phases=1 Linecode=1P_OH_AL_ACSR_#2_Sparrow_12_47_0_1_1_1_1

New Line.l(r:p3udt7114-p3udt8254) Units=km Length=0.0434644 bus1=p3udt7114-p3udt8254x.3 bus2=p3udt7114-p3udt8254xx.3 switch=n enabled=y phases=1 Linecode=1P_UG_AL_#2_15_12_47_0_1_1_1_1

New Line.l(r:p3udt148-p3udt7114) Units=km Length=0.0627799 bus1=p3udt148-p3udt7114x.3 bus2=p3udt148-p3udt7114xx.3 switch=n enabled=y phases=1 Linecode=1P_UG_AL_#2_15_12_47_0_1_1_1_1

New Line.l(r:p3udt148-p3udt4505) Units=km Length=0.058562300000000005 bus1=p3udt148-p3udt4505xx.3 bus2=p3udt148-p3udt4505x.3 switch=n enabled=y phases=1 Linecode=1P_UG_AL_#2_15_12_47_0_1_1_1_1

New Line.l(r:p3udt15819-p3udt24471) Units=km Length=0.0194316 bus1=p3udt15819-p3udt24471xx.3 bus2=p3udt15819-p3udt24471x.3 switch=n enabled=y phases=1 Linecode=1P_UG_AL_#2_15_12_47_0_1_1_1_1

New Line.l(r:p3udt24471-p3udt24691) Units=km Length=0.0170931 bus1=p3udt24471-p3udt24691xx.3 bus2=p3udt24471-p3udt24691x.3 switch=n enabled=y phases=1 Linecode=1P_UG_AL_#2_15_12_47_0_1_1_1_1

New Line.l(r:p3udt21705-p3udt24691) Units=km Length=0.0421591 bus1=p3udt21705-p3udt24691x.3 bus2=p3udt21705-p3udt24691xx.3 switch=n enabled=y phases=1 Linecode=1P_UG_AL_#2_15_12_47_0_1_1_1_1

New Line.l(r:p3udt21705-p3udt29603) Units=km Length=0.0143617 bus1=p3udt21705-p3udt29603xx.3 bus2=p3udt21705-p3udt29603x.3 switch=n enabled=y phases=1 Linecode=1P_UG_AL_#2_15_12_47_0_1_1_1_1

New Line.l(r:p3udt21192-p3udt29603) Units=km Length=0.00685091 bus1=p3udt21192-p3udt29603x.3 bus2=p3udt21192-p3udt29603xx.3 switch=n enabled=y phases=1 Linecode=1P_UG_AL_#2_15_12_47_0_1_1_1_1

New Line.l(r:p3udt21192-p3udt4505) Units=km Length=0.136783 bus1=p3udt21192-p3udt4505xx.3 bus2=p3udt21192-p3udt4505x.3 switch=n enabled=y phases=1 Linecode=1P_UG_AL_#2_15_12_47_0_1_1_1_1

New Line.l(r:p3udt26563-p3udt4505) Units=km Length=0.0299873 bus1=p3udt26563.3 bus2=p3udt4505.3 switch=n enabled=y phases=1 Linecode=1P_OH_AL_ACSR_#2_Sparrow_12_47_0_1_1_1_1

New Line.l(r:p3udt26563-p3udt27319) Units=km Length=0.001 bus1=p3udt26563.3 bus2=p3udt27319.3 switch=n enabled=y phases=1 Linecode=1P_OH_AL_ACSR_#2_Sparrow_12_47_0_1_1_1_1

New Line.l(r:p3udt26563-p3udt8829) Units=km Length=0.027438 bus1=p3udt8829.3 bus2=p3udt26563.3 switch=n enabled=y phases=1 Linecode=1P_OH_AL_ACSR_#2_Sparrow_12_47_0_1_1_1_1

New Line.l(r:p3udt11470-p3udt8829) Units=km Length=0.013721800000000001 bus1=p3udt11470.3 bus2=p3udt8829.3 switch=n enabled=y phases=1 Linecode=1P_OH_AL_ACSR_#2_Sparrow_12_47_0_1_1_1_1

New Line.l(r:p3udt11470-p3udt3796) Units=km Length=0.0197091 bus1=p3udt3796.3 bus2=p3udt11470.3 switch=n enabled=y phases=1 Linecode=1P_OH_AL_ACSR_#2_Sparrow_12_47_0_1_1_1_1

New Line.l(r:p3udt15818-p3udt3796) Units=km Length=0.0197188 bus1=p3udt15818.3 bus2=p3udt3796.3 switch=n enabled=y phases=1 Linecode=1P_OH_AL_ACSR_#2_Sparrow_12_47_0_1_1_1_1

New Line.l(r:p3udt15818-p3udt24690) Units=km Length=0.0394254 bus1=p3udt24690.3 bus2=p3udt15818.3 switch=n enabled=y phases=1 Linecode=1P_OH_AL_ACSR_#2_Sparrow_12_47_0_1_1_1_1

New Line.l(r:p3udt24690-p3udt5198) Units=km Length=0.0197091 bus1=p3udt5198.3 bus2=p3udt24690.3 switch=n enabled=y phases=1 Linecode=1P_OH_AL_ACSR_#2_Sparrow_12_47_0_1_1_1_1

New Line.l(r:p3udt11956-p3udt5198) Units=km Length=0.0197188 bus1=p3udt11956.3 bus2=p3udt5198.3 switch=n enabled=y phases=1 Linecode=1P_OH_AL_ACSR_#2_Sparrow_12_47_0_1_1_1_1

New Line.l(r:p3udt11956-p3udt3795) Units=km Length=0.039428 bus1=p3udt3795.3 bus2=p3udt11956.3 switch=n enabled=y phases=1 Linecode=1P_OH_AL_ACSR_#2_Sparrow_12_47_0_1_1_1_1

New Line.l(r:p3udt15415-p3udt3795) Units=km Length=0.039428 bus1=p3udt15415.3 bus2=p3udt3795.3 switch=n enabled=y phases=1 Linecode=1P_OH_AL_ACSR_#2_Sparrow_12_47_0_1_1_1_1

New Line.l(r:p3udt15415-p3udt21191) Units=km Length=0.001 bus1=p3udt15415.3 bus2=p3udt21191.3 switch=n enabled=y phases=1 Linecode=1P_OH_AL_ACSR_#2_Sparrow_12_47_0_1_1_1_1

New Line.l(r:p3udt10942-p3udt15415) Units=km Length=0.039428 bus1=p3udt10942.3 bus2=p3udt15415.3 switch=n enabled=y phases=1 Linecode=1P_OH_AL_ACSR_#2_Sparrow_12_47_0_1_1_1_1

New Line.l(r:p3udt10942-p3udt28194) Units=km Length=0.001 bus1=p3udt10942.3 bus2=p3udt28194.3 switch=n enabled=y phases=1 Linecode=1P_OH_AL_ACSR_#2_Sparrow_12_47_0_1_1_1_1

New Line.l(r:p3udt10942-p3udt11955) Units=km Length=0.0197066 bus1=p3udt11955.3 bus2=p3udt10942.3 switch=n enabled=y phases=1 Linecode=1P_OH_AL_ACSR_#2_Sparrow_12_47_0_1_1_1_1

New Line.l(r:p3udt11955-p3udt3095) Units=km Length=0.039428 bus1=p3udt3095.3 bus2=p3udt11955.3 switch=n enabled=y phases=1 Linecode=1P_OH_AL_ACSR_#2_Sparrow_12_47_0_1_1_1_1

New Line.l(r:p3udt25387-p3udt3095) Units=km Length=0.039428 bus1=p3udt25387.3 bus2=p3udt3095.3 switch=n enabled=y phases=1 Linecode=1P_OH_AL_ACSR_#2_Sparrow_12_47_0_1_1_1_1

New Line.l(r:p3udt13753-p3udt25981) Units=km Length=0.10938400000000001 bus1=p3udt25981.3 bus2=p3udt13753.3 switch=n enabled=y phases=1 Linecode=1P_OH_AL_ACSR_#2_Sparrow_12_47_0_1_1_1_1

New Line.l(r:p3udt25387-p3udt25981)_s0 Units=km Length=0.11471900000000002 bus1=p3udt25387.3 bus2=p3udt25387-p3udt25981x.3 switch=n enabled=y phases=1 Linecode=1P_OH_AL_ACSR_#2_Sparrow_12_47_0_1_1_1_1

New Line.l(r:p3udt25387-p3udt25981)_s1 Units=km Length=1.07229 bus1=p3udt25387-p3udt25981x.3 bus2=p3udt25981.3 switch=n enabled=y phases=1 Linecode=1P_OH_AL_ACSR_#2_Sparrow_12_47_0_1_1_1_1

New Line.l(r:p3udt25387-p3udt28836) Units=km Length=0.001 bus1=p3udt25387.3 bus2=p3udt28836.3 switch=n enabled=y phases=1 Linecode=1P_OH_AL_ACSR_#2_Sparrow_12_47_0_1_1_1_1

New Line.l(r:p3udt12469-p3udt25387) Units=km Length=0.0197091 bus1=p3udt12469.3 bus2=p3udt25387.3 switch=n enabled=y phases=1 Linecode=1P_OH_AL_ACSR_#2_Sparrow_12_47_0_1_1_1_1

New Line.l(r:p3udt12469-p3udt9405) Units=km Length=0.0197188 bus1=p3udt9405.3 bus2=p3udt12469.3 switch=n enabled=y phases=1 Linecode=1P_OH_AL_ACSR_#2_Sparrow_12_47_0_1_1_1_1

New Line.l(r:p3udt15817-p3udt9405) Units=km Length=0.001 bus1=p3udt9405.3 bus2=p3udt15817.3 switch=n enabled=y phases=1 Linecode=1P_OH_AL_ACSR_#2_Sparrow_12_47_0_1_1_1_1

New Line.l(r:p3udt16572-p3udt9405) Units=km Length=0.0197091 bus1=p3udt16572.3 bus2=p3udt9405.3 switch=n enabled=y phases=1 Linecode=1P_OH_AL_ACSR_#2_Sparrow_12_47_0_1_1_1_1

New Line.l(r:p3udt16572-p3udt31499) Units=km Length=0.001 bus1=p3udt16572.3 bus2=p3udt31499.3 switch=n enabled=y phases=1 Linecode=1P_OH_AL_ACSR_#2_Sparrow_12_47_0_1_1_1_1

New Line.l(r:p3udt16572-p3udt25772) Units=km Length=0.0197188 bus1=p3udt25772.3 bus2=p3udt16572.3 switch=n enabled=y phases=1 Linecode=1P_OH_AL_ACSR_#2_Sparrow_12_47_0_1_1_1_1

New Line.l(r:p3udt19076-p3udt25772) Units=km Length=0.0554903 bus1=p3udt19076.3 bus2=p3udt25772.3 switch=n enabled=y phases=1 Linecode=1P_OH_AL_ACSR_#2_Sparrow_12_47_0_1_1_1_1

New Line.l(r:p3udt19076-p3udt6469)_s0 Units=km Length=0.177086 bus1=p3udt6469.3 bus2=p3udt19076-p3udt6469x.3 switch=n enabled=y phases=1 Linecode=1P_OH_AL_ACSR_#2_Sparrow_12_47_0_1_1_1_1

New Line.l(r:p3udt19076-p3udt6469)_s1 Units=km Length=0.169527 bus1=p3udt19076-p3udt6469x.3 bus2=p3udt19076.3 switch=n enabled=y phases=1 Linecode=1P_OH_AL_ACSR_#2_Sparrow_12_47_0_1_1_1_1

New Line.l(r:p3udt13342-p3udt6469)_s0 Units=km Length=0.07866460000000002 bus1=p3udt13342.3 bus2=p3udt13342-p3udt6469x.3 switch=n enabled=y phases=1 Linecode=1P_OH_AL_ACSR_#2_Sparrow_12_47_0_1_1_1_1

New Line.l(r:p3udt13342-p3udt6469)_s1 Units=km Length=0.0141871 bus1=p3udt13342-p3udt6469x.3 bus2=p3udt6469.3 switch=n enabled=y phases=1 Linecode=1P_OH_AL_ACSR_#2_Sparrow_12_47_0_1_1_1_1

New Line.l(r:p3udt150-p3udt20915) Units=km Length=0.0579412 bus1=p3udt150.3 bus2=p3udt20915.3 switch=n enabled=y phases=1 Linecode=1P_OH_AL_ACSR_#2_Sparrow_12_47_0_1_1_1_1

New Line.l(r:p3udt150-p3udt31773) Units=km Length=0.051502000000000006 bus1=p3udt31773.3 bus2=p3udt150.3 switch=n enabled=y phases=1 Linecode=1P_OH_AL_ACSR_#2_Sparrow_12_47_0_1_1_1_1

New Line.l(r:p3udt13342-p3udt31773) Units=km Length=0.0291977 bus1=p3udt13342.3 bus2=p3udt31773.3 switch=n enabled=y phases=1 Linecode=1P_OH_AL_ACSR_#2_Sparrow_12_47_0_1_1_1_1

New Line.l(r:p3udt13342-p3udt14184) Units=km Length=0.22958200000000004 bus1=p3udt13342-p3udt14184x.3 bus2=p3udt13342.3 switch=n enabled=y phases=1 Linecode=1P_OH_AL_ACSR_#2_Sparrow_12_47_0_1_1_1_1

New Line.l(r:p3udt14184-p3udt26752) Units=km Length=0.001 bus1=p3udt14184-p3udt26752x.1 bus2=p3udt26752.1 switch=n enabled=y phases=1 Linecode=1P_OH_AL_ACSR_#2_Sparrow_12_47_0_1_1_1_1

New Line.l(r:p3udt14184-p3udt26753) Units=km Length=0.001 bus1=p3udt14184-p3udt26753x.1 bus2=p3udt26753.1 switch=n enabled=y phases=1 Linecode=1P_OH_AL_ACSR_#2_Sparrow_12_47_0_1_1_1_1

New Line.l(r:p3udt29444-p3udt3797) Units=km Length=0.001 bus1=p3udt29444-p3udt3797x.2 bus2=p3udt29444.2 switch=n enabled=y phases=1 Linecode=1P_OH_AL_ACSR_#2_Sparrow_12_47_0_1_1_1_1

New Line.l(r:p3udt30086-p3udt8256) Units=km Length=0.001 bus1=p3udt8256.3 bus2=p3udt30086.3 switch=n enabled=y phases=1 Linecode=1P_OH_AL_ACSR_#2_Sparrow_12_47_0_1_1_1_1

New Line.l(r:p3udt18079-p3udt8256) Units=km Length=0.499654 bus1=p3udt18079-p3udt8256x.3 bus2=p3udt8256.3 switch=n enabled=y phases=1 Linecode=1P_OH_AL_ACSR_#2_Sparrow_12_47_0_1_1_1_1

New Line.l(r:p3udt21932-p3udt9931) Units=km Length=0.051852300000000004 bus1=p3udt9931.2 bus2=p3udt21932.2 switch=n enabled=y phases=1 Linecode=1P_OH_AL_ACSR_#2_Sparrow_12_47_0_1_1_1_1

New Line.l(r:p3udt15418-p3udt9931) Units=km Length=0.0888078 bus1=p3udt15418.2 bus2=p3udt9931.2 switch=n enabled=y phases=1 Linecode=1P_OH_AL_ACSR_#2_Sparrow_12_47_0_1_1_1_1

New Line.l(r:p3udt15418-p3udt27862) Units=km Length=0.0461686 bus1=p3udt15418-p3udt27862x.2 bus2=p3udt15418.2 switch=n enabled=y phases=1 Linecode=1P_OH_AL_ACSR_#2_Sparrow_12_47_0_1_1_1_1

New Line.l(r:p3udt5203-p3udt5845) Units=km Length=0.001 bus1=p3udt5203.2 bus2=p3udt5845.2 switch=n enabled=y phases=1 Linecode=1P_OH_AL_ACSR_#2_Sparrow_12_47_0_1_1_1_1

New Line.l(r:p3udt14183-p3udt5203) Units=km Length=0.0883426 bus1=p3udt14183.2 bus2=p3udt5203.2 switch=n enabled=y phases=1 Linecode=1P_OH_AL_ACSR_#2_Sparrow_12_47_0_1_1_1_1

New Line.l(r:p3udt149-p3udt8833) Units=km Length=0.0700052 bus1=p3udt8833.2 bus2=p3udt149.2 switch=n enabled=y phases=1 Linecode=1P_OH_AL_ACSR_#2_Sparrow_12_47_0_1_1_1_1

New Line.l(r:p3udt12931-p3udt8833) Units=km Length=0.001 bus1=p3udt8833.2 bus2=p3udt12931.2 switch=n enabled=y phases=1 Linecode=1P_OH_AL_ACSR_#2_Sparrow_12_47_0_1_1_1_1

New Line.l(r:p3udt14183-p3udt8833) Units=km Length=0.0513111 bus1=p3udt14183.2 bus2=p3udt8833.2 switch=n enabled=y phases=1 Linecode=1P_OH_AL_ACSR_#2_Sparrow_12_47_0_1_1_1_1

New Line.l(r:p3udt14183-p3udt22759) Units=km Length=0.0373428 bus1=p3udt22759.2 bus2=p3udt14183.2 switch=n enabled=y phases=1 Linecode=1P_OH_AL_ACSR_#2_Sparrow_12_47_0_1_1_1_1

New Line.l(r:p3udt22759-p3udt30228) Units=km Length=0.0356955 bus1=p3udt30228.2 bus2=p3udt22759.2 switch=n enabled=y phases=1 Linecode=1P_OH_AL_ACSR_#2_Sparrow_12_47_0_1_1_1_1

New Line.l(r:p3udt27132-p3udt30228) Units=km Length=0.0166878 bus1=p3udt27132-p3udt30228x.2 bus2=p3udt30228.2 switch=n enabled=y phases=1 Linecode=1P_OH_AL_ACSR_#2_Sparrow_12_47_0_1_1_1_1

New Line.l(r:p3udt22760-p3udt31772) Units=km Length=0.001 bus1=p3udt22760-p3udt31772x.1 bus2=p3udt31772.1 switch=n enabled=y phases=1 Linecode=1P_OH_AL_ACSR_#2_Sparrow_12_47_0_1_1_1_1

New Line.l(r:p3udt24943-p3udt5204) Units=km Length=0.0708336 bus1=p3udt5204.1 bus2=p3udt24943.1 switch=n enabled=y phases=1 Linecode=1P_OH_AL_ACSR_#2_Sparrow_12_47_0_1_1_1_1

New Line.l(r:p3udt14608-p3udt5204) Units=km Length=0.152463 bus1=p3udt14608.1 bus2=p3udt5204.1 switch=n enabled=y phases=1 Linecode=1P_OH_AL_ACSR_#2_Sparrow_12_47_0_1_1_1_1

New Line.l(r:p3udt16219-p3udt8258) Units=km Length=0.0850057 bus1=p3udt16219.1 bus2=p3udt8258.1 switch=n enabled=y phases=1 Linecode=1P_OH_AL_ACSR_#2_Sparrow_12_47_0_1_1_1_1

New Line.l(r:p3udt18429-p3udt4509) Units=km Length=0.0857678 bus1=p3udt18429-p3udt4509xx.1 bus2=p3udt18429-p3udt4509x.1 switch=n enabled=y phases=1 Linecode=1P_UG_AL_#2_15_12_47_0_1_1_1_1

New Line.l(r:p3udt23984-p3udt3098) Units=km Length=0.0376494 bus1=p3udt23984-p3udt3098x.1 bus2=p3udt23984-p3udt3098xx.1 switch=n enabled=y phases=1 Linecode=1P_UG_AL_#2_15_12_47_0_1_1_1_1

New Line.l(r:p3udt23984-p3udt4509) Units=km Length=0.0863859 bus1=p3udt23984-p3udt4509xx.1 bus2=p3udt23984-p3udt4509x.1 switch=n enabled=y phases=1 Linecode=1P_UG_AL_#2_15_12_47_0_1_1_1_1

New Line.l(r:p3udt31646-p3udt4509) Units=km Length=0.038370100000000004 bus1=p3udt31646-p3udt4509x.1 bus2=p3udt31646-p3udt4509xx.1 switch=n enabled=y phases=1 Linecode=1P_UG_AL_#2_15_12_47_0_1_1_1_1

New Line.l(r:p3udt24473-p3udt31646) Units=km Length=0.057563 bus1=p3udt24473-p3udt31646x.1 bus2=p3udt24473-p3udt31646xx.1 switch=n enabled=y phases=1 Linecode=1P_UG_AL_#2_15_12_47_0_1_1_1_1

New Line.l(r:p3udt16219-p3udt24473) Units=km Length=0.019185000000000004 bus1=p3udt16219-p3udt24473x.1 bus2=p3udt16219-p3udt24473xx.1 switch=n enabled=y phases=1 Linecode=1P_UG_AL_#2_15_12_47_0_1_1_1_1

New Line.l(r:p3udt16219-p3udt21933) Units=km Length=0.0449258 bus1=p3udt21933.1 bus2=p3udt16219.1 switch=n enabled=y phases=1 Linecode=1P_OH_AL_ACSR_#2_Sparrow_12_47_0_1_1_1_1

New Line.l(r:p3udt14608-p3udt21933) Units=km Length=0.071136 bus1=p3udt14608.1 bus2=p3udt21933.1 switch=n enabled=y phases=1 Linecode=1P_OH_AL_ACSR_#2_Sparrow_12_47_0_1_1_1_1

New Line.l(r:p3udt14608-p3udt23510) Units=km Length=0.017909 bus1=p3udt23510.1 bus2=p3udt14608.1 switch=n enabled=y phases=1 Linecode=1P_OH_AL_ACSR_#2_Sparrow_12_47_0_1_1_1_1

New Line.l(r:p3udt23510-p3udt9932) Units=km Length=0.035815 bus1=p3udt9932.1 bus2=p3udt23510.1 switch=n enabled=y phases=1 Linecode=1P_OH_AL_ACSR_#2_Sparrow_12_47_0_1_1_1_1

New Line.l(r:p3udt31230-p3udt9932) Units=km Length=0.0358119 bus1=p3udt31230.1 bus2=p3udt9932.1 switch=n enabled=y phases=1 Linecode=1P_OH_AL_ACSR_#2_Sparrow_12_47_0_1_1_1_1

New Line.l(r:p3udt24230-p3udt31230) Units=km Length=0.0990724 bus1=p3udt24230-p3udt31230x.1 bus2=p3udt31230.1 switch=n enabled=y phases=1 Linecode=1P_OH_AL_ACSR_#2_Sparrow_12_47_0_1_1_1_1

New Line.l(r:p3udt3099-p3udt5846) Units=km Length=0.001 bus1=p3udt3099-p3udt5846x.3 bus2=p3udt5846.3 switch=n enabled=y phases=1 Linecode=1P_OH_AL_ACSR_#2_Sparrow_12_47_0_1_1_1_1

New Line.l(r:p3udt12932-p3udt3099) Units=km Length=0.001 bus1=p3udt12932-p3udt3099x.2 bus2=p3udt12932.2 switch=n enabled=y phases=1 Linecode=1P_OH_AL_ACSR_#2_Sparrow_12_47_0_1_1_1_1

New Line.l(r:p3udt28346-p3udt29168) Units=km Length=0.0363157 bus1=p3udt29168.2 bus2=p3udt28346.2 switch=n enabled=y phases=1 Linecode=1P_OH_AL_ACSR_#2_Sparrow_12_47_0_1_1_1_1

New Line.l(r:p3udt18083-p3udt29168) Units=km Length=0.0181627 bus1=p3udt18083.2 bus2=p3udt29168.2 switch=n enabled=y phases=1 Linecode=1P_OH_AL_ACSR_#2_Sparrow_12_47_0_1_1_1_1

New Line.l(r:p3udt13344-p3udt18083) Units=km Length=0.018153 bus1=p3udt13344.2 bus2=p3udt18083.2 switch=n enabled=y phases=1 Linecode=1P_OH_AL_ACSR_#2_Sparrow_12_47_0_1_1_1_1

New Line.l(r:p3udt13344-p3udt26161) Units=km Length=0.036407400000000006 bus1=p3udt26161.2 bus2=p3udt13344.2 switch=n enabled=y phases=1 Linecode=1P_OH_AL_ACSR_#2_Sparrow_12_47_0_1_1_1_1

New Line.l(r:p3udt14185-p3udt26161) Units=km Length=0.118332 bus1=p3udt14185-p3udt26161x.2 bus2=p3udt26161.2 switch=n enabled=y phases=1 Linecode=1P_OH_AL_ACSR_#2_Sparrow_12_47_0_1_1_1_1

New Line.l(r:p3udt23737-p3udt8262) Units=km Length=0.159782 bus1=p3udt23737-p3udt8262x.3 bus2=p3udt23737-p3udt8262xx.3 switch=n enabled=y phases=1 Linecode=1P_UG_AL_#2_15_12_47_0_1_1_1_1

New Line.l(r:p3udt23737-p3udt31350) Units=km Length=0.116267 bus1=p3udt23737-p3udt31350xx.3 bus2=p3udt23737-p3udt31350x.3 switch=n enabled=y phases=1 Linecode=1P_UG_AL_#2_15_12_47_0_1_1_1_1

New Line.l(r:p3udt11475-p3udt31350) Units=km Length=0.0386043 bus1=p3udt11475.3 bus2=p3udt31350.3 switch=n enabled=y phases=1 Linecode=1P_OH_AL_ACSR_#2_Sparrow_12_47_0_1_1_1_1

New Line.l(r:p3udt11475-p3udt9411) Units=km Length=0.0386083 bus1=p3udt11475-p3udt9411x.3 bus2=p3udt11475.3 switch=n enabled=y phases=1 Linecode=1P_OH_AL_ACSR_#2_Sparrow_12_47_0_1_1_1_1

New Line.l(r:p3udt10441-p3udt23986) Units=km Length=0.19762700000000002 bus1=p3udt10441.2 bus2=p3udt23986.2 switch=n enabled=y phases=1 Linecode=1P_OH_AL_ACSR_#2_Sparrow_12_47_0_1_1_1_1

New Line.l(r:p3udt10441-p3udt26567) Units=km Length=0.238314 bus1=p3udt10441.2 bus2=p3udt26567.2 switch=n enabled=y phases=1 Linecode=1P_OH_AL_ACSR_#2_Sparrow_12_47_0_1_1_1_1

New Line.l(r:p3udt10441-p3udt25392) Units=km Length=0.457687 bus1=p3udt10441-p3udt25392x.2 bus2=p3udt10441.2 switch=n enabled=y phases=1 Linecode=1P_OH_AL_ACSR_#2_Sparrow_12_47_0_1_1_1_1

New Line.l(r:p3udt21471-p3udt31112) Units=km Length=0.304572 bus1=p3udt21471-p3udt31112x.1 bus2=p3udt31112.1 switch=n enabled=y phases=1 Linecode=1P_OH_AL_ACSR_#2_Sparrow_12_47_0_1_1_1_1

New Line.l(r:p3udt24693-p3udt7698) Units=km Length=0.08519760000000001 bus1=p3udt24693.3 bus2=p3udt24693_b1_1.3 switch=n enabled=y phases=1 Linecode=1P_OH_AL_ACSR_#2_Sparrow_12_47_0_1_1_1_1

New Line.l(r:p3udt24693-p3udt25392) Units=km Length=0.624371 bus1=p3udt24693-p3udt25392x.3 bus2=p3udt24693.3 switch=n enabled=y phases=1 Linecode=1P_OH_AL_ACSR_#2_Sparrow_12_47_0_1_1_1_1

New Line.l(r:p3udt13343-p3udt15821) Units=km Length=0.0283763 bus1=p3udt13343-p3udt15821xx.3 bus2=p3udt13343-p3udt15821x.3 switch=n enabled=y phases=1 Linecode=1P_UG_AL_#2_15_12_47_0_1_1_1_1

New Line.l(r:p3udt22758-p3udt27504) Units=km Length=0.0149102 bus1=p3udt22758-p3udt27504x.1 bus2=p3udt22758.1 switch=n enabled=y phases=1 Linecode=1P_OH_AL_ACSR_#2_Sparrow_12_47_0_1_1_1_1

New Line.l(r:p3udt28345-p3udt29445) Units=km Length=0.001 bus1=p3udt28345.2 bus2=p3udt29445.2 switch=n enabled=y phases=1 Linecode=1P_OH_AL_ACSR_#2_Sparrow_12_47_0_1_1_1_1

New Line.l(r:p3udt28345-p3udt31907) Units=km Length=0.001 bus1=p3udt28345.2 bus2=p3udt31907.2 switch=n enabled=y phases=1 Linecode=1P_OH_AL_ACSR_#2_Sparrow_12_47_0_1_1_1_1

New Line.l(r:p3udt26755-p3udt28345) Units=km Length=0.109595 bus1=p3udt26755-p3udt28345x.2 bus2=p3udt28345.2 switch=n enabled=y phases=1 Linecode=1P_OH_AL_ACSR_#2_Sparrow_12_47_0_1_1_1_1

New Line.l(r:p3udt20337-p3udt24229) Units=km Length=0.001 bus1=p3udt20337.2 bus2=p3udt24229.2 switch=n enabled=y phases=1 Linecode=1P_OH_AL_ACSR_#2_Sparrow_12_47_0_1_1_1_1

New Line.l(r:p3udt20337-p3udt29924) Units=km Length=0.001 bus1=p3udt20337.2 bus2=p3udt29924.2 switch=n enabled=y phases=1 Linecode=1P_OH_AL_ACSR_#2_Sparrow_12_47_0_1_1_1_1

New Line.l(r:p3udt20337-p3udt29167) Units=km Length=0.133146 bus1=p3udt20337-p3udt29167x.2 bus2=p3udt20337.2 switch=n enabled=y phases=1 Linecode=1P_OH_AL_ACSR_#2_Sparrow_12_47_0_1_1_1_1

New Line.l(r:p3udt16977-p3udt29764) Units=km Length=0.001 bus1=p3udt16977-p3udt29764xx.2 bus2=p3udt16977-p3udt29764xxx.2 switch=n enabled=y phases=1 Linecode=1P_UG_AL_#2_15_12_47_0_1_1_1_1

New Line.l(r:p3udt10944-p3udt14184) Units=km Length=0.0354865 bus1=p3udt10944.1.2.3 bus2=p3udt14184.1.2.3 switch=n enabled=y phases=3 Linecode=3P_OH_AL_ACSR_4/0_Penguin_12_47_0_3_3_3_3

New Line.l(r:p3udt10944-p3udt11959) Units=km Length=0.037413 bus1=p3udt11959.1.2.3 bus2=p3udt10944.1.2.3 switch=n enabled=y phases=3 Linecode=3P_OH_AL_ACSR_4/0_Penguin_12_47_0_3_3_3_3

New Line.l(r:p3udt11959-p3udt3797) Units=km Length=0.0374229 bus1=p3udt3797.1.2.3 bus2=p3udt11959.1.2.3 switch=n enabled=y phases=3 Linecode=3P_OH_AL_ACSR_4/0_Penguin_12_47_0_3_3_3_3

New Line.l(r:p3udt26565-p3udt3797) Units=km Length=0.037413 bus1=p3udt26565.1.2.3 bus2=p3udt3797.1.2.3 switch=n enabled=y phases=3 Linecode=3P_OH_AL_ACSR_4/0_Penguin_12_47_0_3_3_3_3

New Line.l(r:p3udt23023-p3udt26565) Units=km Length=0.038127 bus1=p3udt23023.1.2.3 bus2=p3udt26565.1.2.3 switch=n enabled=y phases=3 Linecode=3P_OH_AL_ACSR_4/0_Penguin_12_47_0_3_3_3_3

New Line.l(r:p3udt23023-p3udt28839) Units=km Length=0.038127 bus1=p3udt28839.1.2.3 bus2=p3udt23023.1.2.3 switch=n enabled=y phases=3 Linecode=3P_OH_AL_ACSR_4/0_Penguin_12_47_0_3_3_3_3

New Line.l(r:p3udt28839-p3udt3097) Units=km Length=0.0190627 bus1=p3udt3097.1.2.3 bus2=p3udt28839.1.2.3 switch=n enabled=y phases=3 Linecode=3P_OH_AL_ACSR_4/0_Penguin_12_47_0_3_3_3_3

New Line.l(r:p3udt3097-p3udt31110) Units=km Length=0.0315948 bus1=p3udt31110.1.2.3 bus2=p3udt3097.1.2.3 switch=n enabled=y phases=3 Linecode=3P_OH_AL_ACSR_4/0_Penguin_12_47_0_3_3_3_3

New Line.l(r:p3udt17736-p3udt31110) Units=km Length=0.0236005 bus1=p3udt17736.1.2.3 bus2=p3udt31110.1.2.3 switch=n enabled=y phases=3 Linecode=3P_OH_AL_ACSR_4/0_Penguin_12_47_0_3_3_3_3

New Line.l(r:p3udt17736-p3udt7696) Units=km Length=0.0313416 bus1=p3udt7696.1.2.3 bus2=p3udt17736.1.2.3 switch=n enabled=y phases=3 Linecode=3P_OH_AL_ACSR_4/0_Penguin_12_47_0_3_3_3_3

New Line.l(r:p3udt24227-p3udt7696) Units=km Length=0.0353157 bus1=p3udt24227.1.2.3 bus2=p3udt7696.1.2.3 switch=n enabled=y phases=3 Linecode=3P_OH_AL_ACSR_4/0_Penguin_12_47_0_3_3_3_3

New Line.l(r:p3udt24227-p3udt895) Units=km Length=0.0461321 bus1=p3udt895.1.2.3 bus2=p3udt24227.1.2.3 switch=n enabled=y phases=3 Linecode=3P_OH_AL_ACSR_4/0_Penguin_12_47_0_3_3_3_3

New Line.l(r:p3udt31109-p3udt895) Units=km Length=0.0651742 bus1=p3udt31109.1.2.3 bus2=p3udt895.1.2.3 switch=n enabled=y phases=3 Linecode=3P_OH_AL_ACSR_4/0_Penguin_12_47_0_3_3_3_3

New Line.l(r:p3udt31109-p3udt8834) Units=km Length=0.0292332 bus1=p3udt8834.1.2.3 bus2=p3udt31109.1.2.3 switch=n enabled=y phases=3 Linecode=3P_OH_AL_ACSR_4/0_Penguin_12_47_0_3_3_3_3

New Line.l(r:p3udt27132-p3udt8834) Units=km Length=0.0942185 bus1=p3udt27132.1.2.3 bus2=p3udt8834.1.2.3 switch=n enabled=y phases=3 Linecode=3P_OH_AL_ACSR_4/0_Penguin_12_47_0_3_3_3_3

New Line.l(r:p3udt27132-p3udt30974) Units=km Length=0.0939229 bus1=p3udt30974.1.2.3 bus2=p3udt27132.1.2.3 switch=n enabled=y phases=3 Linecode=3P_OH_AL_ACSR_4/0_Penguin_12_47_0_3_3_3_3

New Line.l(r:p3udt30974-p3udt31771) Units=km Length=0.0595204 bus1=p3udt31771.1.2.3 bus2=p3udt30974.1.2.3 switch=n enabled=y phases=3 Linecode=3P_OH_AL_ACSR_4/0_Penguin_12_47_0_3_3_3_3

New Line.l(r:p3udt22760-p3udt31771) Units=km Length=0.0385415 bus1=p3udt22760.1.2.3 bus2=p3udt31771.1.2.3 switch=n enabled=y phases=3 Linecode=3P_OH_AL_ACSR_4/0_Penguin_12_47_0_3_3_3_3

New Line.l(r:p3udt20042-p3udt22760) Units=km Length=0.0365444 bus1=p3udt20042.1.2.3 bus2=p3udt22760.1.2.3 switch=n enabled=y phases=3 Linecode=3P_OH_AL_ACSR_4/0_Penguin_12_47_0_3_3_3_3

New Line.l(r:p3udt20042-p3udt30383) Units=km Length=0.0518626 bus1=p3udt30383.1.2.3 bus2=p3udt20042.1.2.3 switch=n enabled=y phases=3 Linecode=3P_OH_AL_ACSR_4/0_Penguin_12_47_0_3_3_3_3

New Line.l(r:p3udt24230-p3udt30383) Units=km Length=0.0725442 bus1=p3udt24230.1.2.3 bus2=p3udt30383.1.2.3 switch=n enabled=y phases=3 Linecode=3P_OH_AL_ACSR_4/0_Penguin_12_47_0_3_3_3_3

New Line.l(r:p3udt18080-p3udt24230) Units=km Length=0.037894500000000005 bus1=p3udt18080.1.2.3 bus2=p3udt24230.1.2.3 switch=n enabled=y phases=3 Linecode=3P_OH_AL_ACSR_4/0_Penguin_12_47_0_3_3_3_3

New Line.l(r:p3udt18080-p3udt28997) Units=km Length=0.0361603 bus1=p3udt28997.1.2.3 bus2=p3udt18080.1.2.3 switch=n enabled=y phases=3 Linecode=3P_OH_AL_ACSR_4/0_Penguin_12_47_0_3_3_3_3

New Line.l(r:p3udt26756-p3udt28997) Units=km Length=0.0171965 bus1=p3udt26756.1.2.3 bus2=p3udt28997.1.2.3 switch=n enabled=y phases=3 Linecode=3P_OH_AL_ACSR_4/0_Penguin_12_47_0_3_3_3_3

New Line.l(r:p3udt26755-p3udt26756) Units=km Length=0.0727171 bus1=p3udt26755.1.2.3 bus2=p3udt26756.1.2.3 switch=n enabled=y phases=3 Linecode=3P_OH_AL_ACSR_4/0_Penguin_12_47_0_3_3_3_3

New Line.l(r:p3udt16221-p3udt26755) Units=km Length=0.0840667 bus1=p3udt16221.1.2.3 bus2=p3udt26755.1.2.3 switch=n enabled=y phases=3 Linecode=3P_OH_AL_ACSR_4/0_Penguin_12_47_0_3_3_3_3

New Line.l(r:p3udt16221-p3udt29167) Units=km Length=0.121306 bus1=p3udt29167.1.2.3 bus2=p3udt16221.1.2.3 switch=n enabled=y phases=3 Linecode=3P_OH_AL_ACSR_4/0_Penguin_12_47_0_3_3_3_3

New Line.l(r:p3udt29167-p3udt29604) Units=km Length=0.0188649 bus1=p3udt29604.1.2.3 bus2=p3udt29167.1.2.3 switch=n enabled=y phases=3 Linecode=3P_OH_AL_ACSR_4/0_Penguin_12_47_0_3_3_3_3

New Line.l(r:p3udt16977-p3udt29604) Units=km Length=0.0521067 bus1=p3udt16977.1.2.3 bus2=p3udt29604.1.2.3 switch=n enabled=y phases=3 Linecode=3P_OH_AL_ACSR_4/0_Penguin_12_47_0_3_3_3_3

New Line.l(r:p3udt16977-p3uhs16_1247) Units=km Length=0.110798 bus1=p3udt16977-p3uhs16_1247x.1.2.3 bus2=p3udt16977.1.2.3 switch=n enabled=y phases=3 Linecode=3P_UG_AL_4/0_25_12_47_0_3_3_3_3

New Line.l(r:p3udt17735lv-p3ulv26211) Units=km Length=0.0498808 bus1=p3udt17735lv.1.2.3 bus2=p3ulv26211.1.2.3 switch=n enabled=y phases=3 Linecode=3P_UG_AL_350kcmil_15_0_416_0_3_3_3_3

New Line.l(r:p3udt25982lv-p3ulv50185) Units=km Length=0.0528643 bus1=p3udt25982lv.1.2.3 bus2=p3ulv50185.1.2.3 switch=n enabled=y phases=3 Linecode=3P_UG_AL_350kcmil_15_0_416_0_3_3_3_3

New Line.l(r:p3udm71001-p3ulv60883) Units=km Length=0.0578029 bus1=p3udm71001.1.2.3 bus2=p3ulv60883.1.2.3 switch=n enabled=y phases=3 Linecode=3P_UG_AL_350kcmil_15_0_416_0_3_3_3_3

New Line.l(r:p3udm71001-p3udt25982lv) Units=km Length=0.017457300000000002 bus1=p3udt25982lv.1.2.3 bus2=p3udm71001.1.2.3 switch=n enabled=y phases=3 Linecode=3P_UG_AL_350kcmil_15_0_416_0_3_3_3_3

New Line.l(r:p3udt17735-p3udt25982) Units=km Length=0.119487 bus1=p3udt17735.1.2.3 bus2=p3udt25982.1.2.3 switch=n enabled=y phases=3 Linecode=3P_OH_AL_ACSR_4/0_Penguin_12_47_0_3_3_3_3

New Line.l(r:p3udt17735-p3udt27862) Units=km Length=0.24568 bus1=p3udt27862.1.2.3 bus2=p3udt17735.1.2.3 switch=n enabled=y phases=3 Linecode=3P_OH_AL_ACSR_4/0_Penguin_12_47_0_3_3_3_3

New Line.l(r:p3udt18079-p3udt27862) Units=km Length=0.354296 bus1=p3udt18079.1.2.3 bus2=p3udt27862.1.2.3 switch=n enabled=y phases=3 Linecode=3P_OH_AL_ACSR_4/0_Penguin_12_47_0_3_3_3_3

New Line.l(r:p3udt18079-p3udt22465) Units=km Length=0.0644776 bus1=p3udt22465.1.2.3 bus2=p3udt18079.1.2.3 switch=n enabled=y phases=3 Linecode=3P_OH_AL_ACSR_4/0_Penguin_12_47_0_3_3_3_3

New Line.l(r:p3udt22465-p3udt31109) Units=km Length=0.031123500000000002 bus1=p3udt31109.1.2.3 bus2=p3udt22465.1.2.3 switch=n enabled=y phases=3 Linecode=3P_OH_AL_ACSR_4/0_Penguin_12_47_0_3_3_3_3

New Line.l(r:p3udt29605lv-p3ulv66232) Units=km Length=0.009445030000000002 bus1=p3udt29605lv.1.2.3 bus2=p3ulv66232.1.2.3 switch=n enabled=y phases=3 Linecode=3P_UG_AL_350kcmil_15_0_416_0_3_3_3_3

New Line.l(r:p3udt21471-p3udt29605) Units=km Length=0.144049 bus1=p3udt21471.1.2.3 bus2=p3udt29605.1.2.3 switch=n enabled=y phases=3 Linecode=3P_OH_AL_ACSR_4/0_Penguin_12_47_0_3_3_3_3

New Line.l(r:p3udt21471-p3udt25392) Units=km Length=0.254625 bus1=p3udt25392.1.2.3 bus2=p3udt21471.1.2.3 switch=n enabled=y phases=3 Linecode=3P_OH_AL_ACSR_4/0_Penguin_12_47_0_3_3_3_3

New Line.l(r:p3udt25392-p3udt9411) Units=km Length=0.196698 bus1=p3udt9411.1.2.3 bus2=p3udt9411_b1_1.1.2.3 switch=n enabled=y phases=3 Linecode=3P_OH_AL_ACSR_4/0_Penguin_12_47_0_3_3_3_3

New Line.l(r:p3udt6474-p3udt9411) Units=km Length=0.08316590000000001 bus1=p3udt6474.1.2.3 bus2=p3udt9411.1.2.3 switch=n enabled=y phases=3 Linecode=3P_OH_AL_ACSR_4/0_Penguin_12_47_0_3_3_3_3

New Line.l(r:p3udt30382-p3udt6474) Units=km Length=0.149262 bus1=p3udt30382.1.2.3 bus2=p3udt6474.1.2.3 switch=n enabled=y phases=3 Linecode=3P_OH_AL_ACSR_4/0_Penguin_12_47_0_3_3_3_3

New Line.l(r:p3udt22757-p3udt30382) Units=km Length=0.0187546 bus1=p3udt22757.1.2.3 bus2=p3udt30382.1.2.3 switch=n enabled=y phases=3 Linecode=3P_OH_AL_ACSR_4/0_Penguin_12_47_0_3_3_3_3

New Line.l(r:p3udt22757-p3udt27861) Units=km Length=0.016699500000000003 bus1=p3udt27861.1.2.3 bus2=p3udt22757.1.2.3 switch=n enabled=y phases=3 Linecode=3P_OH_AL_ACSR_4/0_Penguin_12_47_0_3_3_3_3

New Line.l(r:p3udt14185-p3udt27861) Units=km Length=0.184785 bus1=p3udt14185.1.2.3 bus2=p3udt27861.1.2.3 switch=n enabled=y phases=3 Linecode=3P_OH_AL_ACSR_4/0_Penguin_12_47_0_3_3_3_3

New Line.l(r:p3udt15821lv-p3ulv22176) Units=km Length=0.0339483 bus1=p3udt15821lv.1.2.3 bus2=p3ulv22176.1.2.3 switch=n enabled=y phases=3 Linecode=3P_UG_AL_350kcmil_15_0_416_0_3_3_3_3

New Line.l(r:p3udt15821-p3udt18751) Units=km Length=0.037835 bus1=p3udt15821-p3udt18751xx.1.2.3 bus2=p3udt15821-p3udt18751x.1.2.3 switch=n enabled=y phases=3 Linecode=3P_UG_AL_4/0_25_12_47_0_3_3_3_3

New Line.l(r:p3udt18751-p3udt7117) Units=km Length=0.24547 bus1=p3udt7117.1.2.3 bus2=p3udt18751.1.2.3 switch=n enabled=y phases=3 Linecode=3P_OH_AL_ACSR_4/0_Penguin_12_47_0_3_3_3_3

New Line.l(r:p3udt31229-p3udt7117) Units=km Length=0.068993 bus1=p3udt31229.1.2.3 bus2=p3udt7117.1.2.3 switch=n enabled=y phases=3 Linecode=3P_OH_AL_ACSR_4/0_Penguin_12_47_0_3_3_3_3

New Line.l(r:p3udt14185-p3udt31229) Units=km Length=0.102789 bus1=p3udt14185.1.2.3 bus2=p3udt31229.1.2.3 switch=n enabled=y phases=3 Linecode=3P_OH_AL_ACSR_4/0_Penguin_12_47_0_3_3_3_3

New Line.l(r:p3udt14185-p3udt27504) Units=km Length=0.041338 bus1=p3udt27504.1.2.3 bus2=p3udt14185.1.2.3 switch=n enabled=y phases=3 Linecode=3P_OH_AL_ACSR_4/0_Penguin_12_47_0_3_3_3_3

New Line.l(r:p3udt27504-p3udt3099) Units=km Length=0.174953 bus1=p3udt3099.1.2.3 bus2=p3udt27504.1.2.3 switch=n enabled=y phases=3 Linecode=3P_OH_AL_ACSR_4/0_Penguin_12_47_0_3_3_3_3

New Line.l(r:p3udt27323-p3udt3099) Units=km Length=0.0175332 bus1=p3udt27323.1.2.3 bus2=p3udt3099.1.2.3 switch=n enabled=y phases=3 Linecode=3P_OH_AL_ACSR_4/0_Penguin_12_47_0_3_3_3_3

New Line.l(r:p3udt26755-p3udt27323) Units=km Length=0.0958286 bus1=p3udt26755.1.2.3 bus2=p3udt27323.1.2.3 switch=n enabled=y phases=3 Linecode=3P_OH_AL_ACSR_4/0_Penguin_12_47_0_3_3_3_3

New Line.l(r:p3udt18079-p3udt24227) Units=km Length=0.03852160000000001 bus1=p3udt18079-p3udt24227x.1.2.3 bus2=p3udt24227.1.2.3 switch=n enabled=y phases=3 Linecode=3P_OH_AL_ACSR_1033kcmil_Curlew_12.47_1_3_3_3_3

New Line.padswitch(r:p3udt16977-p3udt23985)p3u_194573 Units=km Length=0.001 bus1=p3udt16977-p3udt23985x.2 bus2=p3udt16977-p3udt23985xx.2 switch=y enabled=y phases=1 Linecode=padswitch_1_1_1_1

New Line.padswitch(r:p3udt16977-p3udt23985)p3u_194574 Units=km Length=0.001 bus1=p3udt16977-p3udt23985xxx.2 bus2=p3udt23985.2 switch=y enabled=y phases=1 Linecode=padswitch_1_3_1_1_1

New Line.padswitch(r:p3udt7114-p3udt8254)p3u_194575 Units=km Length=0.001 bus1=p3udt7114.3 bus2=p3udt7114-p3udt8254x.3 switch=y enabled=y phases=1 Linecode=padswitch_1_1_1_1

New Line.padswitch(r:p3udt7114-p3udt8254)p3u_194576 Units=km Length=0.001 bus1=p3udt7114-p3udt8254xx.3 bus2=p3udt8254.3 switch=y enabled=y phases=1 Linecode=padswitch_1_1_1_1

New Line.padswitch(r:p3udt148-p3udt7114)p3u_194577 Units=km Length=0.001 bus1=p3udt148.3 bus2=p3udt148-p3udt7114x.3 switch=y enabled=y phases=1 Linecode=padswitch_1_1_1_1

New Line.padswitch(r:p3udt148-p3udt7114)p3u_194578 Units=km Length=0.001 bus1=p3udt148-p3udt7114xx.3 bus2=p3udt7114.3 switch=y enabled=y phases=1 Linecode=padswitch_1_1_1_1

New Line.padswitch(r:p3udt148-p3udt4505)p3u_194579 Units=km Length=0.001 bus1=p3udt4505.3 bus2=p3udt148-p3udt4505xx.3 switch=y enabled=y phases=1 Linecode=padswitch_1_1_1_1

New Line.padswitch(r:p3udt148-p3udt4505)p3u_194580 Units=km Length=0.001 bus1=p3udt148-p3udt4505x.3 bus2=p3udt148.3 switch=y enabled=y phases=1 Linecode=padswitch_1_1_1_1

New Line.padswitch(r:p3udt15819-p3udt24471)p3u_194581 Units=km Length=0.001 bus1=p3udt24471.3 bus2=p3udt15819-p3udt24471xx.3 switch=y enabled=y phases=1 Linecode=padswitch_1_3_1_1_1

New Line.padswitch(r:p3udt15819-p3udt24471)p3u_194582 Units=km Length=0.001 bus1=p3udt15819-p3udt24471x.3 bus2=p3udt15819.3 switch=y enabled=y phases=1 Linecode=padswitch_1_3_1_1_1

New Line.padswitch(r:p3udt24471-p3udt24691)p3u_194583 Units=km Length=0.001 bus1=p3udt24691.3 bus2=p3udt24471-p3udt24691xx.3 switch=y enabled=y phases=1 Linecode=padswitch_1_1_1_1

New Line.padswitch(r:p3udt24471-p3udt24691)p3u_194584 Units=km Length=0.001 bus1=p3udt24471-p3udt24691x.3 bus2=p3udt24471.3 switch=y enabled=y phases=1 Linecode=padswitch_1_3_1_1_1

New Line.padswitch(r:p3udt21705-p3udt24691)p3u_194585 Units=km Length=0.001 bus1=p3udt21705.3 bus2=p3udt21705-p3udt24691x.3 switch=y enabled=y phases=1 Linecode=padswitch_1_1_1_1

New Line.padswitch(r:p3udt21705-p3udt24691)p3u_194586 Units=km Length=0.001 bus1=p3udt21705-p3udt24691xx.3 bus2=p3udt24691.3 switch=y enabled=y phases=1 Linecode=padswitch_1_1_1_1

New Line.padswitch(r:p3udt21705-p3udt29603)p3u_194587 Units=km Length=0.001 bus1=p3udt29603.3 bus2=p3udt21705-p3udt29603xx.3 switch=y enabled=y phases=1 Linecode=padswitch_1_3_1_0_1_1

New Line.padswitch(r:p3udt21705-p3udt29603)p3u_194588 Units=km Length=0.001 bus1=p3udt21705-p3udt29603x.3 bus2=p3udt21705.3 switch=y enabled=y phases=1 Linecode=padswitch_1_1_1_1

New Line.padswitch(r:p3udt21192-p3udt29603)p3u_194589 Units=km Length=0.001 bus1=p3udt21192.3 bus2=p3udt21192-p3udt29603x.3 switch=y enabled=y phases=1 Linecode=padswitch_1_1_1_1

New Line.padswitch(r:p3udt21192-p3udt29603)p3u_194590 Units=km Length=0.001 bus1=p3udt21192-p3udt29603xx.3 bus2=p3udt29603.3 switch=y enabled=y phases=1 Linecode=padswitch_1_1_1_1

New Line.padswitch(r:p3udt21192-p3udt4505)p3u_194591 Units=km Length=0.001 bus1=p3udt4505.3 bus2=p3udt21192-p3udt4505xx.3 switch=y enabled=y phases=1 Linecode=padswitch_1_1_1_1

New Line.padswitch(r:p3udt21192-p3udt4505)p3u_194592 Units=km Length=0.001 bus1=p3udt21192-p3udt4505x.3 bus2=p3udt21192.3 switch=y enabled=y phases=1 Linecode=padswitch_1_1_1_1

New Line.padswitch(r:p3udt18429-p3udt4509)p3u_194593 Units=km Length=0.001 bus1=p3udt4509.1 bus2=p3udt18429-p3udt4509xx.1 switch=y enabled=y phases=1 Linecode=padswitch_1_1_1_1

New Line.padswitch(r:p3udt18429-p3udt4509)p3u_194594 Units=km Length=0.001 bus1=p3udt18429-p3udt4509x.1 bus2=p3udt18429.1 switch=y enabled=y phases=1 Linecode=padswitch_1_3_1_1_1

New Line.padswitch(r:p3udt23984-p3udt3098)p3u_194595 Units=km Length=0.001 bus1=p3udt23984.1 bus2=p3udt23984-p3udt3098x.1 switch=y enabled=y phases=1 Linecode=padswitch_1_3_1_1_1

New Line.padswitch(r:p3udt23984-p3udt3098)p3u_194596 Units=km Length=0.001 bus1=p3udt23984-p3udt3098xx.1 bus2=p3udt3098.1 switch=y enabled=y phases=1 Linecode=padswitch_1_3_1_0_1_0_1

New Line.padswitch(r:p3udt23984-p3udt4509)p3u_194597 Units=km Length=0.001 bus1=p3udt4509.1 bus2=p3udt23984-p3udt4509xx.1 switch=y enabled=y phases=1 Linecode=padswitch_1_1_1_1

New Line.padswitch(r:p3udt23984-p3udt4509)p3u_194598 Units=km Length=0.001 bus1=p3udt23984-p3udt4509x.1 bus2=p3udt23984.1 switch=y enabled=y phases=1 Linecode=padswitch_1_3_1_1_1

New Line.padswitch(r:p3udt31646-p3udt4509)p3u_194599 Units=km Length=0.001 bus1=p3udt31646.1 bus2=p3udt31646-p3udt4509x.1 switch=y enabled=y phases=1 Linecode=padswitch_1_1_1_1

New Line.padswitch(r:p3udt31646-p3udt4509)p3u_194600 Units=km Length=0.001 bus1=p3udt31646-p3udt4509xx.1 bus2=p3udt4509.1 switch=y enabled=y phases=1 Linecode=padswitch_1_1_1_1

New Line.padswitch(r:p3udt24473-p3udt31646)p3u_194601 Units=km Length=0.001 bus1=p3udt24473.1 bus2=p3udt24473-p3udt31646x.1 switch=y enabled=y phases=1 Linecode=padswitch_1_1_1_1

New Line.padswitch(r:p3udt24473-p3udt31646)p3u_194602 Units=km Length=0.001 bus1=p3udt24473-p3udt31646xx.1 bus2=p3udt31646.1 switch=y enabled=y phases=1 Linecode=padswitch_1_1_1_1

New Line.padswitch(r:p3udt16219-p3udt24473)p3u_194603 Units=km Length=0.001 bus1=p3udt16219.1 bus2=p3udt16219-p3udt24473x.1 switch=y enabled=y phases=1 Linecode=padswitch_1_3_1_0_1_0_1

New Line.padswitch(r:p3udt16219-p3udt24473)p3u_194604 Units=km Length=0.001 bus1=p3udt16219-p3udt24473xx.1 bus2=p3udt24473.1 switch=y enabled=y phases=1 Linecode=padswitch_1_1_1_1

New Line.padswitch(r:p3udt23737-p3udt8262)p3u_194605 Units=km Length=0.001 bus1=p3udt23737.3 bus2=p3udt23737-p3udt8262x.3 switch=y enabled=y phases=1 Linecode=padswitch_1_1_1_1

New Line.padswitch(r:p3udt23737-p3udt8262)p3u_194606 Units=km Length=0.001 bus1=p3udt23737-p3udt8262xx.3 bus2=p3udt8262.3 switch=y enabled=y phases=1 Linecode=padswitch_1_3_1_1_1

New Line.padswitch(r:p3udt23737-p3udt31350)p3u_194607 Units=km Length=0.001 bus1=p3udt31350.3 bus2=p3udt23737-p3udt31350xx.3 switch=y enabled=y phases=1 Linecode=padswitch_1_3_1_1_1

New Line.padswitch(r:p3udt23737-p3udt31350)p3u_194608 Units=km Length=0.001 bus1=p3udt23737-p3udt31350x.3 bus2=p3udt23737.3 switch=y enabled=y phases=1 Linecode=padswitch_1_3_1_1_1

New Line.padswitch(r:p3udt13343-p3udt15821)p3u_194609 Units=km Length=0.001 bus1=p3udt13343-p3udt15821xxx.3 bus2=p3udt13343-p3udt15821xx.3 switch=y enabled=y phases=1 Linecode=padswitch_1_1_1_1

New Line.padswitch(r:p3udt13343-p3udt15821)p3u_194610 Units=km Length=0.001 bus1=p3udt13343-p3udt15821x.3 bus2=p3udt13343.3 switch=y enabled=y phases=1 Linecode=padswitch_1_1_1_1

New Line.padswitch(r:p3udt16977-p3udt29764)p3u_194613 Units=km Length=0.001 bus1=p3udt16977-p3udt29764x.2 bus2=p3udt16977-p3udt29764xx.2 switch=y enabled=y phases=1 Linecode=padswitch_1_1_1_1

New Line.padswitch(r:p3udt16977-p3udt29764)p3u_194614 Units=km Length=0.001 bus1=p3udt16977-p3udt29764xxx.2 bus2=p3udt29764.2 switch=y enabled=y phases=1 Linecode=padswitch_1_3_1_0_1_0_1_0

New Line.padswitch(r:p3udt15821-p3udt18751)p3u_194611 Units=km Length=0.001 bus1=p3udt18751.1.2.3 bus2=p3udt15821-p3udt18751xx.1.2.3 switch=y enabled=y phases=3 Linecode=padswitch_3_3_3_3

New Line.padswitch(r:p3udt15821-p3udt18751)p3u_194612 Units=km Length=0.001 bus1=p3udt15821-p3udt18751x.1.2.3 bus2=p3udt15821.1.2.3 switch=y enabled=y phases=3 Linecode=padswitch_3_4_3_3_3

New Line.elbswitch(r:p3udt18079-p3udt24227)p3u_206741 Units=km Length=0.001 bus1=p3udt18079.1.2.3 bus2=p3udt18079-p3udt24227x.1.2.3 switch=y enabled=n phases=3 Linecode=elbswitch_3_3_3_3

New Line.fuse(r:p3udt3099-p3udt5846)p3u_207127 Units=km Length=0.001 bus1=p3udt3099.3 bus2=p3udt3099-p3udt5846x.3 switch=n enabled=y phases=1 Linecode=fuse_1_1_1_1

New Fuse.Fuse_fuse(r:p3udt3099-p3udt5846)p3u_207127 monitoredobj=Line.fuse(r:p3udt3099-p3udt5846)p3u_207127 enabled=y ratedcurrent=100.0

New Line.fuse(r:p3udt12932-p3udt3099)p3u_207128 Units=km Length=0.001 bus1=p3udt3099.2 bus2=p3udt12932-p3udt3099x.2 switch=n enabled=y phases=1 Linecode=fuse_1_1_1_1

New Fuse.Fuse_fuse(r:p3udt12932-p3udt3099)p3u_207128 monitoredobj=Line.fuse(r:p3udt12932-p3udt3099)p3u_207128 enabled=y ratedcurrent=100.0

New Line.fuse(r:p3udt29444-p3udt3797)p3u_207207 Units=km Length=0.001 bus1=p3udt3797.2 bus2=p3udt29444-p3udt3797x.2 switch=n enabled=y phases=1 Linecode=fuse_1_1_1_1

New Fuse.Fuse_fuse(r:p3udt29444-p3udt3797)p3u_207207 monitoredobj=Line.fuse(r:p3udt29444-p3udt3797)p3u_207207 enabled=y ratedcurrent=100.0

New Line.fuse(r:p3udt11475-p3udt9411)p3u_207749 Units=km Length=0.001 bus1=p3udt9411.3 bus2=p3udt11475-p3udt9411x.3 switch=n enabled=y phases=1 Linecode=fuse_1_1_1_1

New Fuse.Fuse_fuse(r:p3udt11475-p3udt9411)p3u_207749 monitoredobj=Line.fuse(r:p3udt11475-p3udt9411)p3u_207749 enabled=y ratedcurrent=100.0

New Line.fuse(r:p3udt13342-p3udt14184)p3u_208190 Units=km Length=0.001 bus1=p3udt14184.3 bus2=p3udt13342-p3udt14184x.3 switch=n enabled=y phases=1 Linecode=fuse_1_7_1_1_1

New Fuse.Fuse_fuse(r:p3udt13342-p3udt14184)p3u_208190 monitoredobj=Line.fuse(r:p3udt13342-p3udt14184)p3u_208190 enabled=y ratedcurrent=100.0

New Line.fuse(r:p3udt14184-p3udt26752)p3u_208191 Units=km Length=0.001 bus1=p3udt14184.1 bus2=p3udt14184-p3udt26752x.1 switch=n enabled=y phases=1 Linecode=fuse_1_7_1_1_1

New Fuse.Fuse_fuse(r:p3udt14184-p3udt26752)p3u_208191 monitoredobj=Line.fuse(r:p3udt14184-p3udt26752)p3u_208191 enabled=y ratedcurrent=100.0

New Line.fuse(r:p3udt14184-p3udt26753)p3u_208192 Units=km Length=0.001 bus1=p3udt14184.1 bus2=p3udt14184-p3udt26753x.1 switch=n enabled=y phases=1 Linecode=fuse_1_7_1_1_1

New Fuse.Fuse_fuse(r:p3udt14184-p3udt26753)p3u_208192 monitoredobj=Line.fuse(r:p3udt14184-p3udt26753)p3u_208192 enabled=y ratedcurrent=100.0

New Line.fuse(r:p3udt14185-p3udt26161)p3u_208193 Units=km Length=0.001 bus1=p3udt14185.2 bus2=p3udt14185-p3udt26161x.2 switch=n enabled=y phases=1 Linecode=fuse_1_1_1_1

New Fuse.Fuse_fuse(r:p3udt14185-p3udt26161)p3u_208193 monitoredobj=Line.fuse(r:p3udt14185-p3udt26161)p3u_208193 enabled=y ratedcurrent=100.0

New Line.fuse(r:p3udt13343-p3udt15821)p3u_208361 Units=km Length=0.001 bus1=p3udt15821.3 bus2=p3udt13343-p3udt15821xxx.3 switch=n enabled=y phases=1 Linecode=fuse_1_7_1_4_1_1

New Fuse.Fuse_fuse(r:p3udt13343-p3udt15821)p3u_208361 monitoredobj=Line.fuse(r:p3udt13343-p3udt15821)p3u_208361 enabled=y ratedcurrent=100.0

New Line.fuse(r:p3udt16221-p3udt16222)p3u_208396 Units=km Length=0.001 bus1=p3udt16221.1 bus2=p3udt16221-p3udt16222x.1 switch=n enabled=y phases=1 Linecode=fuse_1_1_1_1

New Fuse.Fuse_fuse(r:p3udt16221-p3udt16222)p3u_208396 monitoredobj=Line.fuse(r:p3udt16221-p3udt16222)p3u_208396 enabled=y ratedcurrent=100.0

New Line.fuse(r:p3udt16977-p3udt23985)p3u_208464 Units=km Length=0.001 bus1=p3udt16977.2 bus2=p3udt16977-p3udt23985x.2 switch=n enabled=y phases=1 Linecode=fuse_1_1_1_1

New Fuse.Fuse_fuse(r:p3udt16977-p3udt23985)p3u_208464 monitoredobj=Line.fuse(r:p3udt16977-p3udt23985)p3u_208464 enabled=y ratedcurrent=100.0

New Line.fuse(r:p3udt16977-p3udt29764)p3u_208465 Units=km Length=0.001 bus1=p3udt16977.2 bus2=p3udt16977-p3udt29764x.2 switch=n enabled=y phases=1 Linecode=fuse_1_1_1_1

New Fuse.Fuse_fuse(r:p3udt16977-p3udt29764)p3u_208465 monitoredobj=Line.fuse(r:p3udt16977-p3udt29764)p3u_208465 enabled=y ratedcurrent=100.0

New Line.fuse(r:p3udt18079-p3udt8256)p3u_208590 Units=km Length=0.001 bus1=p3udt18079.3 bus2=p3udt18079-p3udt8256x.3 switch=n enabled=y phases=1 Linecode=fuse_1_1_1_1

New Fuse.Fuse_fuse(r:p3udt18079-p3udt8256)p3u_208590 monitoredobj=Line.fuse(r:p3udt18079-p3udt8256)p3u_208590 enabled=y ratedcurrent=100.0

New Line.fuse(r:p3udt21471-p3udt31112)p3u_208931 Units=km Length=0.001 bus1=p3udt21471.1 bus2=p3udt21471-p3udt31112x.1 switch=n enabled=y phases=1 Linecode=fuse_1_1_1_1

New Fuse.Fuse_fuse(r:p3udt21471-p3udt31112)p3u_208931 monitoredobj=Line.fuse(r:p3udt21471-p3udt31112)p3u_208931 enabled=y ratedcurrent=100.0

New Line.fuse(r:p3udt22760-p3udt31772)p3u_209077 Units=km Length=0.001 bus1=p3udt22760.1 bus2=p3udt22760-p3udt31772x.1 switch=n enabled=y phases=1 Linecode=fuse_1_1_1_1

New Fuse.Fuse_fuse(r:p3udt22760-p3udt31772)p3u_209077 monitoredobj=Line.fuse(r:p3udt22760-p3udt31772)p3u_209077 enabled=y ratedcurrent=100.0

New Line.fuse(r:p3udt24230-p3udt31230)p3u_209220 Units=km Length=0.001 bus1=p3udt24230.1 bus2=p3udt24230-p3udt31230x.1 switch=n enabled=y phases=1 Linecode=fuse_1_1_1_1

New Fuse.Fuse_fuse(r:p3udt24230-p3udt31230)p3u_209220 monitoredobj=Line.fuse(r:p3udt24230-p3udt31230)p3u_209220 enabled=y ratedcurrent=100.0

New Line.fuse(r:p3udt10441-p3udt25392)p3u_209323 Units=km Length=0.001 bus1=p3udt25392.2 bus2=p3udt10441-p3udt25392x.2 switch=n enabled=y phases=1 Linecode=fuse_1_1_1_1

New Fuse.Fuse_fuse(r:p3udt10441-p3udt25392)p3u_209323 monitoredobj=Line.fuse(r:p3udt10441-p3udt25392)p3u_209323 enabled=y ratedcurrent=100.0

New Line.fuse(r:p3udt24693-p3udt25392)p3u_209324 Units=km Length=0.001 bus1=p3udt25392.3 bus2=p3udt24693-p3udt25392x.3 switch=n enabled=y phases=1 Linecode=fuse_1_1_1_1

New Fuse.Fuse_fuse(r:p3udt24693-p3udt25392)p3u_209324 monitoredobj=Line.fuse(r:p3udt24693-p3udt25392)p3u_209324 enabled=y ratedcurrent=100.0

New Line.fuse(r:p3udt26755-p3udt28345)p3u_209446 Units=km Length=0.001 bus1=p3udt26755.2 bus2=p3udt26755-p3udt28345x.2 switch=n enabled=y phases=1 Linecode=fuse_1_1_1_1

New Fuse.Fuse_fuse(r:p3udt26755-p3udt28345)p3u_209446 monitoredobj=Line.fuse(r:p3udt26755-p3udt28345)p3u_209446 enabled=y ratedcurrent=100.0

New Line.fuse(r:p3udt27132-p3udt30228)p3u_209483 Units=km Length=0.001 bus1=p3udt27132.2 bus2=p3udt27132-p3udt30228x.2 switch=n enabled=y phases=1 Linecode=fuse_1_1_1_1

New Fuse.Fuse_fuse(r:p3udt27132-p3udt30228)p3u_209483 monitoredobj=Line.fuse(r:p3udt27132-p3udt30228)p3u_209483 enabled=y ratedcurrent=100.0

New Line.fuse(r:p3udt22758-p3udt27504)p3u_209527 Units=km Length=0.001 bus1=p3udt27504.1 bus2=p3udt22758-p3udt27504x.1 switch=n enabled=y phases=1 Linecode=fuse_1_1_1_1

New Fuse.Fuse_fuse(r:p3udt22758-p3udt27504)p3u_209527 monitoredobj=Line.fuse(r:p3udt22758-p3udt27504)p3u_209527 enabled=y ratedcurrent=100.0

New Line.fuse(r:p3udt15418-p3udt27862)p3u_209566 Units=km Length=0.001 bus1=p3udt27862.2 bus2=p3udt15418-p3udt27862x.2 switch=n enabled=y phases=1 Linecode=fuse_1_1_1_1

New Fuse.Fuse_fuse(r:p3udt15418-p3udt27862)p3u_209566 monitoredobj=Line.fuse(r:p3udt15418-p3udt27862)p3u_209566 enabled=y ratedcurrent=100.0

New Line.fuse(r:p3udt29167-p3udt9410)p3u_209713 Units=km Length=0.001 bus1=p3udt29167.2 bus2=p3udt29167-p3udt9410x.2 switch=n enabled=y phases=1 Linecode=fuse_1_1_1_1

New Fuse.Fuse_fuse(r:p3udt29167-p3udt9410)p3u_209713 monitoredobj=Line.fuse(r:p3udt29167-p3udt9410)p3u_209713 enabled=y ratedcurrent=100.0

New Line.fuse(r:p3udt20337-p3udt29167)p3u_209714 Units=km Length=0.001 bus1=p3udt29167.2 bus2=p3udt20337-p3udt29167x.2 switch=n enabled=y phases=1 Linecode=fuse_1_1_1_1

New Fuse.Fuse_fuse(r:p3udt20337-p3udt29167)p3u_209714 monitoredobj=Line.fuse(r:p3udt20337-p3udt29167)p3u_209714 enabled=y ratedcurrent=100.0

New Line.fuse(r:p3udt22211-p3udt30974)p3u_209904 Units=km Length=0.001 bus1=p3udt30974.2 bus2=p3udt22211-p3udt30974x.2 switch=n enabled=y phases=1 Linecode=fuse_1_1_1_1

New Fuse.Fuse_fuse(r:p3udt22211-p3udt30974)p3u_209904 monitoredobj=Line.fuse(r:p3udt22211-p3udt30974)p3u_209904 enabled=y ratedcurrent=100.0

New Line.l(r:p3udt24693-p3udt7698)_disconnect Units=km Length=0.001 bus1=p3udt24693_b1_1.3 bus2=p3udt24693_b2_1.3 switch=y enabled=y phases=1 Linecode=1P_OH_AL_ACSR_#2_Sparrow_12_47_0_1_1_1_1

New Line.l(r:p3udt24693-p3udt7698)_cont Units=km Length=0.7757784000000001 bus1=p3udt24693_b2_1.3 bus2=p3udt7698.3 switch=n enabled=y phases=1 Linecode=1P_OH_AL_ACSR_#2_Sparrow_12_47_0_1_1_1_1

New Line.l(r:p3udt25392-p3udt9411)_disconnect Units=km Length=0.001 bus1=p3udt9411_b1_1.1.2.3 bus2=p3udt9411_b2_1.1.2.3 switch=y enabled=y phases=3 Linecode=3P_OH_AL_ACSR_4/0_Penguin_12_47_0_3_3_3_3

New Line.l(r:p3udt25392-p3udt9411)_cont Units=km Length=1.7792820000000003 bus1=p3udt9411_b2_1.1.2.3 bus2=p3udt25392.1.2.3 switch=n enabled=y phases=3 Linecode=3P_OH_AL_ACSR_4/0_Penguin_12_47_0_3_3_3_3
