New Capacitor.p3uc105 Bus1=p3udt30825 phases=3 Kv=12.47 conn=Wye Kvar=300.0

New CapControl.p3uc105 Capacitor=p3uc105 Element=Line.padswitch(r:p3udt20036-p3udt30825)p3u_194854 Terminal=1 delay=100.0 Type=voltage Vmin=120.5 Vmax=125.0 Ptratio=59.99631547328862 Ctratio=100.0
