New Capacitor.p3uc109 Bus1=p3udt18419 phases=3 Kv=12.47 conn=Wye Kvar=300.0

New CapControl.p3uc109 Capacitor=p3uc109 Element=Line.l(r:p3udt13751-p3udt18419) Terminal=1 delay=100.0 Type=voltage Vmin=120.5 Vmax=125.0 Ptratio=59.99631547328862 Ctratio=100.0

New Capacitor.p3uc110 Bus1=p3udt23731 phases=3 Kv=12.47 conn=Wye Kvar=300.0

New CapControl.p3uc110 Capacitor=p3uc110 Element=Line.l(r:p3udt15801-p3udt23731) Terminal=1 delay=100.0 Type=voltage Vmin=120.5 Vmax=125.0 Ptratio=59.99631547328862 Ctratio=100.0
