New Capacitor.p3uc108 Bus1=p3udt13325 phases=3 Kv=12.47 conn=Wye Kvar=300.0

New CapControl.p3uc108 Capacitor=p3uc108 Element=Line.l(r:p3udt13325-p3udt25141)_s1 Terminal=1 delay=100.0 Type=voltage Vmin=120.5 Vmax=125.0 Ptratio=59.99631547328862 Ctratio=100.0
