New Capacitor.p3uc112 Bus1=p3udt27563 phases=3 Kv=12.47 conn=Wye Kvar=450.0

New CapControl.p3uc112 Capacitor=p3uc112 Element=Line.padswitch(r:p3udt10587-p3udt27563)p3u_195225 Terminal=1 delay=100.0 Type=voltage Vmin=120.5 Vmax=125.0 Ptratio=59.99631547328862 Ctratio=100.0
