New Capacitor.p3uc111 Bus1=p3udt19495 phases=3 Kv=12.47 conn=Wye Kvar=300.0

New CapControl.p3uc111 Capacitor=p3uc111 Element=Line.l(r:p3udt19495-p3udt7857) Terminal=1 delay=100.0 Type=voltage Vmin=120.5 Vmax=125.0 Ptratio=59.99631547328862 Ctratio=100.0

New Capacitor.p3uc113 Bus1=p3udt29971 phases=3 Kv=12.47 conn=Wye Kvar=300.0

New CapControl.p3uc113 Capacitor=p3uc113 Element=Line.padswitch(r:p3udt17838-p3udt29971)p3u_195828 Terminal=1 delay=100.0 Type=voltage Vmin=120.5 Vmax=125.0 Ptratio=59.99631547328862 Ctratio=100.0
