New Capacitor.p3uc6 Bus1=p3udt24626 phases=3 Kv=12.47 conn=Wye Kvar=450.0

New CapControl.p3uc6 Capacitor=p3uc6 Element=Line.l(r:p3udt18669-p3udt24626) Terminal=1 delay=100.0 Type=voltage Vmin=120.5 Vmax=125.0 Ptratio=59.99631547328862 Ctratio=100.0
