New Capacitor.p3uc116 Bus1=p3udt1137 phases=3 Kv=12.47 conn=Wye Kvar=300.0

New CapControl.p3uc116 Capacitor=p3uc116 Element=Line.l(r:p3udt1137-p3udt29219) Terminal=1 delay=100.0 Type=voltage Vmin=120.5 Vmax=125.0 Ptratio=59.99631547328862 Ctratio=100.0

New Capacitor.p3uc117 Bus1=p3udt2585 phases=3 Kv=12.47 conn=Wye Kvar=300.0

New CapControl.p3uc117 Capacitor=p3uc117 Element=Line.padswitch(r:p3udt15551-p3udt2585)p3u_197245 Terminal=1 delay=100.0 Type=voltage Vmin=120.5 Vmax=125.0 Ptratio=59.99631547328862 Ctratio=100.0
