New Capacitor.p3uc114 Bus1=p3udt27499 phases=3 Kv=12.47 conn=Wye Kvar=300.0

New CapControl.p3uc114 Capacitor=p3uc114 Element=Line.padswitch(r:p3udt24686-p3udt27499)p3u_197430 Terminal=1 delay=100.0 Type=voltage Vmin=120.5 Vmax=125.0 Ptratio=59.99631547328862 Ctratio=100.0
