New Capacitor.p3uc115 Bus1=p3udt31228 phases=3 Kv=12.47 conn=Wye Kvar=300.0

New CapControl.p3uc115 Capacitor=p3uc115 Element=Line.l(r:p3udt31228-p3udt5196) Terminal=1 delay=100.0 Type=voltage Vmin=120.5 Vmax=125.0 Ptratio=59.99631547328862 Ctratio=100.0

New Capacitor.p3uc118 Bus1=p3udt15128 phases=3 Kv=12.47 conn=Wye Kvar=450.0

New CapControl.p3uc118 Capacitor=p3uc118 Element=Line.padswitch(r:p3udt15128-p3udt21547)p3u_198239 Terminal=1 delay=100.0 Type=voltage Vmin=120.5 Vmax=125.0 Ptratio=59.99631547328862 Ctratio=100.0
