Clear

New Circuit.substation_p3uhs22_69 bus1=p3uhs22_69 pu=1.0 basekV=69.0 R1=1e-05 X1=1e-05 R0=1e-05 X0=1e-05

Redirect p3uhs22_1247--p3udt14640/Transformers.dss
Redirect Transformers.dss
Redirect p3uhs22_1247--p3udt29621/Transformers.dss
Redirect Regulators.dss
Redirect p3uhs22_1247--p3udt14640/Loads.dss
Redirect p3uhs22_1247--p3udt29621/Loads.dss
Redirect p3uhs22_1247--p3udt14640/LineCodes.dss
Redirect LineCodes.dss
Redirect p3uhs22_1247--p3udt29621/LineCodes.dss
Redirect p3uhs22_1247--p3udt14640/Lines.dss
Redirect Lines.dss
Redirect p3uhs22_1247--p3udt29621/Lines.dss
Redirect p3uhs22_1247--p3udt14640/Capacitors.dss
Redirect p3uhs22_1247--p3udt29621/Capacitors.dss

Set Voltagebases=[0.2080002494301389, 0.48, 7.199560000000001, 12.47, 69.0]

Calcvoltagebases

Buscoords Buscoords.dss

Solve
