New Capacitor.p3uc124 Bus1=p3udt19777 phases=3 Kv=12.47 conn=Wye Kvar=300.0

New CapControl.p3uc124 Capacitor=p3uc124 Element=Line.l(r:p3udt19777-p3udt972)_cont Terminal=1 delay=100.0 Type=voltage Vmin=120.5 Vmax=125.0 Ptratio=59.99631547328862 Ctratio=100.0
