New Capacitor.p3uc129 Bus1=p3udt29750 phases=3 Kv=12.47 conn=Wye Kvar=300.0

New CapControl.p3uc129 Capacitor=p3uc129 Element=Line.l(r:p3udt26352-p3udt29750) Terminal=1 delay=100.0 Type=voltage Vmin=120.5 Vmax=125.0 Ptratio=59.99631547328862 Ctratio=100.0
