New Capacitor.p3uc132 Bus1=p3udt30649 phases=3 Kv=12.47 conn=Wye Kvar=300.0

New CapControl.p3uc132 Capacitor=p3uc132 Element=Line.l(r:p3udt22980-p3udt30649) Terminal=1 delay=100.0 Type=voltage Vmin=120.5 Vmax=125.0 Ptratio=59.99631547328862 Ctratio=100.0
