New Capacitor.p3uc135 Bus1=p3udt18390 phases=3 Kv=12.47 conn=Wye Kvar=450.0

New CapControl.p3uc135 Capacitor=p3uc135 Element=Line.padswitch(r:p3udt18390-p3udt3053)p3u_204672 Terminal=1 delay=100.0 Type=voltage Vmin=120.5 Vmax=125.0 Ptratio=59.99631547328862 Ctratio=100.0

New Capacitor.p3uc136 Bus1=p3udt1601 phases=3 Kv=12.47 conn=Wye Kvar=450.0

New CapControl.p3uc136 Capacitor=p3uc136 Element=Line.padswitch(r:p3udt1601-p3udt30814)p3u_204776 Terminal=1 delay=100.0 Type=voltage Vmin=120.5 Vmax=125.0 Ptratio=59.99631547328862 Ctratio=100.0
