Clear

New Circuit.substation_p3uhs26_69 bus1=p3uhs26_69 pu=1.0 basekV=69.0 R1=1e-05 X1=1e-05 R0=1e-05 X0=1e-05

Redirect p3uhs26_1247--p3udt15759/Transformers.dss
Redirect Transformers.dss
Redirect p3uhs26_1247--p3udt26126/Transformers.dss
Redirect Regulators.dss
Redirect p3uhs26_1247--p3udt15759/Loads.dss
Redirect p3uhs26_1247--p3udt26126/Loads.dss
Redirect p3uhs26_1247--p3udt15759/LineCodes.dss
Redirect LineCodes.dss
Redirect p3uhs26_1247--p3udt26126/LineCodes.dss
Redirect p3uhs26_1247--p3udt15759/Lines.dss
Redirect Lines.dss
Redirect p3uhs26_1247--p3udt26126/Lines.dss
Redirect p3uhs26_1247--p3udt15759/Capacitors.dss
Redirect p3uhs26_1247--p3udt26126/Capacitors.dss

Set Voltagebases=[0.2080002494301389, 0.48, 7.199560000000001, 12.47, 69.0]

Calcvoltagebases

Buscoords Buscoords.dss

Solve
