New Capacitor.p3uc137 Bus1=p3udt22692 phases=3 Kv=12.47 conn=Wye Kvar=450.0

New CapControl.p3uc137 Capacitor=p3uc137 Element=Line.padswitch(r:p3udt22692-p3udt2275)p3u_205471 Terminal=1 delay=100.0 Type=voltage Vmin=120.5 Vmax=125.0 Ptratio=59.99631547328862 Ctratio=100.0
