New Line.l(r:p3udt854lv-p3ulv52434) Units=km Length=0.0702591 bus1=p3udt854lv.1.2 bus2=p3ulv52434.1.2 switch=n enabled=y phases=2 Linecode=1P_OH_AL_4/0_Zuzara_0_416_0_2_2_2_2

New Line.l(r:p3udm2955-p3ulv1013) Units=km Length=0.0771596 bus1=p3udm2955.1.2 bus2=p3ulv1013.1.2 switch=n enabled=y phases=2 Linecode=1P_OH_AL_4/0_Zuzara_0_416_0_2_2_2_2

New Line.l(r:p3udm2955-p3udt854lv) Units=km Length=0.0195656 bus1=p3udt854lv.1.2 bus2=p3udm2955.1.2 switch=n enabled=y phases=2 Linecode=1P_OH_AL_2/0_Rucina_0_416_0_2_2_2_2

New Line.l(r:p3udt855lv-p3ulv25349) Units=km Length=0.0267192 bus1=p3udt855lv.1.2 bus2=p3ulv25349.1.2 switch=n enabled=y phases=2 Linecode=1P_OH_AL_2/0_Rucina_0_416_0_2_2_2_2

New Line.l(r:p3udm2957-p3ulv1014) Units=km Length=0.0553953 bus1=p3udm2957.1.2 bus2=p3ulv1014.1.2 switch=n enabled=y phases=2 Linecode=1P_OH_AL_4/0_Zuzara_0_416_0_2_2_2_2

New Line.l(r:p3udm2957-p3ulv79269) Units=km Length=0.0416829 bus1=p3udm2957.1.2 bus2=p3ulv79269.1.2 switch=n enabled=y phases=2 Linecode=1P_OH_AL_4/0_Zuzara_0_416_0_2_2_2_2

New Line.l(r:p3udm2957-p3udt855lv) Units=km Length=0.0199053 bus1=p3udt855lv.1.2 bus2=p3udm2957.1.2 switch=n enabled=y phases=2 Linecode=1P_OH_AL_2/0_Rucina_0_416_0_2_2_2_2

New Line.l(r:p3udm2959-p3ulv57037) Units=km Length=0.0107246 bus1=p3udm2959.1.2 bus2=p3ulv57037.1.2 switch=n enabled=y phases=2 Linecode=1P_OH_AL_2/0_Rucina_0_416_0_2_2_2_2

New Line.l(r:p3udm2959-p3udt855lv) Units=km Length=0.0398105 bus1=p3udt855lv.1.2 bus2=p3udm2959.1.2 switch=n enabled=y phases=2 Linecode=1P_OH_AL_4/0_Zuzara_0_416_0_2_2_2_2

New Line.l(r:p3udt856lv-p3ulv1015) Units=km Length=0.0338952 bus1=p3udt856lv.1.2 bus2=p3ulv1015.1.2 switch=n enabled=y phases=2 Linecode=1P_OH_AL_4/0_Zuzara_0_416_0_2_2_2_2

New Line.l(r:p3udt856lv-p3ulv40049) Units=km Length=0.0338952 bus1=p3udt856lv.1.2 bus2=p3ulv40049.1.2 switch=n enabled=y phases=2 Linecode=1P_OH_AL_4/0_Zuzara_0_416_0_2_2_2_2

New Line.l(r:p3udt1611lv-p3ulv57035) Units=km Length=0.0369525 bus1=p3udt1611lv.1.2 bus2=p3ulv57035.1.2 switch=n enabled=y phases=2 Linecode=1P_OH_AL_4/0_Zuzara_0_416_0_2_2_2_2

New Line.l(r:p3udm5609-p3ulv1797) Units=km Length=0.0307923 bus1=p3udm5609.1.2 bus2=p3ulv1797.1.2 switch=n enabled=y phases=2 Linecode=1P_OH_AL_4/0_Zuzara_0_416_0_2_2_2_2

New Line.l(r:p3udm5609-p3udt1611lv) Units=km Length=0.0588695 bus1=p3udt1611lv.1.2 bus2=p3udm5609.1.2 switch=n enabled=y phases=2 Linecode=1P_OH_AL_4/0_Zuzara_0_416_0_2_2_2_2

New Line.l(r:p3udm5610-p3ulv38464) Units=km Length=0.0142858 bus1=p3udm5610.1.2 bus2=p3ulv38464.1.2 switch=n enabled=y phases=2 Linecode=1P_OH_AL_2/0_Rucina_0_416_0_2_2_2_2

New Line.l(r:p3udm5610-p3udt1611lv) Units=km Length=0.039249000000000006 bus1=p3udt1611lv.1.2 bus2=p3udm5610.1.2 switch=n enabled=y phases=2 Linecode=1P_OH_AL_4/0_Zuzara_0_416_0_2_2_2_2

New Line.l(r:p3udt1612lv-p3ulv1798) Units=km Length=0.104636 bus1=p3udt1612lv.1.2 bus2=p3ulv1798.1.2 switch=n enabled=y phases=2 Linecode=1P_UG_AL_1/0_Brenau_0_416_0_2_2_2_2

New Line.l(r:p3udt1612lv-p3ulv58573) Units=km Length=0.0916931 bus1=p3udt1612lv.1.2 bus2=p3ulv58573.1.2 switch=n enabled=y phases=2 Linecode=1P_UG_AL_1/0_Brenau_0_416_0_2_2_2_2

New Line.l(r:p3udt1612lv-p3ulv74651) Units=km Length=0.0699597 bus1=p3udt1612lv.1.2 bus2=p3ulv74651.1.2 switch=n enabled=y phases=2 Linecode=1P_UG_AL_2/0_Converse_0_416_0_2_2_2_2

New Line.l(r:p3udm5615-p3ulv1799) Units=km Length=0.0219079 bus1=p3udm5615.1.2 bus2=p3ulv1799.1.2 switch=n enabled=y phases=2 Linecode=1P_OH_AL_2/0_Rucina_0_416_0_2_2_2_2

New Line.l(r:p3udm5615-p3udt1613lv) Units=km Length=0.0195656 bus1=p3udt1613lv.1.2 bus2=p3udm5615.1.2 switch=n enabled=y phases=2 Linecode=1P_OH_AL_2/0_Rucina_0_416_0_2_2_2_2

New Line.l(r:p3udm5616-p3ulv57036) Units=km Length=0.0281746 bus1=p3udm5616.1.2 bus2=p3ulv57036.1.2 switch=n enabled=y phases=2 Linecode=1P_OH_AL_4/0_Zuzara_0_416_0_2_2_2_2

New Line.l(r:p3udm5616-p3udt1613lv) Units=km Length=0.03912390000000001 bus1=p3udt1613lv.1.2 bus2=p3udm5616.1.2 switch=n enabled=y phases=2 Linecode=1P_OH_AL_4/0_Zuzara_0_416_0_2_2_2_2

New Line.l(r:p3udt1614lv-p3ulv1800) Units=km Length=0.0566216 bus1=p3udt1614lv.1.2 bus2=p3ulv1800.1.2 switch=n enabled=y phases=2 Linecode=1P_OH_AL_4/0_Zuzara_0_416_0_2_2_2_2

New Line.l(r:p3udt1614lv-p3ulv64638) Units=km Length=0.0429178 bus1=p3udt1614lv.1.2 bus2=p3ulv64638.1.2 switch=n enabled=y phases=2 Linecode=1P_OH_AL_4/0_Zuzara_0_416_0_2_2_2_2

New Line.l(r:p3udt2344lv-p3ulv2589) Units=km Length=0.0425872 bus1=p3udt2344lv.1.2 bus2=p3ulv2589.1.2 switch=n enabled=y phases=2 Linecode=1P_OH_AL_4/0_Zuzara_0_416_0_2_2_2_2

New Line.l(r:p3udt2344lv-p3ulv4963) Units=km Length=0.07433050000000001 bus1=p3udt2344lv.1.2 bus2=p3ulv4963.1.2 switch=n enabled=y phases=2 Linecode=1P_OH_AL_4/0_Zuzara_0_416_0_2_2_2_2

New Line.l(r:p3udm8166-p3ulv2591) Units=km Length=0.045465 bus1=p3udm8166.1.2 bus2=p3ulv2591.1.2 switch=n enabled=y phases=2 Linecode=1P_OH_AL_4/0_Zuzara_0_416_0_2_2_2_2

New Line.l(r:p3udm8166-p3ulv15180) Units=km Length=0.04254510000000001 bus1=p3udm8166.1.2 bus2=p3ulv15180.1.2 switch=n enabled=y phases=2 Linecode=1P_OH_AL_4/0_Zuzara_0_416_0_2_2_2_2

New Line.l(r:p3udm8166-p3udt2346lv) Units=km Length=0.018154400000000005 bus1=p3udt2346lv.1.2 bus2=p3udm8166.1.2 switch=n enabled=y phases=2 Linecode=1P_OH_AL_2/0_Rucina_0_416_0_2_2_2_2

New Line.l(r:p3udm8169-p3ulv67748) Units=km Length=0.028922 bus1=p3udm8169.1.2 bus2=p3ulv67748.1.2 switch=n enabled=y phases=2 Linecode=1P_OH_AL_4/0_Zuzara_0_416_0_2_2_2_2

New Line.l(r:p3udm8168-p3ulv33891) Units=km Length=0.0113226 bus1=p3udm8168.1.2 bus2=p3ulv33891.1.2 switch=n enabled=y phases=2 Linecode=1P_OH_AL_2/0_Rucina_0_416_0_2_2_2_2

New Line.l(r:p3udm8168-p3udm8169) Units=km Length=0.0873353 bus1=p3udm8169.1.2 bus2=p3udm8168.1.2 switch=n enabled=y phases=2 Linecode=1P_OH_AL_4/0_Zuzara_0_416_0_2_2_2_2

New Line.l(r:p3udm8169-p3udt2346lv) Units=km Length=0.0181467 bus1=p3udt2346lv.1.2 bus2=p3udm8169.1.2 switch=n enabled=y phases=2 Linecode=1P_OH_AL_2/0_Rucina_0_416_0_2_2_2_2

New Line.l(r:p3udt3062lv-p3ulv3377) Units=km Length=0.0283706 bus1=p3udt3062lv.1.2 bus2=p3ulv3377.1.2 switch=n enabled=y phases=2 Linecode=1P_OH_AL_4/0_Zuzara_0_416_0_2_2_2_2

New Line.l(r:p3udt3063lv-p3ulv3378) Units=km Length=0.0760558 bus1=p3udt3063lv.1.2 bus2=p3ulv3378.1.2 switch=n enabled=y phases=2 Linecode=1P_OH_AL_4/0_Zuzara_0_416_0_2_2_2_2

New Line.l(r:p3udt3771lv-p3ulv4186) Units=km Length=0.0233059 bus1=p3udt3771lv.1.2 bus2=p3ulv4186.1.2 switch=n enabled=y phases=2 Linecode=1P_OH_AL_2/0_Rucina_0_416_0_2_2_2_2

New Line.l(r:p3udt3771lv-p3ulv58572) Units=km Length=0.0858879 bus1=p3udt3771lv.1.2 bus2=p3ulv58572.1.2 switch=n enabled=y phases=2 Linecode=1P_OH_AL_4/0_Zuzara_0_416_0_2_2_2_2

New Line.l(r:p3udm13086-p3ulv41612) Units=km Length=0.145262 bus1=p3udm13086.1.2 bus2=p3ulv41612.1.2 switch=n enabled=y phases=2 Linecode=1P_OH_AL_4/0_Zuzara_0_416_0_2_2_2_2

New Line.l(r:p3udm13086-p3udt3771lv) Units=km Length=0.0187006 bus1=p3udt3771lv.1.2 bus2=p3udm13086.1.2 switch=n enabled=y phases=2 Linecode=1P_OH_AL_2/0_Rucina_0_416_0_2_2_2_2

New Line.l(r:p3udt3772lv-p3ulv4187) Units=km Length=0.06968530000000002 bus1=p3udt3772lv.1.2 bus2=p3ulv4187.1.2 switch=n enabled=y phases=2 Linecode=1P_OH_AL_4/0_Zuzara_0_416_0_2_2_2_2

New Line.l(r:p3udt3772lv-p3ulv49386) Units=km Length=0.012819 bus1=p3udt3772lv.1.2 bus2=p3ulv49386.1.2 switch=n enabled=y phases=2 Linecode=1P_OH_AL_2/0_Rucina_0_416_0_2_2_2_2

New Line.l(r:p3udt4466lv-p3ulv33160) Units=km Length=0.00777394 bus1=p3udt4466lv.1.2 bus2=p3ulv33160.1.2 switch=n enabled=y phases=2 Linecode=1P_OH_AL_2/0_Rucina_0_416_0_2_2_2_2

New Line.l(r:p3udm15474-p3ulv4960) Units=km Length=0.00599627 bus1=p3udm15474.1.2 bus2=p3ulv4960.1.2 switch=n enabled=y phases=2 Linecode=1P_OH_AL_2/0_Rucina_0_416_0_2_2_2_2

New Line.l(r:p3udm15474-p3udt4466lv) Units=km Length=0.0198534 bus1=p3udt4466lv.1.2 bus2=p3udm15474.1.2 switch=n enabled=y phases=2 Linecode=1P_OH_AL_2/0_Rucina_0_416_0_2_2_2_2

New Line.l(r:p3udt4467lv-p3ulv22139) Units=km Length=0.0756856 bus1=p3udt4467lv.1.2 bus2=p3ulv22139.1.2 switch=n enabled=y phases=2 Linecode=1P_OH_AL_4/0_Zuzara_0_416_0_2_2_2_2

New Line.l(r:p3udt4467lv-p3ulv50874) Units=km Length=0.031108 bus1=p3udt4467lv.1.2 bus2=p3ulv50874.1.2 switch=n enabled=y phases=2 Linecode=1P_OH_AL_4/0_Zuzara_0_416_0_2_2_2_2

New Line.l(r:p3udt4467lv-p3ulv75361) Units=km Length=0.117004 bus1=p3udt4467lv.1.2 bus2=p3ulv75361.1.2 switch=n enabled=y phases=2 Linecode=1P_OH_AL_4/0_Zuzara_0_416_0_2_2_2_2

New Line.l(r:p3udm15479-p3ulv53219) Units=km Length=0.0109277 bus1=p3udm15479.1.2 bus2=p3ulv53219.1.2 switch=n enabled=y phases=2 Linecode=1P_OH_AL_2/0_Rucina_0_416_0_2_2_2_2

New Line.l(r:p3udm15476-p3ulv4961) Units=km Length=0.0783798 bus1=p3udm15476.1.2 bus2=p3ulv4961.1.2 switch=n enabled=y phases=2 Linecode=1P_OH_AL_4/0_Zuzara_0_416_0_2_2_2_2

New Line.l(r:p3udm15476-p3udm15479) Units=km Length=0.0197375 bus1=p3udm15479.1.2 bus2=p3udm15476.1.2 switch=n enabled=y phases=2 Linecode=1P_OH_AL_2/0_Rucina_0_416_0_2_2_2_2

New Line.l(r:p3udm15479-p3udt4467lv) Units=km Length=0.0197375 bus1=p3udt4467lv.1.2 bus2=p3udm15479.1.2 switch=n enabled=y phases=2 Linecode=1P_OH_AL_2/0_Rucina_0_416_0_2_2_2_2

New Line.l(r:p3udm15480-p3ulv53967) Units=km Length=0.0502121 bus1=p3udm15480.1.2 bus2=p3ulv53967.1.2 switch=n enabled=y phases=2 Linecode=1P_OH_AL_4/0_Zuzara_0_416_0_2_2_2_2

New Line.l(r:p3udm15480-p3udt4467lv) Units=km Length=0.01973 bus1=p3udt4467lv.1.2 bus2=p3udm15480.1.2 switch=n enabled=y phases=2 Linecode=1P_OH_AL_2/0_Rucina_0_416_0_2_2_2_2

New Line.l(r:p3udt4468lv-p3ulv4962) Units=km Length=0.068212 bus1=p3udt4468lv.1.2 bus2=p3ulv4962.1.2 switch=n enabled=y phases=2 Linecode=1P_OH_AL_4/0_Zuzara_0_416_0_2_2_2_2

New Line.l(r:p3udm19972-p3ulv6572) Units=km Length=0.0396784 bus1=p3udm19972.1.2 bus2=p3ulv6572.1.2 switch=n enabled=y phases=2 Linecode=1P_OH_AL_4/0_Zuzara_0_416_0_2_2_2_2

New Line.l(r:p3udm19972-p3udt5802lv) Units=km Length=0.0197765 bus1=p3udt5802lv.1.2 bus2=p3udm19972.1.2 switch=n enabled=y phases=2 Linecode=1P_OH_AL_2/0_Rucina_0_416_0_2_2_2_2

New Line.l(r:p3udm19973-p3ulv27695) Units=km Length=0.020254400000000002 bus1=p3udm19973.1.2 bus2=p3ulv27695.1.2 switch=n enabled=y phases=2 Linecode=1P_OH_AL_2/0_Rucina_0_416_0_2_2_2_2

New Line.l(r:p3udm19973-p3udt5802lv) Units=km Length=0.0197765 bus1=p3udt5802lv.1.2 bus2=p3udm19973.1.2 switch=n enabled=y phases=2 Linecode=1P_OH_AL_2/0_Rucina_0_416_0_2_2_2_2

New Line.l(r:p3udt6446lv-p3ulv7387) Units=km Length=0.0124196 bus1=p3udt6446lv.1.2 bus2=p3ulv7387.1.2 switch=n enabled=y phases=2 Linecode=1P_OH_AL_2/0_Rucina_0_416_0_2_2_2_2

New Line.l(r:p3udt6446lv-p3ulv66964) Units=km Length=0.0124196 bus1=p3udt6446lv.1.2 bus2=p3ulv66964.1.2 switch=n enabled=y phases=2 Linecode=1P_OH_AL_2/0_Rucina_0_416_0_2_2_2_2

New Line.l(r:p3udm22049-p3ulv7388) Units=km Length=0.0203345 bus1=p3udm22049.1.2 bus2=p3ulv7388.1.2 switch=n enabled=y phases=2 Linecode=1P_OH_AL_2/0_Rucina_0_416_0_2_2_2_2

New Line.l(r:p3udm22049-p3udt6447lv) Units=km Length=0.0393976 bus1=p3udt6447lv.1.2 bus2=p3udm22049.1.2 switch=n enabled=y phases=2 Linecode=1P_OH_AL_4/0_Zuzara_0_416_0_2_2_2_2

New Line.l(r:p3udm22050-p3ulv30750) Units=km Length=0.0129212 bus1=p3udm22050.1.2 bus2=p3ulv30750.1.2 switch=n enabled=y phases=2 Linecode=1P_OH_AL_2/0_Rucina_0_416_0_2_2_2_2

New Line.l(r:p3udm22050-p3udt6447lv) Units=km Length=0.0593369 bus1=p3udt6447lv.1.2 bus2=p3udm22050.1.2 switch=n enabled=y phases=2 Linecode=1P_OH_AL_4/0_Zuzara_0_416_0_2_2_2_2

New Line.l(r:p3udt6449lv-p3ulv7390) Units=km Length=0.041942700000000006 bus1=p3udt6449lv.1.2 bus2=p3ulv7390.1.2 switch=n enabled=y phases=2 Linecode=1P_OH_AL_4/0_Zuzara_0_416_0_2_2_2_2

New Line.l(r:p3udt6449lv-p3ulv68539) Units=km Length=0.041942700000000006 bus1=p3udt6449lv.1.2 bus2=p3ulv68539.1.2 switch=n enabled=y phases=2 Linecode=1P_OH_AL_4/0_Zuzara_0_416_0_2_2_2_2

New Line.l(r:p3udt6450lv-p3ulv7391) Units=km Length=0.0545618 bus1=p3udt6450lv.1.2 bus2=p3ulv7391.1.2 switch=n enabled=y phases=2 Linecode=1P_OH_AL_4/0_Zuzara_0_416_0_2_2_2_2

New Line.l(r:p3udt7661lv-p3ulv8944) Units=km Length=0.055398 bus1=p3udt7661lv.1.2 bus2=p3ulv8944.1.2 switch=n enabled=y phases=2 Linecode=1P_OH_AL_4/0_Zuzara_0_416_0_2_2_2_2

New Line.l(r:p3udt7661lv-p3ulv40048) Units=km Length=0.0334539 bus1=p3udt7661lv.1.2 bus2=p3ulv40048.1.2 switch=n enabled=y phases=2 Linecode=1P_OH_AL_4/0_Zuzara_0_416_0_2_2_2_2

New Line.l(r:p3udm26052-p3ulv16805) Units=km Length=0.0431895 bus1=p3udm26052.1.2 bus2=p3ulv16805.1.2 switch=n enabled=y phases=2 Linecode=1P_OH_AL_4/0_Zuzara_0_416_0_2_2_2_2

New Line.l(r:p3udm26052-p3udt7661lv) Units=km Length=0.0194016 bus1=p3udt7661lv.1.2 bus2=p3udm26052.1.2 switch=n enabled=y phases=2 Linecode=1P_OH_AL_2/0_Rucina_0_416_0_2_2_2_2

New Line.l(r:p3udm26053-p3ulv24579) Units=km Length=0.0348343 bus1=p3udm26053.1.2 bus2=p3ulv24579.1.2 switch=n enabled=y phases=2 Linecode=1P_OH_AL_4/0_Zuzara_0_416_0_2_2_2_2

New Line.l(r:p3udm26053-p3udt7661lv) Units=km Length=0.0173817 bus1=p3udt7661lv.1.2 bus2=p3udm26053.1.2 switch=n enabled=y phases=2 Linecode=1P_OH_AL_2/0_Rucina_0_416_0_2_2_2_2

New Line.l(r:p3udt8222lv-p3ulv9672) Units=km Length=0.0617496 bus1=p3udt8222lv.1.2 bus2=p3ulv9672.1.2 switch=n enabled=y phases=2 Linecode=1P_OH_AL_4/0_Zuzara_0_416_0_2_2_2_2

New Line.l(r:p3udt8795lv-p3ulv10471) Units=km Length=0.0295446 bus1=p3udt8795lv.1.2 bus2=p3ulv10471.1.2 switch=n enabled=y phases=2 Linecode=1P_OH_AL_4/0_Zuzara_0_416_0_2_2_2_2

New Line.l(r:p3udt9365lv-p3ulv11305) Units=km Length=0.0307045 bus1=p3udt9365lv.1.2 bus2=p3ulv11305.1.2 switch=n enabled=y phases=2 Linecode=1P_OH_AL_4/0_Zuzara_0_416_0_2_2_2_2

New Line.l(r:p3udt9365lv-p3ulv11306) Units=km Length=0.0420004 bus1=p3udt9365lv.1.2 bus2=p3ulv11306.1.2 switch=n enabled=y phases=2 Linecode=1P_OH_AL_4/0_Zuzara_0_416_0_2_2_2_2

New Line.l(r:p3udt9365lv-p3ulv35478) Units=km Length=0.0664312 bus1=p3udt9365lv.1.2 bus2=p3ulv35478.1.2 switch=n enabled=y phases=2 Linecode=1P_OH_AL_4/0_Zuzara_0_416_0_2_2_2_2

New Line.l(r:p3udm31390-p3ulv54750) Units=km Length=0.0496431 bus1=p3udm31390.1.2 bus2=p3ulv54750.1.2 switch=n enabled=y phases=2 Linecode=1P_OH_AL_4/0_Zuzara_0_416_0_2_2_2_2

New Line.l(r:p3udm31390-p3udt9365lv) Units=km Length=0.0192566 bus1=p3udt9365lv.1.2 bus2=p3udm31390.1.2 switch=n enabled=y phases=2 Linecode=1P_OH_AL_2/0_Rucina_0_416_0_2_2_2_2

New Line.l(r:p3udt10916lv-p3ulv13609) Units=km Length=0.0381361 bus1=p3udt10916lv.1.2 bus2=p3ulv13609.1.2 switch=n enabled=y phases=2 Linecode=1P_OH_AL_4/0_Zuzara_0_416_0_2_2_2_2

New Line.l(r:p3udt10916lv-p3ulv37700) Units=km Length=0.0512012 bus1=p3udt10916lv.1.2 bus2=p3ulv37700.1.2 switch=n enabled=y phases=2 Linecode=1P_OH_AL_4/0_Zuzara_0_416_0_2_2_2_2

New Line.l(r:p3udm36207-p3ulv13610) Units=km Length=0.014171 bus1=p3udm36207.1.2 bus2=p3ulv13610.1.2 switch=n enabled=y phases=2 Linecode=1P_UG_AL_1/0_Brenau_0_416_0_2_2_2_2

New Line.l(r:p3udm36207-p3udt10917lv) Units=km Length=0.00993908 bus1=p3udt10917lv.1.2 bus2=p3udm36207.1.2 switch=n enabled=y phases=2 Linecode=1P_UG_AL_1/0_Brenau_0_416_0_2_2_2_2

New Line.l(r:p3udm36208-p3ulv60045) Units=km Length=0.0248743 bus1=p3udm36208.1.2 bus2=p3ulv60045.1.2 switch=n enabled=y phases=2 Linecode=1P_UG_AL_1/0_Brenau_0_416_0_2_2_2_2

New Line.l(r:p3udm36208-p3udt10917lv) Units=km Length=0.00993908 bus1=p3udt10917lv.1.2 bus2=p3udm36208.1.2 switch=n enabled=y phases=2 Linecode=1P_UG_AL_1/0_Brenau_0_416_0_2_2_2_2

New Line.l(r:p3udt11440lv-p3ulv14393) Units=km Length=0.0379677 bus1=p3udt11440lv.1.2 bus2=p3ulv14393.1.2 switch=n enabled=y phases=2 Linecode=1P_OH_AL_4/0_Zuzara_0_416_0_2_2_2_2

New Line.l(r:p3udt11440lv-p3ulv29989) Units=km Length=0.0402475 bus1=p3udt11440lv.1.2 bus2=p3ulv29989.1.2 switch=n enabled=y phases=2 Linecode=1P_OH_AL_4/0_Zuzara_0_416_0_2_2_2_2

New Line.l(r:p3udt11440lv-p3ulv31545) Units=km Length=0.004836470000000001 bus1=p3udt11440lv.1.2 bus2=p3ulv31545.1.2 switch=n enabled=y phases=2 Linecode=1P_OH_AL_2/0_Rucina_0_416_0_2_2_2_2

New Line.l(r:p3udt11441lv-p3ulv14394) Units=km Length=0.05808700000000001 bus1=p3udt11441lv.1.2 bus2=p3ulv14394.1.2 switch=n enabled=y phases=2 Linecode=1P_OH_AL_4/0_Zuzara_0_416_0_2_2_2_2

New Line.l(r:p3udm39129-p3ulv15178) Units=km Length=0.0225742 bus1=p3udm39129.1.2 bus2=p3ulv15178.1.2 switch=n enabled=y phases=2 Linecode=1P_OH_AL_2/0_Rucina_0_416_0_2_2_2_2

New Line.l(r:p3udm39129-p3udt11924lv) Units=km Length=0.0192648 bus1=p3udt11924lv.1.2 bus2=p3udm39129.1.2 switch=n enabled=y phases=2 Linecode=1P_OH_AL_2/0_Rucina_0_416_0_2_2_2_2

New Line.l(r:p3udm39130-p3ulv66188) Units=km Length=0.03976240000000001 bus1=p3udm39130.1.2 bus2=p3ulv66188.1.2 switch=n enabled=y phases=2 Linecode=1P_OH_AL_4/0_Zuzara_0_416_0_2_2_2_2

New Line.l(r:p3udm39130-p3udt11924lv) Units=km Length=0.0192789 bus1=p3udt11924lv.1.2 bus2=p3udm39130.1.2 switch=n enabled=y phases=2 Linecode=1P_OH_AL_2/0_Rucina_0_416_0_2_2_2_2

New Line.l(r:p3udt11925lv-p3ulv15179) Units=km Length=0.1066 bus1=p3udt11925lv.1.2 bus2=p3ulv15179.1.2 switch=n enabled=y phases=2 Linecode=1P_OH_AL_4/0_Zuzara_0_416_0_2_2_2_2

New Line.l(r:p3udt11925lv-p3ulv18302) Units=km Length=0.0549602 bus1=p3udt11925lv.1.2 bus2=p3ulv18302.1.2 switch=n enabled=y phases=2 Linecode=1P_OH_AL_4/0_Zuzara_0_416_0_2_2_2_2

New Line.l(r:p3udt12438lv-p3ulv15994) Units=km Length=0.001 bus1=p3udt12438lv.1.2 bus2=p3ulv15994.1.2 switch=n enabled=y phases=2 Linecode=1P_OH_AL_4_Periwinkle_0_416_0_2_2_2_2

New Line.l(r:p3udt12907lv-p3ulv16808) Units=km Length=0.0182935 bus1=p3udt12907lv.1.2 bus2=p3ulv16808.1.2 switch=n enabled=y phases=2 Linecode=1P_OH_AL_2/0_Rucina_0_416_0_2_2_2_2

New Line.l(r:p3udt12907lv-p3ulv76969) Units=km Length=0.0182935 bus1=p3udt12907lv.1.2 bus2=p3ulv76969.1.2 switch=n enabled=y phases=2 Linecode=1P_OH_AL_2/0_Rucina_0_416_0_2_2_2_2

New Line.l(r:p3udt13321lv-p3ulv17532) Units=km Length=0.0186505 bus1=p3udt13321lv.1.2 bus2=p3ulv17532.1.2 switch=n enabled=y phases=2 Linecode=1P_OH_AL_2/0_Rucina_0_416_0_2_2_2_2

New Line.l(r:p3udt13733lv-p3ulv18301) Units=km Length=0.101039 bus1=p3udt13733lv.1.2 bus2=p3ulv18301.1.2 switch=n enabled=y phases=2 Linecode=1P_OH_AL_4/0_Zuzara_0_416_0_2_2_2_2

New Line.l(r:p3udm44380-p3ulv24578) Units=km Length=0.034931 bus1=p3udm44380.1.2 bus2=p3ulv24578.1.2 switch=n enabled=y phases=2 Linecode=1P_OH_AL_4/0_Zuzara_0_416_0_2_2_2_2

New Line.l(r:p3udm44380-p3udt13733lv) Units=km Length=0.0197765 bus1=p3udt13733lv.1.2 bus2=p3udm44380.1.2 switch=n enabled=y phases=2 Linecode=1P_OH_AL_2/0_Rucina_0_416_0_2_2_2_2

New Line.l(r:p3udt14152lv-p3ulv19063) Units=km Length=0.001 bus1=p3udt14152lv.1.2 bus2=p3ulv19063.1.2 switch=n enabled=y phases=2 Linecode=1P_OH_AL_4_Periwinkle_0_416_0_2_2_2_2

New Line.l(r:p3udt14153lv-p3ulv19064) Units=km Length=0.0268064 bus1=p3udt14153lv.1.2 bus2=p3ulv19064.1.2 switch=n enabled=y phases=2 Linecode=1P_OH_AL_2/0_Rucina_0_416_0_2_2_2_2

New Line.l(r:p3udt14154lv-p3ulv19065) Units=km Length=0.054781100000000006 bus1=p3udt14154lv.1.2 bus2=p3ulv19065.1.2 switch=n enabled=y phases=2 Linecode=1P_OH_AL_4/0_Zuzara_0_416_0_2_2_2_2

New Line.l(r:p3udt14154lv-p3ulv31546) Units=km Length=0.054781100000000006 bus1=p3udt14154lv.1.2 bus2=p3ulv31546.1.2 switch=n enabled=y phases=2 Linecode=1P_OH_AL_4/0_Zuzara_0_416_0_2_2_2_2

New Line.l(r:p3udt14575lv-p3ulv19828) Units=km Length=0.0565043 bus1=p3udt14575lv.1.2 bus2=p3ulv19828.1.2 switch=n enabled=y phases=2 Linecode=1P_OH_AL_4/0_Zuzara_0_416_0_2_2_2_2

New Line.l(r:p3udt14979lv-p3ulv20580) Units=km Length=0.0523921 bus1=p3udt14979lv.1.2 bus2=p3ulv20580.1.2 switch=n enabled=y phases=2 Linecode=1P_OH_AL_4/0_Zuzara_0_416_0_2_2_2_2

New Line.l(r:p3udm47750-p3ulv40047) Units=km Length=0.0377075 bus1=p3udm47750.1.2 bus2=p3ulv40047.1.2 switch=n enabled=y phases=2 Linecode=1P_OH_AL_4/0_Zuzara_0_416_0_2_2_2_2

New Line.l(r:p3udm47750-p3udt14979lv) Units=km Length=0.0149774 bus1=p3udt14979lv.1.2 bus2=p3udm47750.1.2 switch=n enabled=y phases=2 Linecode=1P_OH_AL_2/0_Rucina_0_416_0_2_2_2_2

New Line.l(r:p3udt14980lv-p3ulv20581) Units=km Length=0.05871950000000001 bus1=p3udt14980lv.1.2 bus2=p3ulv20581.1.2 switch=n enabled=y phases=2 Linecode=1P_OH_AL_4/0_Zuzara_0_416_0_2_2_2_2

New Line.l(r:p3udt15377lv-p3ulv21355) Units=km Length=0.0603592 bus1=p3udt15377lv.1.2 bus2=p3ulv21355.1.2 switch=n enabled=y phases=2 Linecode=1P_OH_AL_4/0_Zuzara_0_416_0_2_2_2_2

New Line.l(r:p3udm48750-p3ulv28467) Units=km Length=0.0425133 bus1=p3udm48750.1.2 bus2=p3ulv28467.1.2 switch=n enabled=y phases=2 Linecode=1P_OH_AL_4/0_Zuzara_0_416_0_2_2_2_2

New Line.l(r:p3udm48750-p3udt15377lv) Units=km Length=0.0194012 bus1=p3udt15377lv.1.2 bus2=p3udm48750.1.2 switch=n enabled=y phases=2 Linecode=1P_OH_AL_2/0_Rucina_0_416_0_2_2_2_2

New Line.l(r:p3udt16946lv-p3ulv24580) Units=km Length=0.0375394 bus1=p3udt16946lv.1.2 bus2=p3ulv24580.1.2 switch=n enabled=y phases=2 Linecode=1P_OH_AL_4/0_Zuzara_0_416_0_2_2_2_2

New Line.l(r:p3udt16947lv-p3ulv24581) Units=km Length=0.0343195 bus1=p3udt16947lv.1.2 bus2=p3ulv24581.1.2 switch=n enabled=y phases=2 Linecode=1P_OH_AL_4/0_Zuzara_0_416_0_2_2_2_2

New Line.l(r:p3udt17312lv-p3ulv25347) Units=km Length=0.0585003 bus1=p3udt17312lv.1.2 bus2=p3ulv25347.1.2 switch=n enabled=y phases=2 Linecode=1P_OH_AL_4/0_Zuzara_0_416_0_2_2_2_2

New Line.l(r:p3udt17313lv-p3ulv25348) Units=km Length=0.0247003 bus1=p3udt17313lv.1.2 bus2=p3ulv25348.1.2 switch=n enabled=y phases=2 Linecode=1P_OH_AL_2/0_Rucina_0_416_0_2_2_2_2

New Line.l(r:p3udm53528-p3ulv25350) Units=km Length=0.0174316 bus1=p3udm53528.1.2 bus2=p3ulv25350.1.2 switch=n enabled=y phases=2 Linecode=1P_OH_AL_2/0_Rucina_0_416_0_2_2_2_2

New Line.l(r:p3udm53528-p3udt17314lv) Units=km Length=0.0359435 bus1=p3udt17314lv.1.2 bus2=p3udm53528.1.2 switch=n enabled=y phases=2 Linecode=1P_OH_AL_4/0_Zuzara_0_416_0_2_2_2_2

New Line.l(r:p3udm53529-p3ulv76191) Units=km Length=0.0487989 bus1=p3udm53529.1.2 bus2=p3ulv76191.1.2 switch=n enabled=y phases=2 Linecode=1P_OH_AL_4/0_Zuzara_0_416_0_2_2_2_2

New Line.l(r:p3udm53529-p3udt17314lv) Units=km Length=0.0327902 bus1=p3udt17314lv.1.2 bus2=p3udm53529.1.2 switch=n enabled=y phases=2 Linecode=1P_OH_AL_4/0_Zuzara_0_416_0_2_2_2_2

New Line.l(r:p3udt17711lv-p3ulv26171) Units=km Length=0.0950039 bus1=p3udt17711lv.1.2 bus2=p3ulv26171.1.2 switch=n enabled=y phases=2 Linecode=1P_OH_AL_4/0_Zuzara_0_416_0_2_2_2_2

New Line.l(r:p3udt17711lv-p3ulv50875) Units=km Length=0.039718 bus1=p3udt17711lv.1.2 bus2=p3ulv50875.1.2 switch=n enabled=y phases=2 Linecode=1P_OH_AL_4/0_Zuzara_0_416_0_2_2_2_2

New Line.l(r:p3udm54525-p3ulv44797) Units=km Length=0.0580276 bus1=p3udm54525.1.2 bus2=p3ulv44797.1.2 switch=n enabled=y phases=2 Linecode=1P_OH_AL_4/0_Zuzara_0_416_0_2_2_2_2

New Line.l(r:p3udm54525-p3udt17711lv) Units=km Length=0.0196279 bus1=p3udt17711lv.1.2 bus2=p3udm54525.1.2 switch=n enabled=y phases=2 Linecode=1P_OH_AL_2/0_Rucina_0_416_0_2_2_2_2

New Line.l(r:p3udt18052lv-p3ulv26946) Units=km Length=0.05988280000000001 bus1=p3udt18052lv.1.2 bus2=p3ulv26946.1.2 switch=n enabled=y phases=2 Linecode=1P_OH_AL_4/0_Zuzara_0_416_0_2_2_2_2

New Line.l(r:p3udt18732lv-p3ulv28466) Units=km Length=0.0341666 bus1=p3udt18732lv.1.2 bus2=p3ulv28466.1.2 switch=n enabled=y phases=2 Linecode=1P_OH_AL_4/0_Zuzara_0_416_0_2_2_2_2

New Line.l(r:p3udt18733lv-p3ulv28468) Units=km Length=0.099944 bus1=p3udt18733lv.1.2 bus2=p3ulv28468.1.2 switch=n enabled=y phases=2 Linecode=1P_OH_AL_4/0_Zuzara_0_416_0_2_2_2_2

New Line.l(r:p3udt19044lv-p3ulv29210) Units=km Length=0.0825265 bus1=p3udt19044lv.1.2 bus2=p3ulv29210.1.2 switch=n enabled=y phases=2 Linecode=1P_OH_AL_4/0_Zuzara_0_416_0_2_2_2_2

New Line.l(r:p3udt19044lv-p3ulv39249) Units=km Length=0.0574016 bus1=p3udt19044lv.1.2 bus2=p3ulv39249.1.2 switch=n enabled=y phases=2 Linecode=1P_OH_AL_4/0_Zuzara_0_416_0_2_2_2_2

New Line.l(r:p3udt19386lv-p3ulv29990) Units=km Length=0.047966 bus1=p3udt19386lv.1.2 bus2=p3ulv29990.1.2 switch=n enabled=y phases=2 Linecode=1P_OH_AL_4/0_Zuzara_0_416_0_2_2_2_2

New Line.l(r:p3udt19386lv-p3ulv63893) Units=km Length=0.0383001 bus1=p3udt19386lv.1.2 bus2=p3ulv63893.1.2 switch=n enabled=y phases=2 Linecode=1P_OH_AL_4/0_Zuzara_0_416_0_2_2_2_2

New Line.l(r:p3udt19707lv-p3ulv30751) Units=km Length=0.001 bus1=p3udt19707lv.1.2 bus2=p3ulv30751.1.2 switch=n enabled=y phases=2 Linecode=1P_OH_AL_4_Periwinkle_0_416_0_2_2_2_2

New Line.l(r:p3udt19708lv-p3ulv30752) Units=km Length=0.0927166 bus1=p3udt19708lv.1.2 bus2=p3ulv30752.1.2 switch=n enabled=y phases=2 Linecode=1P_OH_AL_4/0_Zuzara_0_416_0_2_2_2_2

New Line.l(r:p3udt20017lv-p3ulv31544) Units=km Length=0.0423215 bus1=p3udt20017lv.1.2 bus2=p3ulv31544.1.2 switch=n enabled=y phases=2 Linecode=1P_UG_AL_1/0_Brenau_0_416_0_2_2_2_2

New Line.l(r:p3udm59854-p3ulv80030) Units=km Length=0.0748242 bus1=p3udm59854.1.2 bus2=p3ulv80030.1.2 switch=n enabled=y phases=2 Linecode=1P_UG_AL_1/0_Brenau_0_416_0_2_2_2_2

New Line.l(r:p3udm59854-p3udt20017lv) Units=km Length=0.00993908 bus1=p3udt20017lv.1.2 bus2=p3udm59854.1.2 switch=n enabled=y phases=2 Linecode=1P_UG_AL_1/0_Brenau_0_416_0_2_2_2_2

New Line.l(r:p3udt20018lv-p3ulv31547) Units=km Length=0.001 bus1=p3udt20018lv.1.2 bus2=p3ulv31547.1.2 switch=n enabled=y phases=2 Linecode=1P_OH_AL_4_Periwinkle_0_416_0_2_2_2_2

New Line.l(r:p3udt20613lv-p3ulv33161) Units=km Length=0.0869818 bus1=p3udt20613lv.1.2 bus2=p3ulv33161.1.2 switch=n enabled=y phases=2 Linecode=1P_OH_AL_4/0_Zuzara_0_416_0_2_2_2_2

New Line.l(r:p3udt20894lv-p3ulv33890) Units=km Length=0.0472288 bus1=p3udt20894lv.1.2 bus2=p3ulv33890.1.2 switch=n enabled=y phases=2 Linecode=1P_OH_AL_4/0_Zuzara_0_416_0_2_2_2_2

New Line.l(r:p3udm61783-p3ulv54752) Units=km Length=0.03924 bus1=p3udm61783.1.2 bus2=p3ulv54752.1.2 switch=n enabled=y phases=2 Linecode=1P_OH_AL_4/0_Zuzara_0_416_0_2_2_2_2

New Line.l(r:p3udm61783-p3udt20894lv) Units=km Length=0.0179718 bus1=p3udt20894lv.1.2 bus2=p3udm61783.1.2 switch=n enabled=y phases=2 Linecode=1P_OH_AL_2/0_Rucina_0_416_0_2_2_2_2

New Line.l(r:p3udt21912lv-p3ulv36927) Units=km Length=0.0270472 bus1=p3udt21912lv.1.2 bus2=p3ulv36927.1.2 switch=n enabled=y phases=2 Linecode=1P_UG_AL_1/0_Brenau_0_416_0_2_2_2_2

New Line.l(r:p3udt21913lv-p3ulv50876) Units=km Length=0.0284526 bus1=p3udt21913lv.1.2 bus2=p3ulv50876.1.2 switch=n enabled=y phases=2 Linecode=1P_OH_AL_4/0_Zuzara_0_416_0_2_2_2_2

New Line.l(r:p3udm63806-p3ulv36929) Units=km Length=0.05194530000000001 bus1=p3udm63806.1.2 bus2=p3ulv36929.1.2 switch=n enabled=y phases=2 Linecode=1P_OH_AL_4/0_Zuzara_0_416_0_2_2_2_2

New Line.l(r:p3udm63806-p3udt21913lv) Units=km Length=0.0198276 bus1=p3udt21913lv.1.2 bus2=p3udm63806.1.2 switch=n enabled=y phases=2 Linecode=1P_OH_AL_2/0_Rucina_0_416_0_2_2_2_2

New Line.l(r:p3udt22182lv-p3ulv37699) Units=km Length=0.0842519 bus1=p3udt22182lv.1.2 bus2=p3ulv37699.1.2 switch=n enabled=y phases=2 Linecode=1P_OH_AL_4/0_Zuzara_0_416_0_2_2_2_2

New Line.l(r:p3udt22182lv-p3ulv46371) Units=km Length=0.0232364 bus1=p3udt22182lv.1.2 bus2=p3ulv46371.1.2 switch=n enabled=y phases=2 Linecode=1P_OH_AL_2/0_Rucina_0_416_0_2_2_2_2

New Line.l(r:p3udm64856-p3ulv38465) Units=km Length=0.0490136 bus1=p3udm64856.1.2 bus2=p3ulv38465.1.2 switch=n enabled=y phases=2 Linecode=1P_OH_AL_4/0_Zuzara_0_416_0_2_2_2_2

New Line.l(r:p3udm64856-p3udt22445lv) Units=km Length=0.0173818 bus1=p3udt22445lv.1.2 bus2=p3udm64856.1.2 switch=n enabled=y phases=2 Linecode=1P_OH_AL_2/0_Rucina_0_416_0_2_2_2_2

New Line.l(r:p3udm64857-p3ulv49385) Units=km Length=0.023573 bus1=p3udm64857.1.2 bus2=p3ulv49385.1.2 switch=n enabled=y phases=2 Linecode=1P_OH_AL_2/0_Rucina_0_416_0_2_2_2_2

New Line.l(r:p3udm64857-p3udt22445lv) Units=km Length=0.0320979 bus1=p3udt22445lv.1.2 bus2=p3udm64857.1.2 switch=n enabled=y phases=2 Linecode=1P_OH_AL_4/0_Zuzara_0_416_0_2_2_2_2

New Line.l(r:p3udt22725lv-p3ulv39250) Units=km Length=0.0476803 bus1=p3udt22725lv.1.2 bus2=p3ulv39250.1.2 switch=n enabled=y phases=2 Linecode=1P_OH_AL_4/0_Zuzara_0_416_0_2_2_2_2

New Line.l(r:p3udt23261lv-p3ulv40846) Units=km Length=0.0346236 bus1=p3udt23261lv.1.2 bus2=p3ulv40846.1.2 switch=n enabled=y phases=2 Linecode=1P_OH_AL_4/0_Zuzara_0_416_0_2_2_2_2

New Line.l(r:p3udt23262lv-p3ulv40847) Units=km Length=0.0196271 bus1=p3udt23262lv.1.2 bus2=p3ulv40847.1.2 switch=n enabled=y phases=2 Linecode=1P_OH_AL_2/0_Rucina_0_416_0_2_2_2_2

New Line.l(r:p3udt23262lv-p3ulv72379) Units=km Length=0.0196271 bus1=p3udt23262lv.1.2 bus2=p3ulv72379.1.2 switch=n enabled=y phases=2 Linecode=1P_OH_AL_2/0_Rucina_0_416_0_2_2_2_2

New Line.l(r:p3udt23721lv-p3ulv42396) Units=km Length=0.047482100000000006 bus1=p3udt23721lv.1.2 bus2=p3ulv42396.1.2 switch=n enabled=y phases=2 Linecode=1P_OH_AL_4/0_Zuzara_0_416_0_2_2_2_2

New Line.l(r:p3udt23721lv-p3ulv69295) Units=km Length=0.075303 bus1=p3udt23721lv.1.2 bus2=p3ulv69295.1.2 switch=n enabled=y phases=2 Linecode=1P_OH_AL_4/0_Zuzara_0_416_0_2_2_2_2

New Line.l(r:p3udt24444lv-p3ulv44796) Units=km Length=0.06558950000000001 bus1=p3udt24444lv.1.2 bus2=p3ulv44796.1.2 switch=n enabled=y phases=2 Linecode=1P_OH_AL_4/0_Zuzara_0_416_0_2_2_2_2

New Line.l(r:p3udt24666lv-p3ulv45575) Units=km Length=0.009893810000000001 bus1=p3udt24666lv.1.2 bus2=p3ulv45575.1.2 switch=n enabled=y phases=2 Linecode=1P_OH_AL_2/0_Rucina_0_416_0_2_2_2_2

New Line.l(r:p3udt24667lv-p3ulv45576) Units=km Length=0.04833830000000001 bus1=p3udt24667lv.1.2 bus2=p3ulv45576.1.2 switch=n enabled=y phases=2 Linecode=1P_OH_AL_4/0_Zuzara_0_416_0_2_2_2_2

New Line.l(r:p3udt24920lv-p3ulv46372) Units=km Length=0.0310255 bus1=p3udt24920lv.1.2 bus2=p3ulv46372.1.2 switch=n enabled=y phases=2 Linecode=1P_OH_AL_4/0_Zuzara_0_416_0_2_2_2_2

New Line.l(r:p3udt24920lv-p3ulv47133) Units=km Length=0.0500492 bus1=p3udt24920lv.1.2 bus2=p3ulv47133.1.2 switch=n enabled=y phases=2 Linecode=1P_OH_AL_4/0_Zuzara_0_416_0_2_2_2_2

New Line.l(r:p3udt24920lv-p3ulv50143) Units=km Length=0.020389800000000003 bus1=p3udt24920lv.1.2 bus2=p3ulv50143.1.2 switch=n enabled=y phases=2 Linecode=1P_OH_AL_2/0_Rucina_0_416_0_2_2_2_2

New Line.l(r:p3udt24920lv-p3ulv59331) Units=km Length=0.0459919 bus1=p3udt24920lv.1.2 bus2=p3ulv59331.1.2 switch=n enabled=y phases=2 Linecode=1P_OH_AL_4/0_Zuzara_0_416_0_2_2_2_2

New Line.l(r:p3udt24920lv-p3ulv66963) Units=km Length=0.0505297 bus1=p3udt24920lv.1.2 bus2=p3ulv66963.1.2 switch=n enabled=y phases=2 Linecode=1P_OH_AL_4/0_Zuzara_0_416_0_2_2_2_2

New Line.l(r:p3udt24921lv-p3ulv46373) Units=km Length=0.0185975 bus1=p3udt24921lv.1.2 bus2=p3ulv46373.1.2 switch=n enabled=y phases=2 Linecode=1P_OH_AL_2/0_Rucina_0_416_0_2_2_2_2

New Line.l(r:p3udt24921lv-p3ulv74652) Units=km Length=0.0185975 bus1=p3udt24921lv.1.2 bus2=p3ulv74652.1.2 switch=n enabled=y phases=2 Linecode=1P_OH_AL_2/0_Rucina_0_416_0_2_2_2_2

New Line.l(r:p3udm69283-p3ulv46374) Units=km Length=0.07745580000000002 bus1=p3udm69283.1.2 bus2=p3ulv46374.1.2 switch=n enabled=y phases=2 Linecode=1P_OH_AL_4/0_Zuzara_0_416_0_2_2_2_2

New Line.l(r:p3udm69283-p3udt24922lv) Units=km Length=0.0197839 bus1=p3udt24922lv.1.2 bus2=p3udm69283.1.2 switch=n enabled=y phases=2 Linecode=1P_OH_AL_2/0_Rucina_0_416_0_2_2_2_2

New Line.l(r:p3udm69284-p3ulv75362) Units=km Length=0.07578900000000001 bus1=p3udm69284.1.2 bus2=p3ulv75362.1.2 switch=n enabled=y phases=2 Linecode=1P_OH_AL_4/0_Zuzara_0_416_0_2_2_2_2

New Line.l(r:p3udm69284-p3udt24922lv) Units=km Length=0.0197765 bus1=p3udt24922lv.1.2 bus2=p3udm69284.1.2 switch=n enabled=y phases=2 Linecode=1P_OH_AL_2/0_Rucina_0_416_0_2_2_2_2

New Line.l(r:p3udt25139lv-p3ulv47134) Units=km Length=0.0165422 bus1=p3udt25139lv.1.2 bus2=p3ulv47134.1.2 switch=n enabled=y phases=2 Linecode=1P_OH_AL_2/0_Rucina_0_416_0_2_2_2_2

New Line.l(r:p3udt25559lv-p3ulv48609) Units=km Length=0.0352807 bus1=p3udt25559lv.1.2 bus2=p3ulv48609.1.2 switch=n enabled=y phases=2 Linecode=1P_OH_AL_4/0_Zuzara_0_416_0_2_2_2_2

New Line.l(r:p3udt27106lv-p3ulv54749) Units=km Length=0.0596664 bus1=p3udt27106lv.1.2 bus2=p3ulv54749.1.2 switch=n enabled=y phases=2 Linecode=1P_OH_AL_4/0_Zuzara_0_416_0_2_2_2_2

New Line.l(r:p3udt27107lv-p3ulv54751) Units=km Length=0.0248647 bus1=p3udt27107lv.1.2 bus2=p3ulv54751.1.2 switch=n enabled=y phases=2 Linecode=1P_OH_AL_2/0_Rucina_0_416_0_2_2_2_2

New Line.l(r:p3udm72683-p3ulv71612) Units=km Length=0.0151005 bus1=p3udm72683.1.2 bus2=p3ulv71612.1.2 switch=n enabled=y phases=2 Linecode=1P_OH_AL_2/0_Rucina_0_416_0_2_2_2_2

New Line.l(r:p3udm72683-p3udt27107lv) Units=km Length=0.03852 bus1=p3udt27107lv.1.2 bus2=p3udm72683.1.2 switch=n enabled=y phases=2 Linecode=1P_OH_AL_4/0_Zuzara_0_416_0_2_2_2_2

New Line.l(r:p3udt27666lv-p3ulv57038) Units=km Length=0.0254987 bus1=p3udt27666lv.1.2 bus2=p3ulv57038.1.2 switch=n enabled=y phases=2 Linecode=1P_OH_AL_2/0_Rucina_0_416_0_2_2_2_2

New Line.l(r:p3udt27667lv-p3ulv57039) Units=km Length=0.0301494 bus1=p3udt27667lv.1.2 bus2=p3ulv57039.1.2 switch=n enabled=y phases=2 Linecode=1P_OH_AL_4/0_Zuzara_0_416_0_2_2_2_2

New Line.l(r:p3udt28176lv-p3ulv59330) Units=km Length=0.0221896 bus1=p3udt28176lv.1.2 bus2=p3ulv59330.1.2 switch=n enabled=y phases=2 Linecode=1P_OH_AL_2/0_Rucina_0_416_0_2_2_2_2

New Line.l(r:p3udt28177lv-p3ulv59332) Units=km Length=0.001 bus1=p3udt28177lv.1.2 bus2=p3ulv59332.1.2 switch=n enabled=y phases=2 Linecode=1P_OH_AL_4_Periwinkle_0_416_0_2_2_2_2

New Line.l(r:p3udt28663lv-p3ulv61608) Units=km Length=0.001 bus1=p3udt28663lv.1.2 bus2=p3ulv61608.1.2 switch=n enabled=y phases=2 Linecode=1P_OH_AL_4_Periwinkle_0_416_0_2_2_2_2

New Line.l(r:p3udt28817lv-p3ulv62364) Units=km Length=0.0613501 bus1=p3udt28817lv.1.2 bus2=p3ulv62364.1.2 switch=n enabled=y phases=2 Linecode=1P_OH_AL_4/0_Zuzara_0_416_0_2_2_2_2

New Line.l(r:p3udt28817lv-p3ulv80031) Units=km Length=0.0613501 bus1=p3udt28817lv.1.2 bus2=p3ulv80031.1.2 switch=n enabled=y phases=2 Linecode=1P_OH_AL_4/0_Zuzara_0_416_0_2_2_2_2

New Line.l(r:p3udt28818lv-p3ulv62365) Units=km Length=0.001 bus1=p3udt28818lv.1.2 bus2=p3ulv62365.1.2 switch=n enabled=y phases=2 Linecode=1P_OH_AL_4_Periwinkle_0_416_0_2_2_2_2

New Line.l(r:p3udt28819lv-p3ulv62366) Units=km Length=0.001 bus1=p3udt28819lv.1.2 bus2=p3ulv62366.1.2 switch=n enabled=y phases=2 Linecode=1P_OH_AL_4_Periwinkle_0_416_0_2_2_2_2

New Line.l(r:p3udt28979lv-p3ulv63150) Units=km Length=0.0145911 bus1=p3udt28979lv.1.2 bus2=p3ulv63150.1.2 switch=n enabled=y phases=2 Linecode=1P_OH_AL_2/0_Rucina_0_416_0_2_2_2_2

New Line.l(r:p3udm75162-p3ulv66962) Units=km Length=0.0317723 bus1=p3udm75162.1.2 bus2=p3ulv66962.1.2 switch=n enabled=y phases=2 Linecode=1P_UG_AL_1/0_Brenau_0_416_0_2_2_2_2

New Line.l(r:p3udm75162-p3udt28979lv) Units=km Length=0.0188745 bus1=p3udt28979lv.1.2 bus2=p3udm75162.1.2 switch=n enabled=y phases=2 Linecode=1P_OH_AL_2/0_Rucina_0_416_0_2_2_2_2

New Line.l(r:p3udt29153lv-p3ulv63892) Units=km Length=0.001 bus1=p3udt29153lv.1.2 bus2=p3ulv63892.1.2 switch=n enabled=y phases=2 Linecode=1P_OH_AL_4_Periwinkle_0_416_0_2_2_2_2

New Line.l(r:p3udt29428lv-p3ulv65400) Units=km Length=0.001 bus1=p3udt29428lv.1.2 bus2=p3ulv65400.1.2 switch=n enabled=y phases=2 Linecode=1P_OH_AL_4_Periwinkle_0_416_0_2_2_2_2

New Line.l(r:p3udt29429lv-p3ulv65401) Units=km Length=0.001 bus1=p3udt29429lv.1.2 bus2=p3ulv65401.1.2 switch=n enabled=y phases=2 Linecode=1P_OH_AL_4_Periwinkle_0_416_0_2_2_2_2

New Line.l(r:p3udt30210lv-p3ulv69296) Units=km Length=0.001 bus1=p3udt30210lv.1.2 bus2=p3ulv69296.1.2 switch=n enabled=y phases=2 Linecode=1P_OH_AL_4_Periwinkle_0_416_0_2_2_2_2

New Line.l(r:p3udt30664lv-p3ulv71613) Units=km Length=0.06949580000000001 bus1=p3udt30664lv.1.2 bus2=p3ulv71613.1.2 switch=n enabled=y phases=2 Linecode=1P_OH_AL_4/0_Zuzara_0_416_0_2_2_2_2

New Line.l(r:p3udt31215lv-p3ulv74650) Units=km Length=0.001 bus1=p3udt31215lv.1.2 bus2=p3ulv74650.1.2 switch=n enabled=y phases=2 Linecode=1P_OH_AL_4_Periwinkle_0_416_0_2_2_2_2

New Line.l(r:p3udt31216lv-p3ulv74653) Units=km Length=0.018267100000000005 bus1=p3udt31216lv.1.2 bus2=p3ulv74653.1.2 switch=n enabled=y phases=2 Linecode=1P_OH_AL_2/0_Rucina_0_416_0_2_2_2_2

New Line.l(r:p3udt31340lv-p3ulv75363) Units=km Length=0.062535 bus1=p3udt31340lv.1.2 bus2=p3ulv75363.1.2 switch=n enabled=y phases=2 Linecode=1P_OH_AL_4/0_Zuzara_0_416_0_2_2_2_2

New Line.l(r:p3udt31341lv-p3ulv75364) Units=km Length=0.0401833 bus1=p3udt31341lv.1.2 bus2=p3ulv75364.1.2 switch=n enabled=y phases=2 Linecode=1P_OH_AL_4/0_Zuzara_0_416_0_2_2_2_2

New Line.l(r:p3udt31341lv-p3ulv78479) Units=km Length=0.0401833 bus1=p3udt31341lv.1.2 bus2=p3ulv78479.1.2 switch=n enabled=y phases=2 Linecode=1P_OH_AL_4/0_Zuzara_0_416_0_2_2_2_2

New Line.l(r:p3udt31635lv-p3ulv76967) Units=km Length=0.001 bus1=p3udt31635lv.1.2 bus2=p3ulv76967.1.2 switch=n enabled=y phases=2 Linecode=1P_OH_AL_4_Periwinkle_0_416_0_2_2_2_2

New Line.l(r:p3udt31636lv-p3ulv76968) Units=km Length=0.0359784 bus1=p3udt31636lv.1.2 bus2=p3ulv76968.1.2 switch=n enabled=y phases=2 Linecode=1P_OH_AL_4/0_Zuzara_0_416_0_2_2_2_2

New Line.l(r:p3udt17313-p3udt854) Units=km Length=0.001 bus1=p3udt17313.3 bus2=p3udt854.3 switch=n enabled=y phases=1 Linecode=1P_OH_AL_ACSR_#2_Sparrow_12_47_0_1_1_1_1

New Line.l(r:p3udt1612-p3udt28176) Units=km Length=0.154464 bus1=p3udt28176.3 bus2=p3udt1612.3 switch=n enabled=y phases=1 Linecode=1P_OH_AL_ACSR_#2_Sparrow_12_47_0_1_1_1_1

New Line.l(r:p3udt20613-p3udt24920) Units=km Length=0.001 bus1=p3udt20613.3 bus2=p3udt24920.3 switch=n enabled=y phases=1 Linecode=1P_OH_AL_ACSR_#2_Sparrow_12_47_0_1_1_1_1

New Line.l(r:p3udt28663-p3udt31215)_s0 Units=km Length=0.227306 bus1=p3udt28663.3 bus2=p3udt28663-p3udt31215x.3 switch=n enabled=y phases=1 Linecode=1P_OH_AL_ACSR_#2_Sparrow_12_47_0_1_1_1_1

New Line.l(r:p3udt28663-p3udt31215)_s1 Units=km Length=0.0248769 bus1=p3udt28663-p3udt31215x.3 bus2=p3udt31215.3 switch=n enabled=y phases=1 Linecode=1P_OH_AL_ACSR_#2_Sparrow_12_47_0_1_1_1_1

New Line.l(r:p3udt20613-p3udt28663)_s0 Units=km Length=0.118521 bus1=p3udt20613.3 bus2=p3udt20613-p3udt28663x.3 switch=n enabled=y phases=1 Linecode=1P_OH_AL_ACSR_#2_Sparrow_12_47_0_1_1_1_1

New Line.l(r:p3udt20613-p3udt28663)_s1 Units=km Length=0.8635110000000001 bus1=p3udt20613-p3udt28663x.3 bus2=p3udt28663.3 switch=n enabled=y phases=1 Linecode=1P_OH_AL_ACSR_#2_Sparrow_12_47_0_1_1_1_1

New Line.l(r:p3udt11924-p3udt20613) Units=km Length=0.0385437 bus1=p3udt11924.3 bus2=p3udt20613.3 switch=n enabled=y phases=1 Linecode=1P_OH_AL_ACSR_#2_Sparrow_12_47_0_1_1_1_1

New Line.l(r:p3udt11924-p3udt28176) Units=km Length=0.116211 bus1=p3udt28176.3 bus2=p3udt11924.3 switch=n enabled=y phases=1 Linecode=1P_OH_AL_ACSR_#2_Sparrow_12_47_0_1_1_1_1

New Line.l(r:p3udt1614-p3udt22725) Units=km Length=0.001 bus1=p3udt1614.3 bus2=p3udt22725.3 switch=n enabled=y phases=1 Linecode=1P_OH_AL_ACSR_#2_Sparrow_12_47_0_1_1_1_1

New Line.l(r:p3udt1614-p3udt855) Units=km Length=0.0597157 bus1=p3udt855.3 bus2=p3udt1614.3 switch=n enabled=y phases=1 Linecode=1P_OH_AL_ACSR_#2_Sparrow_12_47_0_1_1_1_1

New Line.l(r:p3udt855-p3udt9365) Units=km Length=0.0597157 bus1=p3udt9365.3 bus2=p3udt855.3 switch=n enabled=y phases=1 Linecode=1P_OH_AL_ACSR_#2_Sparrow_12_47_0_1_1_1_1

New Line.l(r:p3udt27107-p3udt6446)_s0 Units=km Length=0.0658411 bus1=p3udt27107.3 bus2=p3udt27107-p3udt6446x.3 switch=n enabled=y phases=1 Linecode=1P_OH_AL_ACSR_#2_Sparrow_12_47_0_1_1_1_1

New Line.l(r:p3udt27107-p3udt6446)_s1 Units=km Length=0.053229700000000005 bus1=p3udt27107-p3udt6446x.3 bus2=p3udt6446.3 switch=n enabled=y phases=1 Linecode=1P_OH_AL_ACSR_#2_Sparrow_12_47_0_1_1_1_1

New Line.l(r:p3udt27107-p3udt30664) Units=km Length=0.001 bus1=p3udt27107.3 bus2=p3udt30664.3 switch=n enabled=y phases=1 Linecode=1P_OH_AL_ACSR_#2_Sparrow_12_47_0_1_1_1_1

New Line.l(r:p3udt27107-p3udt27666) Units=km Length=0.057784 bus1=p3udt27666.3 bus2=p3udt27107.3 switch=n enabled=y phases=1 Linecode=1P_OH_AL_ACSR_#2_Sparrow_12_47_0_1_1_1_1

New Line.l(r:p3udt27666-p3udt9365) Units=km Length=0.0577766 bus1=p3udt9365.3 bus2=p3udt27666.3 switch=n enabled=y phases=1 Linecode=1P_OH_AL_ACSR_#2_Sparrow_12_47_0_1_1_1_1

New Line.l(r:p3udt28979-p3udt9365) Units=km Length=0.33621000000000006 bus1=p3udt28979.3 bus2=p3udt9365.3 switch=n enabled=y phases=1 Linecode=1P_OH_AL_ACSR_#2_Sparrow_12_47_0_1_1_1_1

New Line.l(r:p3udt10917-p3udt28979) Units=km Length=0.223609 bus1=p3udt10917.3 bus2=p3udt28979.3 switch=n enabled=y phases=1 Linecode=1P_OH_AL_ACSR_#2_Sparrow_12_47_0_1_1_1_1

New Line.l(r:p3udt10917-p3udt20017) Units=km Length=0.0198782 bus1=p3udt10917-p3udt20017xx.3 bus2=p3udt10917-p3udt20017x.3 switch=n enabled=y phases=1 Linecode=1P_UG_AL_#2_15_12_47_0_1_1_1_1

New Line.l(r:p3udt20017-p3udt21912) Units=km Length=0.0397563 bus1=p3udt20017-p3udt21912xx.3 bus2=p3udt20017-p3udt21912x.3 switch=n enabled=y phases=1 Linecode=1P_UG_AL_#2_15_12_47_0_1_1_1_1

New Line.l(r:p3udt21912-p3udt28176) Units=km Length=0.0987515 bus1=p3udt28176.3 bus2=p3udt21912.3 switch=n enabled=y phases=1 Linecode=1P_OH_AL_ACSR_#2_Sparrow_12_47_0_1_1_1_1

New Line.l(r:p3udt22182-p3udt28176) Units=km Length=0.0586895 bus1=p3udt22182.3 bus2=p3udt28176.3 switch=n enabled=y phases=1 Linecode=1P_OH_AL_ACSR_#2_Sparrow_12_47_0_1_1_1_1

New Line.l(r:p3udt17313-p3udt22182) Units=km Length=0.09782060000000001 bus1=p3udt17313.3 bus2=p3udt22182.3 switch=n enabled=y phases=1 Linecode=1P_OH_AL_ACSR_#2_Sparrow_12_47_0_1_1_1_1

New Line.l(r:p3udt1613-p3udt17313) Units=km Length=0.03912390000000001 bus1=p3udt1613.3 bus2=p3udt17313.3 switch=n enabled=y phases=1 Linecode=1P_OH_AL_ACSR_#2_Sparrow_12_47_0_1_1_1_1

New Line.l(r:p3udt1613-p3udt17312) Units=km Length=0.164927 bus1=p3udt17312.3 bus2=p3udt1613.3 switch=n enabled=y phases=1 Linecode=1P_OH_AL_ACSR_#2_Sparrow_12_47_0_1_1_1_1

New Line.l(r:p3udt14152-p3udt27106) Units=km Length=0.210017 bus1=p3udt27106.3 bus2=p3udt14152.3 switch=n enabled=y phases=1 Linecode=1P_OH_AL_ACSR_#2_Sparrow_12_47_0_1_1_1_1

New Line.l(r:p3udt24444-p3udt27106) Units=km Length=0.253903 bus1=p3udt27106.3 bus2=p3udt24444.3 switch=n enabled=y phases=1 Linecode=1P_OH_AL_ACSR_#2_Sparrow_12_47_0_1_1_1_1

New Line.l(r:p3udt18052-p3udt27106) Units=km Length=0.0390676 bus1=p3udt18052.3 bus2=p3udt27106.3 switch=n enabled=y phases=1 Linecode=1P_OH_AL_ACSR_#2_Sparrow_12_47_0_1_1_1_1

New Line.l(r:p3udt17312-p3udt18052) Units=km Length=0.1768 bus1=p3udt17312.3 bus2=p3udt18052.3 switch=n enabled=y phases=1 Linecode=1P_OH_AL_ACSR_#2_Sparrow_12_47_0_1_1_1_1

New Line.l(r:p3udt17312-p3udt4467) Units=km Length=0.059205 bus1=p3udt4467.3 bus2=p3udt17312.3 switch=n enabled=y phases=1 Linecode=1P_OH_AL_ACSR_#2_Sparrow_12_47_0_1_1_1_1

New Line.l(r:p3udt3771-p3udt4467) Units=km Length=0.110277 bus1=p3udt3771.3 bus2=p3udt4467.3 switch=n enabled=y phases=1 Linecode=1P_OH_AL_ACSR_#2_Sparrow_12_47_0_1_1_1_1

New Line.l(r:p3udt20018-p3udt3771)_s0 Units=km Length=0.154604 bus1=p3udt20018-p3udt3771x.3 bus2=p3udt20018-p3udt3771xx.3 switch=n enabled=y phases=1 Linecode=1P_OH_AL_ACSR_#2_Sparrow_12_47_0_1_1_1_1

New Line.l(r:p3udt20018-p3udt3771)_s1 Units=km Length=0.08373390000000001 bus1=p3udt20018-p3udt3771xx.3 bus2=p3udt3771.3 switch=n enabled=y phases=1 Linecode=1P_OH_AL_ACSR_#2_Sparrow_12_47_0_1_1_1_1

New Line.l(r:p3udt23262-p3udt31341) Units=km Length=0.13845 bus1=p3udt23262.1 bus2=p3udt31341.1 switch=n enabled=y phases=1 Linecode=1P_OH_AL_ACSR_#2_Sparrow_12_47_0_1_1_1_1

New Line.l(r:p3udt12907-p3udt23262) Units=km Length=0.107985 bus1=p3udt12907.1 bus2=p3udt23262.1 switch=n enabled=y phases=1 Linecode=1P_OH_AL_ACSR_#2_Sparrow_12_47_0_1_1_1_1

New Line.l(r:p3udt12438-p3udt12907) Units=km Length=0.0472979 bus1=p3udt12438.1 bus2=p3udt12907.1 switch=n enabled=y phases=1 Linecode=1P_OH_AL_ACSR_#2_Sparrow_12_47_0_1_1_1_1

New Line.l(r:p3udt10916-p3udt12438)_s0 Units=km Length=0.129812 bus1=p3udt10916-p3udt12438x.1 bus2=p3udt10916-p3udt12438xx.1 switch=n enabled=y phases=1 Linecode=1P_OH_AL_ACSR_#2_Sparrow_12_47_0_1_1_1_1

New Line.l(r:p3udt10916-p3udt12438)_s1 Units=km Length=0.0114616 bus1=p3udt10916-p3udt12438xx.1 bus2=p3udt12438.1 switch=n enabled=y phases=1 Linecode=1P_OH_AL_ACSR_#2_Sparrow_12_47_0_1_1_1_1

New Line.l(r:p3udt11440-p3udt5802) Units=km Length=0.128685 bus1=p3udt5802.2 bus2=p3udt11440.2 switch=n enabled=y phases=1 Linecode=1P_OH_AL_ACSR_#2_Sparrow_12_47_0_1_1_1_1

New Line.l(r:p3udt14153-p3udt31636) Units=km Length=0.001 bus1=p3udt14153.2 bus2=p3udt31636.2 switch=n enabled=y phases=1 Linecode=1P_OH_AL_ACSR_#2_Sparrow_12_47_0_1_1_1_1

New Line.l(r:p3udt14153-p3udt24922) Units=km Length=0.0395536 bus1=p3udt24922.2 bus2=p3udt14153.2 switch=n enabled=y phases=1 Linecode=1P_OH_AL_ACSR_#2_Sparrow_12_47_0_1_1_1_1

New Line.l(r:p3udt24922-p3udt5802) Units=km Length=0.0197765 bus1=p3udt5802.2 bus2=p3udt24922.2 switch=n enabled=y phases=1 Linecode=1P_OH_AL_ACSR_#2_Sparrow_12_47_0_1_1_1_1

New Line.l(r:p3udt13733-p3udt5802) Units=km Length=0.0197765 bus1=p3udt13733.2 bus2=p3udt5802.2 switch=n enabled=y phases=1 Linecode=1P_OH_AL_ACSR_#2_Sparrow_12_47_0_1_1_1_1

New Line.l(r:p3udt13733-p3udt18732) Units=km Length=0.0593301 bus1=p3udt18732.2 bus2=p3udt13733.2 switch=n enabled=y phases=1 Linecode=1P_OH_AL_ACSR_#2_Sparrow_12_47_0_1_1_1_1

New Line.l(r:p3udt24921-p3udt31635) Units=km Length=0.124027 bus1=p3udt31635.2 bus2=p3udt24921.2 switch=n enabled=y phases=1 Linecode=1P_OH_AL_ACSR_#2_Sparrow_12_47_0_1_1_1_1

New Line.l(r:p3udt18732-p3udt31635)_s0 Units=km Length=0.114362 bus1=p3udt18732.2 bus2=p3udt18732-p3udt31635x.2 switch=n enabled=y phases=1 Linecode=1P_OH_AL_ACSR_#2_Sparrow_12_47_0_1_1_1_1

New Line.l(r:p3udt18732-p3udt31635)_s1 Units=km Length=0.0219079 bus1=p3udt18732-p3udt31635x.2 bus2=p3udt31635.2 switch=n enabled=y phases=1 Linecode=1P_OH_AL_ACSR_#2_Sparrow_12_47_0_1_1_1_1

New Line.l(r:p3udt18732-p3udt6447) Units=km Length=0.0197839 bus1=p3udt6447.2 bus2=p3udt18732.2 switch=n enabled=y phases=1 Linecode=1P_OH_AL_ACSR_#2_Sparrow_12_47_0_1_1_1_1

New Line.l(r:p3udt28328-p3udt6447) Units=km Length=0.07865340000000001 bus1=p3udt28328-p3udt6447x.2 bus2=p3udt6447.2 switch=n enabled=y phases=1 Linecode=1P_OH_AL_ACSR_#2_Sparrow_12_47_0_1_1_1_1

New Line.l(r:p3udt28328-p3udt30210) Units=km Length=0.179511 bus1=p3udt28328-p3udt30210x.3 bus2=p3udt30210.3 switch=n enabled=y phases=1 Linecode=1P_OH_AL_ACSR_#2_Sparrow_12_47_0_1_1_1_1

New Line.l(r:p3udt28819-p3udt8795) Units=km Length=0.156171 bus1=p3udt28819-p3udt8795x.3 bus2=p3udt28819.3 switch=n enabled=y phases=1 Linecode=1P_OH_AL_ACSR_#2_Sparrow_12_47_0_1_1_1_1

New Line.l(r:p3udt19707-p3udt28177) Units=km Length=0.148937 bus1=p3udt19707.1 bus2=p3udt28177.1 switch=n enabled=y phases=1 Linecode=1P_OH_AL_ACSR_#2_Sparrow_12_47_0_1_1_1_1

New Line.l(r:p3udt24666-p3udt4466) Units=km Length=0.0397165 bus1=p3udt4466.1 bus2=p3udt24666.1 switch=n enabled=y phases=1 Linecode=1P_OH_AL_ACSR_#2_Sparrow_12_47_0_1_1_1_1

New Line.l(r:p3udt3062-p3udt4466) Units=km Length=0.22886900000000002 bus1=p3udt3062.1 bus2=p3udt4466.1 switch=n enabled=y phases=1 Linecode=1P_OH_AL_ACSR_#2_Sparrow_12_47_0_1_1_1_1

New Line.l(r:p3udt16947-p3udt3062) Units=km Length=0.183481 bus1=p3udt16947.1 bus2=p3udt3062.1 switch=n enabled=y phases=1 Linecode=1P_OH_AL_ACSR_#2_Sparrow_12_47_0_1_1_1_1

New Line.l(r:p3udt23261-p3udt4468) Units=km Length=0.09953690000000001 bus1=p3udt23261.1 bus2=p3udt4468.1 switch=n enabled=y phases=1 Linecode=1P_OH_AL_ACSR_#2_Sparrow_12_47_0_1_1_1_1

New Line.l(r:p3udt23261-p3udt31216) Units=km Length=0.0796396 bus1=p3udt31216.1 bus2=p3udt23261.1 switch=n enabled=y phases=1 Linecode=1P_OH_AL_ACSR_#2_Sparrow_12_47_0_1_1_1_1

New Line.l(r:p3udt16947-p3udt31216) Units=km Length=0.111217 bus1=p3udt16947.1 bus2=p3udt31216.1 switch=n enabled=y phases=1 Linecode=1P_OH_AL_ACSR_#2_Sparrow_12_47_0_1_1_1_1

New Line.l(r:p3udt15377-p3udt16947) Units=km Length=0.0729501 bus1=p3udt15377.1 bus2=p3udt16947.1 switch=n enabled=y phases=1 Linecode=1P_OH_AL_ACSR_#2_Sparrow_12_47_0_1_1_1_1

New Line.l(r:p3udt15377-p3udt25559) Units=km Length=0.001 bus1=p3udt15377.1 bus2=p3udt25559.1 switch=n enabled=y phases=1 Linecode=1P_OH_AL_ACSR_#2_Sparrow_12_47_0_1_1_1_1

New Line.l(r:p3udt15377-p3udt19386) Units=km Length=0.09698720000000001 bus1=p3udt19386.1 bus2=p3udt15377.1 switch=n enabled=y phases=1 Linecode=1P_OH_AL_ACSR_#2_Sparrow_12_47_0_1_1_1_1

New Line.l(r:p3udt19386-p3udt7661) Units=km Length=0.077586 bus1=p3udt7661.1 bus2=p3udt19386.1 switch=n enabled=y phases=1 Linecode=1P_OH_AL_ACSR_#2_Sparrow_12_47_0_1_1_1_1

New Line.l(r:p3udt22445-p3udt6449)_s0 Units=km Length=0.0708617 bus1=p3udt22445.1 bus2=p3udt22445-p3udt6449x.1 switch=n enabled=y phases=1 Linecode=1P_OH_AL_ACSR_#2_Sparrow_12_47_0_1_1_1_1

New Line.l(r:p3udt22445-p3udt6449)_s1 Units=km Length=0.0783519 bus1=p3udt22445-p3udt6449x.1 bus2=p3udt6449.1 switch=n enabled=y phases=1 Linecode=1P_OH_AL_ACSR_#2_Sparrow_12_47_0_1_1_1_1

New Line.l(r:p3udt22445-p3udt7661) Units=km Length=0.0695368 bus1=p3udt7661.1 bus2=p3udt22445.1 switch=n enabled=y phases=1 Linecode=1P_OH_AL_ACSR_#2_Sparrow_12_47_0_1_1_1_1

New Line.l(r:p3udt7661-p3udt8222)_s0 Units=km Length=0.001 bus1=p3udt8222.1 bus2=p3udt7661-p3udt8222xx.1 switch=n enabled=y phases=1 Linecode=1P_OH_AL_ACSR_#2_Sparrow_12_47_0_1_1_1_1

New Line.l(r:p3udt7661-p3udt8222)_s1 Units=km Length=0.001 bus1=p3udt7661-p3udt8222xx.1 bus2=p3udt7661-p3udt8222x.1 switch=n enabled=y phases=1 Linecode=1P_OH_AL_ACSR_#2_Sparrow_12_47_0_1_1_1_1

New Line.l(r:p3udt7661-p3udt8222)_s2 Units=km Length=0.259863 bus1=p3udt7661-p3udt8222x.1 bus2=p3udt7661.1 switch=n enabled=y phases=1 Linecode=1P_OH_AL_ACSR_#2_Sparrow_12_47_0_1_1_1_1

New Line.l(r:p3udt29429-p3udt8222)_s0 Units=km Length=0.13705900000000001 bus1=p3udt29429.1 bus2=p3udt29429-p3udt8222x.1 switch=n enabled=y phases=1 Linecode=1P_OH_AL_ACSR_#2_Sparrow_12_47_0_1_1_1_1

New Line.l(r:p3udt29429-p3udt8222)_s1 Units=km Length=0.016256 bus1=p3udt29429-p3udt8222x.1 bus2=p3udt8222.1 switch=n enabled=y phases=1 Linecode=1P_OH_AL_ACSR_#2_Sparrow_12_47_0_1_1_1_1

New Line.l(r:p3udt11441-p3udt11925) Units=km Length=0.0782976 bus1=p3udt11925.1 bus2=p3udt11441.1 switch=n enabled=y phases=1 Linecode=1P_OH_AL_ACSR_#2_Sparrow_12_47_0_1_1_1_1

New Line.l(r:p3udt29428-p3udt3063)_s0 Units=km Length=0.16007 bus1=p3udt3063.1 bus2=p3udt29428-p3udt3063x.1 switch=n enabled=y phases=1 Linecode=1P_OH_AL_ACSR_#2_Sparrow_12_47_0_1_1_1_1

New Line.l(r:p3udt29428-p3udt3063)_s1 Units=km Length=0.0631526 bus1=p3udt29428-p3udt3063x.1 bus2=p3udt29428.1 switch=n enabled=y phases=1 Linecode=1P_OH_AL_ACSR_#2_Sparrow_12_47_0_1_1_1_1

New Line.l(r:p3udt24667-p3udt3063) Units=km Length=0.13387700000000002 bus1=p3udt24667.1 bus2=p3udt3063.1 switch=n enabled=y phases=1 Linecode=1P_OH_AL_ACSR_#2_Sparrow_12_47_0_1_1_1_1

New Line.l(r:p3udt24667-p3udt29153) Units=km Length=0.17821300000000004 bus1=p3udt24667.1 bus2=p3udt29153.1 switch=n enabled=y phases=1 Linecode=1P_OH_AL_ACSR_#2_Sparrow_12_47_0_1_1_1_1

New Line.l(r:p3udt19044-p3udt24667) Units=km Length=0.115713 bus1=p3udt19044.1 bus2=p3udt24667.1 switch=n enabled=y phases=1 Linecode=1P_OH_AL_ACSR_#2_Sparrow_12_47_0_1_1_1_1

New Line.l(r:p3udt19044-p3udt23721) Units=km Length=0.096592 bus1=p3udt23721.1 bus2=p3udt19044.1 switch=n enabled=y phases=1 Linecode=1P_OH_AL_ACSR_#2_Sparrow_12_47_0_1_1_1_1

New Line.l(r:p3udt11925-p3udt23721) Units=km Length=0.214304 bus1=p3udt11925.1 bus2=p3udt23721.1 switch=n enabled=y phases=1 Linecode=1P_OH_AL_ACSR_#2_Sparrow_12_47_0_1_1_1_1

New Line.l(r:p3udt11925-p3udt856)_s0 Units=km Length=0.19921800000000003 bus1=p3udt856.1 bus2=p3udt11925-p3udt856x.1 switch=n enabled=y phases=1 Linecode=1P_OH_AL_ACSR_#2_Sparrow_12_47_0_1_1_1_1

New Line.l(r:p3udt11925-p3udt856)_s1 Units=km Length=0.0111334 bus1=p3udt11925-p3udt856x.1 bus2=p3udt11925.1 switch=n enabled=y phases=1 Linecode=1P_OH_AL_ACSR_#2_Sparrow_12_47_0_1_1_1_1

New Line.l(r:p3udt21913-p3udt856)_s0 Units=km Length=0.167668 bus1=p3udt21913.1 bus2=p3udt21913-p3udt856x.1 switch=n enabled=y phases=1 Linecode=1P_OH_AL_ACSR_#2_Sparrow_12_47_0_1_1_1_1

New Line.l(r:p3udt21913-p3udt856)_s1 Units=km Length=0.123443 bus1=p3udt21913-p3udt856x.1 bus2=p3udt856.1 switch=n enabled=y phases=1 Linecode=1P_OH_AL_ACSR_#2_Sparrow_12_47_0_1_1_1_1

New Line.l(r:p3udt17314-p3udt20894) Units=km Length=0.071887 bus1=p3udt17314.1 bus2=p3udt20894.1 switch=n enabled=y phases=1 Linecode=1P_OH_AL_ACSR_#2_Sparrow_12_47_0_1_1_1_1

New Line.l(r:p3udt17314-p3udt21913) Units=km Length=0.085398 bus1=p3udt21913.1 bus2=p3udt17314.1 switch=n enabled=y phases=1 Linecode=1P_OH_AL_ACSR_#2_Sparrow_12_47_0_1_1_1_1

New Line.l(r:p3udt16946-p3udt21913) Units=km Length=0.0238383 bus1=p3udt16946.1 bus2=p3udt21913.1 switch=n enabled=y phases=1 Linecode=1P_OH_AL_ACSR_#2_Sparrow_12_47_0_1_1_1_1

New Line.l(r:p3udt14979-p3udt16946) Units=km Length=0.053116100000000006 bus1=p3udt14979.1 bus2=p3udt16946.1 switch=n enabled=y phases=1 Linecode=1P_OH_AL_ACSR_#2_Sparrow_12_47_0_1_1_1_1

New Line.l(r:p3udt14979-p3udt29429)_s0 Units=km Length=0.150351 bus1=p3udt29429.1 bus2=p3udt14979-p3udt29429x.1 switch=n enabled=y phases=1 Linecode=1P_OH_AL_ACSR_#2_Sparrow_12_47_0_1_1_1_1

New Line.l(r:p3udt14979-p3udt29429)_s1 Units=km Length=0.0136002 bus1=p3udt14979-p3udt29429x.1 bus2=p3udt14979.1 switch=n enabled=y phases=1 Linecode=1P_OH_AL_ACSR_#2_Sparrow_12_47_0_1_1_1_1

New Line.l(r:p3udt28817-p3udt29429) Units=km Length=0.0925173 bus1=p3udt28817.1 bus2=p3udt29429.1 switch=n enabled=y phases=1 Linecode=1P_OH_AL_ACSR_#2_Sparrow_12_47_0_1_1_1_1

New Line.l(r:p3udt19707-p3udt28817) Units=km Length=0.147809 bus1=p3udt19707.1 bus2=p3udt28817.1 switch=n enabled=y phases=1 Linecode=1P_OH_AL_ACSR_#2_Sparrow_12_47_0_1_1_1_1

New Line.l(r:p3udt19707-p3udt20018) Units=km Length=1.00021 bus1=p3udt19707-p3udt20018x.1 bus2=p3udt19707.1 switch=n enabled=y phases=1 Linecode=1P_OH_AL_ACSR_#2_Sparrow_12_47_0_1_1_1_1

New Line.l(r:p3udt14154-p3udt28818) Units=km Length=0.577596 bus1=p3udt28818.2 bus2=p3udt14154.2 switch=n enabled=y phases=1 Linecode=1P_OH_AL_ACSR_#2_Sparrow_12_47_0_1_1_1_1

New Line.l(r:p3udt18733-p3udt19708) Units=km Length=0.0354645 bus1=p3udt18733.2 bus2=p3udt19708.2 switch=n enabled=y phases=1 Linecode=1P_OH_AL_ACSR_#2_Sparrow_12_47_0_1_1_1_1

New Line.l(r:p3udt2346-p3udt6450) Units=km Length=0.122495 bus1=p3udt2346.2 bus2=p3udt6450.2 switch=n enabled=y phases=1 Linecode=1P_OH_AL_ACSR_#2_Sparrow_12_47_0_1_1_1_1

New Line.l(r:p3udt14980-p3udt3772) Units=km Length=0.313851 bus1=p3udt14980.2 bus2=p3udt3772.2 switch=n enabled=y phases=1 Linecode=1P_OH_AL_ACSR_#2_Sparrow_12_47_0_1_1_1_1

New Line.l(r:p3udt14980-p3udt2346) Units=km Length=0.241773 bus1=p3udt2346.2 bus2=p3udt14980.2 switch=n enabled=y phases=1 Linecode=1P_OH_AL_ACSR_#2_Sparrow_12_47_0_1_1_1_1

New Line.l(r:p3udt13321-p3udt2346) Units=km Length=0.10890300000000001 bus1=p3udt13321.2 bus2=p3udt2346.2 switch=n enabled=y phases=1 Linecode=1P_OH_AL_ACSR_#2_Sparrow_12_47_0_1_1_1_1

New Line.l(r:p3udt13321-p3udt2344) Units=km Length=0.0577652 bus1=p3udt2344.2 bus2=p3udt13321.2 switch=n enabled=y phases=1 Linecode=1P_OH_AL_ACSR_#2_Sparrow_12_47_0_1_1_1_1

New Line.l(r:p3udt2344-p3udt25139) Units=km Length=0.001 bus1=p3udt2344.2 bus2=p3udt25139.2 switch=n enabled=y phases=1 Linecode=1P_OH_AL_ACSR_#2_Sparrow_12_47_0_1_1_1_1

New Line.l(r:p3udt2344-p3udt27667) Units=km Length=0.017729 bus1=p3udt27667.2 bus2=p3udt2344.2 switch=n enabled=y phases=1 Linecode=1P_OH_AL_ACSR_#2_Sparrow_12_47_0_1_1_1_1

New Line.l(r:p3udt18733-p3udt27667) Units=km Length=0.0531869 bus1=p3udt18733.2 bus2=p3udt27667.2 switch=n enabled=y phases=1 Linecode=1P_OH_AL_ACSR_#2_Sparrow_12_47_0_1_1_1_1

New Line.l(r:p3udt18733-p3udt28818)_s0 Units=km Length=0.150005 bus1=p3udt28818.2 bus2=p3udt18733-p3udt28818x.2 switch=n enabled=y phases=1 Linecode=1P_OH_AL_ACSR_#2_Sparrow_12_47_0_1_1_1_1

New Line.l(r:p3udt18733-p3udt28818)_s1 Units=km Length=0.107053 bus1=p3udt18733-p3udt28818x.2 bus2=p3udt18733.2 switch=n enabled=y phases=1 Linecode=1P_OH_AL_ACSR_#2_Sparrow_12_47_0_1_1_1_1

New Line.l(r:p3udt20018-p3udt28818) Units=km Length=0.32726800000000006 bus1=p3udt20018-p3udt28818x.2 bus2=p3udt28818.2 switch=n enabled=y phases=1 Linecode=1P_OH_AL_ACSR_#2_Sparrow_12_47_0_1_1_1_1

New Line.l(r:p3udt14575-p3udt20018)_s0 Units=km Length=0.118116 bus1=p3udt14575.1.2.3 bus2=p3udt14575-p3udt20018x.1.2.3 switch=n enabled=y phases=3 Linecode=3P_OH_AL_ACSR_4/0_Penguin_12_47_0_3_3_3_3

New Line.l(r:p3udt14575-p3udt20018)_s1 Units=km Length=0.53601 bus1=p3udt14575-p3udt20018x.1.2.3 bus2=p3udt20018.1.2.3 switch=n enabled=y phases=3 Linecode=3P_OH_AL_ACSR_4/0_Penguin_12_47_0_3_3_3_3

New Line.l(r:p3udt14575-p3uhs27_1247) Units=km Length=0.0753399 bus1=p3udt14575-p3uhs27_1247x.1.2.3 bus2=p3udt14575.1.2.3 switch=n enabled=y phases=3 Linecode=3P_OH_AL_ACSR_4/0_Penguin_12_47_0_3_3_3_3

New Line.l(r:p3udt28328lv-p3ulv60044) Units=km Length=0.0739431 bus1=p3udt28328lv.1.2.3 bus2=p3ulv60044.1.2.3 switch=n enabled=y phases=3 Linecode=3P_UG_AL_750kcmil_25_0_416_0_3_3_3_3

New Line.l(r:p3udt17711-p3udt28328) Units=km Length=0.039249000000000006 bus1=p3udt17711.1.2.3 bus2=p3udt28328.1.2.3 switch=n enabled=y phases=3 Linecode=3P_OH_AL_ACSR_4/0_Penguin_12_47_0_3_3_3_3

New Line.l(r:p3udt1611-p3udt17711) Units=km Length=0.0784974 bus1=p3udt1611.1.2.3 bus2=p3udt17711.1.2.3 switch=n enabled=y phases=3 Linecode=3P_OH_AL_ACSR_4/0_Penguin_12_47_0_3_3_3_3

New Line.l(r:p3udt1611-p3udt31340) Units=km Length=0.039249000000000006 bus1=p3udt31340.1.2.3 bus2=p3udt1611.1.2.3 switch=n enabled=y phases=3 Linecode=3P_OH_AL_ACSR_4/0_Penguin_12_47_0_3_3_3_3

New Line.l(r:p3udt10916-p3udt31340) Units=km Length=0.0588836 bus1=p3udt10916.1.2.3 bus2=p3udt31340.1.2.3 switch=n enabled=y phases=3 Linecode=3P_OH_AL_ACSR_4/0_Penguin_12_47_0_3_3_3_3

New Line.l(r:p3udt10916-p3udt8795) Units=km Length=0.137382 bus1=p3udt8795.1.2.3 bus2=p3udt10916.1.2.3 switch=n enabled=y phases=3 Linecode=3P_OH_AL_ACSR_4/0_Penguin_12_47_0_3_3_3_3

New Line.l(r:p3udt20018-p3udt8795)_s0 Units=km Length=0.299279 bus1=p3udt20018.1.2.3 bus2=p3udt20018-p3udt8795x.1.2.3 switch=n enabled=y phases=3 Linecode=3P_OH_AL_ACSR_4/0_Penguin_12_47_0_3_3_3_3

New Line.l(r:p3udt20018-p3udt8795)_s1 Units=km Length=0.105739 bus1=p3udt20018-p3udt8795x.1.2.3 bus2=p3udt8795.1.2.3 switch=n enabled=y phases=3 Linecode=3P_OH_AL_ACSR_4/0_Penguin_12_47_0_3_3_3_3

New Line.padswitch(r:p3udt10917-p3udt20017)p3u_206440 Units=km Length=0.001 bus1=p3udt20017.3 bus2=p3udt10917-p3udt20017xx.3 switch=y enabled=y phases=1 Linecode=padswitch_1_1_1_1

New Line.padswitch(r:p3udt10917-p3udt20017)p3u_206441 Units=km Length=0.001 bus1=p3udt10917-p3udt20017x.3 bus2=p3udt10917.3 switch=y enabled=y phases=1 Linecode=padswitch_1_3_1_1_1

New Line.padswitch(r:p3udt20017-p3udt21912)p3u_206442 Units=km Length=0.001 bus1=p3udt21912.3 bus2=p3udt20017-p3udt21912xx.3 switch=y enabled=y phases=1 Linecode=padswitch_1_3_1_0_1_1

New Line.padswitch(r:p3udt20017-p3udt21912)p3u_206443 Units=km Length=0.001 bus1=p3udt20017-p3udt21912x.3 bus2=p3udt20017.3 switch=y enabled=y phases=1 Linecode=padswitch_1_1_1_1

New Line.fuse(r:p3udt28819-p3udt8795)p3u_207694 Units=km Length=0.001 bus1=p3udt8795.3 bus2=p3udt28819-p3udt8795x.3 switch=n enabled=y phases=1 Linecode=fuse_1_1_1_1

New Fuse.Fuse_fuse(r:p3udt28819-p3udt8795)p3u_207694 monitoredobj=Line.fuse(r:p3udt28819-p3udt8795)p3u_207694 enabled=y ratedcurrent=100.0

New Line.fuse(r:p3udt10916-p3udt12438)p3u_207875 Units=km Length=0.001 bus1=p3udt10916.1 bus2=p3udt10916-p3udt12438x.1 switch=n enabled=y phases=1 Linecode=fuse_1_1_1_1

New Fuse.Fuse_fuse(r:p3udt10916-p3udt12438)p3u_207875 monitoredobj=Line.fuse(r:p3udt10916-p3udt12438)p3u_207875 enabled=y ratedcurrent=100.0

New Line.fuse(r:p3udt20018-p3udt3771)p3u_208759 Units=km Length=0.001 bus1=p3udt20018.3 bus2=p3udt20018-p3udt3771x.3 switch=n enabled=y phases=1 Linecode=fuse_1_1_1_1

New Fuse.Fuse_fuse(r:p3udt20018-p3udt3771)p3u_208759 monitoredobj=Line.fuse(r:p3udt20018-p3udt3771)p3u_208759 enabled=y ratedcurrent=100.0

New Line.fuse(r:p3udt19707-p3udt20018)p3u_208760 Units=km Length=0.001 bus1=p3udt20018.1 bus2=p3udt19707-p3udt20018x.1 switch=n enabled=y phases=1 Linecode=fuse_1_1_1_1

New Fuse.Fuse_fuse(r:p3udt19707-p3udt20018)p3u_208760 monitoredobj=Line.fuse(r:p3udt19707-p3udt20018)p3u_208760 enabled=y ratedcurrent=100.0

New Line.fuse(r:p3udt20018-p3udt28818)p3u_208761 Units=km Length=0.001 bus1=p3udt20018.2 bus2=p3udt20018-p3udt28818x.2 switch=n enabled=y phases=1 Linecode=fuse_1_1_1_1

New Fuse.Fuse_fuse(r:p3udt20018-p3udt28818)p3u_208761 monitoredobj=Line.fuse(r:p3udt20018-p3udt28818)p3u_208761 enabled=y ratedcurrent=100.0

New Line.fuse(r:p3udt28328-p3udt6447)p3u_209621 Units=km Length=0.001 bus1=p3udt28328.2 bus2=p3udt28328-p3udt6447x.2 switch=n enabled=y phases=1 Linecode=fuse_1_7_1_1_1

New Fuse.Fuse_fuse(r:p3udt28328-p3udt6447)p3u_209621 monitoredobj=Line.fuse(r:p3udt28328-p3udt6447)p3u_209621 enabled=y ratedcurrent=100.0

New Line.fuse(r:p3udt28328-p3udt30210)p3u_209622 Units=km Length=0.001 bus1=p3udt28328.3 bus2=p3udt28328-p3udt30210x.3 switch=n enabled=y phases=1 Linecode=fuse_1_7_1_4_1_1

New Fuse.Fuse_fuse(r:p3udt28328-p3udt30210)p3u_209622 monitoredobj=Line.fuse(r:p3udt28328-p3udt30210)p3u_209622 enabled=y ratedcurrent=100.0
