Clear

New Circuit.substation_p3uhs28_69 bus1=p3uhs28_69 pu=1.0 basekV=69.0 R1=1e-05 X1=1e-05 R0=1e-05 X0=1e-05

Redirect Transformers.dss
Redirect p3uhs28_1247--p3udt23967/Transformers.dss
Redirect Regulators.dss
Redirect p3uhs28_1247--p3udt23967/Loads.dss
Redirect LineCodes.dss
Redirect p3uhs28_1247--p3udt23967/LineCodes.dss
Redirect Lines.dss
Redirect p3uhs28_1247--p3udt23967/Lines.dss
Redirect p3uhs28_1247--p3udt23967/Capacitors.dss

Set Voltagebases=[0.48, 12.47, 69.0]

Calcvoltagebases

Buscoords Buscoords.dss

Solve
