New Capacitor.p3uc142 Bus1=p3udt858 phases=3 Kv=12.47 conn=Wye Kvar=300.0

New CapControl.p3uc142 Capacitor=p3uc142 Element=Line.l(r:p3udt16549-p3udt858) Terminal=1 delay=100.0 Type=voltage Vmin=120.5 Vmax=125.0 Ptratio=59.99631547328862 Ctratio=100.0

New Capacitor.p3uc143 Bus1=p3udt17315 phases=3 Kv=12.47 conn=Wye Kvar=300.0

New CapControl.p3uc143 Capacitor=p3uc143 Element=Line.l(r:p3udt17315-p3udt22446) Terminal=1 delay=100.0 Type=voltage Vmin=120.5 Vmax=125.0 Ptratio=59.99631547328862 Ctratio=100.0
