New RegControl.sb6_p3uhs2_1247_reg_162 transformer=sb6_p3uhs2_1247_trans_162 winding=2 ptratio=60.0 band=1.9919999999999998 vreg = 123.60000000000001

New RegControl.sb6_p3uhs2_1247_reg_163 transformer=sb6_p3uhs2_1247_trans_163 winding=2 ptratio=60.0 band=1.9919999999999998 vreg = 123.60000000000001
