New Line.l(r:p3udt1558lv-p3ulv1742) Units=km Length=0.0180277 bus1=p3udt1558lv.1.2 bus2=p3ulv1742.1.2 switch=n enabled=y phases=2 Linecode=1P_UG_AL_1/0_Brenau_0_416_0_2_2_2_2

New Line.l(r:p3udt1562lv-p3ulv1746) Units=km Length=0.0161245 bus1=p3udt1562lv.1.2 bus2=p3ulv1746.1.2 switch=n enabled=y phases=2 Linecode=1P_OH_AL_2/0_Rucina_0_416_0_2_2_2_2

New Line.l(r:p3udt1562lv-p3ulv45540) Units=km Length=0.0151559 bus1=p3udt1562lv.1.2 bus2=p3ulv45540.1.2 switch=n enabled=y phases=2 Linecode=1P_OH_AL_2/0_Rucina_0_416_0_2_2_2_2

New Line.l(r:p3udm8041-p3ulv2541) Units=km Length=0.022888500000000003 bus1=p3udm8041.1.2 bus2=p3ulv2541.1.2 switch=n enabled=y phases=2 Linecode=1P_UG_AL_1/0_Brenau_0_416_0_2_2_2_2

New Line.l(r:p3udm8041-p3ulv13564) Units=km Length=0.0179353 bus1=p3udm8041.1.2 bus2=p3ulv13564.1.2 switch=n enabled=y phases=2 Linecode=1P_UG_AL_1/0_Brenau_0_416_0_2_2_2_2

New Line.l(r:p3udm8041-p3udt2299lv) Units=km Length=0.0365941 bus1=p3udt2299lv.1.2 bus2=p3udm8041.1.2 switch=n enabled=y phases=2 Linecode=1P_UG_AL_4/0_Sweetbriar_0_416_0_2_2_2_2

New Line.l(r:p3udm8042-p3ulv7339) Units=km Length=0.0152665 bus1=p3udm8042.1.2 bus2=p3ulv7339.1.2 switch=n enabled=y phases=2 Linecode=1P_UG_AL_1/0_Brenau_0_416_0_2_2_2_2

New Line.l(r:p3udm8044-p3ulv23667) Units=km Length=0.0159809 bus1=p3udm8044.1.2 bus2=p3ulv23667.1.2 switch=n enabled=y phases=2 Linecode=1P_UG_AL_1/0_Brenau_0_416_0_2_2_2_2

New Line.l(r:p3udm8042-p3udm8044) Units=km Length=0.00875315 bus1=p3udm8042.1.2 bus2=p3udm8044.1.2 switch=n enabled=y phases=2 Linecode=1P_UG_AL_1/0_Brenau_0_416_0_2_2_2_2

New Line.l(r:p3udm8042-p3udt2299lv) Units=km Length=0.0624406 bus1=p3udt2299lv.1.2 bus2=p3udm8042.1.2 switch=n enabled=y phases=2 Linecode=1P_UG_AL_4/0_Sweetbriar_0_416_0_2_2_2_2

New Line.l(r:p3udt2301lv-p3ulv2543) Units=km Length=0.00822001 bus1=p3udt2301lv.1.2 bus2=p3ulv2543.1.2 switch=n enabled=y phases=2 Linecode=1P_OH_AL_2/0_Rucina_0_416_0_2_2_2_2

New Line.l(r:p3udm8049-p3ulv10430) Units=km Length=0.00883906 bus1=p3udm8049.1.2 bus2=p3ulv10430.1.2 switch=n enabled=y phases=2 Linecode=1P_OH_AL_2/0_Rucina_0_416_0_2_2_2_2

New Line.l(r:p3udm8053-p3ulv80749) Units=km Length=0.00858015 bus1=p3udm8053.1.2 bus2=p3ulv80749.1.2 switch=n enabled=y phases=2 Linecode=1P_OH_AL_2/0_Rucina_0_416_0_2_2_2_2

New Line.l(r:p3udm8049-p3udm8053) Units=km Length=0.0190635 bus1=p3udm8049.1.2 bus2=p3udm8053.1.2 switch=n enabled=y phases=2 Linecode=1P_OH_AL_2/0_Rucina_0_416_0_2_2_2_2

New Line.l(r:p3udm8049-p3udt2301lv) Units=km Length=0.0190499 bus1=p3udt2301lv.1.2 bus2=p3udm8049.1.2 switch=n enabled=y phases=2 Linecode=1P_OH_AL_2/0_Rucina_0_416_0_2_2_2_2

New Line.l(r:p3udm8050-p3ulv51597) Units=km Length=0.00880911 bus1=p3udm8050.1.2 bus2=p3ulv51597.1.2 switch=n enabled=y phases=2 Linecode=1P_OH_AL_2/0_Rucina_0_416_0_2_2_2_2

New Line.l(r:p3udm8052-p3ulv70021) Units=km Length=0.008588950000000001 bus1=p3udm8052.1.2 bus2=p3ulv70021.1.2 switch=n enabled=y phases=2 Linecode=1P_OH_AL_2/0_Rucina_0_416_0_2_2_2_2

New Line.l(r:p3udm8051-p3ulv64593) Units=km Length=0.00831428 bus1=p3udm8051.1.2 bus2=p3ulv64593.1.2 switch=n enabled=y phases=2 Linecode=1P_OH_AL_2/0_Rucina_0_416_0_2_2_2_2

New Line.l(r:p3udm8051-p3udm8052) Units=km Length=0.0190635 bus1=p3udm8052.1.2 bus2=p3udm8051.1.2 switch=n enabled=y phases=2 Linecode=1P_OH_AL_2/0_Rucina_0_416_0_2_2_2_2

New Line.l(r:p3udm8050-p3udm8052) Units=km Length=0.0190586 bus1=p3udm8050.1.2 bus2=p3udm8052.1.2 switch=n enabled=y phases=2 Linecode=1P_OH_AL_2/0_Rucina_0_416_0_2_2_2_2

New Line.l(r:p3udm8050-p3udt2301lv) Units=km Length=0.0190586 bus1=p3udt2301lv.1.2 bus2=p3udm8050.1.2 switch=n enabled=y phases=2 Linecode=1P_OH_AL_2/0_Rucina_0_416_0_2_2_2_2

New Line.l(r:p3udt2303lv-p3ulv2545) Units=km Length=0.0167527 bus1=p3udt2303lv.1.2 bus2=p3ulv2545.1.2 switch=n enabled=y phases=2 Linecode=1P_OH_AL_2/0_Rucina_0_416_0_2_2_2_2

New Line.l(r:p3udm8057-p3ulv2546) Units=km Length=0.014290100000000002 bus1=p3udm8057.1.2 bus2=p3ulv2546.1.2 switch=n enabled=y phases=2 Linecode=1P_UG_AL_1/0_Brenau_0_416_0_2_2_2_2

New Line.l(r:p3udm8060-p3ulv70835) Units=km Length=0.0171635 bus1=p3udm8060.1.2 bus2=p3ulv70835.1.2 switch=n enabled=y phases=2 Linecode=1P_UG_AL_1/0_Brenau_0_416_0_2_2_2_2

New Line.l(r:p3udm8057-p3udm8060) Units=km Length=0.0199076 bus1=p3udm8057.1.2 bus2=p3udm8060.1.2 switch=n enabled=y phases=2 Linecode=1P_UG_AL_1/0_Brenau_0_416_0_2_2_2_2

New Line.l(r:p3udm8057-p3udt2304lv) Units=km Length=0.0294447 bus1=p3udt2304lv.1.2 bus2=p3udm8057.1.2 switch=n enabled=y phases=2 Linecode=1P_UG_AL_4/0_Sweetbriar_0_416_0_2_2_2_2

New Line.l(r:p3udm8059-p3ulv65365) Units=km Length=0.0148501 bus1=p3udm8059.1.2 bus2=p3ulv65365.1.2 switch=n enabled=y phases=2 Linecode=1P_UG_AL_1/0_Brenau_0_416_0_2_2_2_2

New Line.l(r:p3udm8058-p3ulv53928) Units=km Length=0.018076800000000004 bus1=p3udm8058.1.2 bus2=p3ulv53928.1.2 switch=n enabled=y phases=2 Linecode=1P_UG_AL_1/0_Brenau_0_416_0_2_2_2_2

New Line.l(r:p3udm8058-p3udm8059) Units=km Length=0.00878934 bus1=p3udm8059.1.2 bus2=p3udm8058.1.2 switch=n enabled=y phases=2 Linecode=1P_UG_AL_1/0_Brenau_0_416_0_2_2_2_2

New Line.l(r:p3udm8059-p3udt2304lv) Units=km Length=0.015616 bus1=p3udt2304lv.1.2 bus2=p3udm8059.1.2 switch=n enabled=y phases=2 Linecode=1P_UG_AL_4/0_Sweetbriar_0_416_0_2_2_2_2

New Line.l(r:p3udt3735lv-p3ulv4145) Units=km Length=0.014855100000000001 bus1=p3udt3735lv.1.2 bus2=p3ulv4145.1.2 switch=n enabled=y phases=2 Linecode=1P_UG_AL_1/0_Brenau_0_416_0_2_2_2_2

New Line.l(r:p3udt3735lv-p3ulv54714) Units=km Length=0.012859400000000002 bus1=p3udt3735lv.1.2 bus2=p3ulv54714.1.2 switch=n enabled=y phases=2 Linecode=1P_UG_AL_1/0_Brenau_0_416_0_2_2_2_2

New Line.l(r:p3udm12987-p3ulv70833) Units=km Length=0.0155524 bus1=p3udm12987.1.2 bus2=p3ulv70833.1.2 switch=n enabled=y phases=2 Linecode=1P_UG_AL_1/0_Brenau_0_416_0_2_2_2_2

New Line.l(r:p3udm12987-p3udt3735lv) Units=km Length=0.0199165 bus1=p3udt3735lv.1.2 bus2=p3udm12987.1.2 switch=n enabled=y phases=2 Linecode=1P_UG_AL_1/0_Brenau_0_416_0_2_2_2_2

New Line.l(r:p3udm15339-p3ulv4911) Units=km Length=0.0105789 bus1=p3udm15339.1.2 bus2=p3ulv4911.1.2 switch=n enabled=y phases=2 Linecode=1P_OH_AL_2/0_Rucina_0_416_0_2_2_2_2

New Line.l(r:p3udm15339-p3ulv63847) Units=km Length=0.013899 bus1=p3udm15339.1.2 bus2=p3ulv63847.1.2 switch=n enabled=y phases=2 Linecode=1P_OH_AL_2/0_Rucina_0_416_0_2_2_2_2

New Line.l(r:p3udm15339-p3udt4418lv) Units=km Length=0.0155632 bus1=p3udt4418lv.1.2 bus2=p3udm15339.1.2 switch=n enabled=y phases=2 Linecode=1P_OH_AL_2/0_Rucina_0_416_0_2_2_2_2

New Line.l(r:p3udm15340-p3ulv18262) Units=km Length=0.0119364 bus1=p3udm15340.1.2 bus2=p3ulv18262.1.2 switch=n enabled=y phases=2 Linecode=1P_OH_AL_2/0_Rucina_0_416_0_2_2_2_2

New Line.l(r:p3udm15340-p3udt4418lv) Units=km Length=0.0155632 bus1=p3udt4418lv.1.2 bus2=p3udm15340.1.2 switch=n enabled=y phases=2 Linecode=1P_OH_AL_2/0_Rucina_0_416_0_2_2_2_2

New Line.l(r:p3udt4419lv-p3ulv4912) Units=km Length=0.024870100000000003 bus1=p3udt4419lv.1.2 bus2=p3ulv4912.1.2 switch=n enabled=y phases=2 Linecode=1P_UG_AL_1/0_Brenau_0_416_0_2_2_2_2

New Line.l(r:p3udm15343-p3ulv24521) Units=km Length=0.0212304 bus1=p3udm15343.1.2 bus2=p3ulv24521.1.2 switch=n enabled=y phases=2 Linecode=1P_UG_AL_1/0_Brenau_0_416_0_2_2_2_2

New Line.l(r:p3udm15343-p3udt4419lv) Units=km Length=0.00933023 bus1=p3udt4419lv.1.2 bus2=p3udm15343.1.2 switch=n enabled=y phases=2 Linecode=1P_UG_AL_1/0_Brenau_0_416_0_2_2_2_2

New Line.l(r:p3udm15344-p3ulv29933) Units=km Length=0.0633106 bus1=p3udm15344.1.2 bus2=p3ulv29933.1.2 switch=n enabled=y phases=2 Linecode=1P_UG_AL_1/0_Brenau_0_416_0_2_2_2_2

New Line.l(r:p3udm15344-p3udt4419lv) Units=km Length=0.0194901 bus1=p3udt4419lv.1.2 bus2=p3udm15344.1.2 switch=n enabled=y phases=2 Linecode=1P_UG_AL_1/0_Brenau_0_416_0_2_2_2_2

New Line.l(r:p3udt5116lv-p3ulv52392) Units=km Length=0.0164803 bus1=p3udt5116lv.1.2 bus2=p3ulv52392.1.2 switch=n enabled=y phases=2 Linecode=1P_UG_AL_1/0_Brenau_0_416_0_2_2_2_2

New Line.l(r:p3udm17677-p3ulv5737) Units=km Length=0.013924500000000001 bus1=p3udm17677.1.2 bus2=p3ulv5737.1.2 switch=n enabled=y phases=2 Linecode=1P_UG_AL_1/0_Brenau_0_416_0_2_2_2_2

New Line.l(r:p3udm17677-p3ulv8140) Units=km Length=0.0163124 bus1=p3udm17677.1.2 bus2=p3ulv8140.1.2 switch=n enabled=y phases=2 Linecode=1P_UG_AL_1/0_Brenau_0_416_0_2_2_2_2

New Line.l(r:p3udm17680-p3ulv63108) Units=km Length=0.0161908 bus1=p3udm17680.1.2 bus2=p3ulv63108.1.2 switch=n enabled=y phases=2 Linecode=1P_UG_AL_1/0_Brenau_0_416_0_2_2_2_2

New Line.l(r:p3udm17677-p3udm17680) Units=km Length=0.00991879 bus1=p3udm17677.1.2 bus2=p3udm17680.1.2 switch=n enabled=y phases=2 Linecode=1P_UG_AL_1/0_Brenau_0_416_0_2_2_2_2

New Line.l(r:p3udm17677-p3udt5116lv) Units=km Length=0.00992363 bus1=p3udt5116lv.1.2 bus2=p3udm17677.1.2 switch=n enabled=y phases=2 Linecode=1P_UG_AL_4/0_Sweetbriar_0_416_0_2_2_2_2

New Line.l(r:p3udm17681-p3ulv75334) Units=km Length=0.0228416 bus1=p3udm17681.1.2 bus2=p3ulv75334.1.2 switch=n enabled=y phases=2 Linecode=1P_UG_AL_1/0_Brenau_0_416_0_2_2_2_2

New Line.l(r:p3udm17681-p3udt5116lv) Units=km Length=0.0198473 bus1=p3udt5116lv.1.2 bus2=p3udm17681.1.2 switch=n enabled=y phases=2 Linecode=1P_UG_AL_1/0_Brenau_0_416_0_2_2_2_2

New Line.l(r:p3udm19838-p3ulv6526) Units=km Length=0.0197112 bus1=p3udm19838.1.2 bus2=p3ulv6526.1.2 switch=n enabled=y phases=2 Linecode=1P_UG_AL_1/0_Brenau_0_416_0_2_2_2_2

New Line.l(r:p3udm19838-p3udt5759lv) Units=km Length=0.027044800000000004 bus1=p3udt5759lv.1.2 bus2=p3udm19838.1.2 switch=n enabled=y phases=2 Linecode=1P_UG_AL_1/0_Brenau_0_416_0_2_2_2_2

New Line.l(r:p3udm19840-p3ulv66139) Units=km Length=0.0222163 bus1=p3udm19840.1.2 bus2=p3ulv66139.1.2 switch=n enabled=y phases=2 Linecode=1P_UG_AL_1/0_Brenau_0_416_0_2_2_2_2

New Line.l(r:p3udm19839-p3ulv47081) Units=km Length=0.0195783 bus1=p3udm19839.1.2 bus2=p3ulv47081.1.2 switch=n enabled=y phases=2 Linecode=1P_UG_AL_2/0_Converse_0_416_0_2_2_2_2

New Line.l(r:p3udm19839-p3udm19840) Units=km Length=0.00901679 bus1=p3udm19840.1.2 bus2=p3udm19839.1.2 switch=n enabled=y phases=2 Linecode=1P_UG_AL_2/0_Converse_0_416_0_2_2_2_2

New Line.l(r:p3udm19840-p3udt5759lv) Units=km Length=0.0090208 bus1=p3udt5759lv.1.2 bus2=p3udm19840.1.2 switch=n enabled=y phases=2 Linecode=1P_UG_AL_4/0_Sweetbriar_0_416_0_2_2_2_2

New Line.l(r:p3udt6407lv-p3ulv47080) Units=km Length=0.0109706 bus1=p3udt6407lv.1.2 bus2=p3ulv47080.1.2 switch=n enabled=y phases=2 Linecode=1P_UG_AL_1/0_Brenau_0_416_0_2_2_2_2

New Line.l(r:p3udm21948-p3ulv7340) Units=km Length=0.0258899 bus1=p3udm21948.1.2 bus2=p3ulv7340.1.2 switch=n enabled=y phases=2 Linecode=1P_UG_AL_1/0_Brenau_0_416_0_2_2_2_2

New Line.l(r:p3udm21948-p3ulv15136) Units=km Length=0.0110661 bus1=p3udm21948.1.2 bus2=p3ulv15136.1.2 switch=n enabled=y phases=2 Linecode=1P_UG_AL_1/0_Brenau_0_416_0_2_2_2_2

New Line.l(r:p3udm21948-p3udt6407lv) Units=km Length=0.016194700000000003 bus1=p3udt6407lv.1.2 bus2=p3udm21948.1.2 switch=n enabled=y phases=2 Linecode=1P_UG_AL_4/0_Sweetbriar_0_416_0_2_2_2_2

New Line.l(r:p3udm21952-p3ulv47854) Units=km Length=0.021745300000000002 bus1=p3udm21952.1.2 bus2=p3ulv47854.1.2 switch=n enabled=y phases=2 Linecode=1P_UG_AL_2/0_Converse_0_416_0_2_2_2_2

New Line.l(r:p3udm21950-p3ulv19020) Units=km Length=0.00716547 bus1=p3udm21950.1.2 bus2=p3ulv19020.1.2 switch=n enabled=y phases=2 Linecode=1P_OH_AL_2/0_Rucina_0_416_0_2_2_2_2

New Line.l(r:p3udm21950-p3udm21952) Units=km Length=0.0311019 bus1=p3udm21952.1.2 bus2=p3udm21950.1.2 switch=n enabled=y phases=2 Linecode=1P_OH_AL_4/0_Zuzara_0_416_0_2_2_2_2

New Line.l(r:p3udm21952-p3udt6407lv) Units=km Length=0.00809282 bus1=p3udt6407lv.1.2 bus2=p3udm21952.1.2 switch=n enabled=y phases=2 Linecode=1P_UG_AL_4/0_Sweetbriar_0_416_0_2_2_2_2

New Line.l(r:p3udt6410lv-p3ulv7345) Units=km Length=0.0190346 bus1=p3udt6410lv.1.2 bus2=p3ulv7345.1.2 switch=n enabled=y phases=2 Linecode=1P_UG_AL_1/0_Brenau_0_416_0_2_2_2_2

New Line.l(r:p3udt6411lv-p3ulv7346) Units=km Length=0.023463 bus1=p3udt6411lv.1.2 bus2=p3ulv7346.1.2 switch=n enabled=y phases=2 Linecode=1P_OH_AL_2/0_Rucina_0_416_0_2_2_2_2

New Line.l(r:p3udt6411lv-p3ulv22902) Units=km Length=0.019245600000000005 bus1=p3udt6411lv.1.2 bus2=p3ulv22902.1.2 switch=n enabled=y phases=2 Linecode=1P_OH_AL_2/0_Rucina_0_416_0_2_2_2_2

New Line.l(r:p3udt6412lv-p3ulv37652) Units=km Length=0.0211505 bus1=p3udt6412lv.1.2 bus2=p3ulv37652.1.2 switch=n enabled=y phases=2 Linecode=1P_OH_AL_2/0_Rucina_0_416_0_2_2_2_2

New Line.l(r:p3udm21960-p3ulv7347) Units=km Length=0.0178252 bus1=p3udm21960.1.2 bus2=p3ulv7347.1.2 switch=n enabled=y phases=2 Linecode=1P_OH_AL_2/0_Rucina_0_416_0_2_2_2_2

New Line.l(r:p3udm21960-p3udt6412lv) Units=km Length=0.013762500000000002 bus1=p3udt6412lv.1.2 bus2=p3udm21960.1.2 switch=n enabled=y phases=2 Linecode=1P_OH_AL_2/0_Rucina_0_416_0_2_2_2_2

New Line.l(r:p3udt7039lv-p3ulv8137) Units=km Length=0.0218718 bus1=p3udt7039lv.1.2 bus2=p3ulv8137.1.2 switch=n enabled=y phases=2 Linecode=1P_UG_AL_4/0_Sweetbriar_0_416_0_2_2_2_2

New Line.l(r:p3udm24091-p3ulv17482) Units=km Length=0.0143225 bus1=p3udm24091.1.2 bus2=p3ulv17482.1.2 switch=n enabled=y phases=2 Linecode=1P_UG_AL_1/0_Brenau_0_416_0_2_2_2_2

New Line.l(r:p3udm24091-p3udt7039lv) Units=km Length=0.00969901 bus1=p3udt7039lv.1.2 bus2=p3udm24091.1.2 switch=n enabled=y phases=2 Linecode=1P_UG_AL_1/0_Brenau_0_416_0_2_2_2_2

New Line.l(r:p3udm24092-p3ulv66915) Units=km Length=0.0147158 bus1=p3udm24092.1.2 bus2=p3ulv66915.1.2 switch=n enabled=y phases=2 Linecode=1P_UG_AL_1/0_Brenau_0_416_0_2_2_2_2

New Line.l(r:p3udm24090-p3ulv12032) Units=km Length=0.0217911 bus1=p3udm24090.1.2 bus2=p3ulv12032.1.2 switch=n enabled=y phases=2 Linecode=1P_UG_AL_1/0_Brenau_0_416_0_2_2_2_2

New Line.l(r:p3udm24090-p3udm24092) Units=km Length=0.0078301 bus1=p3udm24092.1.2 bus2=p3udm24090.1.2 switch=n enabled=y phases=2 Linecode=1P_UG_AL_1/0_Brenau_0_416_0_2_2_2_2

New Line.l(r:p3udm24092-p3udt7039lv) Units=km Length=0.00782102 bus1=p3udt7039lv.1.2 bus2=p3udm24092.1.2 switch=n enabled=y phases=2 Linecode=1P_UG_AL_4/0_Sweetbriar_0_416_0_2_2_2_2

New Line.l(r:p3udt7041lv-p3ulv8139) Units=km Length=0.0165912 bus1=p3udt7041lv.1.2 bus2=p3ulv8139.1.2 switch=n enabled=y phases=2 Linecode=1P_UG_AL_2/0_Converse_0_416_0_2_2_2_2

New Line.l(r:p3udt7041lv-p3ulv80746) Units=km Length=0.0138117 bus1=p3udt7041lv.1.2 bus2=p3ulv80746.1.2 switch=n enabled=y phases=2 Linecode=1P_UG_AL_1/0_Brenau_0_416_0_2_2_2_2

New Line.l(r:p3udt7042lv-p3ulv8141) Units=km Length=0.0222892 bus1=p3udt7042lv.1.2 bus2=p3ulv8141.1.2 switch=n enabled=y phases=2 Linecode=1P_UG_AL_1/0_Brenau_0_416_0_2_2_2_2

New Line.l(r:p3udt7042lv-p3ulv34642) Units=km Length=0.0301392 bus1=p3udt7042lv.1.2 bus2=p3ulv34642.1.2 switch=n enabled=y phases=2 Linecode=1P_UG_AL_1/0_Brenau_0_416_0_2_2_2_2

New Line.l(r:p3udt7042lv-p3ulv79226) Units=km Length=0.0293562 bus1=p3udt7042lv.1.2 bus2=p3ulv79226.1.2 switch=n enabled=y phases=2 Linecode=1P_UG_AL_1/0_Brenau_0_416_0_2_2_2_2

New Line.l(r:p3udt8183lv-p3ulv9619) Units=km Length=0.0168259 bus1=p3udt8183lv.1.2 bus2=p3ulv9619.1.2 switch=n enabled=y phases=2 Linecode=1P_UG_AL_1/0_Brenau_0_416_0_2_2_2_2

New Line.l(r:p3udt8183lv-p3ulv48571) Units=km Length=0.0191138 bus1=p3udt8183lv.1.2 bus2=p3ulv48571.1.2 switch=n enabled=y phases=2 Linecode=1P_UG_AL_1/0_Brenau_0_416_0_2_2_2_2

New Line.l(r:p3udm27739-p3ulv12039) Units=km Length=0.0173052 bus1=p3udm27739.1.2 bus2=p3ulv12039.1.2 switch=n enabled=y phases=2 Linecode=1P_UG_AL_1/0_Brenau_0_416_0_2_2_2_2

New Line.l(r:p3udm27739-p3udt8183lv) Units=km Length=0.00991879 bus1=p3udt8183lv.1.2 bus2=p3udm27739.1.2 switch=n enabled=y phases=2 Linecode=1P_UG_AL_1/0_Brenau_0_416_0_2_2_2_2

New Line.l(r:p3udm27741-p3ulv66144) Units=km Length=0.0299693 bus1=p3udm27741.1.2 bus2=p3ulv66144.1.2 switch=n enabled=y phases=2 Linecode=1P_UG_AL_1/0_Brenau_0_416_0_2_2_2_2

New Line.l(r:p3udm27741-p3udt8183lv) Units=km Length=0.0297622 bus1=p3udt8183lv.1.2 bus2=p3udm27741.1.2 switch=n enabled=y phases=2 Linecode=1P_UG_AL_1/0_Brenau_0_416_0_2_2_2_2

New Line.l(r:p3udt8767lv-p3ulv10432) Units=km Length=0.0255082 bus1=p3udt8767lv.1.2 bus2=p3ulv10432.1.2 switch=n enabled=y phases=2 Linecode=1P_OH_AL_2/0_Rucina_0_416_0_2_2_2_2

New Line.l(r:p3udt8767lv-p3ulv10433) Units=km Length=0.0260064 bus1=p3udt8767lv.1.2 bus2=p3ulv10433.1.2 switch=n enabled=y phases=2 Linecode=1P_OH_AL_2/0_Rucina_0_416_0_2_2_2_2

New Line.l(r:p3udt8767lv-p3ulv30706) Units=km Length=0.0335175 bus1=p3udt8767lv.1.2 bus2=p3ulv30706.1.2 switch=n enabled=y phases=2 Linecode=1P_OH_AL_4/0_Zuzara_0_416_0_2_2_2_2

New Line.l(r:p3udt8767lv-p3ulv56984) Units=km Length=0.0239931 bus1=p3udt8767lv.1.2 bus2=p3ulv56984.1.2 switch=n enabled=y phases=2 Linecode=1P_OH_AL_2/0_Rucina_0_416_0_2_2_2_2

New Line.l(r:p3udm29599-p3ulv15949) Units=km Length=0.0217868 bus1=p3udm29599.1.2 bus2=p3ulv15949.1.2 switch=n enabled=y phases=2 Linecode=1P_OH_AL_2/0_Rucina_0_416_0_2_2_2_2

New Line.l(r:p3udm29599-p3udt8767lv) Units=km Length=0.0146285 bus1=p3udt8767lv.1.2 bus2=p3udm29599.1.2 switch=n enabled=y phases=2 Linecode=1P_OH_AL_2/0_Rucina_0_416_0_2_2_2_2

New Line.l(r:p3udt9331lv-p3ulv28427) Units=km Length=0.0238159 bus1=p3udt9331lv.1.2 bus2=p3ulv28427.1.2 switch=n enabled=y phases=2 Linecode=1P_UG_AL_1/0_Brenau_0_416_0_2_2_2_2

New Line.l(r:p3udt9331lv-p3ulv48573) Units=km Length=0.0262828 bus1=p3udt9331lv.1.2 bus2=p3ulv48573.1.2 switch=n enabled=y phases=2 Linecode=1P_UG_AL_1/0_Brenau_0_416_0_2_2_2_2

New Line.l(r:p3udm31286-p3ulv11259) Units=km Length=0.0214673 bus1=p3udm31286.1.2 bus2=p3ulv11259.1.2 switch=n enabled=y phases=2 Linecode=1P_UG_AL_1/0_Brenau_0_416_0_2_2_2_2

New Line.l(r:p3udm31286-p3ulv66146) Units=km Length=0.0169152 bus1=p3udm31286.1.2 bus2=p3ulv66146.1.2 switch=n enabled=y phases=2 Linecode=1P_UG_AL_1/0_Brenau_0_416_0_2_2_2_2

New Line.l(r:p3udm31286-p3udt9331lv) Units=km Length=0.0165728 bus1=p3udt9331lv.1.2 bus2=p3udm31286.1.2 switch=n enabled=y phases=2 Linecode=1P_UG_AL_4/0_Sweetbriar_0_416_0_2_2_2_2

New Line.l(r:p3udm31287-p3ulv26125) Units=km Length=0.0295254 bus1=p3udm31287.1.2 bus2=p3ulv26125.1.2 switch=n enabled=y phases=2 Linecode=1P_UG_AL_1/0_Brenau_0_416_0_2_2_2_2

New Line.l(r:p3udm31287-p3ulv38431) Units=km Length=0.0310696 bus1=p3udm31287.1.2 bus2=p3ulv38431.1.2 switch=n enabled=y phases=2 Linecode=1P_UG_AL_1/0_Brenau_0_416_0_2_2_2_2

New Line.l(r:p3udm31287-p3udt9331lv) Units=km Length=0.0247107 bus1=p3udt9331lv.1.2 bus2=p3udm31287.1.2 switch=n enabled=y phases=2 Linecode=1P_UG_AL_4/0_Sweetbriar_0_416_0_2_2_2_2

New Line.l(r:p3udt9867lv-p3ulv12031) Units=km Length=0.0146484 bus1=p3udt9867lv.1.2 bus2=p3ulv12031.1.2 switch=n enabled=y phases=2 Linecode=1P_OH_AL_2/0_Rucina_0_416_0_2_2_2_2

New Line.l(r:p3udm32964-p3ulv65364) Units=km Length=0.0142704 bus1=p3udm32964.1.2 bus2=p3ulv65364.1.2 switch=n enabled=y phases=2 Linecode=1P_OH_AL_2/0_Rucina_0_416_0_2_2_2_2

New Line.l(r:p3udm32964-p3udt9867lv) Units=km Length=0.019928 bus1=p3udt9867lv.1.2 bus2=p3udm32964.1.2 switch=n enabled=y phases=2 Linecode=1P_OH_AL_2/0_Rucina_0_416_0_2_2_2_2

New Line.l(r:p3udm34536-p3ulv12788) Units=km Length=0.0191127 bus1=p3udm34536.1.2 bus2=p3ulv12788.1.2 switch=n enabled=y phases=2 Linecode=1P_UG_AL_1/0_Brenau_0_416_0_2_2_2_2

New Line.l(r:p3udm34536-p3udt10383lv) Units=km Length=0.00998776 bus1=p3udt10383lv.1.2 bus2=p3udm34536.1.2 switch=n enabled=y phases=2 Linecode=1P_UG_AL_1/0_Brenau_0_416_0_2_2_2_2

New Line.l(r:p3udm34537-p3ulv59292) Units=km Length=0.0209438 bus1=p3udm34537.1.2 bus2=p3ulv59292.1.2 switch=n enabled=y phases=2 Linecode=1P_UG_AL_1/0_Brenau_0_416_0_2_2_2_2

New Line.l(r:p3udm34537-p3udt10383lv) Units=km Length=0.0100014 bus1=p3udt10383lv.1.2 bus2=p3udm34537.1.2 switch=n enabled=y phases=2 Linecode=1P_UG_AL_1/0_Brenau_0_416_0_2_2_2_2

New Line.l(r:p3udt10887lv-p3ulv13565) Units=km Length=0.0157428 bus1=p3udt10887lv.1.2 bus2=p3ulv13565.1.2 switch=n enabled=y phases=2 Linecode=1P_UG_AL_1/0_Brenau_0_416_0_2_2_2_2

New Line.l(r:p3udm36129-p3ulv29161) Units=km Length=0.0150462 bus1=p3udm36129.1.2 bus2=p3ulv29161.1.2 switch=n enabled=y phases=2 Linecode=1P_UG_AL_1/0_Brenau_0_416_0_2_2_2_2

New Line.l(r:p3udm36129-p3ulv31484) Units=km Length=0.0167072 bus1=p3udm36129.1.2 bus2=p3ulv31484.1.2 switch=n enabled=y phases=2 Linecode=1P_UG_AL_1/0_Brenau_0_416_0_2_2_2_2

New Line.l(r:p3udm36129-p3udt10887lv) Units=km Length=0.00983734 bus1=p3udt10887lv.1.2 bus2=p3udm36129.1.2 switch=n enabled=y phases=2 Linecode=1P_UG_AL_4/0_Sweetbriar_0_416_0_2_2_2_2

New Line.l(r:p3udm36132-p3ulv79223) Units=km Length=0.0140632 bus1=p3udm36132.1.2 bus2=p3ulv79223.1.2 switch=n enabled=y phases=2 Linecode=1P_UG_AL_1/0_Brenau_0_416_0_2_2_2_2

New Line.l(r:p3udm36131-p3ulv76916) Units=km Length=0.0146526 bus1=p3udm36131.1.2 bus2=p3ulv76916.1.2 switch=n enabled=y phases=2 Linecode=1P_UG_AL_1/0_Brenau_0_416_0_2_2_2_2

New Line.l(r:p3udm36131-p3udm36132) Units=km Length=0.00984411 bus1=p3udm36132.1.2 bus2=p3udm36131.1.2 switch=n enabled=y phases=2 Linecode=1P_UG_AL_1/0_Brenau_0_416_0_2_2_2_2

New Line.l(r:p3udm36132-p3udt10887lv) Units=km Length=0.00982998 bus1=p3udt10887lv.1.2 bus2=p3udm36132.1.2 switch=n enabled=y phases=2 Linecode=1P_UG_AL_4/0_Sweetbriar_0_416_0_2_2_2_2

New Line.l(r:p3udt11408lv-p3ulv25313) Units=km Length=0.0130103 bus1=p3udt11408lv.1.2 bus2=p3ulv25313.1.2 switch=n enabled=y phases=2 Linecode=1P_OH_AL_2/0_Rucina_0_416_0_2_2_2_2

New Line.l(r:p3udt11408lv-p3ulv76915) Units=km Length=0.014526000000000002 bus1=p3udt11408lv.1.2 bus2=p3ulv76915.1.2 switch=n enabled=y phases=2 Linecode=1P_OH_AL_2/0_Rucina_0_416_0_2_2_2_2

New Line.l(r:p3udm37660-p3ulv14354) Units=km Length=0.0208998 bus1=p3udm37660.1.2 bus2=p3ulv14354.1.2 switch=n enabled=y phases=2 Linecode=1P_UG_AL_1/0_Brenau_0_416_0_2_2_2_2

New Line.l(r:p3udm37660-p3udt11408lv) Units=km Length=0.0472942 bus1=p3udt11408lv.1.2 bus2=p3udm37660.1.2 switch=n enabled=y phases=2 Linecode=1P_OH_AL_4/0_Zuzara_0_416_0_2_2_2_2

New Line.l(r:p3udt11893lv-p3ulv15138) Units=km Length=0.0199145 bus1=p3udt11893lv.1.2 bus2=p3ulv15138.1.2 switch=n enabled=y phases=2 Linecode=1P_OH_AL_2/0_Rucina_0_416_0_2_2_2_2

New Line.l(r:p3udt12405lv-p3ulv15946) Units=km Length=0.0161524 bus1=p3udt12405lv.1.2 bus2=p3ulv15946.1.2 switch=n enabled=y phases=2 Linecode=1P_OH_AL_2/0_Rucina_0_416_0_2_2_2_2

New Line.l(r:p3udt12405lv-p3ulv34633) Units=km Length=0.0136577 bus1=p3udt12405lv.1.2 bus2=p3ulv34633.1.2 switch=n enabled=y phases=2 Linecode=1P_OH_AL_2/0_Rucina_0_416_0_2_2_2_2

New Line.l(r:p3udm40561-p3ulv46321) Units=km Length=0.0156242 bus1=p3udm40561.1.2 bus2=p3ulv46321.1.2 switch=n enabled=y phases=2 Linecode=1P_OH_AL_2/0_Rucina_0_416_0_2_2_2_2

New Line.l(r:p3udm40563-p3ulv78431) Units=km Length=0.014937500000000001 bus1=p3udm40563.1.2 bus2=p3ulv78431.1.2 switch=n enabled=y phases=2 Linecode=1P_OH_AL_2/0_Rucina_0_416_0_2_2_2_2

New Line.l(r:p3udm40561-p3udm40563) Units=km Length=0.0172983 bus1=p3udm40561.1.2 bus2=p3udm40563.1.2 switch=n enabled=y phases=2 Linecode=1P_OH_AL_2/0_Rucina_0_416_0_2_2_2_2

New Line.l(r:p3udm40561-p3udt12405lv) Units=km Length=0.0172942 bus1=p3udt12405lv.1.2 bus2=p3udm40561.1.2 switch=n enabled=y phases=2 Linecode=1P_OH_AL_2/0_Rucina_0_416_0_2_2_2_2

New Line.l(r:p3udm40562-p3ulv54711) Units=km Length=0.0165093 bus1=p3udm40562.1.2 bus2=p3ulv54711.1.2 switch=n enabled=y phases=2 Linecode=1P_OH_AL_2/0_Rucina_0_416_0_2_2_2_2

New Line.l(r:p3udm40562-p3udt12405lv) Units=km Length=0.0345878 bus1=p3udt12405lv.1.2 bus2=p3udm40562.1.2 switch=n enabled=y phases=2 Linecode=1P_OH_AL_4/0_Zuzara_0_416_0_2_2_2_2

New Line.l(r:p3udt12885lv-p3ulv16771) Units=km Length=0.0153203 bus1=p3udt12885lv.1.2 bus2=p3ulv16771.1.2 switch=n enabled=y phases=2 Linecode=1P_OH_AL_2/0_Rucina_0_416_0_2_2_2_2

New Line.l(r:p3udt12885lv-p3ulv66918) Units=km Length=0.0216888 bus1=p3udt12885lv.1.2 bus2=p3ulv66918.1.2 switch=n enabled=y phases=2 Linecode=1P_OH_AL_2/0_Rucina_0_416_0_2_2_2_2

New Line.l(r:p3udm41980-p3ulv60794) Units=km Length=0.014357800000000002 bus1=p3udm41980.1.2 bus2=p3ulv60794.1.2 switch=n enabled=y phases=2 Linecode=1P_OH_AL_2/0_Rucina_0_416_0_2_2_2_2

New Line.l(r:p3udm41980-p3udt12885lv) Units=km Length=0.0189762 bus1=p3udt12885lv.1.2 bus2=p3udm41980.1.2 switch=n enabled=y phases=2 Linecode=1P_OH_AL_2/0_Rucina_0_416_0_2_2_2_2

New Line.l(r:p3udm43113-p3ulv17481) Units=km Length=0.0199047 bus1=p3udm43113.1.2 bus2=p3ulv17481.1.2 switch=n enabled=y phases=2 Linecode=1P_UG_AL_1/0_Brenau_0_416_0_2_2_2_2

New Line.l(r:p3udm43113-p3udt13287lv) Units=km Length=0.0185891 bus1=p3udt13287lv.1.2 bus2=p3udm43113.1.2 switch=n enabled=y phases=2 Linecode=1P_UG_AL_1/0_Brenau_0_416_0_2_2_2_2

New Line.l(r:p3udm43114-p3ulv42352) Units=km Length=0.0178379 bus1=p3udm43114.1.2 bus2=p3ulv42352.1.2 switch=n enabled=y phases=2 Linecode=1P_UG_AL_1/0_Brenau_0_416_0_2_2_2_2

New Line.l(r:p3udm43114-p3udt13287lv) Units=km Length=0.025438400000000003 bus1=p3udt13287lv.1.2 bus2=p3udm43114.1.2 switch=n enabled=y phases=2 Linecode=1P_UG_AL_1/0_Brenau_0_416_0_2_2_2_2

New Line.l(r:p3udm44330-p3ulv18263) Units=km Length=0.0144433 bus1=p3udm44330.1.2 bus2=p3ulv18263.1.2 switch=n enabled=y phases=2 Linecode=1P_UG_AL_1/0_Brenau_0_416_0_2_2_2_2

New Line.l(r:p3udm44330-p3udt13710lv) Units=km Length=0.0340396 bus1=p3udt13710lv.1.2 bus2=p3udm44330.1.2 switch=n enabled=y phases=2 Linecode=1P_UG_AL_1/0_Brenau_0_416_0_2_2_2_2

New Line.l(r:p3udm44331-p3ulv74601) Units=km Length=0.0194132 bus1=p3udm44331.1.2 bus2=p3ulv74601.1.2 switch=n enabled=y phases=2 Linecode=1P_UG_AL_1/0_Brenau_0_416_0_2_2_2_2

New Line.l(r:p3udm44331-p3udt13710lv) Units=km Length=0.00821842 bus1=p3udt13710lv.1.2 bus2=p3udm44331.1.2 switch=n enabled=y phases=2 Linecode=1P_UG_AL_1/0_Brenau_0_416_0_2_2_2_2

New Line.l(r:p3udm45494-p3ulv19022) Units=km Length=0.0157518 bus1=p3udm45494.1.2 bus2=p3ulv19022.1.2 switch=n enabled=y phases=2 Linecode=1P_UG_AL_1/0_Brenau_0_416_0_2_2_2_2

New Line.l(r:p3udm45494-p3udt14120lv) Units=km Length=0.00995354 bus1=p3udt14120lv.1.2 bus2=p3udm45494.1.2 switch=n enabled=y phases=2 Linecode=1P_UG_AL_1/0_Brenau_0_416_0_2_2_2_2

New Line.l(r:p3udm45495-p3ulv66145) Units=km Length=0.0170658 bus1=p3udm45495.1.2 bus2=p3ulv66145.1.2 switch=n enabled=y phases=2 Linecode=1P_UG_AL_1/0_Brenau_0_416_0_2_2_2_2

New Line.l(r:p3udm45495-p3udt14120lv) Units=km Length=0.00994941 bus1=p3udt14120lv.1.2 bus2=p3udm45495.1.2 switch=n enabled=y phases=2 Linecode=1P_UG_AL_1/0_Brenau_0_416_0_2_2_2_2

New Line.l(r:p3udt15352lv-p3ulv21318) Units=km Length=0.0372945 bus1=p3udt15352lv.1.2 bus2=p3ulv21318.1.2 switch=n enabled=y phases=2 Linecode=1P_UG_AL_1/0_Brenau_0_416_0_2_2_2_2

New Line.l(r:p3udt15352lv-p3ulv35428) Units=km Length=0.023714 bus1=p3udt15352lv.1.2 bus2=p3ulv35428.1.2 switch=n enabled=y phases=2 Linecode=1P_UG_AL_1/0_Brenau_0_416_0_2_2_2_2

New Line.l(r:p3udt15352lv-p3ulv61567) Units=km Length=0.0316906 bus1=p3udt15352lv.1.2 bus2=p3ulv61567.1.2 switch=n enabled=y phases=2 Linecode=1P_UG_AL_2/0_Converse_0_416_0_2_2_2_2

New Line.l(r:p3udt15761lv-p3ulv22090) Units=km Length=0.0220874 bus1=p3udt15761lv.1.2 bus2=p3ulv22090.1.2 switch=n enabled=y phases=2 Linecode=1P_OH_AL_2/0_Rucina_0_416_0_2_2_2_2

New Line.l(r:p3udm49716-p3ulv43901) Units=km Length=0.0236373 bus1=p3udm49716.1.2 bus2=p3ulv43901.1.2 switch=n enabled=y phases=2 Linecode=1P_OH_AL_2/0_Rucina_0_416_0_2_2_2_2

New Line.l(r:p3udm49716-p3udt15761lv) Units=km Length=0.0172141 bus1=p3udt15761lv.1.2 bus2=p3udm49716.1.2 switch=n enabled=y phases=2 Linecode=1P_OH_AL_2/0_Rucina_0_416_0_2_2_2_2

New Line.l(r:p3udt15762lv-p3ulv34639) Units=km Length=0.0358803 bus1=p3udt15762lv.1.2 bus2=p3ulv34639.1.2 switch=n enabled=y phases=2 Linecode=1P_OH_AL_4/0_Zuzara_0_416_0_2_2_2_2

New Line.l(r:p3udm49717-p3ulv22091) Units=km Length=0.0188016 bus1=p3udm49717.1.2 bus2=p3ulv22091.1.2 switch=n enabled=y phases=2 Linecode=1P_OH_AL_2/0_Rucina_0_416_0_2_2_2_2

New Line.l(r:p3udm49717-p3udt15762lv) Units=km Length=0.0322495 bus1=p3udt15762lv.1.2 bus2=p3udm49717.1.2 switch=n enabled=y phases=2 Linecode=1P_OH_AL_4/0_Zuzara_0_416_0_2_2_2_2

New Line.l(r:p3udm49720-p3ulv29165) Units=km Length=0.0153513 bus1=p3udm49720.1.2 bus2=p3ulv29165.1.2 switch=n enabled=y phases=2 Linecode=1P_OH_AL_2/0_Rucina_0_416_0_2_2_2_2

New Line.l(r:p3udm49719-p3ulv22092) Units=km Length=0.0145346 bus1=p3udm49719.1.2 bus2=p3ulv22092.1.2 switch=n enabled=y phases=2 Linecode=1P_OH_AL_2/0_Rucina_0_416_0_2_2_2_2

New Line.l(r:p3udm49719-p3udm49720) Units=km Length=0.0524545 bus1=p3udm49720.1.2 bus2=p3udm49719.1.2 switch=n enabled=y phases=2 Linecode=1P_OH_AL_4/0_Zuzara_0_416_0_2_2_2_2

New Line.l(r:p3udm49720-p3udt15763lv) Units=km Length=0.0268555 bus1=p3udt15763lv.1.2 bus2=p3udm49720.1.2 switch=n enabled=y phases=2 Linecode=1P_OH_AL_2/0_Rucina_0_416_0_2_2_2_2

New Line.l(r:p3udt16170lv-p3ulv22899) Units=km Length=0.0297895 bus1=p3udt16170lv.1.2 bus2=p3ulv22899.1.2 switch=n enabled=y phases=2 Linecode=1P_UG_AL_1/0_Brenau_0_416_0_2_2_2_2

New Line.l(r:p3udt16917lv-p3ulv24522) Units=km Length=0.0129425 bus1=p3udt16917lv.1.2 bus2=p3ulv24522.1.2 switch=n enabled=y phases=2 Linecode=1P_OH_AL_2/0_Rucina_0_416_0_2_2_2_2

New Line.l(r:p3udt16917lv-p3ulv34634) Units=km Length=0.013833100000000001 bus1=p3udt16917lv.1.2 bus2=p3ulv34634.1.2 switch=n enabled=y phases=2 Linecode=1P_OH_AL_2/0_Rucina_0_416_0_2_2_2_2

New Line.l(r:p3udm52621-p3ulv40004) Units=km Length=0.0138829 bus1=p3udm52621.1.2 bus2=p3ulv40004.1.2 switch=n enabled=y phases=2 Linecode=1P_OH_AL_2/0_Rucina_0_416_0_2_2_2_2

New Line.l(r:p3udm52621-p3ulv67704) Units=km Length=0.0120796 bus1=p3udm52621.1.2 bus2=p3ulv67704.1.2 switch=n enabled=y phases=2 Linecode=1P_OH_AL_2/0_Rucina_0_416_0_2_2_2_2

New Line.l(r:p3udm52621-p3udt16917lv) Units=km Length=0.0199369 bus1=p3udt16917lv.1.2 bus2=p3udm52621.1.2 switch=n enabled=y phases=2 Linecode=1P_OH_AL_2/0_Rucina_0_416_0_2_2_2_2

New Line.l(r:p3udt16922lv-p3ulv24527) Units=km Length=0.01876 bus1=p3udt16922lv.1.2 bus2=p3ulv24527.1.2 switch=n enabled=y phases=2 Linecode=1P_OH_AL_2/0_Rucina_0_416_0_2_2_2_2

New Line.l(r:p3udm52633-p3ulv73081) Units=km Length=0.0156608 bus1=p3udm52633.1.2 bus2=p3ulv73081.1.2 switch=n enabled=y phases=2 Linecode=1P_OH_AL_2/0_Rucina_0_416_0_2_2_2_2

New Line.l(r:p3udm52633-p3udt16922lv) Units=km Length=0.0152272 bus1=p3udt16922lv.1.2 bus2=p3udm52633.1.2 switch=n enabled=y phases=2 Linecode=1P_OH_AL_2/0_Rucina_0_416_0_2_2_2_2

New Line.l(r:p3udt16923lv-p3ulv74610) Units=km Length=0.0159775 bus1=p3udt16923lv.1.2 bus2=p3ulv74610.1.2 switch=n enabled=y phases=2 Linecode=1P_UG_AL_1/0_Brenau_0_416_0_2_2_2_2

New Line.l(r:p3udm52634-p3ulv24528) Units=km Length=0.0160729 bus1=p3udm52634.1.2 bus2=p3ulv24528.1.2 switch=n enabled=y phases=2 Linecode=1P_UG_AL_1/0_Brenau_0_416_0_2_2_2_2

New Line.l(r:p3udm52634-p3udt16923lv) Units=km Length=0.00994941 bus1=p3udt16923lv.1.2 bus2=p3udm52634.1.2 switch=n enabled=y phases=2 Linecode=1P_UG_AL_1/0_Brenau_0_416_0_2_2_2_2

New Line.l(r:p3udt18029lv-p3ulv26902) Units=km Length=0.0289878 bus1=p3udt18029lv.1.2 bus2=p3ulv26902.1.2 switch=n enabled=y phases=2 Linecode=1P_UG_AL_1/0_Brenau_0_416_0_2_2_2_2

New Line.l(r:p3udt18375lv-p3ulv27661) Units=km Length=0.0237044 bus1=p3udt18375lv.1.2 bus2=p3ulv27661.1.2 switch=n enabled=y phases=2 Linecode=1P_UG_AL_1/0_Brenau_0_416_0_2_2_2_2

New Line.l(r:p3udt19015lv-p3ulv29162) Units=km Length=0.0209982 bus1=p3udt19015lv.1.2 bus2=p3ulv29162.1.2 switch=n enabled=y phases=2 Linecode=1P_OH_AL_2/0_Rucina_0_416_0_2_2_2_2

New Line.l(r:p3udt19989lv-p3ulv31488) Units=km Length=0.0292318 bus1=p3udt19989lv.1.2 bus2=p3ulv31488.1.2 switch=n enabled=y phases=2 Linecode=1P_UG_AL_1/0_Brenau_0_416_0_2_2_2_2

New Line.l(r:p3udt20298lv-p3ulv32342) Units=km Length=0.0153787 bus1=p3udt20298lv.1.2 bus2=p3ulv32342.1.2 switch=n enabled=y phases=2 Linecode=1P_UG_AL_1/0_Brenau_0_416_0_2_2_2_2

New Line.l(r:p3udm60516-p3ulv51599) Units=km Length=0.0158423 bus1=p3udm60516.1.2 bus2=p3ulv51599.1.2 switch=n enabled=y phases=2 Linecode=1P_UG_AL_1/0_Brenau_0_416_0_2_2_2_2

New Line.l(r:p3udm60516-p3udt20298lv) Units=km Length=0.00704228 bus1=p3udt20298lv.1.2 bus2=p3udm60516.1.2 switch=n enabled=y phases=2 Linecode=1P_UG_AL_1/0_Brenau_0_416_0_2_2_2_2

New Line.l(r:p3udt20586lv-p3ulv33109) Units=km Length=0.00679682 bus1=p3udt20586lv.1.2 bus2=p3ulv33109.1.2 switch=n enabled=y phases=2 Linecode=1P_OH_AL_2/0_Rucina_0_416_0_2_2_2_2

New Line.l(r:p3udt20586lv-p3ulv79222) Units=km Length=0.00375971 bus1=p3udt20586lv.1.2 bus2=p3ulv79222.1.2 switch=n enabled=y phases=2 Linecode=1P_OH_AL_4_Periwinkle_0_416_0_2_2_2_2

New Line.l(r:p3udt20874lv-p3ulv33850) Units=km Length=0.013199 bus1=p3udt20874lv.1.2 bus2=p3ulv33850.1.2 switch=n enabled=y phases=2 Linecode=1P_UG_AL_1/0_Brenau_0_416_0_2_2_2_2

New Line.l(r:p3udt21159lv-p3ulv34640) Units=km Length=0.0146436 bus1=p3udt21159lv.1.2 bus2=p3ulv34640.1.2 switch=n enabled=y phases=2 Linecode=1P_UG_AL_1/0_Brenau_0_416_0_2_2_2_2

New Line.l(r:p3udt21667lv-p3ulv36180) Units=km Length=0.0201569 bus1=p3udt21667lv.1.2 bus2=p3ulv36180.1.2 switch=n enabled=y phases=2 Linecode=1P_UG_AL_1/0_Brenau_0_416_0_2_2_2_2

New Line.l(r:p3udt21667lv-p3ulv70831) Units=km Length=0.0233057 bus1=p3udt21667lv.1.2 bus2=p3ulv70831.1.2 switch=n enabled=y phases=2 Linecode=1P_UG_AL_1/0_Brenau_0_416_0_2_2_2_2

New Line.l(r:p3udt22164lv-p3ulv43898) Units=km Length=0.0128326 bus1=p3udt22164lv.1.2 bus2=p3ulv43898.1.2 switch=n enabled=y phases=2 Linecode=1P_OH_AL_2/0_Rucina_0_416_0_2_2_2_2

New Line.l(r:p3udm64323-p3ulv37647) Units=km Length=0.0150586 bus1=p3udm64323.1.2 bus2=p3ulv37647.1.2 switch=n enabled=y phases=2 Linecode=1P_OH_AL_2/0_Rucina_0_416_0_2_2_2_2

New Line.l(r:p3udm64323-p3ulv56231) Units=km Length=0.010659500000000002 bus1=p3udm64323.1.2 bus2=p3ulv56231.1.2 switch=n enabled=y phases=2 Linecode=1P_OH_AL_2/0_Rucina_0_416_0_2_2_2_2

New Line.l(r:p3udm64323-p3udt22164lv) Units=km Length=0.0199369 bus1=p3udt22164lv.1.2 bus2=p3udm64323.1.2 switch=n enabled=y phases=2 Linecode=1P_OH_AL_2/0_Rucina_0_416_0_2_2_2_2

New Line.l(r:p3udt23702lv-p3ulv42355) Units=km Length=0.020982 bus1=p3udt23702lv.1.2 bus2=p3ulv42355.1.2 switch=n enabled=y phases=2 Linecode=1P_UG_AL_1/0_Brenau_0_416_0_2_2_2_2

New Line.l(r:p3udm67179-p3ulv45536) Units=km Length=0.019327100000000003 bus1=p3udm67179.1.2 bus2=p3ulv45536.1.2 switch=n enabled=y phases=2 Linecode=1P_UG_AL_1/0_Brenau_0_416_0_2_2_2_2

New Line.l(r:p3udm67179-p3udt23702lv) Units=km Length=0.0083898 bus1=p3udt23702lv.1.2 bus2=p3udm67179.1.2 switch=n enabled=y phases=2 Linecode=1P_UG_AL_1/0_Brenau_0_416_0_2_2_2_2

New Line.l(r:p3udt24183lv-p3ulv43903) Units=km Length=0.0185236 bus1=p3udt24183lv.1.2 bus2=p3ulv43903.1.2 switch=n enabled=y phases=2 Linecode=1P_UG_AL_1/0_Brenau_0_416_0_2_2_2_2

New Line.l(r:p3udt25541lv-p3ulv48570) Units=km Length=0.01606 bus1=p3udt25541lv.1.2 bus2=p3ulv48570.1.2 switch=n enabled=y phases=2 Linecode=1P_UG_AL_4/0_Sweetbriar_0_416_0_2_2_2_2

New Line.l(r:p3udt25542lv-p3ulv48572) Units=km Length=0.0202633 bus1=p3udt25542lv.1.2 bus2=p3ulv48572.1.2 switch=n enabled=y phases=2 Linecode=1P_OH_AL_2/0_Rucina_0_416_0_2_2_2_2

New Line.l(r:p3udt25542lv-p3ulv66917) Units=km Length=0.013734100000000003 bus1=p3udt25542lv.1.2 bus2=p3ulv66917.1.2 switch=n enabled=y phases=2 Linecode=1P_OH_AL_2/0_Rucina_0_416_0_2_2_2_2

New Line.l(r:p3udt25542lv-p3ulv71564) Units=km Length=0.020124 bus1=p3udt25542lv.1.2 bus2=p3ulv71564.1.2 switch=n enabled=y phases=2 Linecode=1P_OH_AL_2/0_Rucina_0_416_0_2_2_2_2

New Line.l(r:p3udt26333lv-p3ulv51600) Units=km Length=0.0238333 bus1=p3udt26333lv.1.2 bus2=p3ulv51600.1.2 switch=n enabled=y phases=2 Linecode=1P_OH_AL_2/0_Rucina_0_416_0_2_2_2_2

New Line.l(r:p3udt26334lv-p3ulv51601) Units=km Length=0.0209858 bus1=p3udt26334lv.1.2 bus2=p3ulv51601.1.2 switch=n enabled=y phases=2 Linecode=1P_OH_AL_2/0_Rucina_0_416_0_2_2_2_2

New Line.l(r:p3udt26334lv-p3ulv54715) Units=km Length=0.0252946 bus1=p3udt26334lv.1.2 bus2=p3ulv54715.1.2 switch=n enabled=y phases=2 Linecode=1P_OH_AL_2/0_Rucina_0_416_0_2_2_2_2

New Line.l(r:p3udt26334lv-p3ulv58537) Units=km Length=0.0239006 bus1=p3udt26334lv.1.2 bus2=p3ulv58537.1.2 switch=n enabled=y phases=2 Linecode=1P_OH_AL_2/0_Rucina_0_416_0_2_2_2_2

New Line.l(r:p3udt26334lv-p3ulv59291) Units=km Length=0.0229905 bus1=p3udt26334lv.1.2 bus2=p3ulv59291.1.2 switch=n enabled=y phases=2 Linecode=1P_OH_AL_2/0_Rucina_0_416_0_2_2_2_2

New Line.l(r:p3udt26334lv-p3ulv70834) Units=km Length=0.0248206 bus1=p3udt26334lv.1.2 bus2=p3ulv70834.1.2 switch=n enabled=y phases=2 Linecode=1P_OH_AL_2/0_Rucina_0_416_0_2_2_2_2

New Line.l(r:p3udt26905lv-p3ulv53927) Units=km Length=0.023947 bus1=p3udt26905lv.1.2 bus2=p3ulv53927.1.2 switch=n enabled=y phases=2 Linecode=1P_OH_AL_2/0_Rucina_0_416_0_2_2_2_2

New Line.l(r:p3udt27643lv-p3ulv56978) Units=km Length=0.0167432 bus1=p3udt27643lv.1.2 bus2=p3ulv56978.1.2 switch=n enabled=y phases=2 Linecode=1P_UG_AL_1/0_Brenau_0_416_0_2_2_2_2

New Line.l(r:p3udt27829lv-p3ulv57776) Units=km Length=0.029133400000000004 bus1=p3udt27829lv.1.2 bus2=p3ulv57776.1.2 switch=n enabled=y phases=2 Linecode=1P_OH_AL_4/0_Zuzara_0_416_0_2_2_2_2

New Line.l(r:p3udt28163lv-p3ulv59289) Units=km Length=0.0160614 bus1=p3udt28163lv.1.2 bus2=p3ulv59289.1.2 switch=n enabled=y phases=2 Linecode=1P_OH_AL_2/0_Rucina_0_416_0_2_2_2_2

New Line.l(r:p3udt28486lv-p3ulv60795) Units=km Length=0.0229145 bus1=p3udt28486lv.1.2 bus2=p3ulv60795.1.2 switch=n enabled=y phases=2 Linecode=1P_OH_AL_2/0_Rucina_0_416_0_2_2_2_2

New Line.l(r:p3udt30201lv-p3ulv69258) Units=km Length=0.0129857 bus1=p3udt30201lv.1.2 bus2=p3ulv69258.1.2 switch=n enabled=y phases=2 Linecode=1P_OH_AL_2/0_Rucina_0_416_0_2_2_2_2

New Line.l(r:p3udt30492lv-p3ulv70829) Units=km Length=0.0117935 bus1=p3udt30492lv.1.2 bus2=p3ulv70829.1.2 switch=n enabled=y phases=2 Linecode=1P_OH_AL_2/0_Rucina_0_416_0_2_2_2_2

New Line.l(r:p3udm76947-p3ulv73077) Units=km Length=0.0117779 bus1=p3udm76947.1.2 bus2=p3ulv73077.1.2 switch=n enabled=y phases=2 Linecode=1P_OH_AL_2/0_Rucina_0_416_0_2_2_2_2

New Line.l(r:p3udm76947-p3udt30492lv) Units=km Length=0.0172895 bus1=p3udt30492lv.1.2 bus2=p3udm76947.1.2 switch=n enabled=y phases=2 Linecode=1P_OH_AL_2/0_Rucina_0_416_0_2_2_2_2

New Line.l(r:p3udt30493lv-p3ulv70832) Units=km Length=0.0159798 bus1=p3udt30493lv.1.2 bus2=p3ulv70832.1.2 switch=n enabled=y phases=2 Linecode=1P_UG_AL_1/0_Brenau_0_416_0_2_2_2_2

New Line.l(r:p3udm76949-p3ulv73856) Units=km Length=0.0167503 bus1=p3udm76949.1.2 bus2=p3ulv73856.1.2 switch=n enabled=y phases=2 Linecode=1P_UG_AL_1/0_Brenau_0_416_0_2_2_2_2

New Line.l(r:p3udm76949-p3udt30493lv) Units=km Length=0.00992363 bus1=p3udt30493lv.1.2 bus2=p3udm76949.1.2 switch=n enabled=y phases=2 Linecode=1P_UG_AL_1/0_Brenau_0_416_0_2_2_2_2

New Line.l(r:p3udt30652lv-p3ulv71565) Units=km Length=0.019044 bus1=p3udt30652lv.1.2 bus2=p3ulv71565.1.2 switch=n enabled=y phases=2 Linecode=1P_UG_AL_1/0_Brenau_0_416_0_2_2_2_2

New Line.l(r:p3udt30799lv-p3ulv72331) Units=km Length=0.0219278 bus1=p3udt30799lv.1.2 bus2=p3ulv72331.1.2 switch=n enabled=y phases=2 Linecode=1P_UG_AL_2/0_Converse_0_416_0_2_2_2_2

New Line.l(r:p3udt31332lv-p3ulv75335) Units=km Length=0.0183616 bus1=p3udt31332lv.1.2 bus2=p3ulv75335.1.2 switch=n enabled=y phases=2 Linecode=1P_UG_AL_1/0_Brenau_0_416_0_2_2_2_2

New Line.l(r:p3udt31879lv-p3ulv78430) Units=km Length=0.0355087 bus1=p3udt31879lv.1.2 bus2=p3ulv78430.1.2 switch=n enabled=y phases=2 Linecode=1P_UG_AL_1/0_Brenau_0_416_0_2_2_2_2

New Line.l(r:p3udt7042-p3udt9331) Units=km Length=0.0247107 bus1=p3udt7042-p3udt9331xx.2 bus2=p3udt7042-p3udt9331x.2 switch=n enabled=y phases=1 Linecode=1P_UG_AL_#2_15_12_47_0_1_1_1_1

New Line.l(r:p3udt2304-p3udt9331) Units=km Length=0.0668348 bus1=p3udt2304-p3udt9331x.2 bus2=p3udt2304-p3udt9331xx.2 switch=n enabled=y phases=1 Linecode=1P_UG_AL_#2_15_12_47_0_1_1_1_1

New Line.l(r:p3udt19989-p3udt6410) Units=km Length=0.0187883 bus1=p3udt19989-p3udt6410x.2 bus2=p3udt19989-p3udt6410xx.2 switch=n enabled=y phases=1 Linecode=1P_UG_AL_#2_15_12_47_0_1_1_1_1

New Line.l(r:p3udt1562-p3udt19989) Units=km Length=0.0789205 bus1=p3udt1562.2 bus2=p3udt19989.2 switch=n enabled=y phases=1 Linecode=1P_OH_AL_ACSR_#2_Sparrow_12_47_0_1_1_1_1

New Line.l(r:p3udt1562-p3udt21667) Units=km Length=0.0255526 bus1=p3udt21667.2 bus2=p3udt1562.2 switch=n enabled=y phases=1 Linecode=1P_OH_AL_ACSR_#2_Sparrow_12_47_0_1_1_1_1

New Line.l(r:p3udt20298-p3udt21667) Units=km Length=0.022890400000000005 bus1=p3udt20298-p3udt21667x.2 bus2=p3udt20298-p3udt21667xx.2 switch=n enabled=y phases=1 Linecode=1P_UG_AL_#2_15_12_47_0_1_1_1_1

New Line.l(r:p3udt20298-p3udt8183) Units=km Length=0.033927 bus1=p3udt20298-p3udt8183xx.2 bus2=p3udt20298-p3udt8183x.2 switch=n enabled=y phases=1 Linecode=1P_UG_AL_#2_15_12_47_0_1_1_1_1

New Line.l(r:p3udt30493-p3udt8183) Units=km Length=0.0297622 bus1=p3udt30493-p3udt8183x.2 bus2=p3udt30493-p3udt8183xx.2 switch=n enabled=y phases=1 Linecode=1P_UG_AL_#2_15_12_47_0_1_1_1_1

New Line.l(r:p3udt30493-p3udt5116) Units=km Length=0.0496046 bus1=p3udt30493-p3udt5116xx.2 bus2=p3udt30493-p3udt5116x.2 switch=n enabled=y phases=1 Linecode=1P_UG_AL_#2_15_12_47_0_1_1_1_1

New Line.l(r:p3udt3735-p3udt5116) Units=km Length=0.0595974 bus1=p3udt3735-p3udt5116x.2 bus2=p3udt3735-p3udt5116xx.2 switch=n enabled=y phases=1 Linecode=1P_UG_AL_#2_15_12_47_0_1_1_1_1

New Line.l(r:p3udt16923-p3udt3735) Units=km Length=0.0398106 bus1=p3udt16923-p3udt3735x.2 bus2=p3udt16923-p3udt3735xx.2 switch=n enabled=y phases=1 Linecode=1P_UG_AL_#2_15_12_47_0_1_1_1_1

New Line.l(r:p3udt16923-p3udt30652) Units=km Length=0.00995824 bus1=p3udt16923-p3udt30652xx.2 bus2=p3udt16923-p3udt30652x.2 switch=n enabled=y phases=1 Linecode=1P_UG_AL_#2_15_12_47_0_1_1_1_1

New Line.l(r:p3udt14120-p3udt30652) Units=km Length=0.0199118 bus1=p3udt14120-p3udt30652x.2 bus2=p3udt14120-p3udt30652xx.2 switch=n enabled=y phases=1 Linecode=1P_UG_AL_#2_15_12_47_0_1_1_1_1

New Line.l(r:p3udt14120-p3udt2304) Units=km Length=0.0792183 bus1=p3udt14120-p3udt2304xx.2 bus2=p3udt14120-p3udt2304x.2 switch=n enabled=y phases=1 Linecode=1P_UG_AL_#2_15_12_47_0_1_1_1_1

New Line.l(r:p3udt2299-p3udt2304) Units=km Length=0.103971 bus1=p3udt2299-p3udt2304xx.2 bus2=p3udt2299-p3udt2304xxx.2 switch=n enabled=y phases=1 Linecode=1P_UG_AL_#2_15_12_47_0_1_1_1_1

New Line.l(r:p3udt12885-p3udt25542) Units=km Length=0.0379388 bus1=p3udt25542.2 bus2=p3udt12885.2 switch=n enabled=y phases=1 Linecode=1P_OH_AL_ACSR_#2_Sparrow_12_47_0_1_1_1_1

New Line.l(r:p3udt15763-p3udt25542) Units=km Length=0.0647943 bus1=p3udt15763-p3udt25542x.2 bus2=p3udt25542.2 switch=n enabled=y phases=1 Linecode=1P_OH_AL_ACSR_#2_Sparrow_12_47_0_1_1_1_1

New Line.l(r:p3udt15761-p3udt6411) Units=km Length=0.0172112 bus1=p3udt6411.1 bus2=p3udt15761.1 switch=n enabled=y phases=1 Linecode=1P_OH_AL_ACSR_#2_Sparrow_12_47_0_1_1_1_1

New Line.l(r:p3udt15762-p3udt6411) Units=km Length=0.07411790000000001 bus1=p3udt15762-p3udt6411x.1 bus2=p3udt6411.1 switch=n enabled=y phases=1 Linecode=1P_OH_AL_ACSR_#2_Sparrow_12_47_0_1_1_1_1

New Line.l(r:p3udt31879-p3udt4419) Units=km Length=0.0292284 bus1=p3udt31879-p3udt4419xx.3 bus2=p3udt31879-p3udt4419x.3 switch=n enabled=y phases=1 Linecode=1P_UG_AL_#2_15_12_47_0_1_1_1_1

New Line.l(r:p3udt16170-p3udt4419) Units=km Length=0.045898 bus1=p3udt16170-p3udt4419x.3 bus2=p3udt16170-p3udt4419xx.3 switch=n enabled=y phases=1 Linecode=1P_UG_AL_#2_15_12_47_0_1_1_1_1

New Line.l(r:p3udt16170-p3udt30799) Units=km Length=0.0171384 bus1=p3udt16170-p3udt30799xx.3 bus2=p3udt16170-p3udt30799x.3 switch=n enabled=y phases=1 Linecode=1P_UG_AL_#2_15_12_47_0_1_1_1_1

New Line.l(r:p3udt1558-p3udt30799) Units=km Length=0.0166283 bus1=p3udt1558-p3udt30799x.3 bus2=p3udt1558-p3udt30799xx.3 switch=n enabled=y phases=1 Linecode=1P_UG_AL_#2_15_12_47_0_1_1_1_1

New Line.l(r:p3udt1558-p3udt6407) Units=km Length=0.0664317 bus1=p3udt1558-p3udt6407xx.3 bus2=p3udt1558-p3udt6407x.3 switch=n enabled=y phases=1 Linecode=1P_UG_AL_#2_15_12_47_0_1_1_1_1

New Line.l(r:p3udt30492-p3udt4418) Units=km Length=0.0657053 bus1=p3udt30492.3 bus2=p3udt4418.3 switch=n enabled=y phases=1 Linecode=1P_OH_AL_ACSR_#2_Sparrow_12_47_0_1_1_1_1

New Line.l(r:p3udt20586-p3udt30492) Units=km Length=0.0602026 bus1=p3udt30492.3 bus2=p3udt20586.3 switch=n enabled=y phases=1 Linecode=1P_OH_AL_ACSR_#2_Sparrow_12_47_0_1_1_1_1

New Line.l(r:p3udt12405-p3udt30492) Units=km Length=0.034592500000000005 bus1=p3udt12405.3 bus2=p3udt30492.3 switch=n enabled=y phases=1 Linecode=1P_OH_AL_ACSR_#2_Sparrow_12_47_0_1_1_1_1

New Line.l(r:p3udt11408-p3udt12405) Units=km Length=0.0172895 bus1=p3udt11408.3 bus2=p3udt12405.3 switch=n enabled=y phases=1 Linecode=1P_OH_AL_ACSR_#2_Sparrow_12_47_0_1_1_1_1

New Line.l(r:p3udt11408-p3udt6407) Units=km Length=0.0880931 bus1=p3udt6407.3 bus2=p3udt11408.3 switch=n enabled=y phases=1 Linecode=1P_OH_AL_ACSR_#2_Sparrow_12_47_0_1_1_1_1

New Line.l(r:p3udt16917-p3udt22164) Units=km Length=0.0398649 bus1=p3udt16917.3 bus2=p3udt22164.3 switch=n enabled=y phases=1 Linecode=1P_OH_AL_ACSR_#2_Sparrow_12_47_0_1_1_1_1

New Line.l(r:p3udt16917-p3udt9867) Units=km Length=0.0598018 bus1=p3udt9867.3 bus2=p3udt16917.3 switch=n enabled=y phases=1 Linecode=1P_OH_AL_ACSR_#2_Sparrow_12_47_0_1_1_1_1

New Line.l(r:p3udt28163-p3udt9867) Units=km Length=0.0199369 bus1=p3udt28163.3 bus2=p3udt9867.3 switch=n enabled=y phases=1 Linecode=1P_OH_AL_ACSR_#2_Sparrow_12_47_0_1_1_1_1

New Line.l(r:p3udt19015-p3udt28163) Units=km Length=0.019928 bus1=p3udt19015.3 bus2=p3udt28163.3 switch=n enabled=y phases=1 Linecode=1P_OH_AL_ACSR_#2_Sparrow_12_47_0_1_1_1_1

New Line.l(r:p3udt19015-p3udt6407) Units=km Length=0.0734467 bus1=p3udt6407.3 bus2=p3udt19015.3 switch=n enabled=y phases=1 Linecode=1P_OH_AL_ACSR_#2_Sparrow_12_47_0_1_1_1_1

New Line.l(r:p3udt6407-p3udt7039) Units=km Length=0.0533846 bus1=p3udt6407-p3udt7039xx.3 bus2=p3udt6407-p3udt7039x.3 switch=n enabled=y phases=1 Linecode=1P_UG_AL_#2_15_12_47_0_1_1_1_1

New Line.l(r:p3udt5759-p3udt7039) Units=km Length=0.0583474 bus1=p3udt5759-p3udt7039x.3 bus2=p3udt5759-p3udt7039xx.3 switch=n enabled=y phases=1 Linecode=1P_UG_AL_#2_15_12_47_0_1_1_1_1

New Line.l(r:p3udt25541-p3udt5759) Units=km Length=0.0786513 bus1=p3udt25541-p3udt5759xx.3 bus2=p3udt25541-p3udt5759xxx.3 switch=n enabled=y phases=1 Linecode=1P_UG_AL_#2_15_12_47_0_1_1_1_1

New Line.l(r:p3udt13710-p3udt18375) Units=km Length=0.0516391 bus1=p3udt13710-p3udt18375x.1 bus2=p3udt13710-p3udt18375xx.1 switch=n enabled=y phases=1 Linecode=1P_UG_AL_#2_15_12_47_0_1_1_1_1

New Line.l(r:p3udt10887-p3udt13287) Units=km Length=0.137739 bus1=p3udt10887-p3udt13287x.1 bus2=p3udt10887-p3udt13287xx.1 switch=n enabled=y phases=1 Linecode=1P_UG_AL_#2_15_12_47_0_1_1_1_1

New Line.l(r:p3udt10887-p3udt15352) Units=km Length=0.0393488 bus1=p3udt10887-p3udt15352x.1 bus2=p3udt10887-p3udt15352xx.1 switch=n enabled=y phases=1 Linecode=1P_UG_AL_#2_15_12_47_0_1_1_1_1

New Line.l(r:p3udt10887-p3udt27643) Units=km Length=0.105386 bus1=p3udt10887-p3udt27643xx.1 bus2=p3udt10887-p3udt27643x.1 switch=n enabled=y phases=1 Linecode=1P_UG_AL_#2_15_12_47_0_1_1_1_1

New Line.l(r:p3udt13710-p3udt27643) Units=km Length=0.0338449 bus1=p3udt13710-p3udt27643x.1 bus2=p3udt13710-p3udt27643xx.1 switch=n enabled=y phases=1 Linecode=1P_UG_AL_#2_15_12_47_0_1_1_1_1

New Line.l(r:p3udt13710-p3udt23702) Units=km Length=0.0414362 bus1=p3udt13710-p3udt23702xx.1 bus2=p3udt13710-p3udt23702x.1 switch=n enabled=y phases=1 Linecode=1P_UG_AL_#2_15_12_47_0_1_1_1_1

New Line.l(r:p3udt20874-p3udt23702) Units=km Length=0.0412061 bus1=p3udt20874-p3udt23702x.1 bus2=p3udt20874-p3udt23702xx.1 switch=n enabled=y phases=1 Linecode=1P_UG_AL_#2_15_12_47_0_1_1_1_1

New Line.l(r:p3udt28486-p3udt8767) Units=km Length=0.0292614 bus1=p3udt28486.1 bus2=p3udt8767.1 switch=n enabled=y phases=1 Linecode=1P_OH_AL_ACSR_#2_Sparrow_12_47_0_1_1_1_1

New Line.l(r:p3udt20874-p3udt28486) Units=km Length=0.0346045 bus1=p3udt20874.1 bus2=p3udt28486.1 switch=n enabled=y phases=1 Linecode=1P_OH_AL_ACSR_#2_Sparrow_12_47_0_1_1_1_1

New Line.l(r:p3udt11893-p3udt20874) Units=km Length=0.04500210000000001 bus1=p3udt11893-p3udt20874x.1 bus2=p3udt20874.1 switch=n enabled=y phases=1 Linecode=1P_OH_AL_ACSR_#2_Sparrow_12_47_0_1_1_1_1

New Line.l(r:p3udt17686-p3udt2301) Units=km Length=0.0901896 bus1=p3udt17686-p3udt2301x.1 bus2=p3udt2301.1 switch=n enabled=y phases=1 Linecode=1P_OH_AL_ACSR_#2_Sparrow_12_47_0_1_1_1_1

New Line.l(r:p3udt19355-p3udt22162) Units=km Length=0.078432 bus1=p3udt22162.1.2.3 bus2=p3udt19355.1.2.3 switch=n enabled=y phases=3 Linecode=3P_OH_AL_ACSR_4/0_Penguin_12_47_0_3_3_3_3

New Line.l(r:p3udt22162-p3udt25118) Units=km Length=0.100258 bus1=p3udt25118.1.2.3 bus2=p3udt22162.1.2.3 switch=n enabled=y phases=3 Linecode=3P_OH_AL_ACSR_4/0_Penguin_12_47_0_3_3_3_3

New Line.l(r:p3udt22985-p3udt25118) Units=km Length=0.0611921 bus1=p3udt22985.1.2.3 bus2=p3udt25118.1.2.3 switch=n enabled=y phases=3 Linecode=3P_OH_AL_ACSR_4/0_Penguin_12_47_0_3_3_3_3

New Line.l(r:p3udt22985-p3udt25951) Units=km Length=0.0991708 bus1=p3udt25951.1.2.3 bus2=p3udt22985.1.2.3 switch=n enabled=y phases=3 Linecode=3P_OH_AL_ACSR_4/0_Penguin_12_47_0_3_3_3_3

New Line.l(r:p3udt25951-p3udt30201) Units=km Length=0.0157088 bus1=p3udt30201.1.2.3 bus2=p3udt25951.1.2.3 switch=n enabled=y phases=3 Linecode=3P_OH_AL_ACSR_4/0_Penguin_12_47_0_3_3_3_3

New Line.l(r:p3udt27829-p3udt30201) Units=km Length=0.275449 bus1=p3udt27829.1.2.3 bus2=p3udt30201.1.2.3 switch=n enabled=y phases=3 Linecode=3P_OH_AL_ACSR_4/0_Penguin_12_47_0_3_3_3_3

New Line.l(r:p3udt26334-p3udt27829) Units=km Length=0.08126980000000002 bus1=p3udt26334.1.2.3 bus2=p3udt26334_b1_1.1.2.3 switch=n enabled=y phases=3 Linecode=3P_OH_AL_ACSR_4/0_Penguin_12_47_0_3_3_3_3

New Line.l(r:p3udt16922-p3udt26334) Units=km Length=0.0152272 bus1=p3udt16922.1.2.3 bus2=p3udt26334.1.2.3 switch=n enabled=y phases=3 Linecode=3P_OH_AL_ACSR_4/0_Penguin_12_47_0_3_3_3_3

New Line.l(r:p3udt15762-p3udt16922) Units=km Length=0.049827 bus1=p3udt15762.1.2.3 bus2=p3udt16922.1.2.3 switch=n enabled=y phases=3 Linecode=3P_OH_AL_ACSR_4/0_Penguin_12_47_0_3_3_3_3

New Line.l(r:p3udt15762-p3udt26333) Units=km Length=0.0193769 bus1=p3udt26333.1.2.3 bus2=p3udt15762.1.2.3 switch=n enabled=y phases=3 Linecode=3P_OH_AL_ACSR_4/0_Penguin_12_47_0_3_3_3_3

New Line.l(r:p3udt15763-p3udt26333) Units=km Length=0.03874500000000001 bus1=p3udt15763.1.2.3 bus2=p3udt26333.1.2.3 switch=n enabled=y phases=3 Linecode=3P_OH_AL_ACSR_4/0_Penguin_12_47_0_3_3_3_3

New Line.l(r:p3udt15763-p3udt2303) Units=km Length=0.05485120000000001 bus1=p3udt2303.1.2.3 bus2=p3udt15763.1.2.3 switch=n enabled=y phases=3 Linecode=3P_OH_AL_ACSR_4/0_Penguin_12_47_0_3_3_3_3

New Line.l(r:p3udt2303-p3udt31332) Units=km Length=0.0616733 bus1=p3udt31332.1.2.3 bus2=p3udt2303.1.2.3 switch=n enabled=y phases=3 Linecode=3P_OH_AL_ACSR_4/0_Penguin_12_47_0_3_3_3_3

New Line.l(r:p3udt24183-p3udt31332) Units=km Length=0.0250338 bus1=p3udt24183-p3udt31332x.1.2.3 bus2=p3udt24183-p3udt31332xx.1.2.3 switch=n enabled=y phases=3 Linecode=3P_UG_AL_4/0_25_12_47_0_3_3_3_3

New Line.l(r:p3udt10383-p3udt24183) Units=km Length=0.0299682 bus1=p3udt10383-p3udt24183x.1.2.3 bus2=p3udt10383-p3udt24183xx.1.2.3 switch=n enabled=y phases=3 Linecode=3P_UG_AL_4/0_25_12_47_0_3_3_3_3

New Line.l(r:p3udt10383-p3udt21159) Units=km Length=0.0399782 bus1=p3udt10383-p3udt21159xx.1.2.3 bus2=p3udt10383-p3udt21159x.1.2.3 switch=n enabled=y phases=3 Linecode=3P_UG_AL_4/0_25_12_47_0_3_3_3_3

New Line.l(r:p3udt21159-p3udt2299) Units=km Length=0.0474244 bus1=p3udt21159-p3udt2299xx.1.2.3 bus2=p3udt21159-p3udt2299x.1.2.3 switch=n enabled=y phases=3 Linecode=3P_UG_AL_4/0_25_12_47_0_3_3_3_3

New Line.l(r:p3udt18029-p3udt2299) Units=km Length=0.0804251 bus1=p3udt18029-p3udt2299x.1.2.3 bus2=p3udt18029-p3udt2299xx.1.2.3 switch=n enabled=y phases=3 Linecode=3P_UG_AL_4/0_25_12_47_0_3_3_3_3

New Line.l(r:p3udt18029-p3uhs2_1247) Units=km Length=0.5171890000000001 bus1=p3udt18029-p3uhs2_1247x.1.2.3 bus2=p3udt18029-p3uhs2_1247x_b1_1.1.2.3 switch=n enabled=y phases=3 Linecode=3P_OH_AL_ACSR_4/0_Penguin_12_47_0_3_3_3_3

New Line.l(r:p3udt25951lv-p3ulv50104) Units=km Length=0.012219100000000002 bus1=p3udt25951lv.1.2.3 bus2=p3ulv50104.1.2.3 switch=n enabled=y phases=3 Linecode=3P_UG_AL_350kcmil_15_0_416_0_3_3_3_3

New Line.l(r:p3udt22985lv-p3ulv40003) Units=km Length=0.00966147 bus1=p3udt22985lv.1.2.3 bus2=p3ulv40003.1.2.3 switch=n enabled=y phases=3 Linecode=3P_UG_AL_350kcmil_15_0_416_0_3_3_3_3

New Line.l(r:p3udt25118lv-p3ulv47079) Units=km Length=0.0125155 bus1=p3udt25118lv.1.2.3 bus2=p3ulv47079.1.2.3 switch=n enabled=y phases=3 Linecode=3P_UG_AL_350kcmil_15_0_416_0_3_3_3_3

New Line.l(r:p3udt22162lv-p3ulv37645) Units=km Length=0.0210632 bus1=p3udt22162lv.1.2.3 bus2=p3ulv37645.1.2.3 switch=n enabled=y phases=3 Linecode=3P_UG_AL_350kcmil_15_0_416_0_3_3_3_3

New Line.l(r:p3udt19355lv-p3ulv29934) Units=km Length=0.0103458 bus1=p3udt19355lv.1.2.3 bus2=p3ulv29934.1.2.3 switch=n enabled=y phases=3 Linecode=3P_UG_AL_350kcmil_15_0_416_0_3_3_3_3

New Line.l(r:p3udt31202lv-p3ulv74603) Units=km Length=0.0190073 bus1=p3udt31202lv.1.2.3 bus2=p3ulv74603.1.2.3 switch=n enabled=y phases=3 Linecode=3P_UG_AL_350kcmil_15_0_416_0_3_3_3_3

New Line.l(r:p3udt10380lv-p3ulv12785) Units=km Length=0.0314409 bus1=p3udt10380lv.1.2.3 bus2=p3ulv12785.1.2.3 switch=n enabled=y phases=3 Linecode=3P_UG_AL_350kcmil_15_0_416_0_3_3_3_3

New Line.l(r:p3udt10380-p3udt25541) Units=km Length=0.0471608 bus1=p3udt10380-p3udt25541xx.1.2.3 bus2=p3udt10380-p3udt25541x.1.2.3 switch=n enabled=y phases=3 Linecode=3P_UG_AL_4/0_25_12_47_0_3_3_3_3

New Line.l(r:p3udt25541-p3udt7041) Units=km Length=0.0723423 bus1=p3udt25541-p3udt7041xx.1.2.3 bus2=p3udt25541-p3udt7041x.1.2.3 switch=n enabled=y phases=3 Linecode=3P_UG_AL_4/0_25_12_47_0_3_3_3_3

New Line.l(r:p3udt31202-p3udt7041) Units=km Length=0.0782607 bus1=p3udt31202.1.2.3 bus2=p3udt7041.1.2.3 switch=n enabled=y phases=3 Linecode=3P_OH_AL_ACSR_4/0_Penguin_12_47_0_3_3_3_3

New Line.l(r:p3udt9325lv-p3ulv11253) Units=km Length=0.0128972 bus1=p3udt9325lv.1.2.3 bus2=p3ulv11253.1.2.3 switch=n enabled=y phases=3 Linecode=3P_UG_AL_350kcmil_15_0_416_0_3_3_3_3

New Line.l(r:p3udt31202-p3udt9325) Units=km Length=0.023688900000000002 bus1=p3udt31202.1.2.3 bus2=p3udt9325.1.2.3 switch=n enabled=y phases=3 Linecode=3P_OH_AL_ACSR_4/0_Penguin_12_47_0_3_3_3_3

New Line.l(r:p3udt19355-p3udt31202) Units=km Length=0.0538506 bus1=p3udt19355.1.2.3 bus2=p3udt31202.1.2.3 switch=n enabled=y phases=3 Linecode=3P_OH_AL_ACSR_4/0_Penguin_12_47_0_3_3_3_3

New Line.l(r:p3udt29734lv-p3ulv66914) Units=km Length=0.015274300000000001 bus1=p3udt29734lv.1.2.3 bus2=p3ulv66914.1.2.3 switch=n enabled=y phases=3 Linecode=3P_UG_AL_350kcmil_15_0_416_0_3_3_3_3

New Line.l(r:p3udt22162-p3udt29734) Units=km Length=0.0750811 bus1=p3udt22162.1.2.3 bus2=p3udt29734.1.2.3 switch=n enabled=y phases=3 Linecode=3P_OH_AL_ACSR_4/0_Penguin_12_47_0_3_3_3_3

New Line.l(r:p3udt19990lv-p3ulv31489) Units=km Length=0.0126765 bus1=p3udt19990lv.1.2.3 bus2=p3ulv31489.1.2.3 switch=n enabled=y phases=3 Linecode=3P_UG_AL_350kcmil_15_0_416_0_3_3_3_3

New Line.l(r:p3udt28963lv-p3ulv63103) Units=km Length=0.0157698 bus1=p3udt28963lv.1.2.3 bus2=p3ulv63103.1.2.3 switch=n enabled=y phases=3 Linecode=3P_UG_AL_350kcmil_15_0_416_0_3_3_3_3

New Line.l(r:p3udt25947lv-p3ulv50100) Units=km Length=0.0129962 bus1=p3udt25947lv.1.2.3 bus2=p3ulv50100.1.2.3 switch=n enabled=y phases=3 Linecode=3P_UG_AL_350kcmil_15_0_416_0_3_3_3_3

New Line.l(r:p3udt25947-p3udt28963) Units=km Length=0.0395075 bus1=p3udt28963.1.2.3 bus2=p3udt25947.1.2.3 switch=n enabled=y phases=3 Linecode=3P_OH_AL_ACSR_4/0_Penguin_12_47_0_3_3_3_3

New Line.l(r:p3udt19990-p3udt28963) Units=km Length=0.019763 bus1=p3udt19990.1.2.3 bus2=p3udt28963.1.2.3 switch=n enabled=y phases=3 Linecode=3P_OH_AL_ACSR_4/0_Penguin_12_47_0_3_3_3_3

New Line.l(r:p3udt11893-p3udt19990) Units=km Length=0.0531719 bus1=p3udt11893.1.2.3 bus2=p3udt19990.1.2.3 switch=n enabled=y phases=3 Linecode=3P_OH_AL_ACSR_4/0_Penguin_12_47_0_3_3_3_3

New Line.l(r:p3udt11893-p3udt6412) Units=km Length=0.0137686 bus1=p3udt6412.1.2.3 bus2=p3udt11893.1.2.3 switch=n enabled=y phases=3 Linecode=3P_OH_AL_ACSR_4/0_Penguin_12_47_0_3_3_3_3

New Line.l(r:p3udt26905-p3udt6412) Units=km Length=0.0639759 bus1=p3udt26905.1.2.3 bus2=p3udt6412.1.2.3 switch=n enabled=y phases=3 Linecode=3P_OH_AL_ACSR_4/0_Penguin_12_47_0_3_3_3_3

New Line.l(r:p3udt2303-p3udt26905) Units=km Length=0.0856917 bus1=p3udt2303.1.2.3 bus2=p3udt26905.1.2.3 switch=n enabled=y phases=3 Linecode=3P_OH_AL_ACSR_4/0_Penguin_12_47_0_3_3_3_3

New Line.l(r:p3udt27291lv-p3ulv55477) Units=km Length=0.00363979 bus1=p3udt27291lv.1.2.3 bus2=p3ulv55477.1.2.3 switch=n enabled=y phases=3 Linecode=3P_UG_AL_350kcmil_15_0_416_0_3_3_3_3

New Line.l(r:p3udt31467lv-p3ulv76147) Units=km Length=0.0146769 bus1=p3udt31467lv.1.2.3 bus2=p3ulv76147.1.2.3 switch=n enabled=y phases=3 Linecode=3P_UG_AL_350kcmil_15_0_416_0_3_3_3_3

New Line.l(r:p3udt13712lv-p3ulv18265) Units=km Length=0.0145982 bus1=p3udt13712lv.1.2.3 bus2=p3ulv18265.1.2.3 switch=n enabled=y phases=3 Linecode=3P_UG_AL_350kcmil_15_0_416_0_3_3_3_3

New Line.l(r:p3udm44335-p3ulv40803) Units=km Length=0.0158809 bus1=p3udm44335.1.2.3 bus2=p3ulv40803.1.2.3 switch=n enabled=y phases=3 Linecode=3P_UG_AL_350kcmil_15_0_416_0_3_3_3_3

New Line.l(r:p3udm44335-p3udt13712lv) Units=km Length=0.0537578 bus1=p3udt13712lv.1.2.3 bus2=p3udm44335.1.2.3 switch=n enabled=y phases=3 Linecode=3P_UG_AL_350kcmil_15_0_416_0_3_3_3_3

New Line.l(r:p3udm44336-p3ulv47853) Units=km Length=0.0182022 bus1=p3udm44336.1.2.3 bus2=p3ulv47853.1.2.3 switch=n enabled=y phases=3 Linecode=3P_UG_AL_350kcmil_15_0_416_0_3_3_3_3

New Line.l(r:p3udm44336-p3ulv74602) Units=km Length=0.0114914 bus1=p3udm44336.1.2.3 bus2=p3ulv74602.1.2.3 switch=n enabled=y phases=3 Linecode=3P_UG_AL_350kcmil_15_0_416_0_3_3_3_3

New Line.l(r:p3udm44336-p3udt13712lv) Units=km Length=0.0178244 bus1=p3udt13712lv.1.2.3 bus2=p3udm44336.1.2.3 switch=n enabled=y phases=3 Linecode=3P_UG_AL_350kcmil_15_0_416_0_3_3_3_3

New Line.l(r:p3udt13712-p3udt31467) Units=km Length=0.0850561 bus1=p3udt31467.1.2.3 bus2=p3udt13712.1.2.3 switch=n enabled=y phases=3 Linecode=3P_OH_AL_ACSR_4/0_Penguin_12_47_0_3_3_3_3

New Line.l(r:p3udt27291-p3udt31467) Units=km Length=0.0991004 bus1=p3udt27291.1.2.3 bus2=p3udt31467.1.2.3 switch=n enabled=y phases=3 Linecode=3P_OH_AL_ACSR_4/0_Penguin_12_47_0_3_3_3_3

New Line.l(r:p3udt27291-p3udt31332) Units=km Length=0.0642133 bus1=p3udt31332.1.2.3 bus2=p3udt27291.1.2.3 switch=n enabled=y phases=3 Linecode=3P_OH_AL_ACSR_4/0_Penguin_12_47_0_3_3_3_3

New Line.l(r:p3udt14552lv-p3ulv19781) Units=km Length=0.0156043 bus1=p3udt14552lv.1.2.3 bus2=p3ulv19781.1.2.3 switch=n enabled=y phases=3 Linecode=3P_UG_AL_350kcmil_15_0_416_0_3_3_3_3

New Line.l(r:p3udt32161lv-p3ulv79982) Units=km Length=0.0133743 bus1=p3udt32161lv.1.2.3 bus2=p3ulv79982.1.2.3 switch=n enabled=y phases=3 Linecode=3P_UG_AL_350kcmil_15_0_416_0_3_3_3_3

New Line.l(r:p3udt8180lv-p3ulv9615) Units=km Length=0.00768482 bus1=p3udt8180lv.1.2.3 bus2=p3ulv9615.1.2.3 switch=n enabled=y phases=3 Linecode=3P_UG_AL_4/0_15_0_416_0_3_3_3_3

New Line.l(r:p3udt17686lv-p3ulv26122) Units=km Length=0.01334 bus1=p3udt17686lv.1.2.3 bus2=p3ulv26122.1.2.3 switch=n enabled=y phases=3 Linecode=3P_UG_AL_350kcmil_15_0_416_0_3_3_3_3

New Line.l(r:p3udt17686-p3udt8180) Units=km Length=0.0689259 bus1=p3udt8180.1.2.3 bus2=p3udt17686.1.2.3 switch=n enabled=y phases=3 Linecode=3P_OH_AL_ACSR_4/0_Penguin_12_47_0_3_3_3_3

New Line.l(r:p3udt30348lv-p3ulv70017) Units=km Length=0.0167729 bus1=p3udt30348lv.1.2.3 bus2=p3ulv70017.1.2.3 switch=n enabled=y phases=3 Linecode=3P_UG_AL_350kcmil_15_0_416_0_3_3_3_3

New Line.l(r:p3udt30348-p3udt8180) Units=km Length=0.08867100000000001 bus1=p3udt8180.1.2.3 bus2=p3udt30348.1.2.3 switch=n enabled=y phases=3 Linecode=3P_OH_AL_ACSR_4/0_Penguin_12_47_0_3_3_3_3

New Line.l(r:p3udt32161-p3udt8180) Units=km Length=0.107796 bus1=p3udt32161.1.2.3 bus2=p3udt8180.1.2.3 switch=n enabled=y phases=3 Linecode=3P_OH_AL_ACSR_4/0_Penguin_12_47_0_3_3_3_3

New Line.l(r:p3udt14552-p3udt32161) Units=km Length=0.0485494 bus1=p3udt14552.1.2.3 bus2=p3udt32161.1.2.3 switch=n enabled=y phases=3 Linecode=3P_OH_AL_ACSR_4/0_Penguin_12_47_0_3_3_3_3

New Line.l(r:p3udt14552-p3udt18029) Units=km Length=0.08470420000000001 bus1=p3udt18029.1.2.3 bus2=p3udt14552.1.2.3 switch=n enabled=y phases=3 Linecode=3P_OH_AL_ACSR_4/0_Penguin_12_47_0_3_3_3_3

New Line.l(r:p3udt29733lv-p3ulv66913) Units=km Length=0.0137329 bus1=p3udt29733lv.1.2.3 bus2=p3ulv66913.1.2.3 switch=n enabled=y phases=3 Linecode=3P_UG_AL_350kcmil_15_0_416_0_3_3_3_3

New Line.l(r:p3udt31468lv-p3ulv76148) Units=km Length=0.0133294 bus1=p3udt31468lv.1.2.3 bus2=p3ulv76148.1.2.3 switch=n enabled=y phases=3 Linecode=3P_UG_AL_750kcmil_25_0_416_0_3_3_3_3

New Line.l(r:p3udt27642lv-p3ulv56977) Units=km Length=0.0142658 bus1=p3udt27642lv.1.2.3 bus2=p3ulv56977.1.2.3 switch=n enabled=y phases=3 Linecode=3P_UG_AL_350kcmil_15_0_416_0_3_3_3_3

New Line.l(r:p3udt27642-p3udt31468) Units=km Length=0.015558900000000002 bus1=p3udt31468.1.2.3 bus2=p3udt27642.1.2.3 switch=n enabled=y phases=3 Linecode=3P_OH_AL_ACSR_4/0_Penguin_12_47_0_3_3_3_3

New Line.l(r:p3udt29733-p3udt31468) Units=km Length=0.139611 bus1=p3udt29733.1.2.3 bus2=p3udt31468.1.2.3 switch=n enabled=y phases=3 Linecode=3P_OH_AL_ACSR_4/0_Penguin_12_47_0_3_3_3_3

New Line.l(r:p3udt18029-p3udt29733) Units=km Length=0.11840900000000001 bus1=p3udt18029.1.2.3 bus2=p3udt29733.1.2.3 switch=n enabled=y phases=3 Linecode=3P_OH_AL_ACSR_4/0_Penguin_12_47_0_3_3_3_3

New Line.l(r:p3udt18029-p3udt31204) Units=km Length=0.33054100000000003 bus1=p3udt18029-p3udt31204x.1.2.3 bus2=p3udt18029.1.2.3 switch=n enabled=y phases=3 Linecode=3P_OH_AL_ACSR_1033kcmil_Curlew_12.47_1_3_3_3_3

New Line.l(r:p3udt13712-p3udt25947) Units=km Length=0.0735115 bus1=p3udt13712-p3udt25947x.1.2.3 bus2=p3udt25947.1.2.3 switch=n enabled=y phases=3 Linecode=3P_OH_AL_ACSR_1033kcmil_Curlew_12.47_1_3_3_3_3

New Line.l(r:p3udt27642-p3udt30348) Units=km Length=0.137329 bus1=p3udt27642-p3udt30348x.1.2.3 bus2=p3udt27642.1.2.3 switch=n enabled=y phases=3 Linecode=3P_OH_AL_ACSR_1033kcmil_Curlew_12.47_1_3_3_3_3

New Line.padswitch(r:p3udt7042-p3udt9331)p3u_169296 Units=km Length=0.001 bus1=p3udt9331.2 bus2=p3udt7042-p3udt9331xx.2 switch=y enabled=y phases=1 Linecode=padswitch_1_1_1_1

New Line.padswitch(r:p3udt7042-p3udt9331)p3u_169297 Units=km Length=0.001 bus1=p3udt7042-p3udt9331x.2 bus2=p3udt7042.2 switch=y enabled=y phases=1 Linecode=padswitch_1_3_1_1_1

New Line.padswitch(r:p3udt2304-p3udt9331)p3u_169298 Units=km Length=0.001 bus1=p3udt2304.2 bus2=p3udt2304-p3udt9331x.2 switch=y enabled=y phases=1 Linecode=padswitch_1_1_1_1

New Line.padswitch(r:p3udt2304-p3udt9331)p3u_169299 Units=km Length=0.001 bus1=p3udt2304-p3udt9331xx.2 bus2=p3udt9331.2 switch=y enabled=y phases=1 Linecode=padswitch_1_1_1_1

New Line.padswitch(r:p3udt19989-p3udt6410)p3u_169300 Units=km Length=0.001 bus1=p3udt19989.2 bus2=p3udt19989-p3udt6410x.2 switch=y enabled=y phases=1 Linecode=padswitch_1_1_1_1

New Line.padswitch(r:p3udt19989-p3udt6410)p3u_169301 Units=km Length=0.001 bus1=p3udt19989-p3udt6410xx.2 bus2=p3udt6410.2 switch=y enabled=y phases=1 Linecode=padswitch_1_3_1_1_1

New Line.padswitch(r:p3udt20298-p3udt21667)p3u_169302 Units=km Length=0.001 bus1=p3udt20298.2 bus2=p3udt20298-p3udt21667x.2 switch=y enabled=y phases=1 Linecode=padswitch_1_1_1_1

New Line.padswitch(r:p3udt20298-p3udt21667)p3u_169303 Units=km Length=0.001 bus1=p3udt20298-p3udt21667xx.2 bus2=p3udt21667.2 switch=y enabled=y phases=1 Linecode=padswitch_1_3_1_0_1_1

New Line.padswitch(r:p3udt20298-p3udt8183)p3u_169304 Units=km Length=0.001 bus1=p3udt8183.2 bus2=p3udt20298-p3udt8183xx.2 switch=y enabled=y phases=1 Linecode=padswitch_1_1_1_1

New Line.padswitch(r:p3udt20298-p3udt8183)p3u_169305 Units=km Length=0.001 bus1=p3udt20298-p3udt8183x.2 bus2=p3udt20298.2 switch=y enabled=y phases=1 Linecode=padswitch_1_1_1_1

New Line.padswitch(r:p3udt30493-p3udt8183)p3u_169306 Units=km Length=0.001 bus1=p3udt30493.2 bus2=p3udt30493-p3udt8183x.2 switch=y enabled=y phases=1 Linecode=padswitch_1_1_1_1

New Line.padswitch(r:p3udt30493-p3udt8183)p3u_169307 Units=km Length=0.001 bus1=p3udt30493-p3udt8183xx.2 bus2=p3udt8183.2 switch=y enabled=y phases=1 Linecode=padswitch_1_1_1_1

New Line.padswitch(r:p3udt30493-p3udt5116)p3u_169308 Units=km Length=0.001 bus1=p3udt5116.2 bus2=p3udt30493-p3udt5116xx.2 switch=y enabled=y phases=1 Linecode=padswitch_1_1_1_1

New Line.padswitch(r:p3udt30493-p3udt5116)p3u_169309 Units=km Length=0.001 bus1=p3udt30493-p3udt5116x.2 bus2=p3udt30493.2 switch=y enabled=y phases=1 Linecode=padswitch_1_1_1_1

New Line.padswitch(r:p3udt3735-p3udt5116)p3u_169310 Units=km Length=0.001 bus1=p3udt3735.2 bus2=p3udt3735-p3udt5116x.2 switch=y enabled=y phases=1 Linecode=padswitch_1_1_1_1

New Line.padswitch(r:p3udt3735-p3udt5116)p3u_169311 Units=km Length=0.001 bus1=p3udt3735-p3udt5116xx.2 bus2=p3udt5116.2 switch=y enabled=y phases=1 Linecode=padswitch_1_1_1_1

New Line.padswitch(r:p3udt16923-p3udt3735)p3u_169312 Units=km Length=0.001 bus1=p3udt16923.2 bus2=p3udt16923-p3udt3735x.2 switch=y enabled=y phases=1 Linecode=padswitch_1_1_1_1

New Line.padswitch(r:p3udt16923-p3udt3735)p3u_169313 Units=km Length=0.001 bus1=p3udt16923-p3udt3735xx.2 bus2=p3udt3735.2 switch=y enabled=y phases=1 Linecode=padswitch_1_1_1_1

New Line.padswitch(r:p3udt16923-p3udt30652)p3u_169314 Units=km Length=0.001 bus1=p3udt30652.2 bus2=p3udt16923-p3udt30652xx.2 switch=y enabled=y phases=1 Linecode=padswitch_1_1_1_1

New Line.padswitch(r:p3udt16923-p3udt30652)p3u_169315 Units=km Length=0.001 bus1=p3udt16923-p3udt30652x.2 bus2=p3udt16923.2 switch=y enabled=y phases=1 Linecode=padswitch_1_1_1_1

New Line.padswitch(r:p3udt14120-p3udt30652)p3u_169316 Units=km Length=0.001 bus1=p3udt14120.2 bus2=p3udt14120-p3udt30652x.2 switch=y enabled=y phases=1 Linecode=padswitch_1_1_1_1

New Line.padswitch(r:p3udt14120-p3udt30652)p3u_169317 Units=km Length=0.001 bus1=p3udt14120-p3udt30652xx.2 bus2=p3udt30652.2 switch=y enabled=y phases=1 Linecode=padswitch_1_1_1_1

New Line.padswitch(r:p3udt14120-p3udt2304)p3u_169318 Units=km Length=0.001 bus1=p3udt2304.2 bus2=p3udt14120-p3udt2304xx.2 switch=y enabled=y phases=1 Linecode=padswitch_1_1_1_1

New Line.padswitch(r:p3udt14120-p3udt2304)p3u_169319 Units=km Length=0.001 bus1=p3udt14120-p3udt2304x.2 bus2=p3udt14120.2 switch=y enabled=y phases=1 Linecode=padswitch_1_1_1_1

New Line.padswitch(r:p3udt2299-p3udt2304)p3u_169320 Units=km Length=0.001 bus1=p3udt2299-p3udt2304x.2 bus2=p3udt2299-p3udt2304xx.2 switch=y enabled=y phases=1 Linecode=padswitch_1_1_1_1

New Line.padswitch(r:p3udt2299-p3udt2304)p3u_169321 Units=km Length=0.001 bus1=p3udt2299-p3udt2304xxx.2 bus2=p3udt2304.2 switch=y enabled=y phases=1 Linecode=padswitch_1_1_1_1

New Line.padswitch(r:p3udt31879-p3udt4419)p3u_169322 Units=km Length=0.001 bus1=p3udt4419.3 bus2=p3udt31879-p3udt4419xx.3 switch=y enabled=y phases=1 Linecode=padswitch_1_1_1_1

New Line.padswitch(r:p3udt31879-p3udt4419)p3u_169323 Units=km Length=0.001 bus1=p3udt31879-p3udt4419x.3 bus2=p3udt31879.3 switch=y enabled=y phases=1 Linecode=padswitch_1_3_1_1_1

New Line.padswitch(r:p3udt16170-p3udt4419)p3u_169324 Units=km Length=0.001 bus1=p3udt16170.3 bus2=p3udt16170-p3udt4419x.3 switch=y enabled=y phases=1 Linecode=padswitch_1_3_1_1_1

New Line.padswitch(r:p3udt16170-p3udt4419)p3u_169325 Units=km Length=0.001 bus1=p3udt16170-p3udt4419xx.3 bus2=p3udt4419.3 switch=y enabled=y phases=1 Linecode=padswitch_1_1_1_1

New Line.padswitch(r:p3udt16170-p3udt30799)p3u_169326 Units=km Length=0.001 bus1=p3udt30799.3 bus2=p3udt16170-p3udt30799xx.3 switch=y enabled=y phases=1 Linecode=padswitch_1_3_1_1_1

New Line.padswitch(r:p3udt16170-p3udt30799)p3u_169327 Units=km Length=0.001 bus1=p3udt16170-p3udt30799x.3 bus2=p3udt16170.3 switch=y enabled=y phases=1 Linecode=padswitch_1_1_1_1

New Line.padswitch(r:p3udt1558-p3udt30799)p3u_169328 Units=km Length=0.001 bus1=p3udt1558.3 bus2=p3udt1558-p3udt30799x.3 switch=y enabled=y phases=1 Linecode=padswitch_1_1_1_1

New Line.padswitch(r:p3udt1558-p3udt30799)p3u_169329 Units=km Length=0.001 bus1=p3udt1558-p3udt30799xx.3 bus2=p3udt30799.3 switch=y enabled=y phases=1 Linecode=padswitch_1_1_1_1

New Line.padswitch(r:p3udt1558-p3udt6407)p3u_169330 Units=km Length=0.001 bus1=p3udt6407.3 bus2=p3udt1558-p3udt6407xx.3 switch=y enabled=y phases=1 Linecode=padswitch_1_3_1_0_1_0_1

New Line.padswitch(r:p3udt1558-p3udt6407)p3u_169331 Units=km Length=0.001 bus1=p3udt1558-p3udt6407x.3 bus2=p3udt1558.3 switch=y enabled=y phases=1 Linecode=padswitch_1_1_1_1

New Line.padswitch(r:p3udt6407-p3udt7039)p3u_169332 Units=km Length=0.001 bus1=p3udt7039.3 bus2=p3udt6407-p3udt7039xx.3 switch=y enabled=y phases=1 Linecode=padswitch_1_3_1_0_1_0_1

New Line.padswitch(r:p3udt6407-p3udt7039)p3u_169333 Units=km Length=0.001 bus1=p3udt6407-p3udt7039x.3 bus2=p3udt6407.3 switch=y enabled=y phases=1 Linecode=padswitch_1_3_1_0_1_0_1

New Line.padswitch(r:p3udt5759-p3udt7039)p3u_169334 Units=km Length=0.001 bus1=p3udt5759.3 bus2=p3udt5759-p3udt7039x.3 switch=y enabled=y phases=1 Linecode=padswitch_1_3_1_0_1_0_1

New Line.padswitch(r:p3udt5759-p3udt7039)p3u_169335 Units=km Length=0.001 bus1=p3udt5759-p3udt7039xx.3 bus2=p3udt7039.3 switch=y enabled=y phases=1 Linecode=padswitch_1_3_1_0_1_0_1

New Line.padswitch(r:p3udt25541-p3udt5759)p3u_169336 Units=km Length=0.001 bus1=p3udt25541-p3udt5759x.3 bus2=p3udt25541-p3udt5759xx.3 switch=y enabled=y phases=1 Linecode=padswitch_1_1_1_1

New Line.padswitch(r:p3udt25541-p3udt5759)p3u_169337 Units=km Length=0.001 bus1=p3udt25541-p3udt5759xxx.3 bus2=p3udt5759.3 switch=y enabled=y phases=1 Linecode=padswitch_1_3_1_0_1_0_1

New Line.padswitch(r:p3udt13710-p3udt18375)p3u_169342 Units=km Length=0.001 bus1=p3udt13710.1 bus2=p3udt13710-p3udt18375x.1 switch=y enabled=y phases=1 Linecode=padswitch_1_1_1_1

New Line.padswitch(r:p3udt13710-p3udt18375)p3u_169343 Units=km Length=0.001 bus1=p3udt13710-p3udt18375xx.1 bus2=p3udt18375.1 switch=y enabled=y phases=1 Linecode=padswitch_1_3_1_1_1

New Line.padswitch(r:p3udt10887-p3udt13287)p3u_169344 Units=km Length=0.001 bus1=p3udt10887.1 bus2=p3udt10887-p3udt13287x.1 switch=y enabled=y phases=1 Linecode=padswitch_1_1_1_1

New Line.padswitch(r:p3udt10887-p3udt13287)p3u_169345 Units=km Length=0.001 bus1=p3udt10887-p3udt13287xx.1 bus2=p3udt13287.1 switch=y enabled=y phases=1 Linecode=padswitch_1_3_1_1_1

New Line.padswitch(r:p3udt10887-p3udt15352)p3u_169346 Units=km Length=0.001 bus1=p3udt10887.1 bus2=p3udt10887-p3udt15352x.1 switch=y enabled=y phases=1 Linecode=padswitch_1_1_1_1

New Line.padswitch(r:p3udt10887-p3udt15352)p3u_169347 Units=km Length=0.001 bus1=p3udt10887-p3udt15352xx.1 bus2=p3udt15352.1 switch=y enabled=y phases=1 Linecode=padswitch_1_3_1_0_1_0_1_0

New Line.padswitch(r:p3udt10887-p3udt27643)p3u_169348 Units=km Length=0.001 bus1=p3udt27643.1 bus2=p3udt10887-p3udt27643xx.1 switch=y enabled=y phases=1 Linecode=padswitch_1_1_1_1

New Line.padswitch(r:p3udt10887-p3udt27643)p3u_169349 Units=km Length=0.001 bus1=p3udt10887-p3udt27643x.1 bus2=p3udt10887.1 switch=y enabled=y phases=1 Linecode=padswitch_1_1_1_1

New Line.padswitch(r:p3udt13710-p3udt27643)p3u_169350 Units=km Length=0.001 bus1=p3udt13710.1 bus2=p3udt13710-p3udt27643x.1 switch=y enabled=y phases=1 Linecode=padswitch_1_1_1_1

New Line.padswitch(r:p3udt13710-p3udt27643)p3u_169351 Units=km Length=0.001 bus1=p3udt13710-p3udt27643xx.1 bus2=p3udt27643.1 switch=y enabled=y phases=1 Linecode=padswitch_1_1_1_1

New Line.padswitch(r:p3udt13710-p3udt23702)p3u_169352 Units=km Length=0.001 bus1=p3udt23702.1 bus2=p3udt13710-p3udt23702xx.1 switch=y enabled=y phases=1 Linecode=padswitch_1_3_1_1_1

New Line.padswitch(r:p3udt13710-p3udt23702)p3u_169353 Units=km Length=0.001 bus1=p3udt13710-p3udt23702x.1 bus2=p3udt13710.1 switch=y enabled=y phases=1 Linecode=padswitch_1_1_1_1

New Line.padswitch(r:p3udt20874-p3udt23702)p3u_169354 Units=km Length=0.001 bus1=p3udt20874.1 bus2=p3udt20874-p3udt23702x.1 switch=y enabled=y phases=1 Linecode=padswitch_1_3_1_0_1_0_1

New Line.padswitch(r:p3udt20874-p3udt23702)p3u_169355 Units=km Length=0.001 bus1=p3udt20874-p3udt23702xx.1 bus2=p3udt23702.1 switch=y enabled=y phases=1 Linecode=padswitch_1_3_1_1_1

New Line.padswitch(r:p3udt24183-p3udt31332)p3u_169356 Units=km Length=0.001 bus1=p3udt24183.1.2.3 bus2=p3udt24183-p3udt31332x.1.2.3 switch=y enabled=y phases=3 Linecode=padswitch_3_3_3_3

New Line.padswitch(r:p3udt24183-p3udt31332)p3u_169357 Units=km Length=0.001 bus1=p3udt24183-p3udt31332xx.1.2.3 bus2=p3udt31332.1.2.3 switch=y enabled=y phases=3 Linecode=padswitch_3_4_3_3_3

New Line.padswitch(r:p3udt10383-p3udt24183)p3u_169358 Units=km Length=0.001 bus1=p3udt10383.1.2.3 bus2=p3udt10383-p3udt24183x.1.2.3 switch=y enabled=y phases=3 Linecode=padswitch_3_4_3_3_3

New Line.padswitch(r:p3udt10383-p3udt24183)p3u_169359 Units=km Length=0.001 bus1=p3udt10383-p3udt24183xx.1.2.3 bus2=p3udt24183.1.2.3 switch=y enabled=y phases=3 Linecode=padswitch_3_4_3_3_3

New Line.padswitch(r:p3udt10383-p3udt21159)p3u_169360 Units=km Length=0.001 bus1=p3udt21159.1.2.3 bus2=p3udt10383-p3udt21159xx.1.2.3 switch=y enabled=y phases=3 Linecode=padswitch_3_4_3_3_3

New Line.padswitch(r:p3udt10383-p3udt21159)p3u_169361 Units=km Length=0.001 bus1=p3udt10383-p3udt21159x.1.2.3 bus2=p3udt10383.1.2.3 switch=y enabled=y phases=3 Linecode=padswitch_3_4_3_1_3_3

New Line.padswitch(r:p3udt21159-p3udt2299)p3u_169362 Units=km Length=0.001 bus1=p3udt2299.1.2.3 bus2=p3udt21159-p3udt2299xx.1.2.3 switch=y enabled=y phases=3 Linecode=padswitch_3_4_3_3_3

New Line.padswitch(r:p3udt21159-p3udt2299)p3u_169363 Units=km Length=0.001 bus1=p3udt21159-p3udt2299x.1.2.3 bus2=p3udt21159.1.2.3 switch=y enabled=y phases=3 Linecode=padswitch_3_4_3_1_3_1_3

New Line.padswitch(r:p3udt18029-p3udt2299)p3u_169364 Units=km Length=0.001 bus1=p3udt18029.1.2.3 bus2=p3udt18029-p3udt2299x.1.2.3 switch=y enabled=y phases=3 Linecode=padswitch_3_4_3_1_3_1_3_1

New Line.padswitch(r:p3udt18029-p3udt2299)p3u_169365 Units=km Length=0.001 bus1=p3udt18029-p3udt2299xx.1.2.3 bus2=p3udt2299.1.2.3 switch=y enabled=y phases=3 Linecode=padswitch_3_4_3_1_3_1_3_1

New Line.padswitch(r:p3udt10380-p3udt25541)p3u_169338 Units=km Length=0.001 bus1=p3udt25541.1.2.3 bus2=p3udt10380-p3udt25541xx.1.2.3 switch=y enabled=y phases=3 Linecode=padswitch_3_4_3_1_3_1_3_1

New Line.padswitch(r:p3udt10380-p3udt25541)p3u_169339 Units=km Length=0.001 bus1=p3udt10380-p3udt25541x.1.2.3 bus2=p3udt10380.1.2.3 switch=y enabled=y phases=3 Linecode=padswitch_3_4_3_1_3_3

New Line.padswitch(r:p3udt25541-p3udt7041)p3u_169340 Units=km Length=0.001 bus1=p3udt7041.1.2.3 bus2=p3udt25541-p3udt7041xx.1.2.3 switch=y enabled=y phases=3 Linecode=padswitch_3_4_3_1_3_1_3_1

New Line.padswitch(r:p3udt25541-p3udt7041)p3u_169341 Units=km Length=0.001 bus1=p3udt25541-p3udt7041x.1.2.3 bus2=p3udt25541.1.2.3 switch=y enabled=y phases=3 Linecode=padswitch_3_4_3_1_3_1_3_1

New Line.elbswitch(r:p3udt13712-p3udt25947)p3u_206697 Units=km Length=0.001 bus1=p3udt13712.1.2.3 bus2=p3udt13712-p3udt25947x.1.2.3 switch=y enabled=n phases=3 Linecode=elbswitch_3_3_3_3

New Line.elbswitch(r:p3udt31470-p3udt7041)p3u_206743 Units=km Length=0.001 bus1=p3udt7041.1.2.3 bus2=p3udt31470-p3udt7041x.1.2.3 switch=y enabled=n phases=3 Linecode=elbswitch_3_6_3_3_3

New Line.elbswitch(r:p3udt27642-p3udt30348)p3u_206783 Units=km Length=0.001 bus1=p3udt30348.1.2.3 bus2=p3udt27642-p3udt30348x.1.2.3 switch=y enabled=n phases=3 Linecode=elbswitch_3_3_3_3

New Line.fuse(r:p3udt2299-p3udt2304)p3u_207042 Units=km Length=0.001 bus1=p3udt2299.2 bus2=p3udt2299-p3udt2304x.2 switch=n enabled=y phases=1 Linecode=fuse_1_1_1_1

New Fuse.Fuse_fuse(r:p3udt2299-p3udt2304)p3u_207042 monitoredobj=Line.fuse(r:p3udt2299-p3udt2304)p3u_207042 enabled=y ratedcurrent=100.0

New Line.fuse(r:p3udt11893-p3udt20874)p3u_207962 Units=km Length=0.001 bus1=p3udt11893.1 bus2=p3udt11893-p3udt20874x.1 switch=n enabled=y phases=1 Linecode=fuse_1_1_1_1

New Fuse.Fuse_fuse(r:p3udt11893-p3udt20874)p3u_207962 monitoredobj=Line.fuse(r:p3udt11893-p3udt20874)p3u_207962 enabled=y ratedcurrent=100.0

New Line.fuse(r:p3udt15762-p3udt6411)p3u_208350 Units=km Length=0.001 bus1=p3udt15762.1 bus2=p3udt15762-p3udt6411x.1 switch=n enabled=y phases=1 Linecode=fuse_1_1_1_1

New Fuse.Fuse_fuse(r:p3udt15762-p3udt6411)p3u_208350 monitoredobj=Line.fuse(r:p3udt15762-p3udt6411)p3u_208350 enabled=y ratedcurrent=100.0

New Line.fuse(r:p3udt15763-p3udt25542)p3u_208351 Units=km Length=0.001 bus1=p3udt15763.2 bus2=p3udt15763-p3udt25542x.2 switch=n enabled=y phases=1 Linecode=fuse_1_1_1_1

New Fuse.Fuse_fuse(r:p3udt15763-p3udt25542)p3u_208351 monitoredobj=Line.fuse(r:p3udt15763-p3udt25542)p3u_208351 enabled=y ratedcurrent=100.0

New Line.fuse(r:p3udt17686-p3udt2301)p3u_208549 Units=km Length=0.001 bus1=p3udt17686.1 bus2=p3udt17686-p3udt2301x.1 switch=n enabled=y phases=1 Linecode=fuse_1_7_1_1_1

New Fuse.Fuse_fuse(r:p3udt17686-p3udt2301)p3u_208549 monitoredobj=Line.fuse(r:p3udt17686-p3udt2301)p3u_208549 enabled=y ratedcurrent=100.0

New Line.fuse(r:p3udt25541-p3udt5759)p3u_209344 Units=km Length=0.001 bus1=p3udt25541.3 bus2=p3udt25541-p3udt5759x.3 switch=n enabled=y phases=1 Linecode=fuse_1_7_1_4_1_1

New Fuse.Fuse_fuse(r:p3udt25541-p3udt5759)p3u_209344 monitoredobj=Line.fuse(r:p3udt25541-p3udt5759)p3u_209344 enabled=y ratedcurrent=100.0

New Line.l(r:p3udt26334-p3udt27829)_disconnect Units=km Length=0.001 bus1=p3udt26334_b1_1.1.2.3 bus2=p3udt26334_b2_1.1.2.3 switch=y enabled=y phases=3 Linecode=3P_OH_AL_ACSR_4/0_Penguin_12_47_0_3_3_3_3

New Line.l(r:p3udt26334-p3udt27829)_cont Units=km Length=0.7404282000000001 bus1=p3udt26334_b2_1.1.2.3 bus2=p3udt27829.1.2.3 switch=n enabled=y phases=3 Linecode=3P_OH_AL_ACSR_4/0_Penguin_12_47_0_3_3_3_3

New Line.l(r:p3udt18029-p3uhs2_1247)_disconnect Units=km Length=0.001 bus1=p3udt18029-p3uhs2_1247x_b1_1.1.2.3 bus2=p3udt18029-p3uhs2_1247x_b2_1.1.2.3 switch=y enabled=y phases=3 Linecode=3P_OH_AL_ACSR_4/0_Penguin_12_47_0_3_3_3_3

New Line.l(r:p3udt18029-p3uhs2_1247)_cont Units=km Length=4.6637010000000005 bus1=p3udt18029-p3uhs2_1247x_b2_1.1.2.3 bus2=p3udt18029.1.2.3 switch=n enabled=y phases=3 Linecode=3P_OH_AL_ACSR_4/0_Penguin_12_47_0_3_3_3_3
