New Line.l(r:p3udm5460-p3ulv1749) Units=km Length=0.011447600000000002 bus1=p3udm5460.1.2 bus2=p3ulv1749.1.2 switch=n enabled=y phases=2 Linecode=1P_UG_AL_1/0_Brenau_0_416_0_2_2_2_2

New Line.l(r:p3udm5460-p3udt1565lv) Units=km Length=0.0197674 bus1=p3udt1565lv.1.2 bus2=p3udm5460.1.2 switch=n enabled=y phases=2 Linecode=1P_UG_AL_1/0_Brenau_0_416_0_2_2_2_2

New Line.l(r:p3udm5461-p3ulv26907) Units=km Length=0.0286777 bus1=p3udm5461.1.2 bus2=p3ulv26907.1.2 switch=n enabled=y phases=2 Linecode=1P_UG_AL_1/0_Brenau_0_416_0_2_2_2_2

New Line.l(r:p3udm5461-p3udt1565lv) Units=km Length=0.0197674 bus1=p3udt1565lv.1.2 bus2=p3udm5461.1.2 switch=n enabled=y phases=2 Linecode=1P_UG_AL_1/0_Brenau_0_416_0_2_2_2_2

New Line.l(r:p3udt6413lv-p3ulv7348) Units=km Length=0.0468727 bus1=p3udt6413lv.1.2 bus2=p3ulv7348.1.2 switch=n enabled=y phases=2 Linecode=1P_OH_AL_4/0_Zuzara_0_416_0_2_2_2_2

New Line.l(r:p3udt6413lv-p3ulv66922) Units=km Length=0.0156411 bus1=p3udt6413lv.1.2 bus2=p3ulv66922.1.2 switch=n enabled=y phases=2 Linecode=1P_OH_AL_2/0_Rucina_0_416_0_2_2_2_2

New Line.l(r:p3udt9333lv-p3ulv11261) Units=km Length=0.0411629 bus1=p3udt9333lv.1.2 bus2=p3ulv11261.1.2 switch=n enabled=y phases=2 Linecode=1P_OH_AL_4/0_Zuzara_0_416_0_2_2_2_2

New Line.l(r:p3udt9333lv-p3ulv26908) Units=km Length=0.0513388 bus1=p3udt9333lv.1.2 bus2=p3ulv26908.1.2 switch=n enabled=y phases=2 Linecode=1P_OH_AL_4/0_Zuzara_0_416_0_2_2_2_2

New Line.l(r:p3udt10384lv-p3ulv12789) Units=km Length=0.0299027 bus1=p3udt10384lv.1.2 bus2=p3ulv12789.1.2 switch=n enabled=y phases=2 Linecode=1P_OH_AL_4/0_Zuzara_0_416_0_2_2_2_2

New Line.l(r:p3udm34539-p3ulv30707) Units=km Length=0.0478309 bus1=p3udm34539.1.2 bus2=p3ulv30707.1.2 switch=n enabled=y phases=2 Linecode=1P_OH_AL_4/0_Zuzara_0_416_0_2_2_2_2

New Line.l(r:p3udm34539-p3udt10384lv) Units=km Length=0.0199089 bus1=p3udt10384lv.1.2 bus2=p3udm34539.1.2 switch=n enabled=y phases=2 Linecode=1P_OH_AL_2/0_Rucina_0_416_0_2_2_2_2

New Line.l(r:p3udm43121-p3ulv17487) Units=km Length=0.0158801 bus1=p3udm43121.1.2 bus2=p3ulv17487.1.2 switch=n enabled=y phases=2 Linecode=1P_OH_AL_2/0_Rucina_0_416_0_2_2_2_2

New Line.l(r:p3udm43121-p3udt13292lv) Units=km Length=0.0367647 bus1=p3udt13292lv.1.2 bus2=p3udm43121.1.2 switch=n enabled=y phases=2 Linecode=1P_OH_AL_4/0_Zuzara_0_416_0_2_2_2_2

New Line.l(r:p3udm43122-p3ulv49335) Units=km Length=0.0179324 bus1=p3udm43122.1.2 bus2=p3ulv49335.1.2 switch=n enabled=y phases=2 Linecode=1P_OH_AL_2/0_Rucina_0_416_0_2_2_2_2

New Line.l(r:p3udm43122-p3udt13292lv) Units=km Length=0.03820130000000001 bus1=p3udt13292lv.1.2 bus2=p3udm43122.1.2 switch=n enabled=y phases=2 Linecode=1P_OH_AL_4/0_Zuzara_0_416_0_2_2_2_2

New Line.l(r:p3udt14956lv-p3ulv20548) Units=km Length=0.0427314 bus1=p3udt14956lv.1.2 bus2=p3ulv20548.1.2 switch=n enabled=y phases=2 Linecode=1P_OH_AL_4/0_Zuzara_0_416_0_2_2_2_2

New Line.l(r:p3udt15764lv-p3ulv22093) Units=km Length=0.022908400000000002 bus1=p3udt15764lv.1.2 bus2=p3ulv22093.1.2 switch=n enabled=y phases=2 Linecode=1P_OH_AL_2/0_Rucina_0_416_0_2_2_2_2

New Line.l(r:p3udt15764lv-p3ulv60010) Units=km Length=0.0162115 bus1=p3udt15764lv.1.2 bus2=p3ulv60010.1.2 switch=n enabled=y phases=2 Linecode=1P_OH_AL_2/0_Rucina_0_416_0_2_2_2_2

New Line.l(r:p3udt16924lv-p3ulv24529) Units=km Length=0.0174332 bus1=p3udt16924lv.1.2 bus2=p3ulv24529.1.2 switch=n enabled=y phases=2 Linecode=1P_UG_AL_1/0_Brenau_0_416_0_2_2_2_2

New Line.l(r:p3udt18705lv-p3ulv28424) Units=km Length=0.0209346 bus1=p3udt18705lv.1.2 bus2=p3ulv28424.1.2 switch=n enabled=y phases=2 Linecode=1P_OH_AL_2/0_Rucina_0_416_0_2_2_2_2

New Line.l(r:p3udt18710lv-p3ulv28430) Units=km Length=0.0178294 bus1=p3udt18710lv.1.2 bus2=p3ulv28430.1.2 switch=n enabled=y phases=2 Linecode=1P_OH_AL_2/0_Rucina_0_416_0_2_2_2_2

New Line.l(r:p3udt19017lv-p3ulv29167) Units=km Length=0.025217700000000003 bus1=p3udt19017lv.1.2 bus2=p3ulv29167.1.2 switch=n enabled=y phases=2 Linecode=1P_OH_AL_2/0_Rucina_0_416_0_2_2_2_2

New Line.l(r:p3udt19017lv-p3ulv47089) Units=km Length=0.0632247 bus1=p3udt19017lv.1.2 bus2=p3ulv47089.1.2 switch=n enabled=y phases=2 Linecode=1P_OH_AL_4/0_Zuzara_0_416_0_2_2_2_2

New Line.l(r:p3udt20296lv-p3ulv32340) Units=km Length=0.0299208 bus1=p3udt20296lv.1.2 bus2=p3ulv32340.1.2 switch=n enabled=y phases=2 Linecode=1P_OH_AL_4/0_Zuzara_0_416_0_2_2_2_2

New Line.l(r:p3udt21432lv-p3ulv35437) Units=km Length=0.00517262 bus1=p3udt21432lv.1.2 bus2=p3ulv35437.1.2 switch=n enabled=y phases=2 Linecode=1P_OH_AL_2/0_Rucina_0_416_0_2_2_2_2

New Line.l(r:p3udt21899lv-p3ulv36894) Units=km Length=0.0166553 bus1=p3udt21899lv.1.2 bus2=p3ulv36894.1.2 switch=n enabled=y phases=2 Linecode=1P_OH_AL_2/0_Rucina_0_416_0_2_2_2_2

New Line.l(r:p3udt22699lv-p3ulv39192) Units=km Length=0.0308983 bus1=p3udt22699lv.1.2 bus2=p3ulv39192.1.2 switch=n enabled=y phases=2 Linecode=1P_OH_AL_4/0_Zuzara_0_416_0_2_2_2_2

New Line.l(r:p3udt22699lv-p3ulv49336) Units=km Length=0.040705700000000004 bus1=p3udt22699lv.1.2 bus2=p3ulv49336.1.2 switch=n enabled=y phases=2 Linecode=1P_OH_AL_4/0_Zuzara_0_416_0_2_2_2_2

New Line.l(r:p3udt24434lv-p3ulv44759) Units=km Length=0.0796529 bus1=p3udt24434lv.1.2 bus2=p3ulv44759.1.2 switch=n enabled=y phases=2 Linecode=1P_OH_AL_4/0_Zuzara_0_416_0_2_2_2_2

New Line.l(r:p3udt24434lv-p3ulv74613) Units=km Length=0.076811 bus1=p3udt24434lv.1.2 bus2=p3ulv74613.1.2 switch=n enabled=y phases=2 Linecode=1P_OH_AL_4/0_Zuzara_0_416_0_2_2_2_2

New Line.l(r:p3udt24902lv-p3ulv46324) Units=km Length=0.0415155 bus1=p3udt24902lv.1.2 bus2=p3ulv46324.1.2 switch=n enabled=y phases=2 Linecode=1P_OH_AL_4/0_Zuzara_0_416_0_2_2_2_2

New Line.l(r:p3udt25349lv-p3ulv47858) Units=km Length=0.00655046 bus1=p3udt25349lv.1.2 bus2=p3ulv47858.1.2 switch=n enabled=y phases=2 Linecode=1P_OH_AL_2/0_Rucina_0_416_0_2_2_2_2

New Line.l(r:p3udt26127lv-p3ulv50844) Units=km Length=0.01395 bus1=p3udt26127lv.1.2 bus2=p3ulv50844.1.2 switch=n enabled=y phases=2 Linecode=1P_OH_AL_2/0_Rucina_0_416_0_2_2_2_2

New Line.l(r:p3udt27292lv-p3ulv55478) Units=km Length=0.0368436 bus1=p3udt27292lv.1.2 bus2=p3ulv55478.1.2 switch=n enabled=y phases=2 Linecode=1P_OH_AL_4/0_Zuzara_0_416_0_2_2_2_2

New Line.l(r:p3udt27292lv-p3ulv68500) Units=km Length=0.019927600000000004 bus1=p3udt27292lv.1.2 bus2=p3ulv68500.1.2 switch=n enabled=y phases=2 Linecode=1P_OH_AL_2/0_Rucina_0_416_0_2_2_2_2

New Line.l(r:p3udt27649lv-p3ulv56988) Units=km Length=0.0422563 bus1=p3udt27649lv.1.2 bus2=p3ulv56988.1.2 switch=n enabled=y phases=2 Linecode=1P_OH_AL_4/0_Zuzara_0_416_0_2_2_2_2

New Line.l(r:p3udt28648lv-p3ulv61570) Units=km Length=0.0707213 bus1=p3udt28648lv.1.2 bus2=p3ulv61570.1.2 switch=n enabled=y phases=2 Linecode=1P_OH_AL_4/0_Zuzara_0_416_0_2_2_2_2

New Line.l(r:p3udt29134lv-p3ulv63850) Units=km Length=0.0109512 bus1=p3udt29134lv.1.2 bus2=p3ulv63850.1.2 switch=n enabled=y phases=2 Linecode=1P_OH_AL_2/0_Rucina_0_416_0_2_2_2_2

New Line.l(r:p3udt29737lv-p3ulv66921) Units=km Length=0.0189272 bus1=p3udt29737lv.1.2 bus2=p3ulv66921.1.2 switch=n enabled=y phases=2 Linecode=1P_UG_AL_1/0_Brenau_0_416_0_2_2_2_2

New Line.l(r:p3udt30052lv-p3ulv68503) Units=km Length=0.0250511 bus1=p3udt30052lv.1.2 bus2=p3ulv68503.1.2 switch=n enabled=y phases=2 Linecode=1P_OH_AL_2/0_Rucina_0_416_0_2_2_2_2

New Line.l(r:p3udt31207lv-p3ulv74612) Units=km Length=0.00510393 bus1=p3udt31207lv.1.2 bus2=p3ulv74612.1.2 switch=n enabled=y phases=2 Linecode=1P_OH_AL_2/0_Rucina_0_416_0_2_2_2_2

New Line.l(r:p3udt24434-p3udt7044) Units=km Length=0.08133970000000001 bus1=p3udt24434-p3udt7044x.1 bus2=p3udt24434.1 switch=n enabled=y phases=1 Linecode=1P_OH_AL_ACSR_#2_Sparrow_12_47_0_1_1_1_1

New Line.l(r:p3udt29134-p3udt7043) Units=km Length=0.001 bus1=p3udt29134-p3udt7043x.2 bus2=p3udt29134.2 switch=n enabled=y phases=1 Linecode=1P_OH_AL_ACSR_#2_Sparrow_12_47_0_1_1_1_1

New Line.l(r:p3udt14956-p3udt15764) Units=km Length=0.0193122 bus1=p3udt14956-p3udt15764x.3 bus2=p3udt15764.3 switch=n enabled=y phases=1 Linecode=1P_OH_AL_ACSR_#2_Sparrow_12_47_0_1_1_1_1

New Line.l(r:p3udt10384-p3udt21668) Units=km Length=0.059717900000000004 bus1=p3udt10384-p3udt21668x.1 bus2=p3udt10384.1 switch=n enabled=y phases=1 Linecode=1P_OH_AL_ACSR_#2_Sparrow_12_47_0_1_1_1_1

New Line.l(r:p3udt21899-p3udt6413) Units=km Length=0.0333869 bus1=p3udt21899.2 bus2=p3udt6413.2 switch=n enabled=y phases=1 Linecode=1P_OH_AL_ACSR_#2_Sparrow_12_47_0_1_1_1_1

New Line.l(r:p3udt21899-p3udt9333) Units=km Length=0.0166885 bus1=p3udt9333.2 bus2=p3udt21899.2 switch=n enabled=y phases=1 Linecode=1P_OH_AL_ACSR_#2_Sparrow_12_47_0_1_1_1_1

New Line.l(r:p3udt18711-p3udt9333) Units=km Length=0.0191503 bus1=p3udt18711-p3udt9333x.2 bus2=p3udt9333.2 switch=n enabled=y phases=1 Linecode=1P_OH_AL_ACSR_#2_Sparrow_12_47_0_1_1_1_1

New Line.l(r:p3udt22700-p3udt27649) Units=km Length=0.0558139 bus1=p3udt22700-p3udt27649x.3 bus2=p3udt27649.3 switch=n enabled=y phases=1 Linecode=1P_OH_AL_ACSR_#2_Sparrow_12_47_0_1_1_1_1

New Line.l(r:p3udt20296-p3uhs2_1247) Units=km Length=0.3341030000000001 bus1=p3udt20296-p3uhs2_1247x.1.2.3 bus2=p3udt20296-p3uhs2_1247x_b1_1.1.2.3 switch=n enabled=y phases=3 Linecode=3P_OH_AL_ACSR_1033kcmil_Curlew_12.47_1_3_3_3_3

New Line.l(r:p3udt31752-p3udt4424) Units=km Length=0.125632 bus1=p3udt4424.1.2.3 bus2=p3udt31752.1.2.3 switch=n enabled=y phases=3 Linecode=3P_OH_AL_ACSR_4/0_Penguin_12_47_0_3_3_3_3

New Line.l(r:p3udt29737-p3udt4424) Units=km Length=0.265884 bus1=p3udt29737.1.2.3 bus2=p3udt4424.1.2.3 switch=n enabled=y phases=3 Linecode=3P_OH_AL_ACSR_4/0_Penguin_12_47_0_3_3_3_3

New Line.l(r:p3udt1565-p3udt22699) Units=km Length=0.131422 bus1=p3udt22699.1.2.3 bus2=p3udt1565.1.2.3 switch=n enabled=y phases=3 Linecode=3P_OH_AL_ACSR_4/0_Penguin_12_47_0_3_3_3_3

New Line.l(r:p3udt13292-p3udt22699) Units=km Length=0.0190895 bus1=p3udt13292.1.2.3 bus2=p3udt22699.1.2.3 switch=n enabled=y phases=3 Linecode=3P_OH_AL_ACSR_4/0_Penguin_12_47_0_3_3_3_3

New Line.l(r:p3udt13292-p3udt27292) Units=km Length=0.0572907 bus1=p3udt27292.1.2.3 bus2=p3udt13292.1.2.3 switch=n enabled=y phases=3 Linecode=3P_OH_AL_ACSR_4/0_Penguin_12_47_0_3_3_3_3

New Line.l(r:p3udt27292-p3udt29737) Units=km Length=0.342323 bus1=p3udt29737.1.2.3 bus2=p3udt27292.1.2.3 switch=n enabled=y phases=3 Linecode=3P_OH_AL_ACSR_4/0_Penguin_12_47_0_3_3_3_3

New Line.l(r:p3udt28488-p3udt29737) Units=km Length=0.297864 bus1=p3udt28488-p3udt29737x.1.2.3 bus2=p3udt28488-p3udt29737xx.1.2.3 switch=n enabled=y phases=3 Linecode=3P_UG_AL_4/0_25_12_47_0_3_3_3_3

New Line.l(r:p3udt28488-p3udt31471) Units=km Length=0.0977557 bus1=p3udt28488-p3udt31471xx.1.2.3 bus2=p3udt28488-p3udt31471x.1.2.3 switch=n enabled=y phases=3 Linecode=3P_UG_AL_4/0_25_12_47_0_3_3_3_3

New Line.l(r:p3udt31471-p3udt31621) Units=km Length=0.156395 bus1=p3udt31471-p3udt31621xx.1.2.3 bus2=p3udt31471-p3udt31621x.1.2.3 switch=n enabled=y phases=3 Linecode=3P_UG_AL_4/0_25_12_47_0_3_3_3_3

New Line.l(r:p3udt30802-p3udt31621) Units=km Length=0.698538 bus1=p3udt30802-p3udt31621x.1.2.3 bus2=p3udt30802-p3udt31621xx.1.2.3 switch=n enabled=y phases=3 Linecode=3P_UG_AL_4/0_25_12_47_0_3_3_3_3

New Line.l(r:p3udt18705-p3udt30802) Units=km Length=0.166276 bus1=p3udt18705.1.2.3 bus2=p3udt30802.1.2.3 switch=n enabled=y phases=3 Linecode=3P_OH_AL_ACSR_4/0_Penguin_12_47_0_3_3_3_3

New Line.l(r:p3udt18705-p3udt28648) Units=km Length=0.0394201 bus1=p3udt28648.1.2.3 bus2=p3udt18705.1.2.3 switch=n enabled=y phases=3 Linecode=3P_OH_AL_ACSR_4/0_Penguin_12_47_0_3_3_3_3

New Line.l(r:p3udt24902-p3udt28648) Units=km Length=0.118258 bus1=p3udt24902.1.2.3 bus2=p3udt28648.1.2.3 switch=n enabled=y phases=3 Linecode=3P_OH_AL_ACSR_4/0_Penguin_12_47_0_3_3_3_3

New Line.l(r:p3udt20296-p3udt24902) Units=km Length=0.0583301 bus1=p3udt20296.1.2.3 bus2=p3udt24902.1.2.3 switch=n enabled=y phases=3 Linecode=3P_OH_AL_ACSR_4/0_Penguin_12_47_0_3_3_3_3

New Line.l(r:p3udt30802lv-p3ulv72335) Units=km Length=0.0420404 bus1=p3udt30802lv.1.2.3 bus2=p3ulv72335.1.2.3 switch=n enabled=y phases=3 Linecode=3P_UG_AL_350kcmil_15_0_416_0_3_3_3_3

New Line.l(r:p3udt30802-p3umv36) Units=km Length=0.239585 bus1=p3udt30802-p3umv36x.1.2.3 bus2=p3udt30802-p3umv36xx.1.2.3 switch=n enabled=y phases=3 Linecode=3P_UG_AL_4/0_25_12_47_0_3_3_3_3

New Line.l(r:p3udt31621lv-p3ulv76919) Units=km Length=0.0317309 bus1=p3udt31621lv.1.2.3 bus2=p3ulv76919.1.2.3 switch=n enabled=y phases=3 Linecode=3P_UG_AL_350kcmil_15_0_416_0_3_3_3_3

New Line.l(r:p3udt30051lv-p3ulv68502) Units=km Length=0.0470365 bus1=p3udt30051lv.1.2.3 bus2=p3ulv68502.1.2.3 switch=n enabled=y phases=3 Linecode=3P_UG_AL_350kcmil_15_0_416_0_3_3_3_3

New Line.l(r:p3udt30051-p3udt31621) Units=km Length=0.135085 bus1=p3udt30051-p3udt31621xx.1.2.3 bus2=p3udt30051-p3udt31621x.1.2.3 switch=n enabled=y phases=3 Linecode=3P_UG_AL_4/0_25_12_47_0_3_3_3_3

New Line.l(r:p3udt31471lv-p3ulv76153) Units=km Length=0.0380437 bus1=p3udt31471lv.1.2.3 bus2=p3ulv76153.1.2.3 switch=n enabled=y phases=3 Linecode=3P_UG_AL_350kcmil_15_0_416_0_3_3_3_3

New Line.l(r:p3udt28488lv-p3ulv60797) Units=km Length=0.0336707 bus1=p3udt28488lv.1.2.3 bus2=p3ulv60797.1.2.3 switch=n enabled=y phases=3 Linecode=3P_UG_AL_350kcmil_15_0_416_0_3_3_3_3

New Line.l(r:p3udm15359-p3ulv4917) Units=km Length=0.00713414 bus1=p3udm15359.1.2.3 bus2=p3ulv4917.1.2.3 switch=n enabled=y phases=3 Linecode=3P_UG_AL_350kcmil_15_0_416_0_3_3_3_3

New Line.l(r:p3udm15359-p3udt4424lv) Units=km Length=0.042549100000000006 bus1=p3udt4424lv.1.2.3 bus2=p3udm15359.1.2.3 switch=n enabled=y phases=3 Linecode=3P_UG_AL_350kcmil_15_0_416_0_3_3_3_3

New Line.l(r:p3udm15360-p3ulv32346) Units=km Length=0.00812577 bus1=p3udm15360.1.2.3 bus2=p3ulv32346.1.2.3 switch=n enabled=y phases=3 Linecode=3P_UG_AL_750kcmil_25_0_416_0_3_3_3_3

New Line.l(r:p3udm15360-p3udt4424lv) Units=km Length=0.0768579 bus1=p3udt4424lv.1.2.3 bus2=p3udm15360.1.2.3 switch=n enabled=y phases=3 Linecode=3P_UG_AL_750kcmil_25_0_416_0_3_3_3_3

New Line.l(r:p3udt27465lv-p3ulv56239) Units=km Length=0.0114199 bus1=p3udt27465lv.1.2.3 bus2=p3ulv56239.1.2.3 switch=n enabled=y phases=3 Linecode=3P_UG_AL_350kcmil_15_0_416_0_3_3_3_3

New Line.l(r:p3udt31472lv-p3ulv76154) Units=km Length=0.0116191 bus1=p3udt31472lv.1.2.3 bus2=p3ulv76154.1.2.3 switch=n enabled=y phases=3 Linecode=3P_UG_AL_350kcmil_15_0_416_0_3_3_3_3

New Line.l(r:p3udt24186lv-p3ulv43906) Units=km Length=0.00886833 bus1=p3udt24186lv.1.2.3 bus2=p3ulv43906.1.2.3 switch=n enabled=y phases=3 Linecode=3P_UG_AL_350kcmil_15_0_416_0_3_3_3_3

New Line.l(r:p3udt817lv-p3ulv974) Units=km Length=0.0414141 bus1=p3udt817lv.1.2.3 bus2=p3ulv974.1.2.3 switch=n enabled=y phases=3 Linecode=3P_UG_AL_350kcmil_15_0_416_0_3_3_3_3

New Line.l(r:p3udt24186-p3udt817) Units=km Length=0.0504261 bus1=p3udt24186.1.2.3 bus2=p3udt817.1.2.3 switch=n enabled=y phases=3 Linecode=3P_OH_AL_ACSR_4/0_Penguin_12_47_0_3_3_3_3

New Line.l(r:p3udt24186-p3udt30052) Units=km Length=0.027037300000000004 bus1=p3udt30052.1.2.3 bus2=p3udt24186.1.2.3 switch=n enabled=y phases=3 Linecode=3P_OH_AL_ACSR_4/0_Penguin_12_47_0_3_3_3_3

New Line.l(r:p3udt30052-p3udt31207) Units=km Length=0.0485161 bus1=p3udt31207.1.2.3 bus2=p3udt30052.1.2.3 switch=n enabled=y phases=3 Linecode=3P_OH_AL_ACSR_4/0_Penguin_12_47_0_3_3_3_3

New Line.l(r:p3udt21432-p3udt31207) Units=km Length=0.245846 bus1=p3udt21432.1.2.3 bus2=p3udt31207.1.2.3 switch=n enabled=y phases=3 Linecode=3P_OH_AL_ACSR_4/0_Penguin_12_47_0_3_3_3_3

New Line.l(r:p3udt21432-p3udt31472) Units=km Length=0.0849077 bus1=p3udt31472.1.2.3 bus2=p3udt21432.1.2.3 switch=n enabled=y phases=3 Linecode=3P_OH_AL_ACSR_4/0_Penguin_12_47_0_3_3_3_3

New Line.l(r:p3udt30804lv-p3ulv72337) Units=km Length=0.00963089 bus1=p3udt30804lv.1.2.3 bus2=p3ulv72337.1.2.3 switch=n enabled=y phases=3 Linecode=3P_UG_AL_750kcmil_25_0_416_0_3_3_3_3

New Line.l(r:p3udt30804-p3udt31472) Units=km Length=0.0973554 bus1=p3udt31472.1.2.3 bus2=p3udt30804.1.2.3 switch=n enabled=y phases=3 Linecode=3P_OH_AL_ACSR_4/0_Penguin_12_47_0_3_3_3_3

New Line.l(r:p3udt27465-p3udt31472) Units=km Length=0.0976227 bus1=p3udt27465.1.2.3 bus2=p3udt31472.1.2.3 switch=n enabled=y phases=3 Linecode=3P_OH_AL_ACSR_4/0_Penguin_12_47_0_3_3_3_3

New Line.l(r:p3udt27465-p3udt4424) Units=km Length=0.0548771 bus1=p3udt4424.1.2.3 bus2=p3udt27465.1.2.3 switch=n enabled=y phases=3 Linecode=3P_OH_AL_ACSR_4/0_Penguin_12_47_0_3_3_3_3

New Line.l(r:p3udt31752lv-p3ulv77683) Units=km Length=0.0177176 bus1=p3udt31752lv.1.2.3 bus2=p3ulv77683.1.2.3 switch=n enabled=y phases=3 Linecode=3P_UG_AL_750kcmil_25_0_416_0_3_3_3_3

New Line.l(r:p3udt3738lv-p3ulv4148) Units=km Length=0.0214155 bus1=p3udt3738lv.1.2.3 bus2=p3ulv4148.1.2.3 switch=n enabled=y phases=3 Linecode=3P_UG_AL_350kcmil_15_0_416_0_3_3_3_3

New Line.l(r:p3udt31753lv-p3ulv77684) Units=km Length=0.0080913 bus1=p3udt31753lv.1.2.3 bus2=p3ulv77684.1.2.3 switch=n enabled=y phases=3 Linecode=3P_UG_AL_350kcmil_15_0_416_0_3_3_3_3

New Line.l(r:p3udt24904lv-p3ulv46326) Units=km Length=0.00911755 bus1=p3udt24904lv.1.2.3 bus2=p3ulv46326.1.2.3 switch=n enabled=y phases=3 Linecode=3P_UG_AL_350kcmil_15_0_416_0_3_3_3_3

New Line.l(r:p3udt25350lv-p3ulv47859) Units=km Length=0.0113332 bus1=p3udt25350lv.1.2.3 bus2=p3ulv47859.1.2.3 switch=n enabled=y phases=3 Linecode=3P_UG_AL_4/0_15_0_416_0_3_3_3_3

New Line.l(r:p3udt25349-p3udt25350) Units=km Length=0.0290572 bus1=p3udt25349.1.2.3 bus2=p3udt25350.1.2.3 switch=n enabled=y phases=3 Linecode=3P_OH_AL_ACSR_4/0_Penguin_12_47_0_3_3_3_3

New Line.l(r:p3udt24904-p3udt25349) Units=km Length=0.138744 bus1=p3udt24904.1.2.3 bus2=p3udt25349.1.2.3 switch=n enabled=y phases=3 Linecode=3P_OH_AL_ACSR_4/0_Penguin_12_47_0_3_3_3_3

New Line.l(r:p3udt24904-p3udt31753) Units=km Length=0.0580618 bus1=p3udt31753.1.2.3 bus2=p3udt24904.1.2.3 switch=n enabled=y phases=3 Linecode=3P_OH_AL_ACSR_4/0_Penguin_12_47_0_3_3_3_3

New Line.l(r:p3udt31753-p3udt3738) Units=km Length=0.107272 bus1=p3udt3738.1.2.3 bus2=p3udt31753.1.2.3 switch=n enabled=y phases=3 Linecode=3P_OH_AL_ACSR_4/0_Penguin_12_47_0_3_3_3_3

New Line.l(r:p3udt31752-p3udt3738) Units=km Length=0.041693 bus1=p3udt31752.1.2.3 bus2=p3udt3738.1.2.3 switch=n enabled=y phases=3 Linecode=3P_OH_AL_ACSR_4/0_Penguin_12_47_0_3_3_3_3

New Line.l(r:p3udt30050lv-p3ulv68501) Units=km Length=0.00745201 bus1=p3udt30050lv.1.2.3 bus2=p3ulv68501.1.2.3 switch=n enabled=y phases=3 Linecode=3P_UG_AL_750kcmil_25_0_416_0_3_3_3_3

New Line.l(r:p3udt7043lv-p3ulv8142) Units=km Length=0.016044100000000002 bus1=p3udt7043lv.1.2.3 bus2=p3ulv8142.1.2.3 switch=n enabled=y phases=3 Linecode=3P_UG_AL_750kcmil_25_0_416_0_3_3_3_3

New Line.l(r:p3udm24102-p3ulv8143) Units=km Length=0.0194575 bus1=p3udm24102.1.2.3 bus2=p3ulv8143.1.2.3 switch=n enabled=y phases=3 Linecode=3P_UG_AL_750kcmil_25_0_416_0_3_3_3_3

New Line.l(r:p3udm24102-p3udt7044lv) Units=km Length=0.00859741 bus1=p3udt7044lv.1.2.3 bus2=p3udm24102.1.2.3 switch=n enabled=y phases=3 Linecode=3P_UG_AL_750kcmil_25_0_416_0_3_3_3_3

New Line.l(r:p3udm24103-p3ulv30708) Units=km Length=0.0151164 bus1=p3udm24103.1.2.3 bus2=p3ulv30708.1.2.3 switch=n enabled=y phases=3 Linecode=3P_UG_AL_350kcmil_15_0_416_0_3_3_3_3

New Line.l(r:p3udm24103-p3udt7044lv) Units=km Length=0.0319056 bus1=p3udt7044lv.1.2.3 bus2=p3udm24103.1.2.3 switch=n enabled=y phases=3 Linecode=3P_UG_AL_350kcmil_15_0_416_0_3_3_3_3

New Line.l(r:p3udt18710-p3udt7044) Units=km Length=0.0755705 bus1=p3udt18710.1.2.3 bus2=p3udt7044.1.2.3 switch=n enabled=y phases=3 Linecode=3P_OH_AL_ACSR_4/0_Penguin_12_47_0_3_3_3_3

New Line.l(r:p3udt18710-p3udt7043) Units=km Length=0.0168146 bus1=p3udt7043.1.2.3 bus2=p3udt18710.1.2.3 switch=n enabled=y phases=3 Linecode=3P_OH_AL_ACSR_4/0_Penguin_12_47_0_3_3_3_3

New Line.l(r:p3udt30050-p3udt7043) Units=km Length=0.074904 bus1=p3udt30050.1.2.3 bus2=p3udt7043.1.2.3 switch=n enabled=y phases=3 Linecode=3P_OH_AL_ACSR_4/0_Penguin_12_47_0_3_3_3_3

New Line.l(r:p3udt30050-p3udt31752) Units=km Length=0.134241 bus1=p3udt31752.1.2.3 bus2=p3udt30050.1.2.3 switch=n enabled=y phases=3 Linecode=3P_OH_AL_ACSR_4/0_Penguin_12_47_0_3_3_3_3

New Line.l(r:p3udt24185lv-p3ulv43905) Units=km Length=0.0198686 bus1=p3udt24185lv.1.2.3 bus2=p3ulv43905.1.2.3 switch=n enabled=y phases=3 Linecode=3P_UG_AL_350kcmil_15_0_416_0_3_3_3_3

New Line.l(r:p3udt14956-p3udt24185) Units=km Length=0.001 bus1=p3udt14956.1.2.3 bus2=p3udt24185.1.2.3 switch=n enabled=y phases=3 Linecode=3P_OH_AL_ACSR_4/0_Penguin_12_47_0_3_3_3_3

New Line.l(r:p3udt14956-p3udt16924) Units=km Length=0.321879 bus1=p3udt16924.1.2.3 bus2=p3udt14956.1.2.3 switch=n enabled=y phases=3 Linecode=3P_OH_AL_ACSR_4/0_Penguin_12_47_0_3_3_3_3

New Line.l(r:p3udt1565-p3udt16924) Units=km Length=0.0914358 bus1=p3udt1565-p3udt16924x.1.2.3 bus2=p3udt1565-p3udt16924xx.1.2.3 switch=n enabled=y phases=3 Linecode=3P_UG_AL_4/0_25_12_47_0_3_3_3_3

New Line.l(r:p3udt20876lv-p3ulv33853) Units=km Length=0.0262315 bus1=p3udt20876lv.1.2.3 bus2=p3ulv33853.1.2.3 switch=n enabled=y phases=3 Linecode=3P_UG_AL_350kcmil_15_0_416_0_3_3_3_3

New Line.l(r:p3udt21668lv-p3ulv36181) Units=km Length=0.0259828 bus1=p3udt21668lv.1.2.3 bus2=p3ulv36181.1.2.3 switch=n enabled=y phases=3 Linecode=3P_UG_AL_350kcmil_15_0_416_0_3_3_3_3

New Line.l(r:p3udt26906lv-p3ulv53929) Units=km Length=0.0457816 bus1=p3udt26906lv.1.2.3 bus2=p3ulv53929.1.2.3 switch=n enabled=y phases=3 Linecode=3P_UG_AL_750kcmil_25_0_416_0_3_3_3_3

New Line.l(r:p3udt21668-p3udt26906) Units=km Length=0.14503 bus1=p3udt21668.1.2.3 bus2=p3udt26906.1.2.3 switch=n enabled=y phases=3 Linecode=3P_OH_AL_ACSR_4/0_Penguin_12_47_0_3_3_3_3

New Line.l(r:p3udt20876-p3udt21668) Units=km Length=0.332058 bus1=p3udt20876.1.2.3 bus2=p3udt21668.1.2.3 switch=n enabled=y phases=3 Linecode=3P_OH_AL_ACSR_4/0_Penguin_12_47_0_3_3_3_3

New Line.l(r:p3udt31085lv-p3ulv73857) Units=km Length=0.00563497 bus1=p3udt31085lv.1.2.3 bus2=p3ulv73857.1.2.3 switch=n enabled=y phases=3 Linecode=3P_UG_AL_350kcmil_15_0_416_0_3_3_3_3

New Line.l(r:p3udt8768lv-p3ulv10434) Units=km Length=0.0135306 bus1=p3udt8768lv.1.2.3 bus2=p3ulv10434.1.2.3 switch=n enabled=y phases=3 Linecode=3P_UG_AL_350kcmil_15_0_416_0_3_3_3_3

New Line.l(r:p3udt18711lv-p3ulv28431) Units=km Length=0.0402805 bus1=p3udt18711lv.1.2.3 bus2=p3ulv28431.1.2.3 switch=n enabled=y phases=3 Linecode=3P_UG_AL_350kcmil_15_0_416_0_3_3_3_3

New Line.l(r:p3udt18711-p3udt26127) Units=km Length=0.0191503 bus1=p3udt26127.1.2.3 bus2=p3udt18711.1.2.3 switch=n enabled=y phases=3 Linecode=3P_OH_AL_ACSR_4/0_Penguin_12_47_0_3_3_3_3

New Line.l(r:p3udt19017-p3udt26127) Units=km Length=0.0191403 bus1=p3udt19017.1.2.3 bus2=p3udt26127.1.2.3 switch=n enabled=y phases=3 Linecode=3P_OH_AL_ACSR_4/0_Penguin_12_47_0_3_3_3_3

New Line.l(r:p3udt19017-p3udt8768) Units=km Length=0.0191503 bus1=p3udt8768.1.2.3 bus2=p3udt19017.1.2.3 switch=n enabled=y phases=3 Linecode=3P_OH_AL_ACSR_4/0_Penguin_12_47_0_3_3_3_3

New Line.l(r:p3udt25347lv-p3ulv47856) Units=km Length=0.03298800000000001 bus1=p3udt25347lv.1.2.3 bus2=p3ulv47856.1.2.3 switch=n enabled=y phases=3 Linecode=3P_UG_AL_350kcmil_15_0_416_0_3_3_3_3

New Line.l(r:p3udt16525lv-p3ulv23670) Units=km Length=0.0233461 bus1=p3udt16525lv.1.2.3 bus2=p3ulv23670.1.2.3 switch=n enabled=y phases=3 Linecode=3P_UG_AL_350kcmil_15_0_416_0_3_3_3_3

New Line.l(r:p3udt16525-p3udt25347) Units=km Length=0.0884379 bus1=p3udt25347.1.2.3 bus2=p3udt16525.1.2.3 switch=n enabled=y phases=3 Linecode=3P_OH_AL_ACSR_4/0_Penguin_12_47_0_3_3_3_3

New Line.l(r:p3udt22700lv-p3ulv39193) Units=km Length=0.0328054 bus1=p3udt22700lv.1.2.3 bus2=p3ulv39193.1.2.3 switch=n enabled=y phases=3 Linecode=3P_UG_AL_350kcmil_15_0_416_0_3_3_3_3

New Line.l(r:p3udt22700-p3udt25347) Units=km Length=0.09307730000000002 bus1=p3udt25347.1.2.3 bus2=p3udt22700.1.2.3 switch=n enabled=y phases=3 Linecode=3P_OH_AL_ACSR_4/0_Penguin_12_47_0_3_3_3_3

New Line.l(r:p3udt25347-p3udt8768) Units=km Length=0.173797 bus1=p3udt8768.1.2.3 bus2=p3udt25347.1.2.3 switch=n enabled=y phases=3 Linecode=3P_OH_AL_ACSR_4/0_Penguin_12_47_0_3_3_3_3

New Line.l(r:p3udt31085-p3udt8768) Units=km Length=0.261482 bus1=p3udt31085.1.2.3 bus2=p3udt8768.1.2.3 switch=n enabled=y phases=3 Linecode=3P_OH_AL_ACSR_4/0_Penguin_12_47_0_3_3_3_3

New Line.l(r:p3udt20876-p3udt31085) Units=km Length=0.0715414 bus1=p3udt20876.1.2.3 bus2=p3udt31085.1.2.3 switch=n enabled=y phases=3 Linecode=3P_OH_AL_ACSR_4/0_Penguin_12_47_0_3_3_3_3

New Line.l(r:p3udt1565-p3udt20876) Units=km Length=0.261442 bus1=p3udt1565.1.2.3 bus2=p3udt20876.1.2.3 switch=n enabled=y phases=3 Linecode=3P_OH_AL_ACSR_4/0_Penguin_12_47_0_3_3_3_3

New Line.l(r:p3udt10382-p3udt20296) Units=km Length=0.113448 bus1=p3udt10382-p3udt20296x.1.2.3 bus2=p3udt20296.1.2.3 switch=n enabled=y phases=3 Linecode=3P_OH_AL_ACSR_1033kcmil_Curlew_12.47_1_3_3_3_3

New Line.l(r:p3udt25350-p3udt7044) Units=km Length=0.10978200000000002 bus1=p3udt25350-p3udt7044x.1.2.3 bus2=p3udt25350.1.2.3 switch=n enabled=y phases=3 Linecode=3P_OH_AL_ACSR_1033kcmil_Curlew_12.47_1_3_3_3_3

New Line.l(r:p3udt25349-p3udt31207) Units=km Length=0.136645 bus1=p3udt25349-p3udt31207x.1.2.3 bus2=p3udt31207.1.2.3 switch=n enabled=y phases=3 Linecode=3P_OH_AL_ACSR_1033kcmil_Curlew_12.47_1_3_3_3_3

New Line.padswitch(r:p3udt28488-p3udt29737)p3u_169373 Units=km Length=0.001 bus1=p3udt28488.1.2.3 bus2=p3udt28488-p3udt29737x.1.2.3 switch=y enabled=y phases=3 Linecode=padswitch_3_3_3_3

New Line.padswitch(r:p3udt28488-p3udt29737)p3u_169374 Units=km Length=0.001 bus1=p3udt28488-p3udt29737xx.1.2.3 bus2=p3udt29737.1.2.3 switch=y enabled=y phases=3 Linecode=padswitch_3_4_3_3_3

New Line.padswitch(r:p3udt28488-p3udt31471)p3u_169375 Units=km Length=0.001 bus1=p3udt31471.1.2.3 bus2=p3udt28488-p3udt31471xx.1.2.3 switch=y enabled=y phases=3 Linecode=padswitch_3_4_3_1_3_3

New Line.padswitch(r:p3udt28488-p3udt31471)p3u_169376 Units=km Length=0.001 bus1=p3udt28488-p3udt31471x.1.2.3 bus2=p3udt28488.1.2.3 switch=y enabled=y phases=3 Linecode=padswitch_3_4_3_1_3_1_3

New Line.padswitch(r:p3udt31471-p3udt31621)p3u_169377 Units=km Length=0.001 bus1=p3udt31621.1.2.3 bus2=p3udt31471-p3udt31621xx.1.2.3 switch=y enabled=y phases=3 Linecode=padswitch_3_4_3_1_3_3

New Line.padswitch(r:p3udt31471-p3udt31621)p3u_169378 Units=km Length=0.001 bus1=p3udt31471-p3udt31621x.1.2.3 bus2=p3udt31471.1.2.3 switch=y enabled=y phases=3 Linecode=padswitch_3_4_3_1_3_3

New Line.padswitch(r:p3udt30802-p3udt31621)p3u_169379 Units=km Length=0.001 bus1=p3udt30802.1.2.3 bus2=p3udt30802-p3udt31621x.1.2.3 switch=y enabled=y phases=3 Linecode=padswitch_3_4_3_1_3_3

New Line.padswitch(r:p3udt30802-p3udt31621)p3u_169380 Units=km Length=0.001 bus1=p3udt30802-p3udt31621xx.1.2.3 bus2=p3udt31621.1.2.3 switch=y enabled=y phases=3 Linecode=padswitch_3_4_3_1_3_3

New Line.padswitch(r:p3udt30802-p3umv36)p3u_169367 Units=km Length=0.001 bus1=p3udt30802.1.2.3 bus2=p3udt30802-p3umv36x.1.2.3 switch=y enabled=y phases=3 Linecode=padswitch_3_4_3_1_3_1_3_1

New Line.padswitch(r:p3udt30802-p3umv36)p3u_169368 Units=km Length=0.001 bus1=p3udt30802-p3umv36xx.1.2.3 bus2=p3umv36.1.2.3 switch=y enabled=y phases=3 Linecode=padswitch_3_4_3_1_3_1_3_1

New Line.padswitch(r:p3udt30051-p3udt31621)p3u_169369 Units=km Length=0.001 bus1=p3udt31621.1.2.3 bus2=p3udt30051-p3udt31621xx.1.2.3 switch=y enabled=y phases=3 Linecode=padswitch_3_4_3_1_3_3

New Line.padswitch(r:p3udt30051-p3udt31621)p3u_169370 Units=km Length=0.001 bus1=p3udt30051-p3udt31621x.1.2.3 bus2=p3udt30051.1.2.3 switch=y enabled=y phases=3 Linecode=padswitch_3_4_3_1_3_3

New Line.padswitch(r:p3udt1565-p3udt16924)p3u_169371 Units=km Length=0.001 bus1=p3udt1565.1.2.3 bus2=p3udt1565-p3udt16924x.1.2.3 switch=y enabled=y phases=3 Linecode=padswitch_3_4_3_1_3_1_3_1

New Line.padswitch(r:p3udt1565-p3udt16924)p3u_169372 Units=km Length=0.001 bus1=p3udt1565-p3udt16924xx.1.2.3 bus2=p3udt16924.1.2.3 switch=y enabled=y phases=3 Linecode=padswitch_3_4_3_1_3_1_3_1

New Line.elbswitch(r:p3udt25350-p3udt7044)p3u_206720 Units=km Length=0.001 bus1=p3udt7044.1.2.3 bus2=p3udt25350-p3udt7044x.1.2.3 switch=y enabled=n phases=3 Linecode=elbswitch_3_3_3_3

New Line.elbswitch(r:p3udt25349-p3udt31207)p3u_206780 Units=km Length=0.001 bus1=p3udt25349.1.2.3 bus2=p3udt25349-p3udt31207x.1.2.3 switch=y enabled=n phases=3 Linecode=elbswitch_3_3_3_3

New Line.fuse(r:p3udt29134-p3udt7043)p3u_207548 Units=km Length=0.001 bus1=p3udt7043.2 bus2=p3udt29134-p3udt7043x.2 switch=n enabled=y phases=1 Linecode=fuse_1_1_1_1

New Fuse.Fuse_fuse(r:p3udt29134-p3udt7043)p3u_207548 monitoredobj=Line.fuse(r:p3udt29134-p3udt7043)p3u_207548 enabled=y ratedcurrent=100.0

New Line.fuse(r:p3udt24434-p3udt7044)p3u_207549 Units=km Length=0.001 bus1=p3udt7044.1 bus2=p3udt24434-p3udt7044x.1 switch=n enabled=y phases=1 Linecode=fuse_1_7_1_1_1

New Fuse.Fuse_fuse(r:p3udt24434-p3udt7044)p3u_207549 monitoredobj=Line.fuse(r:p3udt24434-p3udt7044)p3u_207549 enabled=y ratedcurrent=100.0

New Line.fuse(r:p3udt14956-p3udt15764)p3u_208265 Units=km Length=0.001 bus1=p3udt14956.3 bus2=p3udt14956-p3udt15764x.3 switch=n enabled=y phases=1 Linecode=fuse_1_1_1_1

New Fuse.Fuse_fuse(r:p3udt14956-p3udt15764)p3u_208265 monitoredobj=Line.fuse(r:p3udt14956-p3udt15764)p3u_208265 enabled=y ratedcurrent=100.0

New Line.fuse(r:p3udt18711-p3udt9333)p3u_208641 Units=km Length=0.001 bus1=p3udt18711.2 bus2=p3udt18711-p3udt9333x.2 switch=n enabled=y phases=1 Linecode=fuse_1_7_1_1_1

New Fuse.Fuse_fuse(r:p3udt18711-p3udt9333)p3u_208641 monitoredobj=Line.fuse(r:p3udt18711-p3udt9333)p3u_208641 enabled=y ratedcurrent=100.0

New Line.fuse(r:p3udt10384-p3udt21668)p3u_208952 Units=km Length=0.001 bus1=p3udt21668.1 bus2=p3udt10384-p3udt21668x.1 switch=n enabled=y phases=1 Linecode=fuse_1_1_1_1

New Fuse.Fuse_fuse(r:p3udt10384-p3udt21668)p3u_208952 monitoredobj=Line.fuse(r:p3udt10384-p3udt21668)p3u_208952 enabled=y ratedcurrent=100.0

New Line.fuse(r:p3udt22700-p3udt27649)p3u_209074 Units=km Length=0.001 bus1=p3udt22700.3 bus2=p3udt22700-p3udt27649x.3 switch=n enabled=y phases=1 Linecode=fuse_1_1_1_1

New Fuse.Fuse_fuse(r:p3udt22700-p3udt27649)p3u_209074 monitoredobj=Line.fuse(r:p3udt22700-p3udt27649)p3u_209074 enabled=y ratedcurrent=100.0

New Line.l(r:p3udt20296-p3uhs2_1247)_disconnect Units=km Length=0.001 bus1=p3udt20296-p3uhs2_1247x_b1_1.1.2.3 bus2=p3udt20296-p3uhs2_1247x_b2_1.1.2.3 switch=y enabled=y phases=3 Linecode=3P_OH_AL_ACSR_1033kcmil_Curlew_12.47_1_3_3_3_3

New Line.l(r:p3udt20296-p3uhs2_1247)_cont Units=km Length=3.015927 bus1=p3udt20296-p3uhs2_1247x_b2_1.1.2.3 bus2=p3udt20296.1.2.3 switch=n enabled=y phases=3 Linecode=3P_OH_AL_ACSR_1033kcmil_Curlew_12.47_1_3_3_3_3
