New Line.l(r:p3udt2300lv-p3ulv2542) Units=km Length=0.0161447 bus1=p3udt2300lv.1.2 bus2=p3ulv2542.1.2 switch=n enabled=y phases=2 Linecode=1P_OH_AL_2/0_Rucina_0_416_0_2_2_2_2

New Line.l(r:p3udt2300lv-p3ulv7341) Units=km Length=0.012663300000000002 bus1=p3udt2300lv.1.2 bus2=p3ulv7341.1.2 switch=n enabled=y phases=2 Linecode=1P_OH_AL_2/0_Rucina_0_416_0_2_2_2_2

New Line.l(r:p3udt2300lv-p3ulv78432) Units=km Length=0.0128476 bus1=p3udt2300lv.1.2 bus2=p3ulv78432.1.2 switch=n enabled=y phases=2 Linecode=1P_OH_AL_2/0_Rucina_0_416_0_2_2_2_2

New Line.l(r:p3udt3014lv-p3ulv3328) Units=km Length=0.00582001 bus1=p3udt3014lv.1.2 bus2=p3ulv3328.1.2 switch=n enabled=y phases=2 Linecode=1P_OH_AL_2/0_Rucina_0_416_0_2_2_2_2

New Line.l(r:p3udt4421lv-p3ulv4914) Units=km Length=0.0105045 bus1=p3udt4421lv.1.2 bus2=p3ulv4914.1.2 switch=n enabled=y phases=2 Linecode=1P_OH_AL_2/0_Rucina_0_416_0_2_2_2_2

New Line.l(r:p3udm15350-p3ulv30701) Units=km Length=0.00773109 bus1=p3udm15350.1.2 bus2=p3ulv30701.1.2 switch=n enabled=y phases=2 Linecode=1P_OH_AL_2/0_Rucina_0_416_0_2_2_2_2

New Line.l(r:p3udm15350-p3udt4421lv) Units=km Length=0.0193889 bus1=p3udt4421lv.1.2 bus2=p3udm15350.1.2 switch=n enabled=y phases=2 Linecode=1P_OH_AL_2/0_Rucina_0_416_0_2_2_2_2

New Line.l(r:p3udm15351-p3ulv56233) Units=km Length=0.011848700000000002 bus1=p3udm15351.1.2 bus2=p3ulv56233.1.2 switch=n enabled=y phases=2 Linecode=1P_OH_AL_2/0_Rucina_0_416_0_2_2_2_2

New Line.l(r:p3udm15351-p3udt4421lv) Units=km Length=0.019385 bus1=p3udt4421lv.1.2 bus2=p3udm15351.1.2 switch=n enabled=y phases=2 Linecode=1P_OH_AL_2/0_Rucina_0_416_0_2_2_2_2

New Line.l(r:p3udt5114lv-p3ulv26904) Units=km Length=0.0123684 bus1=p3udt5114lv.1.2 bus2=p3ulv26904.1.2 switch=n enabled=y phases=2 Linecode=1P_OH_AL_2/0_Rucina_0_416_0_2_2_2_2

New Line.l(r:p3udt5114lv-p3ulv33110) Units=km Length=0.0133872 bus1=p3udt5114lv.1.2 bus2=p3ulv33110.1.2 switch=n enabled=y phases=2 Linecode=1P_OH_AL_2/0_Rucina_0_416_0_2_2_2_2

New Line.l(r:p3udm17669-p3ulv5735) Units=km Length=0.013416800000000001 bus1=p3udm17669.1.2 bus2=p3ulv5735.1.2 switch=n enabled=y phases=2 Linecode=1P_OH_AL_2/0_Rucina_0_416_0_2_2_2_2

New Line.l(r:p3udm17669-p3ulv7342) Units=km Length=0.0106793 bus1=p3udm17669.1.2 bus2=p3ulv7342.1.2 switch=n enabled=y phases=2 Linecode=1P_OH_AL_2/0_Rucina_0_416_0_2_2_2_2

New Line.l(r:p3udm17669-p3udt5114lv) Units=km Length=0.0193802 bus1=p3udt5114lv.1.2 bus2=p3udm17669.1.2 switch=n enabled=y phases=2 Linecode=1P_OH_AL_2/0_Rucina_0_416_0_2_2_2_2

New Line.l(r:p3udt5115lv-p3ulv63105) Units=km Length=0.00964061 bus1=p3udt5115lv.1.2 bus2=p3ulv63105.1.2 switch=n enabled=y phases=2 Linecode=1P_OH_AL_2/0_Rucina_0_416_0_2_2_2_2

New Line.l(r:p3udm17673-p3ulv5736) Units=km Length=0.014197300000000001 bus1=p3udm17673.1.2 bus2=p3ulv5736.1.2 switch=n enabled=y phases=2 Linecode=1P_OH_AL_2/0_Rucina_0_416_0_2_2_2_2

New Line.l(r:p3udm17673-p3ulv28422) Units=km Length=0.0124286 bus1=p3udm17673.1.2 bus2=p3ulv28422.1.2 switch=n enabled=y phases=2 Linecode=1P_OH_AL_2/0_Rucina_0_416_0_2_2_2_2

New Line.l(r:p3udm17673-p3udt5115lv) Units=km Length=0.0193889 bus1=p3udt5115lv.1.2 bus2=p3udm17673.1.2 switch=n enabled=y phases=2 Linecode=1P_OH_AL_2/0_Rucina_0_416_0_2_2_2_2

New Line.l(r:p3udm17675-p3ulv45537) Units=km Length=0.018878 bus1=p3udm17675.1.2 bus2=p3ulv45537.1.2 switch=n enabled=y phases=2 Linecode=1P_UG_AL_1/0_Brenau_0_416_0_2_2_2_2

New Line.l(r:p3udm17675-p3udt5115lv) Units=km Length=0.05400630000000001 bus1=p3udt5115lv.1.2 bus2=p3udm17675.1.2 switch=n enabled=y phases=2 Linecode=1P_OH_AL_4/0_Zuzara_0_416_0_2_2_2_2

New Line.l(r:p3udm21953-p3ulv7343) Units=km Length=0.0238601 bus1=p3udm21953.1.2 bus2=p3ulv7343.1.2 switch=n enabled=y phases=2 Linecode=1P_UG_AL_1/0_Brenau_0_416_0_2_2_2_2

New Line.l(r:p3udm21953-p3udt6408lv) Units=km Length=0.0188778 bus1=p3udt6408lv.1.2 bus2=p3udm21953.1.2 switch=n enabled=y phases=2 Linecode=1P_UG_AL_1/0_Brenau_0_416_0_2_2_2_2

New Line.l(r:p3udm21954-p3ulv32338) Units=km Length=0.0248891 bus1=p3udm21954.1.2 bus2=p3ulv32338.1.2 switch=n enabled=y phases=2 Linecode=1P_UG_AL_1/0_Brenau_0_416_0_2_2_2_2

New Line.l(r:p3udm21954-p3ulv63106) Units=km Length=0.0244876 bus1=p3udm21954.1.2 bus2=p3ulv63106.1.2 switch=n enabled=y phases=2 Linecode=1P_UG_AL_1/0_Brenau_0_416_0_2_2_2_2

New Line.l(r:p3udm21954-p3udt6408lv) Units=km Length=0.0094323 bus1=p3udt6408lv.1.2 bus2=p3udm21954.1.2 switch=n enabled=y phases=2 Linecode=1P_UG_AL_4/0_Sweetbriar_0_416_0_2_2_2_2

New Line.l(r:p3udt6409lv-p3ulv7344) Units=km Length=0.0229195 bus1=p3udt6409lv.1.2 bus2=p3ulv7344.1.2 switch=n enabled=y phases=2 Linecode=1P_OH_AL_2/0_Rucina_0_416_0_2_2_2_2

New Line.l(r:p3udt8763lv-p3ulv10427) Units=km Length=0.0160367 bus1=p3udt8763lv.1.2 bus2=p3ulv10427.1.2 switch=n enabled=y phases=2 Linecode=1P_UG_AL_4/0_Sweetbriar_0_416_0_2_2_2_2

New Line.l(r:p3udt9326lv-p3ulv11254) Units=km Length=0.0146088 bus1=p3udt9326lv.1.2 bus2=p3ulv11254.1.2 switch=n enabled=y phases=2 Linecode=1P_OH_AL_2/0_Rucina_0_416_0_2_2_2_2

New Line.l(r:p3udt9868lv-p3ulv12033) Units=km Length=0.011535200000000002 bus1=p3udt9868lv.1.2 bus2=p3ulv12033.1.2 switch=n enabled=y phases=2 Linecode=1P_OH_AL_2/0_Rucina_0_416_0_2_2_2_2

New Line.l(r:p3udt10381lv-p3ulv12786) Units=km Length=0.0125508 bus1=p3udt10381lv.1.2 bus2=p3ulv12786.1.2 switch=n enabled=y phases=2 Linecode=1P_OH_AL_2/0_Rucina_0_416_0_2_2_2_2

New Line.l(r:p3udt14955lv-p3ulv20547) Units=km Length=0.0132641 bus1=p3udt14955lv.1.2 bus2=p3ulv20547.1.2 switch=n enabled=y phases=2 Linecode=1P_OH_AL_2/0_Rucina_0_416_0_2_2_2_2

New Line.l(r:p3udt16918lv-p3ulv24523) Units=km Length=0.0154967 bus1=p3udt16918lv.1.2 bus2=p3ulv24523.1.2 switch=n enabled=y phases=2 Linecode=1P_OH_AL_2/0_Rucina_0_416_0_2_2_2_2

New Line.l(r:p3udt16919lv-p3ulv24524) Units=km Length=0.0198112 bus1=p3udt16919lv.1.2 bus2=p3ulv24524.1.2 switch=n enabled=y phases=2 Linecode=1P_OH_AL_2/0_Rucina_0_416_0_2_2_2_2

New Line.l(r:p3udt16919lv-p3ulv60790) Units=km Length=0.0108649 bus1=p3udt16919lv.1.2 bus2=p3ulv60790.1.2 switch=n enabled=y phases=2 Linecode=1P_OH_AL_2/0_Rucina_0_416_0_2_2_2_2

New Line.l(r:p3udm52625-p3ulv28421) Units=km Length=0.0188405 bus1=p3udm52625.1.2 bus2=p3ulv28421.1.2 switch=n enabled=y phases=2 Linecode=1P_OH_AL_2/0_Rucina_0_416_0_2_2_2_2

New Line.l(r:p3udm52625-p3ulv56232) Units=km Length=0.0129349 bus1=p3udm52625.1.2 bus2=p3ulv56232.1.2 switch=n enabled=y phases=2 Linecode=1P_OH_AL_2/0_Rucina_0_416_0_2_2_2_2

New Line.l(r:p3udm52625-p3udt16919lv) Units=km Length=0.0193889 bus1=p3udt16919lv.1.2 bus2=p3udm52625.1.2 switch=n enabled=y phases=2 Linecode=1P_OH_AL_2/0_Rucina_0_416_0_2_2_2_2

New Line.l(r:p3udt17290lv-p3ulv25314) Units=km Length=0.00991952 bus1=p3udt17290lv.1.2 bus2=p3ulv25314.1.2 switch=n enabled=y phases=2 Linecode=1P_OH_AL_2/0_Rucina_0_416_0_2_2_2_2

New Line.l(r:p3udt19681lv-p3ulv30704) Units=km Length=0.0222617 bus1=p3udt19681lv.1.2 bus2=p3ulv30704.1.2 switch=n enabled=y phases=2 Linecode=1P_OH_AL_2/0_Rucina_0_416_0_2_2_2_2

New Line.l(r:p3udt19988lv-p3ulv67706) Units=km Length=0.008870140000000002 bus1=p3udt19988lv.1.2 bus2=p3ulv67706.1.2 switch=n enabled=y phases=2 Linecode=1P_OH_AL_2/0_Rucina_0_416_0_2_2_2_2

New Line.l(r:p3udm59802-p3ulv31486) Units=km Length=0.017021600000000005 bus1=p3udm59802.1.2 bus2=p3ulv31486.1.2 switch=n enabled=y phases=2 Linecode=1P_OH_AL_2/0_Rucina_0_416_0_2_2_2_2

New Line.l(r:p3udm59802-p3udt19988lv) Units=km Length=0.0109914 bus1=p3udt19988lv.1.2 bus2=p3udm59802.1.2 switch=n enabled=y phases=2 Linecode=1P_OH_AL_2/0_Rucina_0_416_0_2_2_2_2

New Line.l(r:p3udm59803-p3ulv35429) Units=km Length=0.0146445 bus1=p3udm59803.1.2 bus2=p3ulv35429.1.2 switch=n enabled=y phases=2 Linecode=1P_OH_AL_2/0_Rucina_0_416_0_2_2_2_2

New Line.l(r:p3udm59803-p3udt19988lv) Units=km Length=0.0109781 bus1=p3udt19988lv.1.2 bus2=p3udm59803.1.2 switch=n enabled=y phases=2 Linecode=1P_OH_AL_2/0_Rucina_0_416_0_2_2_2_2

New Line.l(r:p3udt20294lv-p3ulv32336) Units=km Length=0.0125787 bus1=p3udt20294lv.1.2 bus2=p3ulv32336.1.2 switch=n enabled=y phases=2 Linecode=1P_OH_AL_2/0_Rucina_0_416_0_2_2_2_2

New Line.l(r:p3udt20587lv-p3ulv38429) Units=km Length=0.0133263 bus1=p3udt20587lv.1.2 bus2=p3ulv38429.1.2 switch=n enabled=y phases=2 Linecode=1P_OH_AL_2/0_Rucina_0_416_0_2_2_2_2

New Line.l(r:p3udm61146-p3ulv33112) Units=km Length=0.0149197 bus1=p3udm61146.1.2 bus2=p3ulv33112.1.2 switch=n enabled=y phases=2 Linecode=1P_OH_AL_2/0_Rucina_0_416_0_2_2_2_2

New Line.l(r:p3udm61146-p3udt20587lv) Units=km Length=0.0431215 bus1=p3udt20587lv.1.2 bus2=p3udm61146.1.2 switch=n enabled=y phases=2 Linecode=1P_OH_AL_4/0_Zuzara_0_416_0_2_2_2_2

New Line.l(r:p3udt21157lv-p3ulv34635) Units=km Length=0.009745670000000001 bus1=p3udt21157lv.1.2 bus2=p3ulv34635.1.2 switch=n enabled=y phases=2 Linecode=1P_OH_AL_2/0_Rucina_0_416_0_2_2_2_2

New Line.l(r:p3udt22165lv-p3ulv37648) Units=km Length=0.018674500000000004 bus1=p3udt22165lv.1.2 bus2=p3ulv37648.1.2 switch=n enabled=y phases=2 Linecode=1P_OH_AL_2/0_Rucina_0_416_0_2_2_2_2

New Line.l(r:p3udt22429lv-p3ulv38430) Units=km Length=0.0196706 bus1=p3udt22429lv.1.2 bus2=p3ulv38430.1.2 switch=n enabled=y phases=2 Linecode=1P_UG_AL_4/0_Sweetbriar_0_416_0_2_2_2_2

New Line.l(r:p3udm64822-p3ulv56981) Units=km Length=0.020303 bus1=p3udm64822.1.2 bus2=p3ulv56981.1.2 switch=n enabled=y phases=2 Linecode=1P_UG_AL_1/0_Brenau_0_416_0_2_2_2_2

New Line.l(r:p3udm64822-p3udt22429lv) Units=km Length=0.00909886 bus1=p3udt22429lv.1.2 bus2=p3udm64822.1.2 switch=n enabled=y phases=2 Linecode=1P_UG_AL_1/0_Brenau_0_416_0_2_2_2_2

New Line.l(r:p3udt22986lv-p3ulv40005) Units=km Length=0.0112975 bus1=p3udt22986lv.1.2 bus2=p3ulv40005.1.2 switch=n enabled=y phases=2 Linecode=1P_OH_AL_2/0_Rucina_0_416_0_2_2_2_2

New Line.l(r:p3udt22986lv-p3ulv53170) Units=km Length=0.0240168 bus1=p3udt22986lv.1.2 bus2=p3ulv53170.1.2 switch=n enabled=y phases=2 Linecode=1P_OH_AL_2/0_Rucina_0_416_0_2_2_2_2

New Line.l(r:p3udt22986lv-p3ulv68497) Units=km Length=0.00805234 bus1=p3udt22986lv.1.2 bus2=p3ulv68497.1.2 switch=n enabled=y phases=2 Linecode=1P_OH_AL_2/0_Rucina_0_416_0_2_2_2_2

New Line.l(r:p3udt23244lv-p3ulv40804) Units=km Length=0.011009000000000001 bus1=p3udt23244lv.1.2 bus2=p3ulv40804.1.2 switch=n enabled=y phases=2 Linecode=1P_OH_AL_2/0_Rucina_0_416_0_2_2_2_2

New Line.l(r:p3udm68461-p3ulv44757) Units=km Length=0.00877009 bus1=p3udm68461.1.2 bus2=p3ulv44757.1.2 switch=n enabled=y phases=2 Linecode=1P_OH_AL_2/0_Rucina_0_416_0_2_2_2_2

New Line.l(r:p3udm68461-p3udt24432lv) Units=km Length=0.0341449 bus1=p3udt24432lv.1.2 bus2=p3udm68461.1.2 switch=n enabled=y phases=2 Linecode=1P_OH_AL_4/0_Zuzara_0_416_0_2_2_2_2

New Line.l(r:p3udm68462-p3ulv56979) Units=km Length=0.0121598 bus1=p3udm68462.1.2 bus2=p3ulv56979.1.2 switch=n enabled=y phases=2 Linecode=1P_OH_AL_2/0_Rucina_0_416_0_2_2_2_2

New Line.l(r:p3udm68462-p3udt24432lv) Units=km Length=0.0152091 bus1=p3udt24432lv.1.2 bus2=p3udm68462.1.2 switch=n enabled=y phases=2 Linecode=1P_OH_AL_2/0_Rucina_0_416_0_2_2_2_2

New Line.l(r:p3udt24650lv-p3ulv45538) Units=km Length=0.0246091 bus1=p3udt24650lv.1.2 bus2=p3ulv45538.1.2 switch=n enabled=y phases=2 Linecode=1P_UG_AL_4/0_Sweetbriar_0_416_0_2_2_2_2

New Line.l(r:p3udt24650lv-p3ulv57773) Units=km Length=0.0238734 bus1=p3udt24650lv.1.2 bus2=p3ulv57773.1.2 switch=n enabled=y phases=2 Linecode=1P_UG_AL_2/0_Converse_0_416_0_2_2_2_2

New Line.l(r:p3udt24650lv-p3ulv74605) Units=km Length=0.0241943 bus1=p3udt24650lv.1.2 bus2=p3ulv74605.1.2 switch=n enabled=y phases=2 Linecode=1P_UG_AL_1/0_Brenau_0_416_0_2_2_2_2

New Line.l(r:p3udm68833-p3ulv55471) Units=km Length=0.0245517 bus1=p3udm68833.1.2 bus2=p3ulv55471.1.2 switch=n enabled=y phases=2 Linecode=1P_UG_AL_1/0_Brenau_0_416_0_2_2_2_2

New Line.l(r:p3udm68833-p3udt24650lv) Units=km Length=0.00943663 bus1=p3udt24650lv.1.2 bus2=p3udm68833.1.2 switch=n enabled=y phases=2 Linecode=1P_UG_AL_1/0_Brenau_0_416_0_2_2_2_2

New Line.l(r:p3udt25540lv-p3ulv48568) Units=km Length=0.0218658 bus1=p3udt25540lv.1.2 bus2=p3ulv48568.1.2 switch=n enabled=y phases=2 Linecode=1P_OH_AL_2/0_Rucina_0_416_0_2_2_2_2

New Line.l(r:p3udt25948lv-p3ulv50101) Units=km Length=0.00819962 bus1=p3udt25948lv.1.2 bus2=p3ulv50101.1.2 switch=n enabled=y phases=2 Linecode=1P_OH_AL_2/0_Rucina_0_416_0_2_2_2_2

New Line.l(r:p3udm70955-p3ulv61568) Units=km Length=0.0126047 bus1=p3udm70955.1.2 bus2=p3ulv61568.1.2 switch=n enabled=y phases=2 Linecode=1P_OH_AL_2/0_Rucina_0_416_0_2_2_2_2

New Line.l(r:p3udm70955-p3udt25948lv) Units=km Length=0.019096900000000003 bus1=p3udt25948lv.1.2 bus2=p3udm70955.1.2 switch=n enabled=y phases=2 Linecode=1P_OH_AL_2/0_Rucina_0_416_0_2_2_2_2

New Line.l(r:p3udt25949lv-p3ulv50102) Units=km Length=0.0182034 bus1=p3udt25949lv.1.2 bus2=p3ulv50102.1.2 switch=n enabled=y phases=2 Linecode=1P_OH_AL_2/0_Rucina_0_416_0_2_2_2_2

New Line.l(r:p3udt27098lv-p3ulv54712) Units=km Length=0.00820196 bus1=p3udt27098lv.1.2 bus2=p3ulv54712.1.2 switch=n enabled=y phases=2 Linecode=1P_OH_AL_2/0_Rucina_0_416_0_2_2_2_2

New Line.l(r:p3udm73166-p3ulv56234) Units=km Length=0.009968720000000002 bus1=p3udm73166.1.2 bus2=p3ulv56234.1.2 switch=n enabled=y phases=2 Linecode=1P_UG_AL_1/0_Brenau_0_416_0_2_2_2_2

New Line.l(r:p3udm73166-p3ulv62326) Units=km Length=0.0204053 bus1=p3udm73166.1.2 bus2=p3ulv62326.1.2 switch=n enabled=y phases=2 Linecode=1P_UG_AL_1/0_Brenau_0_416_0_2_2_2_2

New Line.l(r:p3udm73166-p3udt27463lv) Units=km Length=0.00866058 bus1=p3udt27463lv.1.2 bus2=p3udm73166.1.2 switch=n enabled=y phases=2 Linecode=1P_UG_AL_4/0_Sweetbriar_0_416_0_2_2_2_2

New Line.l(r:p3udm73167-p3ulv56235) Units=km Length=0.0184826 bus1=p3udm73167.1.2 bus2=p3ulv56235.1.2 switch=n enabled=y phases=2 Linecode=1P_UG_AL_2/0_Converse_0_416_0_2_2_2_2

New Line.l(r:p3udm73167-p3udt27463lv) Units=km Length=0.0086552 bus1=p3udt27463lv.1.2 bus2=p3udm73167.1.2 switch=n enabled=y phases=2 Linecode=1P_UG_AL_2/0_Converse_0_416_0_2_2_2_2

New Line.l(r:p3udt27644lv-p3ulv56980) Units=km Length=0.0109335 bus1=p3udt27644lv.1.2 bus2=p3ulv56980.1.2 switch=n enabled=y phases=2 Linecode=1P_OH_AL_2/0_Rucina_0_416_0_2_2_2_2

New Line.l(r:p3udt28485lv-p3ulv60789) Units=km Length=0.00895072 bus1=p3udt28485lv.1.2 bus2=p3ulv60789.1.2 switch=n enabled=y phases=2 Linecode=1P_OH_AL_2/0_Rucina_0_416_0_2_2_2_2

New Line.l(r:p3udt28647lv-p3ulv61569) Units=km Length=0.0173312 bus1=p3udt28647lv.1.2 bus2=p3ulv61569.1.2 switch=n enabled=y phases=2 Linecode=1P_OH_AL_2/0_Rucina_0_416_0_2_2_2_2

New Line.l(r:p3udt28810lv-p3ulv62324) Units=km Length=0.0171567 bus1=p3udt28810lv.1.2 bus2=p3ulv62324.1.2 switch=n enabled=y phases=2 Linecode=1P_OH_AL_2/0_Rucina_0_416_0_2_2_2_2

New Line.l(r:p3udt28965lv-p3ulv63107) Units=km Length=0.0121455 bus1=p3udt28965lv.1.2 bus2=p3ulv63107.1.2 switch=n enabled=y phases=2 Linecode=1P_OH_AL_2/0_Rucina_0_416_0_2_2_2_2

New Line.l(r:p3udt29132lv-p3ulv63848) Units=km Length=0.0124141 bus1=p3udt29132lv.1.2 bus2=p3ulv63848.1.2 switch=n enabled=y phases=2 Linecode=1P_OH_AL_2/0_Rucina_0_416_0_2_2_2_2

New Line.l(r:p3udt29133lv-p3ulv63849) Units=km Length=0.0195732 bus1=p3udt29133lv.1.2 bus2=p3ulv63849.1.2 switch=n enabled=y phases=2 Linecode=1P_UG_AL_4/0_Sweetbriar_0_416_0_2_2_2_2

New Line.l(r:p3udt29576lv-p3ulv66140) Units=km Length=0.0182721 bus1=p3udt29576lv.1.2 bus2=p3ulv66140.1.2 switch=n enabled=y phases=2 Linecode=1P_UG_AL_4/0_Sweetbriar_0_416_0_2_2_2_2

New Line.l(r:p3udt30350lv-p3ulv70019) Units=km Length=0.0164759 bus1=p3udt30350lv.1.2 bus2=p3ulv70019.1.2 switch=n enabled=y phases=2 Linecode=1P_OH_AL_2/0_Rucina_0_416_0_2_2_2_2

New Line.l(r:p3udt30800lv-p3ulv72332) Units=km Length=0.0109299 bus1=p3udt30800lv.1.2 bus2=p3ulv72332.1.2 switch=n enabled=y phases=2 Linecode=1P_OH_AL_2/0_Rucina_0_416_0_2_2_2_2

New Line.l(r:p3udt31083lv-p3ulv73853) Units=km Length=0.0133375 bus1=p3udt31083lv.1.2 bus2=p3ulv73853.1.2 switch=n enabled=y phases=2 Linecode=1P_OH_AL_2/0_Rucina_0_416_0_2_2_2_2

New Line.l(r:p3udm77598-p3ulv75332) Units=km Length=0.0148487 bus1=p3udm77598.1.2 bus2=p3ulv75332.1.2 switch=n enabled=y phases=2 Linecode=1P_OH_AL_2/0_Rucina_0_416_0_2_2_2_2

New Line.l(r:p3udm77598-p3udt31083lv) Units=km Length=0.0116519 bus1=p3udt31083lv.1.2 bus2=p3udm77598.1.2 switch=n enabled=y phases=2 Linecode=1P_OH_AL_2/0_Rucina_0_416_0_2_2_2_2

New Line.l(r:p3udt31204lv-p3ulv74606) Units=km Length=0.0217881 bus1=p3udt31204lv.1.2 bus2=p3ulv74606.1.2 switch=n enabled=y phases=2 Linecode=1P_OH_AL_2/0_Rucina_0_416_0_2_2_2_2

New Line.l(r:p3udt32162lv-p3ulv79983) Units=km Length=0.0179667 bus1=p3udt32162lv.1.2 bus2=p3ulv79983.1.2 switch=n enabled=y phases=2 Linecode=1P_OH_AL_2/0_Rucina_0_416_0_2_2_2_2

New Line.l(r:p3udt31204-p3udt6409) Units=km Length=0.143721 bus1=p3udt31204-p3udt6409x.3 bus2=p3udt6409.3 switch=n enabled=y phases=1 Linecode=1P_OH_AL_ACSR_#2_Sparrow_12_47_0_1_1_1_1

New Line.l(r:p3udt22986-p3udt9868) Units=km Length=0.0242443 bus1=p3udt22986-p3udt9868x.2 bus2=p3udt22986.2 switch=n enabled=y phases=1 Linecode=1P_OH_AL_ACSR_#2_Sparrow_12_47_0_1_1_1_1

New Line.l(r:p3udt22428-p3udt8763) Units=km Length=0.168753 bus1=p3udt22428-p3udt8763x.3 bus2=p3udt8763.3 switch=n enabled=y phases=1 Linecode=1P_OH_AL_ACSR_#2_Sparrow_12_47_0_1_1_1_1

New Line.l(r:p3udt28810-p3udt28964) Units=km Length=0.0553838 bus1=p3udt28810-p3udt28964x.1 bus2=p3udt28810.1 switch=n enabled=y phases=1 Linecode=1P_OH_AL_ACSR_#2_Sparrow_12_47_0_1_1_1_1

New Line.l(r:p3udt14955-p3udt23244) Units=km Length=0.0260583 bus1=p3udt14955.2 bus2=p3udt23244.2 switch=n enabled=y phases=1 Linecode=1P_OH_AL_ACSR_#2_Sparrow_12_47_0_1_1_1_1

New Line.l(r:p3udt14955-p3udt23949) Units=km Length=0.0354762 bus1=p3udt14955-p3udt23949x.2 bus2=p3udt14955.2 switch=n enabled=y phases=1 Linecode=1P_OH_AL_ACSR_#2_Sparrow_12_47_0_1_1_1_1

New Line.l(r:p3udt25949-p3udt4421) Units=km Length=0.001 bus1=p3udt4421.1 bus2=p3udt25949.1 switch=n enabled=y phases=1 Linecode=1P_OH_AL_ACSR_#2_Sparrow_12_47_0_1_1_1_1

New Line.l(r:p3udt16919-p3udt4421) Units=km Length=0.0581628 bus1=p3udt16919.1 bus2=p3udt4421.1 switch=n enabled=y phases=1 Linecode=1P_OH_AL_ACSR_#2_Sparrow_12_47_0_1_1_1_1

New Line.l(r:p3udt16919-p3udt2300) Units=km Length=0.0193802 bus1=p3udt2300.1 bus2=p3udt16919.1 switch=n enabled=y phases=1 Linecode=1P_OH_AL_ACSR_#2_Sparrow_12_47_0_1_1_1_1

New Line.l(r:p3udt2300-p3udt5114) Units=km Length=0.0387691 bus1=p3udt5114.1 bus2=p3udt2300.1 switch=n enabled=y phases=1 Linecode=1P_OH_AL_ACSR_#2_Sparrow_12_47_0_1_1_1_1

New Line.l(r:p3udt5114-p3udt5115) Units=km Length=0.0387778 bus1=p3udt5115.1 bus2=p3udt5114.1 switch=n enabled=y phases=1 Linecode=1P_OH_AL_ACSR_#2_Sparrow_12_47_0_1_1_1_1

New Line.l(r:p3udt27463-p3udt5115) Units=km Length=0.0280354 bus1=p3udt27463.1 bus2=p3udt5115.1 switch=n enabled=y phases=1 Linecode=1P_OH_AL_ACSR_#2_Sparrow_12_47_0_1_1_1_1

New Line.l(r:p3udt29133-p3udt6408) Units=km Length=0.0377424 bus1=p3udt29133-p3udt6408x.1 bus2=p3udt29133-p3udt6408xx.1 switch=n enabled=y phases=1 Linecode=1P_UG_AL_#2_15_12_47_0_1_1_1_1

New Line.l(r:p3udt24650-p3udt29133) Units=km Length=0.0283101 bus1=p3udt24650-p3udt29133x.1 bus2=p3udt24650-p3udt29133xx.1 switch=n enabled=y phases=1 Linecode=1P_UG_AL_#2_15_12_47_0_1_1_1_1

New Line.l(r:p3udt24650-p3udt27463) Units=km Length=0.04328980000000001 bus1=p3udt24650-p3udt27463xx.1 bus2=p3udt24650-p3udt27463x.1 switch=n enabled=y phases=1 Linecode=1P_UG_AL_#2_15_12_47_0_1_1_1_1

New Line.l(r:p3udt22429-p3udt27463) Units=km Length=0.0359429 bus1=p3udt22429-p3udt27463x.1 bus2=p3udt22429-p3udt27463xx.1 switch=n enabled=y phases=1 Linecode=1P_UG_AL_#2_15_12_47_0_1_1_1_1

New Line.l(r:p3udt22429-p3udt31470) Units=km Length=0.402791 bus1=p3udt22429-p3udt31470x.1 bus2=p3udt22429.1 switch=n enabled=y phases=1 Linecode=1P_OH_AL_ACSR_#2_Sparrow_12_47_0_1_1_1_1

New Line.l(r:p3udt22165-p3udt8764) Units=km Length=0.001 bus1=p3udt22165-p3udt8764x.3 bus2=p3udt22165.3 switch=n enabled=y phases=1 Linecode=1P_OH_AL_ACSR_#2_Sparrow_12_47_0_1_1_1_1

New Line.l(r:p3udt27098-p3udt8764) Units=km Length=0.034071 bus1=p3udt27098-p3udt8764x.1 bus2=p3udt27098.1 switch=n enabled=y phases=1 Linecode=1P_OH_AL_ACSR_#2_Sparrow_12_47_0_1_1_1_1

New Line.l(r:p3udt19988-p3udt20587) Units=km Length=0.0540996 bus1=p3udt19988-p3udt20587x.3 bus2=p3udt19988.3 switch=n enabled=y phases=1 Linecode=1P_OH_AL_ACSR_#2_Sparrow_12_47_0_1_1_1_1

New Line.l(r:p3udt21157-p3udt29132) Units=km Length=0.0229427 bus1=p3udt21157.2 bus2=p3udt29132.2 switch=n enabled=y phases=1 Linecode=1P_OH_AL_ACSR_#2_Sparrow_12_47_0_1_1_1_1

New Line.l(r:p3udt19356-p3udt21157) Units=km Length=0.0382796 bus1=p3udt19356-p3udt21157x.2 bus2=p3udt21157.2 switch=n enabled=y phases=1 Linecode=1P_OH_AL_ACSR_#2_Sparrow_12_47_0_1_1_1_1

New Line.l(r:p3udt28485-p3udt29576) Units=km Length=0.0964764 bus1=p3udt28485-p3udt29576x.3 bus2=p3udt29576.3 switch=n enabled=y phases=1 Linecode=1P_OH_AL_ACSR_#2_Sparrow_12_47_0_1_1_1_1

New Line.l(r:p3udt22428-p3udt25119) Units=km Length=0.47305900000000006 bus1=p3udt25119.1.2.3 bus2=p3udt22428.1.2.3 switch=n enabled=y phases=3 Linecode=3P_OH_AL_ACSR_4/0_Penguin_12_47_0_3_3_3_3

New Line.l(r:p3udt25119-p3udt27827) Units=km Length=0.207731 bus1=p3udt27827.1.2.3 bus2=p3udt25119.1.2.3 switch=n enabled=y phases=3 Linecode=3P_OH_AL_ACSR_4/0_Penguin_12_47_0_3_3_3_3

New Line.l(r:p3udt23477-p3udt27827) Units=km Length=0.0199042 bus1=p3udt23477.1.2.3 bus2=p3udt27827.1.2.3 switch=n enabled=y phases=3 Linecode=3P_OH_AL_ACSR_4/0_Penguin_12_47_0_3_3_3_3

New Line.l(r:p3udt23477-p3udt9326) Units=km Length=0.100138 bus1=p3udt9326.1.2.3 bus2=p3udt23477.1.2.3 switch=n enabled=y phases=3 Linecode=3P_OH_AL_ACSR_4/0_Penguin_12_47_0_3_3_3_3

New Line.l(r:p3udt28485-p3udt9326) Units=km Length=0.0194186 bus1=p3udt28485.1.2.3 bus2=p3udt9326.1.2.3 switch=n enabled=y phases=3 Linecode=3P_OH_AL_ACSR_4/0_Penguin_12_47_0_3_3_3_3

New Line.l(r:p3udt28485-p3udt30350) Units=km Length=0.0304959 bus1=p3udt30350.1.2.3 bus2=p3udt28485.1.2.3 switch=n enabled=y phases=3 Linecode=3P_OH_AL_ACSR_4/0_Penguin_12_47_0_3_3_3_3

New Line.l(r:p3udt30350-p3udt9868) Units=km Length=0.0418559 bus1=p3udt9868.1.2.3 bus2=p3udt30350.1.2.3 switch=n enabled=y phases=3 Linecode=3P_OH_AL_ACSR_4/0_Penguin_12_47_0_3_3_3_3

New Line.l(r:p3udt25540-p3udt9868) Units=km Length=0.356132 bus1=p3udt25540.1.2.3 bus2=p3udt9868.1.2.3 switch=n enabled=y phases=3 Linecode=3P_OH_AL_ACSR_4/0_Penguin_12_47_0_3_3_3_3

New Line.l(r:p3udt19681-p3udt25540) Units=km Length=0.119257 bus1=p3udt19681.1.2.3 bus2=p3udt25540.1.2.3 switch=n enabled=y phases=3 Linecode=3P_OH_AL_ACSR_4/0_Penguin_12_47_0_3_3_3_3

New Line.l(r:p3udt19681-p3udt31204) Units=km Length=0.180841 bus1=p3udt31204.1.2.3 bus2=p3udt19681.1.2.3 switch=n enabled=y phases=3 Linecode=3P_OH_AL_ACSR_4/0_Penguin_12_47_0_3_3_3_3

New Line.l(r:p3udt20299-p3udt31204) Units=km Length=0.616635 bus1=p3udt20299.1.2.3 bus2=p3udt31204.1.2.3 switch=n enabled=y phases=3 Linecode=3P_OH_AL_ACSR_4/0_Penguin_12_47_0_3_3_3_3

New Line.l(r:p3udt20299-p3uhs2_1247) Units=km Length=0.422471 bus1=p3udt20299-p3uhs2_1247x.1.2.3 bus2=p3udt20299-p3uhs2_1247x_b1_1.1.2.3 switch=n enabled=y phases=3 Linecode=3P_OH_AL_ACSR_4/0_Penguin_12_47_0_3_3_3_3

New Line.l(r:p3udt20299lv-p3ulv32344) Units=km Length=0.00708239 bus1=p3udt20299lv.1.2.3 bus2=p3ulv32344.1.2.3 switch=n enabled=y phases=3 Linecode=3P_UG_AL_750kcmil_25_0_416_0_3_3_3_3

New Line.l(r:p3udt16921lv-p3ulv60009) Units=km Length=0.0109777 bus1=p3udt16921lv.1.2.3 bus2=p3ulv60009.1.2.3 switch=n enabled=y phases=3 Linecode=3P_UG_AL_350kcmil_15_0_416_0_3_3_3_3

New Line.l(r:p3udm52630-p3ulv24526) Units=km Length=0.0141686 bus1=p3udm52630.1.2.3 bus2=p3ulv24526.1.2.3 switch=n enabled=y phases=3 Linecode=3P_UG_AL_350kcmil_15_0_416_0_3_3_3_3

New Line.l(r:p3udm52630-p3udt16921lv) Units=km Length=0.0150773 bus1=p3udt16921lv.1.2.3 bus2=p3udm52630.1.2.3 switch=n enabled=y phases=3 Linecode=3P_UG_AL_350kcmil_15_0_416_0_3_3_3_3

New Line.l(r:p3udt16921-p3udt3014) Units=km Length=0.0150679 bus1=p3udt3014.1.2.3 bus2=p3udt16921.1.2.3 switch=n enabled=y phases=3 Linecode=3P_OH_AL_ACSR_4/0_Penguin_12_47_0_3_3_3_3

New Line.l(r:p3udt3014-p3udt31204) Units=km Length=0.161336 bus1=p3udt31204.1.2.3 bus2=p3udt3014.1.2.3 switch=n enabled=y phases=3 Linecode=3P_OH_AL_ACSR_4/0_Penguin_12_47_0_3_3_3_3

New Line.l(r:p3udt3734lv-p3ulv4144) Units=km Length=0.0115145 bus1=p3udt3734lv.1.2.3 bus2=p3ulv4144.1.2.3 switch=n enabled=y phases=3 Linecode=3P_UG_AL_350kcmil_15_0_416_0_3_3_3_3

New Line.l(r:p3udt31204-p3udt3734) Units=km Length=0.140807 bus1=p3udt31204.1.2.3 bus2=p3udt3734.1.2.3 switch=n enabled=y phases=3 Linecode=3P_OH_AL_ACSR_4/0_Penguin_12_47_0_3_3_3_3

New Line.l(r:p3udt23477lv-p3ulv41575) Units=km Length=0.0107431 bus1=p3udt23477lv.1.2.3 bus2=p3ulv41575.1.2.3 switch=n enabled=y phases=3 Linecode=3P_UG_AL_350kcmil_15_0_416_0_3_3_3_3

New Line.l(r:p3udt27827lv-p3ulv57772) Units=km Length=0.017183 bus1=p3udt27827lv.1.2.3 bus2=p3ulv57772.1.2.3 switch=n enabled=y phases=3 Linecode=3P_UG_AL_350kcmil_15_0_416_0_3_3_3_3

New Line.l(r:p3udt25119lv-p3ulv47082) Units=km Length=0.0121297 bus1=p3udt25119lv.1.2.3 bus2=p3ulv47082.1.2.3 switch=n enabled=y phases=3 Linecode=3P_UG_AL_350kcmil_15_0_416_0_3_3_3_3

New Line.l(r:p3udt25119lv-p3ulv47083) Units=km Length=0.00825085 bus1=p3udt25119lv.1.2.3 bus2=p3ulv47083.1.2.3 switch=n enabled=y phases=3 Linecode=3P_UG_AL_350kcmil_15_0_416_0_3_3_3_3

New Line.l(r:p3udt22428lv-p3ulv38428) Units=km Length=0.008954160000000001 bus1=p3udt22428lv.1.2.3 bus2=p3ulv38428.1.2.3 switch=n enabled=y phases=3 Linecode=3P_UG_AL_350kcmil_15_0_416_0_3_3_3_3

New Line.l(r:p3udt28964lv-p3ulv63104) Units=km Length=0.0151414 bus1=p3udt28964lv.1.2.3 bus2=p3ulv63104.1.2.3 switch=n enabled=y phases=3 Linecode=3P_UG_AL_350kcmil_15_0_416_0_3_3_3_3

New Line.l(r:p3udt18704lv-p3ulv70830) Units=km Length=0.00809015 bus1=p3udt18704lv.1.2.3 bus2=p3ulv70830.1.2.3 switch=n enabled=y phases=3 Linecode=3P_UG_AL_350kcmil_15_0_416_0_3_3_3_3

New Line.l(r:p3udm56881-p3ulv28420) Units=km Length=0.0102512 bus1=p3udm56881.1.2.3 bus2=p3ulv28420.1.2.3 switch=n enabled=y phases=3 Linecode=3P_UG_AL_350kcmil_15_0_416_0_3_3_3_3

New Line.l(r:p3udm56881-p3udt18704lv) Units=km Length=0.0506858 bus1=p3udt18704lv.1.2.3 bus2=p3udm56881.1.2.3 switch=n enabled=y phases=3 Linecode=3P_UG_AL_350kcmil_15_0_416_0_3_3_3_3

New Line.l(r:p3udm56882-p3ulv46322) Units=km Length=0.0113445 bus1=p3udm56882.1.2.3 bus2=p3ulv46322.1.2.3 switch=n enabled=y phases=3 Linecode=3P_UG_AL_350kcmil_15_0_416_0_3_3_3_3

New Line.l(r:p3udm56882-p3ulv69260) Units=km Length=0.011201 bus1=p3udm56882.1.2.3 bus2=p3ulv69260.1.2.3 switch=n enabled=y phases=3 Linecode=3P_UG_AL_350kcmil_15_0_416_0_3_3_3_3

New Line.l(r:p3udm56882-p3udt18704lv) Units=km Length=0.0198742 bus1=p3udt18704lv.1.2.3 bus2=p3udm56882.1.2.3 switch=n enabled=y phases=3 Linecode=3P_UG_AL_350kcmil_15_0_416_0_3_3_3_3

New Line.l(r:p3udt28164lv-p3ulv59290) Units=km Length=0.008367750000000002 bus1=p3udt28164lv.1.2.3 bus2=p3ulv59290.1.2.3 switch=n enabled=y phases=3 Linecode=3P_UG_AL_350kcmil_15_0_416_0_3_3_3_3

New Line.l(r:p3udt17290-p3udt28164) Units=km Length=0.0499076 bus1=p3udt17290.1.2.3 bus2=p3udt28164.1.2.3 switch=n enabled=y phases=3 Linecode=3P_OH_AL_ACSR_4/0_Penguin_12_47_0_3_3_3_3

New Line.l(r:p3udt17290-p3udt18704) Units=km Length=0.0522228 bus1=p3udt18704.1.2.3 bus2=p3udt17290.1.2.3 switch=n enabled=y phases=3 Linecode=3P_OH_AL_ACSR_4/0_Penguin_12_47_0_3_3_3_3

New Line.l(r:p3udt18704-p3udt28964) Units=km Length=0.06024260000000001 bus1=p3udt28964.1.2.3 bus2=p3udt18704.1.2.3 switch=n enabled=y phases=3 Linecode=3P_OH_AL_ACSR_4/0_Penguin_12_47_0_3_3_3_3

New Line.l(r:p3udt20294-p3udt28964) Units=km Length=0.0189868 bus1=p3udt20294.1.2.3 bus2=p3udt28964.1.2.3 switch=n enabled=y phases=3 Linecode=3P_OH_AL_ACSR_4/0_Penguin_12_47_0_3_3_3_3

New Line.l(r:p3udt20294-p3udt22428) Units=km Length=0.07354210000000001 bus1=p3udt22428.1.2.3 bus2=p3udt20294.1.2.3 switch=n enabled=y phases=3 Linecode=3P_OH_AL_ACSR_4/0_Penguin_12_47_0_3_3_3_3

New Line.l(r:p3udt9328lv-p3ulv11256) Units=km Length=0.015585400000000001 bus1=p3udt9328lv.1.2.3 bus2=p3ulv11256.1.2.3 switch=n enabled=y phases=3 Linecode=3P_UG_AL_350kcmil_15_0_416_0_3_3_3_3

New Line.l(r:p3udt21428lv-p3ulv35430) Units=km Length=0.013788 bus1=p3udt21428lv.1.2.3 bus2=p3ulv35430.1.2.3 switch=n enabled=y phases=3 Linecode=3P_UG_AL_350kcmil_15_0_416_0_3_3_3_3

New Line.l(r:p3udt23949lv-p3ulv43140) Units=km Length=0.00990293 bus1=p3udt23949lv.1.2.3 bus2=p3ulv43140.1.2.3 switch=n enabled=y phases=3 Linecode=3P_UG_AL_350kcmil_15_0_416_0_3_3_3_3

New Line.l(r:p3udt10381-p3udt23949) Units=km Length=0.378232 bus1=p3udt10381.1.2.3 bus2=p3udt23949.1.2.3 switch=n enabled=y phases=3 Linecode=3P_OH_AL_ACSR_4/0_Penguin_12_47_0_3_3_3_3

New Line.l(r:p3udt31470lv-p3ulv76150) Units=km Length=0.00943265 bus1=p3udt31470lv.1.2.3 bus2=p3ulv76150.1.2.3 switch=n enabled=y phases=3 Linecode=3P_UG_AL_350kcmil_15_0_416_0_3_3_3_3

New Line.l(r:p3udt10381-p3udt31470) Units=km Length=0.001 bus1=p3udt10381.1.2.3 bus2=p3udt31470.1.2.3 switch=n enabled=y phases=3 Linecode=3P_OH_AL_ACSR_4/0_Penguin_12_47_0_3_3_3_3

New Line.l(r:p3udt10381-p3udt21428) Units=km Length=0.0606267 bus1=p3udt21428.1.2.3 bus2=p3udt10381.1.2.3 switch=n enabled=y phases=3 Linecode=3P_OH_AL_ACSR_4/0_Penguin_12_47_0_3_3_3_3

New Line.l(r:p3udt21428-p3udt9328) Units=km Length=0.0228613 bus1=p3udt9328.1.2.3 bus2=p3udt21428.1.2.3 switch=n enabled=y phases=3 Linecode=3P_OH_AL_ACSR_4/0_Penguin_12_47_0_3_3_3_3

New Line.l(r:p3udt28965-p3udt9328) Units=km Length=0.0822909 bus1=p3udt28965.1.2.3 bus2=p3udt9328.1.2.3 switch=n enabled=y phases=3 Linecode=3P_OH_AL_ACSR_4/0_Penguin_12_47_0_3_3_3_3

New Line.l(r:p3udt27644-p3udt28965) Units=km Length=0.0661024 bus1=p3udt27644.1.2.3 bus2=p3udt28965.1.2.3 switch=n enabled=y phases=3 Linecode=3P_OH_AL_ACSR_4/0_Penguin_12_47_0_3_3_3_3

New Line.l(r:p3udt22428-p3udt27644) Units=km Length=0.0564821 bus1=p3udt22428.1.2.3 bus2=p3udt27644.1.2.3 switch=n enabled=y phases=3 Linecode=3P_OH_AL_ACSR_4/0_Penguin_12_47_0_3_3_3_3

New Line.l(r:p3udt8764lv-p3ulv10428) Units=km Length=0.012889 bus1=p3udt8764lv.1.2.3 bus2=p3ulv10428.1.2.3 switch=n enabled=y phases=3 Linecode=3P_UG_AL_350kcmil_15_0_416_0_3_3_3_3

New Line.l(r:p3udt26521lv-p3ulv52390) Units=km Length=0.0113029 bus1=p3udt26521lv.1.2.3 bus2=p3ulv52390.1.2.3 switch=n enabled=y phases=3 Linecode=3P_UG_AL_350kcmil_15_0_416_0_3_3_3_3

New Line.l(r:p3udt26521-p3udt8764) Units=km Length=0.020762100000000002 bus1=p3udt8764.1.2.3 bus2=p3udt26521.1.2.3 switch=n enabled=y phases=3 Linecode=3P_OH_AL_ACSR_4/0_Penguin_12_47_0_3_3_3_3

New Line.l(r:p3udt20587-p3udt8764) Units=km Length=0.0689265 bus1=p3udt20587.1.2.3 bus2=p3udt8764.1.2.3 switch=n enabled=y phases=3 Linecode=3P_OH_AL_ACSR_4/0_Penguin_12_47_0_3_3_3_3

New Line.l(r:p3udt20587-p3udt28647) Units=km Length=0.0176936 bus1=p3udt28647.1.2.3 bus2=p3udt20587.1.2.3 switch=n enabled=y phases=3 Linecode=3P_OH_AL_ACSR_4/0_Penguin_12_47_0_3_3_3_3

New Line.l(r:p3udt25119-p3udt28647) Units=km Length=0.0697291 bus1=p3udt25119.1.2.3 bus2=p3udt28647.1.2.3 switch=n enabled=y phases=3 Linecode=3P_OH_AL_ACSR_4/0_Penguin_12_47_0_3_3_3_3

New Line.l(r:p3udt23701lv-p3ulv42353) Units=km Length=0.0119985 bus1=p3udt23701lv.1.2.3 bus2=p3ulv42353.1.2.3 switch=n enabled=y phases=3 Linecode=3P_UG_AL_350kcmil_15_0_416_0_3_3_3_3

New Line.l(r:p3udt17291lv-p3ulv25315) Units=km Length=0.00862566 bus1=p3udt17291lv.1.2.3 bus2=p3ulv25315.1.2.3 switch=n enabled=y phases=3 Linecode=3P_UG_AL_350kcmil_15_0_416_0_3_3_3_3

New Line.l(r:p3udt30202lv-p3ulv69259) Units=km Length=0.0135538 bus1=p3udt30202lv.1.2.3 bus2=p3ulv69259.1.2.3 switch=n enabled=y phases=3 Linecode=3P_UG_AL_350kcmil_15_0_416_0_3_3_3_3

New Line.l(r:p3udt16520lv-p3ulv23664) Units=km Length=0.0158216 bus1=p3udt16520lv.1.2.3 bus2=p3ulv23664.1.2.3 switch=n enabled=y phases=3 Linecode=3P_UG_AL_350kcmil_15_0_416_0_3_3_3_3

New Line.l(r:p3udt32160lv-p3ulv79981) Units=km Length=0.019193500000000002 bus1=p3udt32160lv.1.2.3 bus2=p3ulv79981.1.2.3 switch=n enabled=y phases=3 Linecode=3P_UG_AL_350kcmil_15_0_416_0_3_3_3_3

New Line.l(r:p3udt16520-p3udt32160) Units=km Length=0.0261257 bus1=p3udt16520.1.2.3 bus2=p3udt32160.1.2.3 switch=n enabled=y phases=3 Linecode=3P_OH_AL_ACSR_4/0_Penguin_12_47_0_3_3_3_3

New Line.l(r:p3udt16520-p3udt30202) Units=km Length=0.0395524 bus1=p3udt30202.1.2.3 bus2=p3udt16520.1.2.3 switch=n enabled=y phases=3 Linecode=3P_OH_AL_ACSR_4/0_Penguin_12_47_0_3_3_3_3

New Line.l(r:p3udt17291-p3udt30202) Units=km Length=0.0544106 bus1=p3udt17291.1.2.3 bus2=p3udt30202.1.2.3 switch=n enabled=y phases=3 Linecode=3P_OH_AL_ACSR_4/0_Penguin_12_47_0_3_3_3_3

New Line.l(r:p3udt17291-p3udt23701) Units=km Length=0.026299300000000005 bus1=p3udt23701.1.2.3 bus2=p3udt17291.1.2.3 switch=n enabled=y phases=3 Linecode=3P_OH_AL_ACSR_4/0_Penguin_12_47_0_3_3_3_3

New Line.l(r:p3udt19356lv-p3ulv29935) Units=km Length=0.00795633 bus1=p3udt19356lv.1.2.3 bus2=p3ulv29935.1.2.3 switch=n enabled=y phases=3 Linecode=3P_UG_AL_350kcmil_15_0_416_0_3_3_3_3

New Line.l(r:p3udt19356-p3udt23701) Units=km Length=0.0577831 bus1=p3udt23701.1.2.3 bus2=p3udt19356.1.2.3 switch=n enabled=y phases=3 Linecode=3P_OH_AL_ACSR_4/0_Penguin_12_47_0_3_3_3_3

New Line.l(r:p3udt23701-p3udt30800) Units=km Length=0.0861264 bus1=p3udt30800.1.2.3 bus2=p3udt23701.1.2.3 switch=n enabled=y phases=3 Linecode=3P_OH_AL_ACSR_4/0_Penguin_12_47_0_3_3_3_3

New Line.l(r:p3udt30349lv-p3ulv70018) Units=km Length=0.010670900000000002 bus1=p3udt30349lv.1.2.3 bus2=p3ulv70018.1.2.3 switch=n enabled=y phases=3 Linecode=3P_UG_AL_350kcmil_15_0_416_0_3_3_3_3

New Line.l(r:p3udt26330lv-p3ulv51595) Units=km Length=0.0102738 bus1=p3udt26330lv.1.2.3 bus2=p3ulv51595.1.2.3 switch=n enabled=y phases=3 Linecode=3P_UG_AL_350kcmil_15_0_416_0_3_3_3_3

New Line.l(r:p3udt24432-p3udt26330) Units=km Length=0.0434897 bus1=p3udt24432.1.2.3 bus2=p3udt26330.1.2.3 switch=n enabled=y phases=3 Linecode=3P_OH_AL_ACSR_4/0_Penguin_12_47_0_3_3_3_3

New Line.l(r:p3udt24432-p3udt30349) Units=km Length=0.0152091 bus1=p3udt30349.1.2.3 bus2=p3udt24432.1.2.3 switch=n enabled=y phases=3 Linecode=3P_OH_AL_ACSR_4/0_Penguin_12_47_0_3_3_3_3

New Line.l(r:p3udt25948-p3udt30349) Units=km Length=0.0343142 bus1=p3udt25948.1.2.3 bus2=p3udt30349.1.2.3 switch=n enabled=y phases=3 Linecode=3P_OH_AL_ACSR_4/0_Penguin_12_47_0_3_3_3_3

New Line.l(r:p3udt31203lv-p3ulv74604) Units=km Length=0.0105999 bus1=p3udt31203lv.1.2.3 bus2=p3ulv74604.1.2.3 switch=n enabled=y phases=3 Linecode=3P_UG_AL_350kcmil_15_0_416_0_3_3_3_3

New Line.l(r:p3udt25948-p3udt31203) Units=km Length=0.001 bus1=p3udt25948.1.2.3 bus2=p3udt31203.1.2.3 switch=n enabled=y phases=3 Linecode=3P_OH_AL_ACSR_4/0_Penguin_12_47_0_3_3_3_3

New Line.l(r:p3udt25948-p3udt31083) Units=km Length=0.041485 bus1=p3udt31083.1.2.3 bus2=p3udt25948.1.2.3 switch=n enabled=y phases=3 Linecode=3P_OH_AL_ACSR_4/0_Penguin_12_47_0_3_3_3_3

New Line.l(r:p3udt31083-p3udt32162) Units=km Length=0.0270298 bus1=p3udt32162.1.2.3 bus2=p3udt31083.1.2.3 switch=n enabled=y phases=3 Linecode=3P_OH_AL_ACSR_4/0_Penguin_12_47_0_3_3_3_3

New Line.l(r:p3udt30800-p3udt32162) Units=km Length=0.0276991 bus1=p3udt30800.1.2.3 bus2=p3udt32162.1.2.3 switch=n enabled=y phases=3 Linecode=3P_OH_AL_ACSR_4/0_Penguin_12_47_0_3_3_3_3

New Line.l(r:p3udt16918-p3udt30800) Units=km Length=0.0467341 bus1=p3udt16918.1.2.3 bus2=p3udt30800.1.2.3 switch=n enabled=y phases=3 Linecode=3P_OH_AL_ACSR_4/0_Penguin_12_47_0_3_3_3_3

New Line.l(r:p3udt16918-p3udt28485) Units=km Length=0.08207080000000001 bus1=p3udt28485.1.2.3 bus2=p3udt16918.1.2.3 switch=n enabled=y phases=3 Linecode=3P_OH_AL_ACSR_4/0_Penguin_12_47_0_3_3_3_3

New Line.l(r:p3udt20299-p3umv31) Units=km Length=0.0452298 bus1=p3udt20299-p3umv31x.1.2.3 bus2=p3umv31.1.2.3 switch=n enabled=y phases=3 Linecode=3P_OH_AL_ACSR_1033kcmil_Curlew_12.47_1_3_3_3_3

New Line.l(r:p3udt31470-p3udt7041) Units=km Length=0.741504 bus1=p3udt31470-p3udt7041x.1.2.3 bus2=p3udt31470.1.2.3 switch=n enabled=y phases=3 Linecode=3P_OH_AL_ACSR_1033kcmil_Curlew_12.47_1_3_3_3_3

New Line.padswitch(r:p3udt29133-p3udt6408)p3u_169382 Units=km Length=0.001 bus1=p3udt29133.1 bus2=p3udt29133-p3udt6408x.1 switch=y enabled=y phases=1 Linecode=padswitch_1_1_1_1

New Line.padswitch(r:p3udt29133-p3udt6408)p3u_169383 Units=km Length=0.001 bus1=p3udt29133-p3udt6408xx.1 bus2=p3udt6408.1 switch=y enabled=y phases=1 Linecode=padswitch_1_3_1_1_1

New Line.padswitch(r:p3udt24650-p3udt29133)p3u_169384 Units=km Length=0.001 bus1=p3udt24650.1 bus2=p3udt24650-p3udt29133x.1 switch=y enabled=y phases=1 Linecode=padswitch_1_3_1_0_1_1

New Line.padswitch(r:p3udt24650-p3udt29133)p3u_169385 Units=km Length=0.001 bus1=p3udt24650-p3udt29133xx.1 bus2=p3udt29133.1 switch=y enabled=y phases=1 Linecode=padswitch_1_1_1_1

New Line.padswitch(r:p3udt24650-p3udt27463)p3u_169386 Units=km Length=0.001 bus1=p3udt27463.1 bus2=p3udt24650-p3udt27463xx.1 switch=y enabled=y phases=1 Linecode=padswitch_1_3_1_0_1_0_1

New Line.padswitch(r:p3udt24650-p3udt27463)p3u_169387 Units=km Length=0.001 bus1=p3udt24650-p3udt27463x.1 bus2=p3udt24650.1 switch=y enabled=y phases=1 Linecode=padswitch_1_1_1_1

New Line.padswitch(r:p3udt22429-p3udt27463)p3u_169388 Units=km Length=0.001 bus1=p3udt22429.1 bus2=p3udt22429-p3udt27463x.1 switch=y enabled=y phases=1 Linecode=padswitch_1_1_1_1

New Line.padswitch(r:p3udt22429-p3udt27463)p3u_169389 Units=km Length=0.001 bus1=p3udt22429-p3udt27463xx.1 bus2=p3udt27463.1 switch=y enabled=y phases=1 Linecode=padswitch_1_3_1_0_1_0_1

New Line.elbswitch(r:p3udt20299-p3umv31)p3u_206604 Units=km Length=0.001 bus1=p3udt20299.1.2.3 bus2=p3udt20299-p3umv31x.1.2.3 switch=y enabled=n phases=3 Linecode=elbswitch_3_3_3_3

New Line.elbswitch(r:p3udt18029-p3udt31204)p3u_206658 Units=km Length=0.001 bus1=p3udt31204.1.2.3 bus2=p3udt18029-p3udt31204x.1.2.3 switch=y enabled=n phases=3 Linecode=elbswitch_3_3_3_3

New Line.fuse(r:p3udt22165-p3udt8764)p3u_207689 Units=km Length=0.001 bus1=p3udt8764.3 bus2=p3udt22165-p3udt8764x.3 switch=n enabled=y phases=1 Linecode=fuse_1_1_1_1

New Fuse.Fuse_fuse(r:p3udt22165-p3udt8764)p3u_207689 monitoredobj=Line.fuse(r:p3udt22165-p3udt8764)p3u_207689 enabled=y ratedcurrent=100.0

New Line.fuse(r:p3udt27098-p3udt8764)p3u_207690 Units=km Length=0.001 bus1=p3udt8764.1 bus2=p3udt27098-p3udt8764x.1 switch=n enabled=y phases=1 Linecode=fuse_1_1_1_1

New Fuse.Fuse_fuse(r:p3udt27098-p3udt8764)p3u_207690 monitoredobj=Line.fuse(r:p3udt27098-p3udt8764)p3u_207690 enabled=y ratedcurrent=100.0

New Line.fuse(r:p3udt22986-p3udt9868)p3u_207774 Units=km Length=0.001 bus1=p3udt9868.2 bus2=p3udt22986-p3udt9868x.2 switch=n enabled=y phases=1 Linecode=fuse_1_1_1_1

New Fuse.Fuse_fuse(r:p3udt22986-p3udt9868)p3u_207774 monitoredobj=Line.fuse(r:p3udt22986-p3udt9868)p3u_207774 enabled=y ratedcurrent=100.0

New Line.fuse(r:p3udt19356-p3udt21157)p3u_208692 Units=km Length=0.001 bus1=p3udt19356.2 bus2=p3udt19356-p3udt21157x.2 switch=n enabled=y phases=1 Linecode=fuse_1_1_1_1

New Fuse.Fuse_fuse(r:p3udt19356-p3udt21157)p3u_208692 monitoredobj=Line.fuse(r:p3udt19356-p3udt21157)p3u_208692 enabled=y ratedcurrent=100.0

New Line.fuse(r:p3udt19988-p3udt20587)p3u_208819 Units=km Length=0.001 bus1=p3udt20587.3 bus2=p3udt19988-p3udt20587x.3 switch=n enabled=y phases=1 Linecode=fuse_1_1_1_1

New Fuse.Fuse_fuse(r:p3udt19988-p3udt20587)p3u_208819 monitoredobj=Line.fuse(r:p3udt19988-p3udt20587)p3u_208819 enabled=y ratedcurrent=100.0

New Line.fuse(r:p3udt22428-p3udt8763)p3u_209040 Units=km Length=0.001 bus1=p3udt22428.3 bus2=p3udt22428-p3udt8763x.3 switch=n enabled=y phases=1 Linecode=fuse_1_7_1_1_1

New Fuse.Fuse_fuse(r:p3udt22428-p3udt8763)p3u_209040 monitoredobj=Line.fuse(r:p3udt22428-p3udt8763)p3u_209040 enabled=y ratedcurrent=100.0

New Line.fuse(r:p3udt14955-p3udt23949)p3u_209198 Units=km Length=0.001 bus1=p3udt23949.2 bus2=p3udt14955-p3udt23949x.2 switch=n enabled=y phases=1 Linecode=fuse_1_7_1_4_1_1

New Fuse.Fuse_fuse(r:p3udt14955-p3udt23949)p3u_209198 monitoredobj=Line.fuse(r:p3udt14955-p3udt23949)p3u_209198 enabled=y ratedcurrent=100.0

New Line.fuse(r:p3udt28485-p3udt29576)p3u_209644 Units=km Length=0.001 bus1=p3udt28485.3 bus2=p3udt28485-p3udt29576x.3 switch=n enabled=y phases=1 Linecode=fuse_1_1_1_1

New Fuse.Fuse_fuse(r:p3udt28485-p3udt29576)p3u_209644 monitoredobj=Line.fuse(r:p3udt28485-p3udt29576)p3u_209644 enabled=y ratedcurrent=100.0

New Line.fuse(r:p3udt28810-p3udt28964)p3u_209692 Units=km Length=0.001 bus1=p3udt28964.1 bus2=p3udt28810-p3udt28964x.1 switch=n enabled=y phases=1 Linecode=fuse_1_1_1_1

New Fuse.Fuse_fuse(r:p3udt28810-p3udt28964)p3u_209692 monitoredobj=Line.fuse(r:p3udt28810-p3udt28964)p3u_209692 enabled=y ratedcurrent=100.0

New Line.fuse(r:p3udt31204-p3udt6409)p3u_209930 Units=km Length=0.001 bus1=p3udt31204.3 bus2=p3udt31204-p3udt6409x.3 switch=n enabled=y phases=1 Linecode=fuse_1_1_1_1

New Fuse.Fuse_fuse(r:p3udt31204-p3udt6409)p3u_209930 monitoredobj=Line.fuse(r:p3udt31204-p3udt6409)p3u_209930 enabled=y ratedcurrent=100.0

New Line.fuse(r:p3udt22429-p3udt31470)p3u_209955 Units=km Length=0.001 bus1=p3udt31470.1 bus2=p3udt22429-p3udt31470x.1 switch=n enabled=y phases=1 Linecode=fuse_1_1_1_1

New Fuse.Fuse_fuse(r:p3udt22429-p3udt31470)p3u_209955 monitoredobj=Line.fuse(r:p3udt22429-p3udt31470)p3u_209955 enabled=y ratedcurrent=100.0

New Line.l(r:p3udt20299-p3uhs2_1247)_disconnect Units=km Length=0.001 bus1=p3udt20299-p3uhs2_1247x_b1_1.1.2.3 bus2=p3udt20299-p3uhs2_1247x_b2_1.1.2.3 switch=y enabled=y phases=3 Linecode=3P_OH_AL_ACSR_4/0_Penguin_12_47_0_3_3_3_3

New Line.l(r:p3udt20299-p3uhs2_1247)_cont Units=km Length=3.811239 bus1=p3udt20299-p3uhs2_1247x_b2_1.1.2.3 bus2=p3udt20299.1.2.3 switch=n enabled=y phases=3 Linecode=3P_OH_AL_ACSR_4/0_Penguin_12_47_0_3_3_3_3
