New Line.l(r:p3udt1563lv-p3ulv1747) Units=km Length=0.0384274 bus1=p3udt1563lv.1.2 bus2=p3ulv1747.1.2 switch=n enabled=y phases=2 Linecode=1P_OH_AL_4/0_Zuzara_0_416_0_2_2_2_2

New Line.l(r:p3udt17293lv-p3ulv25317) Units=km Length=0.00878786 bus1=p3udt17293lv.1.2 bus2=p3ulv25317.1.2 switch=n enabled=y phases=2 Linecode=1P_OH_AL_2/0_Rucina_0_416_0_2_2_2_2

New Line.l(r:p3udt17293-p3udt23951) Units=km Length=0.10434200000000002 bus1=p3udt17293-p3udt23951x.2 bus2=p3udt17293-p3udt23951x_b1_1.2 switch=n enabled=y phases=1 Linecode=1P_OH_AL_ACSR_#2_Sparrow_12_47_0_1_1_1_1

New Line.l(r:p3udt1563-p3udt30653) Units=km Length=0.0572908 bus1=p3udt1563-p3udt30653x.3 bus2=p3udt1563.3 switch=n enabled=y phases=1 Linecode=1P_OH_AL_ACSR_#2_Sparrow_12_47_0_1_1_1_1

New Line.l(r:p3udt15355-p3udt18708) Units=km Length=0.0925003 bus1=p3udt18708.1.2.3 bus2=p3udt15355.1.2.3 switch=n enabled=y phases=3 Linecode=3P_OH_AL_ACSR_4/0_Penguin_12_47_0_3_3_3_3

New Line.l(r:p3udt18708-p3udt21160) Units=km Length=0.345634 bus1=p3udt21160.1.2.3 bus2=p3udt18708.1.2.3 switch=n enabled=y phases=3 Linecode=3P_OH_AL_ACSR_4/0_Penguin_12_47_0_3_3_3_3

New Line.l(r:p3udt21160-p3udt4423) Units=km Length=0.433865 bus1=p3udt4423.1.2.3 bus2=p3udt21160.1.2.3 switch=n enabled=y phases=3 Linecode=3P_OH_AL_ACSR_4/0_Penguin_12_47_0_3_3_3_3

New Line.l(r:p3udt23951-p3udt4423) Units=km Length=0.432909 bus1=p3udt23951.1.2.3 bus2=p3udt4423.1.2.3 switch=n enabled=y phases=3 Linecode=3P_OH_AL_ACSR_4/0_Penguin_12_47_0_3_3_3_3

New Line.l(r:p3udt23951-p3uhs2_1247) Units=km Length=0.47084700000000007 bus1=p3udt23951-p3uhs2_1247x.1.2.3 bus2=p3udt23951-p3uhs2_1247x_b1_1.1.2.3 switch=n enabled=y phases=3 Linecode=3P_OH_AL_ACSR_4/0_Penguin_12_47_0_3_3_3_3

New Line.l(r:p3udt23951lv-p3ulv43142) Units=km Length=0.0114639 bus1=p3udt23951lv.1.2.3 bus2=p3ulv43142.1.2.3 switch=n enabled=y phases=3 Linecode=3P_UG_AL_750kcmil_25_0_416_0_3_3_3_3

New Line.l(r:p3udt4423lv-p3ulv4916) Units=km Length=0.0392765 bus1=p3udt4423lv.1.2.3 bus2=p3ulv4916.1.2.3 switch=n enabled=y phases=3 Linecode=3P_UG_AL_350kcmil_15_0_416_0_3_3_3_3

New Line.l(r:p3udt21160lv-p3ulv34641) Units=km Length=0.0139306 bus1=p3udt21160lv.1.2.3 bus2=p3ulv34641.1.2.3 switch=n enabled=y phases=3 Linecode=3P_UG_AL_750kcmil_25_0_416_0_3_3_3_3

New Line.l(r:p3udt14121lv-p3ulv19023) Units=km Length=0.0214729 bus1=p3udt14121lv.1.2.3 bus2=p3ulv19023.1.2.3 switch=n enabled=y phases=3 Linecode=3P_UG_AL_350kcmil_15_0_416_0_3_3_3_3

New Line.l(r:p3udt14121-p3udt21160) Units=km Length=0.189786 bus1=p3udt21160.1.2.3 bus2=p3udt14121.1.2.3 switch=n enabled=y phases=3 Linecode=3P_OH_AL_ACSR_4/0_Penguin_12_47_0_3_3_3_3

New Line.l(r:p3udt18708lv-p3ulv28428) Units=km Length=0.0372092 bus1=p3udt18708lv.1.2.3 bus2=p3ulv28428.1.2.3 switch=n enabled=y phases=3 Linecode=3P_UG_AL_750kcmil_25_0_416_0_3_3_3_3

New Line.l(r:p3udm48691-p3ulv21323) Units=km Length=0.0317031 bus1=p3udm48691.1.2.3 bus2=p3ulv21323.1.2.3 switch=n enabled=y phases=3 Linecode=3P_UG_AL_750kcmil_25_0_416_0_3_3_3_3

New Line.l(r:p3udm48691-p3udt15355lv) Units=km Length=0.018635600000000002 bus1=p3udt15355lv.1.2.3 bus2=p3udm48691.1.2.3 switch=n enabled=y phases=3 Linecode=3P_UG_AL_750kcmil_25_0_416_0_3_3_3_3

New Line.l(r:p3udm48692-p3ulv73083) Units=km Length=0.030997500000000004 bus1=p3udm48692.1.2.3 bus2=p3ulv73083.1.2.3 switch=n enabled=y phases=3 Linecode=3P_UG_AL_350kcmil_15_0_416_0_3_3_3_3

New Line.l(r:p3udm48692-p3udt15355lv) Units=km Length=0.0372664 bus1=p3udt15355lv.1.2.3 bus2=p3udm48692.1.2.3 switch=n enabled=y phases=3 Linecode=3P_UG_AL_350kcmil_15_0_416_0_3_3_3_3

New Line.l(r:p3udt15355-p3umv41) Units=km Length=0.0679716 bus1=p3udt15355.1.2.3 bus2=p3umv41.1.2.3 switch=n enabled=y phases=3 Linecode=3P_OH_AL_ACSR_4/0_Penguin_12_47_0_3_3_3_3

New Line.l(r:p3udt20875lv-p3ulv33852) Units=km Length=0.00744296 bus1=p3udt20875lv.1.2.3 bus2=p3ulv33852.1.2.3 switch=n enabled=y phases=3 Linecode=3P_UG_AL_350kcmil_15_0_416_0_3_3_3_3

New Line.l(r:p3udt20875lv-p3ulv73082) Units=km Length=0.00858401 bus1=p3udt20875lv.1.2.3 bus2=p3ulv73082.1.2.3 switch=n enabled=y phases=3 Linecode=3P_UG_AL_750kcmil_25_0_416_0_3_3_3_3

New Line.l(r:p3udt30653lv-p3ulv71566) Units=km Length=0.0121052 bus1=p3udt30653lv.1.2.3 bus2=p3ulv71566.1.2.3 switch=n enabled=y phases=3 Linecode=3P_UG_AL_350kcmil_15_0_416_0_3_3_3_3

New Line.l(r:p3udt26718lv-p3ulv53174) Units=km Length=0.0147275 bus1=p3udt26718lv.1.2.3 bus2=p3ulv53174.1.2.3 switch=n enabled=y phases=3 Linecode=3P_UG_AL_750kcmil_25_0_416_0_3_3_3_3

New Line.l(r:p3udt26718-p3udt30653) Units=km Length=0.251844 bus1=p3udt30653.1.2.3 bus2=p3udt26718.1.2.3 switch=n enabled=y phases=3 Linecode=3P_OH_AL_ACSR_4/0_Penguin_12_47_0_3_3_3_3

New Line.l(r:p3udt20875-p3udt30653) Units=km Length=0.13710500000000003 bus1=p3udt20875.1.2.3 bus2=p3udt30653.1.2.3 switch=n enabled=y phases=3 Linecode=3P_OH_AL_ACSR_4/0_Penguin_12_47_0_3_3_3_3

New Line.l(r:p3udt20875-p3udt23951) Units=km Length=0.451392 bus1=p3udt23951.1.2.3 bus2=p3udt20875.1.2.3 switch=n enabled=y phases=3 Linecode=3P_OH_AL_ACSR_4/0_Penguin_12_47_0_3_3_3_3

New Line.l(r:p3udt14121-p3udt26906) Units=km Length=0.36598 bus1=p3udt14121-p3udt26906x.1.2.3 bus2=p3udt26906.1.2.3 switch=n enabled=y phases=3 Linecode=3P_OH_AL_ACSR_1033kcmil_Curlew_12.47_1_3_3_3_3

New Line.elbswitch(r:p3udt14121-p3udt26906)p3u_206653 Units=km Length=0.001 bus1=p3udt14121.1.2.3 bus2=p3udt14121-p3udt26906x.1.2.3 switch=y enabled=n phases=3 Linecode=elbswitch_3_3_3_3

New Line.fuse(r:p3udt17293-p3udt23951)p3u_209199 Units=km Length=0.001 bus1=p3udt23951.2 bus2=p3udt17293-p3udt23951x.2 switch=n enabled=y phases=1 Linecode=fuse_1_1_1_1

New Fuse.Fuse_fuse(r:p3udt17293-p3udt23951)p3u_209199 monitoredobj=Line.fuse(r:p3udt17293-p3udt23951)p3u_209199 enabled=y ratedcurrent=100.0

New Line.fuse(r:p3udt1563-p3udt30653)p3u_209873 Units=km Length=0.001 bus1=p3udt30653.3 bus2=p3udt1563-p3udt30653x.3 switch=n enabled=y phases=1 Linecode=fuse_1_1_1_1

New Fuse.Fuse_fuse(r:p3udt1563-p3udt30653)p3u_209873 monitoredobj=Line.fuse(r:p3udt1563-p3udt30653)p3u_209873 enabled=y ratedcurrent=100.0

New Line.l(r:p3udt17293-p3udt23951)_disconnect Units=km Length=0.001 bus1=p3udt17293-p3udt23951x_b1_1.2 bus2=p3udt17293-p3udt23951x_b2_1.2 switch=y enabled=y phases=1 Linecode=1P_OH_AL_ACSR_#2_Sparrow_12_47_0_1_1_1_1

New Line.l(r:p3udt17293-p3udt23951)_cont Units=km Length=0.9480780000000001 bus1=p3udt17293-p3udt23951x_b2_1.2 bus2=p3udt17293.2 switch=n enabled=y phases=1 Linecode=1P_OH_AL_ACSR_#2_Sparrow_12_47_0_1_1_1_1

New Line.l(r:p3udt23951-p3uhs2_1247)_disconnect Units=km Length=0.001 bus1=p3udt23951-p3uhs2_1247x_b1_1.1.2.3 bus2=p3udt23951-p3uhs2_1247x_b2_1.1.2.3 switch=y enabled=y phases=3 Linecode=3P_OH_AL_ACSR_4/0_Penguin_12_47_0_3_3_3_3

New Line.l(r:p3udt23951-p3uhs2_1247)_cont Units=km Length=4.2466230000000005 bus1=p3udt23951-p3uhs2_1247x_b2_1.1.2.3 bus2=p3udt23951.1.2.3 switch=n enabled=y phases=3 Linecode=3P_OH_AL_ACSR_4/0_Penguin_12_47_0_3_3_3_3
