New Load.load_p3ulv1747 conn=wye bus1=p3ulv1747.1.2 kV=0.2080002494301389 Vminpu=0.8 Vmaxpu=1.2 model=1 kW=18.1002 kvar=3.675402369207605 Phases=2

New Load.load_p3ulv4916 conn=wye bus1=p3ulv4916.1.2.3 kV=0.48 Vminpu=0.8 Vmaxpu=1.2 model=1 kW=58.14059999999999 kvar=11.80595236445739 Phases=3

New Load.load_p3ulv19023 conn=wye bus1=p3ulv19023.1.2.3 kV=0.48 Vminpu=0.8 Vmaxpu=1.2 model=1 kW=51.900499999999994 kvar=10.538846016235139 Phases=3

New Load.load_p3ulv21323 conn=wye bus1=p3ulv21323.1.2.3 kV=0.48 Vminpu=0.8 Vmaxpu=1.2 model=1 kW=143.93100000000004 kvar=47.30783194249896 Phases=3

New Load.load_p3ulv25317 conn=wye bus1=p3ulv25317.1.2 kV=0.2080002494301389 Vminpu=0.8 Vmaxpu=1.2 model=1 kW=7.29007 kvar=2.4013000219203327 Phases=2

New Load.load_p3ulv28428 conn=wye bus1=p3ulv28428.1.2.3 kV=0.48 Vminpu=0.8 Vmaxpu=1.2 model=1 kW=98.84099999999998 kvar=32.48746563998401 Phases=3

New Load.load_p3ulv33852 conn=wye bus1=p3ulv33852.1.2.3 kV=0.48 Vminpu=0.8 Vmaxpu=1.2 model=1 kW=56.8606 kvar=18.68917543093327 Phases=3

New Load.load_p3ulv34641 conn=wye bus1=p3ulv34641.1.2.3 kV=0.48 Vminpu=0.8 Vmaxpu=1.2 model=1 kW=89.3309 kvar=18.139412907230174 Phases=3

New Load.load_p3ulv43142 conn=wye bus1=p3ulv43142.1.2.3 kV=0.48 Vminpu=0.8 Vmaxpu=1.2 model=1 kW=236.76199999999997 kvar=48.07657460902812 Phases=3

New Load.load_p3ulv53174 conn=wye bus1=p3ulv53174.1.2.3 kV=0.48 Vminpu=0.8 Vmaxpu=1.2 model=1 kW=137.741 kvar=45.27327733144179 Phases=3

New Load.load_p3ulv71566 conn=wye bus1=p3ulv71566.1.2.3 kV=0.48 Vminpu=0.8 Vmaxpu=1.2 model=1 kW=58.320600000000006 kvar=19.16905422449441 Phases=3

New Load.load_p3ulv73082 conn=wye bus1=p3ulv73082.1.2.3 kV=0.48 Vminpu=0.8 Vmaxpu=1.2 model=1 kW=76.0408 kvar=24.9934023050849 Phases=3

New Load.load_p3ulv73083 conn=wye bus1=p3ulv73083.1.2.3 kV=0.48 Vminpu=0.8 Vmaxpu=1.2 model=1 kW=51.3705 kvar=16.88466682509079 Phases=3

New Load.load_p3umv41 conn=wye bus1=p3umv41.1.2.3 kV=12.47 Vminpu=0.8 Vmaxpu=1.2 model=1 kW=875.759 kvar=177.83044957817498 Phases=3
