New Capacitor.p3uc17 Bus1=p3umv42 phases=3 Kv=12.47 conn=Wye Kvar=300.0

New CapControl.p3uc17 Capacitor=p3uc17 Element=Line.l(r:p3udt27646-p3umv42) Terminal=1 delay=100.0 Type=voltage Vmin=120.5 Vmax=125.0 Ptratio=59.99631547328862 Ctratio=100.0
