New Line.l(r:p3udt815lv-p3ulv972) Units=km Length=0.0229462 bus1=p3udt815lv.1.2 bus2=p3ulv972.1.2 switch=n enabled=y phases=2 Linecode=1P_OH_AL_2/0_Rucina_0_416_0_2_2_2_2

New Line.l(r:p3udm12988-p3ulv4146) Units=km Length=0.0237033 bus1=p3udm12988.1.2 bus2=p3ulv4146.1.2 switch=n enabled=y phases=2 Linecode=1P_OH_AL_2/0_Rucina_0_416_0_2_2_2_2

New Line.l(r:p3udm12988-p3udt3736lv) Units=km Length=0.0195188 bus1=p3udt3736lv.1.2 bus2=p3udm12988.1.2 switch=n enabled=y phases=2 Linecode=1P_OH_AL_2/0_Rucina_0_416_0_2_2_2_2

New Line.l(r:p3udm12989-p3ulv67712) Units=km Length=0.013809900000000002 bus1=p3udm12989.1.2 bus2=p3ulv67712.1.2 switch=n enabled=y phases=2 Linecode=1P_OH_AL_2/0_Rucina_0_416_0_2_2_2_2

New Line.l(r:p3udm12989-p3udt3736lv) Units=km Length=0.0195188 bus1=p3udt3736lv.1.2 bus2=p3udm12989.1.2 switch=n enabled=y phases=2 Linecode=1P_OH_AL_2/0_Rucina_0_416_0_2_2_2_2

New Line.l(r:p3udt5762lv-p3ulv6529) Units=km Length=0.0143386 bus1=p3udt5762lv.1.2 bus2=p3ulv6529.1.2 switch=n enabled=y phases=2 Linecode=1P_UG_AL_2/0_Converse_0_416_0_2_2_2_2

New Line.l(r:p3udt7630lv-p3ulv8904) Units=km Length=0.0127142 bus1=p3udt7630lv.1.2 bus2=p3ulv8904.1.2 switch=n enabled=y phases=2 Linecode=1P_OH_AL_2/0_Rucina_0_416_0_2_2_2_2

New Line.l(r:p3udt7630lv-p3ulv35436) Units=km Length=0.00896889 bus1=p3udt7630lv.1.2 bus2=p3ulv35436.1.2 switch=n enabled=y phases=2 Linecode=1P_OH_AL_2/0_Rucina_0_416_0_2_2_2_2

New Line.l(r:p3udt8184lv-p3ulv9620) Units=km Length=0.0222461 bus1=p3udt8184lv.1.2 bus2=p3ulv9620.1.2 switch=n enabled=y phases=2 Linecode=1P_OH_AL_2/0_Rucina_0_416_0_2_2_2_2

New Line.l(r:p3udt8185lv-p3ulv9621) Units=km Length=0.0515118 bus1=p3udt8185lv.1.2 bus2=p3ulv9621.1.2 switch=n enabled=y phases=2 Linecode=1P_UG_AL_1/0_Brenau_0_416_0_2_2_2_2

New Line.l(r:p3udm27744-p3ulv33114) Units=km Length=0.0490644 bus1=p3udm27744.1.2 bus2=p3ulv33114.1.2 switch=n enabled=y phases=2 Linecode=1P_UG_AL_1/0_Brenau_0_416_0_2_2_2_2

New Line.l(r:p3udm27744-p3udt8185lv) Units=km Length=0.0196702 bus1=p3udt8185lv.1.2 bus2=p3udm27744.1.2 switch=n enabled=y phases=2 Linecode=1P_UG_AL_1/0_Brenau_0_416_0_2_2_2_2

New Line.l(r:p3udm27745-p3ulv47086) Units=km Length=0.055159 bus1=p3udm27745.1.2 bus2=p3ulv47086.1.2 switch=n enabled=y phases=2 Linecode=1P_UG_AL_1/0_Brenau_0_416_0_2_2_2_2

New Line.l(r:p3udm27745-p3udt8185lv) Units=km Length=0.00983614 bus1=p3udt8185lv.1.2 bus2=p3udm27745.1.2 switch=n enabled=y phases=2 Linecode=1P_UG_AL_1/0_Brenau_0_416_0_2_2_2_2

New Line.l(r:p3udt9226lv-p3ulv11096) Units=km Length=0.0118007 bus1=p3udt9226lv.1.2 bus2=p3ulv11096.1.2 switch=n enabled=y phases=2 Linecode=1P_UG_AL_2/0_Converse_0_416_0_2_2_2_2

New Line.l(r:p3udt9332lv-p3ulv11260) Units=km Length=0.0302921 bus1=p3udt9332lv.1.2 bus2=p3ulv11260.1.2 switch=n enabled=y phases=2 Linecode=1P_OH_AL_4/0_Zuzara_0_416_0_2_2_2_2

New Line.l(r:p3udt9874lv-p3ulv12040) Units=km Length=0.0330018 bus1=p3udt9874lv.1.2 bus2=p3ulv12040.1.2 switch=n enabled=y phases=2 Linecode=1P_UG_AL_4/0_Sweetbriar_0_416_0_2_2_2_2

New Line.l(r:p3udt10891lv-p3ulv13569) Units=km Length=0.061356 bus1=p3udt10891lv.1.2 bus2=p3ulv13569.1.2 switch=n enabled=y phases=2 Linecode=1P_UG_AL_1/0_Brenau_0_416_0_2_2_2_2

New Line.l(r:p3udt13288lv-p3ulv80750) Units=km Length=0.0296371 bus1=p3udt13288lv.1.2 bus2=p3ulv80750.1.2 switch=n enabled=y phases=2 Linecode=1P_OH_AL_4/0_Zuzara_0_416_0_2_2_2_2

New Line.l(r:p3udm43115-p3ulv17483) Units=km Length=0.030002000000000004 bus1=p3udm43115.1.2 bus2=p3ulv17483.1.2 switch=n enabled=y phases=2 Linecode=1P_OH_AL_4/0_Zuzara_0_416_0_2_2_2_2

New Line.l(r:p3udm43115-p3udt13288lv) Units=km Length=0.0190968 bus1=p3udt13288lv.1.2 bus2=p3udm43115.1.2 switch=n enabled=y phases=2 Linecode=1P_OH_AL_2/0_Rucina_0_416_0_2_2_2_2

New Line.l(r:p3udm43119-p3ulv17486) Units=km Length=0.0180491 bus1=p3udm43119.1.2 bus2=p3ulv17486.1.2 switch=n enabled=y phases=2 Linecode=1P_OH_AL_2/0_Rucina_0_416_0_2_2_2_2

New Line.l(r:p3udm43119-p3udt13291lv) Units=km Length=0.0187359 bus1=p3udt13291lv.1.2 bus2=p3udm43119.1.2 switch=n enabled=y phases=2 Linecode=1P_OH_AL_2/0_Rucina_0_416_0_2_2_2_2

New Line.l(r:p3udm43120-p3ulv29166) Units=km Length=0.0235125 bus1=p3udm43120.1.2 bus2=p3ulv29166.1.2 switch=n enabled=y phases=2 Linecode=1P_OH_AL_2/0_Rucina_0_416_0_2_2_2_2

New Line.l(r:p3udm43120-p3udt13291lv) Units=km Length=0.0187407 bus1=p3udt13291lv.1.2 bus2=p3udm43120.1.2 switch=n enabled=y phases=2 Linecode=1P_OH_AL_2/0_Rucina_0_416_0_2_2_2_2

New Line.l(r:p3udt13713lv-p3ulv21320) Units=km Length=0.044615 bus1=p3udt13713lv.1.2 bus2=p3ulv21320.1.2 switch=n enabled=y phases=2 Linecode=1P_OH_AL_4/0_Zuzara_0_416_0_2_2_2_2

New Line.l(r:p3udt13713lv-p3ulv34637) Units=km Length=0.046281100000000006 bus1=p3udt13713lv.1.2 bus2=p3ulv34637.1.2 switch=n enabled=y phases=2 Linecode=1P_OH_AL_4/0_Zuzara_0_416_0_2_2_2_2

New Line.l(r:p3udm44341-p3ulv54717) Units=km Length=0.019469100000000003 bus1=p3udm44341.1.2 bus2=p3ulv54717.1.2 switch=n enabled=y phases=2 Linecode=1P_OH_AL_2/0_Rucina_0_416_0_2_2_2_2

New Line.l(r:p3udm44338-p3ulv18267) Units=km Length=0.048159 bus1=p3udm44338.1.2 bus2=p3ulv18267.1.2 switch=n enabled=y phases=2 Linecode=1P_OH_AL_4/0_Zuzara_0_416_0_2_2_2_2

New Line.l(r:p3udm44338-p3udm44341) Units=km Length=0.015283 bus1=p3udm44341.1.2 bus2=p3udm44338.1.2 switch=n enabled=y phases=2 Linecode=1P_OH_AL_2/0_Rucina_0_416_0_2_2_2_2

New Line.l(r:p3udm44341-p3udt13713lv) Units=km Length=0.015283 bus1=p3udt13713lv.1.2 bus2=p3udm44341.1.2 switch=n enabled=y phases=2 Linecode=1P_OH_AL_2/0_Rucina_0_416_0_2_2_2_2

New Line.l(r:p3udm44342-p3ulv70022) Units=km Length=0.0494947 bus1=p3udm44342.1.2 bus2=p3ulv70022.1.2 switch=n enabled=y phases=2 Linecode=1P_OH_AL_4/0_Zuzara_0_416_0_2_2_2_2

New Line.l(r:p3udm44342-p3ulv79986) Units=km Length=0.055722600000000004 bus1=p3udm44342.1.2 bus2=p3ulv79986.1.2 switch=n enabled=y phases=2 Linecode=1P_OH_AL_4/0_Zuzara_0_416_0_2_2_2_2

New Line.l(r:p3udm44342-p3udt13713lv) Units=km Length=0.0115201 bus1=p3udt13713lv.1.2 bus2=p3udm44342.1.2 switch=n enabled=y phases=2 Linecode=1P_OH_AL_2/0_Rucina_0_416_0_2_2_2_2

New Line.l(r:p3udt15354lv-p3ulv21322) Units=km Length=0.0453123 bus1=p3udt15354lv.1.2 bus2=p3ulv21322.1.2 switch=n enabled=y phases=2 Linecode=1P_OH_AL_4/0_Zuzara_0_416_0_2_2_2_2

New Line.l(r:p3udt15354lv-p3ulv32345) Units=km Length=0.0213539 bus1=p3udt15354lv.1.2 bus2=p3ulv32345.1.2 switch=n enabled=y phases=2 Linecode=1P_OH_AL_2/0_Rucina_0_416_0_2_2_2_2

New Line.l(r:p3udt17687lv-p3ulv26124) Units=km Length=0.0268873 bus1=p3udt17687lv.1.2 bus2=p3ulv26124.1.2 switch=n enabled=y phases=2 Linecode=1P_OH_AL_2/0_Rucina_0_416_0_2_2_2_2

New Line.l(r:p3udm54461-p3ulv56237) Units=km Length=0.0239339 bus1=p3udm54461.1.2 bus2=p3ulv56237.1.2 switch=n enabled=y phases=2 Linecode=1P_OH_AL_2/0_Rucina_0_416_0_2_2_2_2

New Line.l(r:p3udm54461-p3udt17687lv) Units=km Length=0.0191466 bus1=p3udt17687lv.1.2 bus2=p3udm54461.1.2 switch=n enabled=y phases=2 Linecode=1P_OH_AL_2/0_Rucina_0_416_0_2_2_2_2

New Line.l(r:p3udt18709lv-p3ulv28429) Units=km Length=0.0131669 bus1=p3udt18709lv.1.2 bus2=p3ulv28429.1.2 switch=n enabled=y phases=2 Linecode=1P_OH_AL_2/0_Rucina_0_416_0_2_2_2_2

New Line.l(r:p3udt20237lv-p3ulv32150) Units=km Length=0.045311000000000004 bus1=p3udt20237lv.1.2 bus2=p3ulv32150.1.2 switch=n enabled=y phases=2 Linecode=1P_UG_AL_1/0_Brenau_0_416_0_2_2_2_2

New Line.l(r:p3udm60373-p3ulv46932) Units=km Length=0.0448123 bus1=p3udm60373.1.2 bus2=p3ulv46932.1.2 switch=n enabled=y phases=2 Linecode=1P_UG_AL_1/0_Brenau_0_416_0_2_2_2_2

New Line.l(r:p3udm60373-p3udt20237lv) Units=km Length=0.0172497 bus1=p3udt20237lv.1.2 bus2=p3udm60373.1.2 switch=n enabled=y phases=2 Linecode=1P_UG_AL_1/0_Brenau_0_416_0_2_2_2_2

New Line.l(r:p3udm60374-p3ulv61421) Units=km Length=0.0461378 bus1=p3udm60374.1.2 bus2=p3ulv61421.1.2 switch=n enabled=y phases=2 Linecode=1P_UG_AL_1/0_Brenau_0_416_0_2_2_2_2

New Line.l(r:p3udm60374-p3udt20237lv) Units=km Length=0.0192265 bus1=p3udt20237lv.1.2 bus2=p3udm60374.1.2 switch=n enabled=y phases=2 Linecode=1P_UG_AL_1/0_Brenau_0_416_0_2_2_2_2

New Line.l(r:p3udm63321-p3ulv36182) Units=km Length=0.118905 bus1=p3udm63321.1.2 bus2=p3ulv36182.1.2 switch=n enabled=y phases=2 Linecode=1P_OH_AL_4/0_Zuzara_0_416_0_2_2_2_2

New Line.l(r:p3udm63321-p3udt21669lv) Units=km Length=0.0334509 bus1=p3udt21669lv.1.2 bus2=p3udm63321.1.2 switch=n enabled=y phases=2 Linecode=1P_OH_AL_4/0_Zuzara_0_416_0_2_2_2_2

New Line.l(r:p3udm63322-p3ulv74611) Units=km Length=0.0670945 bus1=p3udm63322.1.2 bus2=p3ulv74611.1.2 switch=n enabled=y phases=2 Linecode=1P_OH_AL_4/0_Zuzara_0_416_0_2_2_2_2

New Line.l(r:p3udm63322-p3udt21669lv) Units=km Length=0.0187202 bus1=p3udt21669lv.1.2 bus2=p3udm63322.1.2 switch=n enabled=y phases=2 Linecode=1P_OH_AL_2/0_Rucina_0_416_0_2_2_2_2

New Line.l(r:p3udt22169lv-p3ulv37654) Units=km Length=0.0341387 bus1=p3udt22169lv.1.2 bus2=p3ulv37654.1.2 switch=n enabled=y phases=2 Linecode=1P_OH_AL_4/0_Zuzara_0_416_0_2_2_2_2

New Line.l(r:p3udt22377lv-p3ulv38284) Units=km Length=0.001 bus1=p3udt22377lv.1.2 bus2=p3ulv38284.1.2 switch=n enabled=y phases=2 Linecode=1P_UG_AL_4/0_Sweetbriar_0_416_0_2_2_2_2

New Line.l(r:p3udt22430lv-p3ulv40008) Units=km Length=0.0538753 bus1=p3udt22430lv.1.2 bus2=p3ulv40008.1.2 switch=n enabled=y phases=2 Linecode=1P_OH_AL_4/0_Zuzara_0_416_0_2_2_2_2

New Line.l(r:p3udt22430lv-p3ulv49334) Units=km Length=0.0785525 bus1=p3udt22430lv.1.2 bus2=p3ulv49334.1.2 switch=n enabled=y phases=2 Linecode=1P_OH_AL_4/0_Zuzara_0_416_0_2_2_2_2

New Line.l(r:p3udm64823-p3ulv38432) Units=km Length=0.0800979 bus1=p3udm64823.1.2 bus2=p3ulv38432.1.2 switch=n enabled=y phases=2 Linecode=1P_OH_AL_4/0_Zuzara_0_416_0_2_2_2_2

New Line.l(r:p3udm64823-p3ulv68499) Units=km Length=0.0292776 bus1=p3udm64823.1.2 bus2=p3ulv68499.1.2 switch=n enabled=y phases=2 Linecode=1P_OH_AL_4/0_Zuzara_0_416_0_2_2_2_2

New Line.l(r:p3udm64823-p3udt22430lv) Units=km Length=0.0187607 bus1=p3udt22430lv.1.2 bus2=p3udm64823.1.2 switch=n enabled=y phases=2 Linecode=1P_OH_AL_2/0_Rucina_0_416_0_2_2_2_2

New Line.l(r:p3udm70223-p3ulv48430) Units=km Length=0.0453231 bus1=p3udm70223.1.2 bus2=p3ulv48430.1.2 switch=n enabled=y phases=2 Linecode=1P_UG_AL_1/0_Brenau_0_416_0_2_2_2_2

New Line.l(r:p3udm70223-p3udt25510lv) Units=km Length=0.008627130000000002 bus1=p3udt25510lv.1.2 bus2=p3udm70223.1.2 switch=n enabled=y phases=2 Linecode=1P_UG_AL_1/0_Brenau_0_416_0_2_2_2_2

New Line.l(r:p3udm70224-p3ulv49957) Units=km Length=0.0447601 bus1=p3udm70224.1.2 bus2=p3ulv49957.1.2 switch=n enabled=y phases=2 Linecode=1P_UG_AL_4/0_Sweetbriar_0_416_0_2_2_2_2

New Line.l(r:p3udm70224-p3udt25510lv) Units=km Length=0.0172362 bus1=p3udt25510lv.1.2 bus2=p3udm70224.1.2 switch=n enabled=y phases=2 Linecode=1P_UG_AL_4/0_Sweetbriar_0_416_0_2_2_2_2

New Line.l(r:p3udt25543lv-p3ulv48574) Units=km Length=0.0325342 bus1=p3udt25543lv.1.2 bus2=p3ulv48574.1.2 switch=n enabled=y phases=2 Linecode=1P_UG_AL_4/0_Sweetbriar_0_416_0_2_2_2_2

New Line.l(r:p3udt25544lv-p3ulv48576) Units=km Length=0.0432839 bus1=p3udt25544lv.1.2 bus2=p3ulv48576.1.2 switch=n enabled=y phases=2 Linecode=1P_UG_AL_1/0_Brenau_0_416_0_2_2_2_2

New Line.l(r:p3udt25544lv-p3ulv53930) Units=km Length=0.0101122 bus1=p3udt25544lv.1.2 bus2=p3ulv53930.1.2 switch=n enabled=y phases=2 Linecode=1P_UG_AL_1/0_Brenau_0_416_0_2_2_2_2

New Line.l(r:p3udm70285-p3ulv54716) Units=km Length=0.0460925 bus1=p3udm70285.1.2 bus2=p3ulv54716.1.2 switch=n enabled=y phases=2 Linecode=1P_UG_AL_4/0_Sweetbriar_0_416_0_2_2_2_2

New Line.l(r:p3udm70285-p3udt25544lv) Units=km Length=0.009842100000000001 bus1=p3udt25544lv.1.2 bus2=p3udm70285.1.2 switch=n enabled=y phases=2 Linecode=1P_UG_AL_4/0_Sweetbriar_0_416_0_2_2_2_2

New Line.l(r:p3udt25743lv-p3ulv49333) Units=km Length=0.0142716 bus1=p3udt25743lv.1.2 bus2=p3ulv49333.1.2 switch=n enabled=y phases=2 Linecode=1P_OH_AL_2/0_Rucina_0_416_0_2_2_2_2

New Line.l(r:p3udt27099lv-p3ulv56238) Units=km Length=0.0378387 bus1=p3udt27099lv.1.2 bus2=p3ulv56238.1.2 switch=n enabled=y phases=2 Linecode=1P_OH_AL_4/0_Zuzara_0_416_0_2_2_2_2

New Line.l(r:p3udm72671-p3ulv54718) Units=km Length=0.056553 bus1=p3udm72671.1.2 bus2=p3ulv54718.1.2 switch=n enabled=y phases=2 Linecode=1P_OH_AL_4/0_Zuzara_0_416_0_2_2_2_2

New Line.l(r:p3udm72671-p3udt27099lv) Units=km Length=0.0187249 bus1=p3udt27099lv.1.2 bus2=p3udm72671.1.2 switch=n enabled=y phases=2 Linecode=1P_OH_AL_2/0_Rucina_0_416_0_2_2_2_2

New Line.l(r:p3udt27647lv-p3ulv56986) Units=km Length=0.027095100000000004 bus1=p3udt27647lv.1.2 bus2=p3ulv56986.1.2 switch=n enabled=y phases=2 Linecode=1P_OH_AL_4/0_Zuzara_0_416_0_2_2_2_2

New Line.l(r:p3udt28649lv-p3ulv61573) Units=km Length=0.0347089 bus1=p3udt28649lv.1.2 bus2=p3ulv61573.1.2 switch=n enabled=y phases=2 Linecode=1P_OH_AL_4/0_Zuzara_0_416_0_2_2_2_2

New Line.l(r:p3udt29270lv-p3ulv64594) Units=km Length=0.0111401 bus1=p3udt29270lv.1.2 bus2=p3ulv64594.1.2 switch=n enabled=y phases=2 Linecode=1P_OH_AL_2/0_Rucina_0_416_0_2_2_2_2

New Line.l(r:p3udt29417lv-p3ulv65366) Units=km Length=0.029857000000000005 bus1=p3udt29417lv.1.2 bus2=p3ulv65366.1.2 switch=n enabled=y phases=2 Linecode=1P_OH_AL_4/0_Zuzara_0_416_0_2_2_2_2

New Line.l(r:p3udt29735lv-p3ulv66919) Units=km Length=0.0185431 bus1=p3udt29735lv.1.2 bus2=p3ulv66919.1.2 switch=n enabled=y phases=2 Linecode=1P_OH_AL_2/0_Rucina_0_416_0_2_2_2_2

New Line.l(r:p3udt21387-p3udt22377) Units=km Length=0.154633 bus1=p3udt21387-p3udt22377xx.3 bus2=p3udt21387-p3udt22377xxx.3 switch=n enabled=y phases=1 Linecode=1P_UG_AL_#2_15_12_47_0_1_1_1_1

New Line.l(r:p3udt10891-p3udt22698) Units=km Length=0.343464 bus1=p3udt10891-p3udt22698xx.3 bus2=p3udt10891-p3udt22698x.3 switch=n enabled=y phases=1 Linecode=1P_UG_AL_#2_15_12_47_0_1_1_1_1

New Line.l(r:p3udt25543-p3udt29896) Units=km Length=0.08898530000000002 bus1=p3udt25543-p3udt29896xx.2 bus2=p3udt25543-p3udt29896x.2 switch=n enabled=y phases=1 Linecode=1P_UG_AL_#2_15_12_47_0_1_1_1_1

New Line.l(r:p3udt18709-p3umv42) Units=km Length=0.265611 bus1=p3udt18709-p3umv42x.3 bus2=p3udt18709.3 switch=n enabled=y phases=1 Linecode=1P_OH_AL_ACSR_#2_Sparrow_12_47_0_1_1_1_1

New Line.l(r:p3udt29270-p3udt9332) Units=km Length=0.0453041 bus1=p3udt29270.3 bus2=p3udt9332.3 switch=n enabled=y phases=1 Linecode=1P_OH_AL_ACSR_#2_Sparrow_12_47_0_1_1_1_1

New Line.l(r:p3udt29270-p3udt29735) Units=km Length=0.0470715 bus1=p3udt29270-p3udt29735x.3 bus2=p3udt29270.3 switch=n enabled=y phases=1 Linecode=1P_OH_AL_ACSR_#2_Sparrow_12_47_0_1_1_1_1

New Line.l(r:p3udt13291-p3udt30203) Units=km Length=0.095966 bus1=p3udt13291-p3udt30203x.2 bus2=p3udt13291.2 switch=n enabled=y phases=1 Linecode=1P_OH_AL_ACSR_#2_Sparrow_12_47_0_1_1_1_1

New Line.l(r:p3udt25743-p3udt26719) Units=km Length=0.269634 bus1=p3udt25743-p3udt26719x.3 bus2=p3udt25743.3 switch=n enabled=y phases=1 Linecode=1P_OH_AL_ACSR_#2_Sparrow_12_47_0_1_1_1_1

New Line.l(r:p3udt21430-p3udt5762) Units=km Length=0.0197559 bus1=p3udt21430-p3udt5762xx.3 bus2=p3udt21430-p3udt5762xxx.3 switch=n enabled=y phases=1 Linecode=1P_UG_AL_#2_15_12_47_0_1_1_1_1

New Line.l(r:p3udt27289-p3uhs2_1247) Units=km Length=0.277824 bus1=p3udt27289-p3uhs2_1247x.1.2.3 bus2=p3udt27289-p3uhs2_1247x_b1_1.1.2.3 switch=n enabled=y phases=3 Linecode=3P_OH_AL_ACSR_1033kcmil_Curlew_12.47_1_3_3_3_3

New Line.l(r:p3udt30467-p3udt9226) Units=km Length=0.0384664 bus1=p3udt30467-p3udt9226x.1.2.3 bus2=p3udt30467-p3udt9226xx.1.2.3 switch=n enabled=y phases=3 Linecode=3P_UG_AL_4/0_25_12_47_0_3_3_3_3

New Line.l(r:p3udt20237-p3udt30467) Units=km Length=0.0384618 bus1=p3udt20237-p3udt30467x.1.2.3 bus2=p3udt20237-p3udt30467xx.1.2.3 switch=n enabled=y phases=3 Linecode=3P_UG_AL_4/0_25_12_47_0_3_3_3_3

New Line.l(r:p3udt20237-p3udt25510) Units=km Length=0.0431131 bus1=p3udt20237-p3udt25510xx.1.2.3 bus2=p3udt20237-p3udt25510x.1.2.3 switch=n enabled=y phases=3 Linecode=3P_UG_AL_4/0_25_12_47_0_3_3_3_3

New Line.l(r:p3udt25510-p3udt25544) Units=km Length=0.0172362 bus1=p3udt25510-p3udt25544xx.1.2.3 bus2=p3udt25510-p3udt25544x.1.2.3 switch=n enabled=y phases=3 Linecode=3P_UG_AL_4/0_25_12_47_0_3_3_3_3

New Line.l(r:p3udt25544-p3udt8185) Units=km Length=0.0491905 bus1=p3udt25544-p3udt8185xx.1.2.3 bus2=p3udt25544-p3udt8185x.1.2.3 switch=n enabled=y phases=3 Linecode=3P_UG_AL_4/0_25_12_47_0_3_3_3_3

New Line.l(r:p3udt13713-p3udt8185) Units=km Length=0.11972000000000001 bus1=p3udt13713.1.2.3 bus2=p3udt8185.1.2.3 switch=n enabled=y phases=3 Linecode=3P_OH_AL_ACSR_4/0_Penguin_12_47_0_3_3_3_3

New Line.l(r:p3udt13713-p3udt816) Units=km Length=0.20352 bus1=p3udt816.1.2.3 bus2=p3udt13713.1.2.3 switch=n enabled=y phases=3 Linecode=3P_OH_AL_ACSR_4/0_Penguin_12_47_0_3_3_3_3

New Line.l(r:p3udt17687-p3udt816) Units=km Length=0.240686 bus1=p3udt17687.1.2.3 bus2=p3udt816.1.2.3 switch=n enabled=y phases=3 Linecode=3P_OH_AL_ACSR_4/0_Penguin_12_47_0_3_3_3_3

New Line.l(r:p3udt27646-p3udt30803) Units=km Length=0.198387 bus1=p3udt30803.1.2.3 bus2=p3udt27646.1.2.3 switch=n enabled=y phases=3 Linecode=3P_OH_AL_ACSR_4/0_Penguin_12_47_0_3_3_3_3

New Line.l(r:p3udt22698-p3udt30803) Units=km Length=0.245159 bus1=p3udt22698-p3udt30803x.1.2.3 bus2=p3udt22698-p3udt30803xx.1.2.3 switch=n enabled=y phases=3 Linecode=3P_UG_AL_4/0_25_12_47_0_3_3_3_3

New Line.l(r:p3udt22698-p3udt23953) Units=km Length=0.117733 bus1=p3udt22698-p3udt23953xx.1.2.3 bus2=p3udt22698-p3udt23953x.1.2.3 switch=n enabled=y phases=3 Linecode=3P_UG_AL_4/0_25_12_47_0_3_3_3_3

New Line.l(r:p3udt23953-p3udt27647) Units=km Length=0.283602 bus1=p3udt27647.1.2.3 bus2=p3udt23953.1.2.3 switch=n enabled=y phases=3 Linecode=3P_OH_AL_ACSR_4/0_Penguin_12_47_0_3_3_3_3

New Line.l(r:p3udt16524-p3udt21669) Units=km Length=0.0501675 bus1=p3udt21669.1.2.3 bus2=p3udt16524.1.2.3 switch=n enabled=y phases=3 Linecode=3P_OH_AL_ACSR_4/0_Penguin_12_47_0_3_3_3_3

New Line.l(r:p3udt21669-p3udt27099) Units=km Length=0.05617 bus1=p3udt27099.1.2.3 bus2=p3udt21669.1.2.3 switch=n enabled=y phases=3 Linecode=3P_OH_AL_ACSR_4/0_Penguin_12_47_0_3_3_3_3

New Line.l(r:p3udt1564-p3udt27099) Units=km Length=0.338663 bus1=p3udt1564.1.2.3 bus2=p3udt27099.1.2.3 switch=n enabled=y phases=3 Linecode=3P_OH_AL_ACSR_4/0_Penguin_12_47_0_3_3_3_3

New Line.l(r:p3udt1564-p3udt8184) Units=km Length=0.14018 bus1=p3udt8184.1.2.3 bus2=p3udt1564.1.2.3 switch=n enabled=y phases=3 Linecode=3P_OH_AL_ACSR_4/0_Penguin_12_47_0_3_3_3_3

New Line.l(r:p3udt7630-p3udt8184) Units=km Length=0.145667 bus1=p3udt7630.1.2.3 bus2=p3udt8184.1.2.3 switch=n enabled=y phases=3 Linecode=3P_OH_AL_ACSR_4/0_Penguin_12_47_0_3_3_3_3

New Line.l(r:p3udt25952-p3udt7630) Units=km Length=0.15980700000000003 bus1=p3udt25952.1.2.3 bus2=p3udt7630.1.2.3 switch=n enabled=y phases=3 Linecode=3P_OH_AL_ACSR_4/0_Penguin_12_47_0_3_3_3_3

New Line.l(r:p3udt25952-p3udt5117) Units=km Length=0.03962220000000001 bus1=p3udt5117.1.2.3 bus2=p3udt25952.1.2.3 switch=n enabled=y phases=3 Linecode=3P_OH_AL_ACSR_4/0_Penguin_12_47_0_3_3_3_3

New Line.l(r:p3udt27648-p3udt5117) Units=km Length=0.0198134 bus1=p3udt27648.1.2.3 bus2=p3udt5117.1.2.3 switch=n enabled=y phases=3 Linecode=3P_OH_AL_ACSR_4/0_Penguin_12_47_0_3_3_3_3

New Line.l(r:p3udt27647-p3udt27648) Units=km Length=0.193848 bus1=p3udt27647.1.2.3 bus2=p3udt27648.1.2.3 switch=n enabled=y phases=3 Linecode=3P_OH_AL_ACSR_4/0_Penguin_12_47_0_3_3_3_3

New Line.l(r:p3udt27647-p3udt815) Units=km Length=0.03820710000000001 bus1=p3udt815.1.2.3 bus2=p3udt27647.1.2.3 switch=n enabled=y phases=3 Linecode=3P_OH_AL_ACSR_4/0_Penguin_12_47_0_3_3_3_3

New Line.l(r:p3udt13288-p3udt815) Units=km Length=0.0381983 bus1=p3udt13288.1.2.3 bus2=p3udt815.1.2.3 switch=n enabled=y phases=3 Linecode=3P_OH_AL_ACSR_4/0_Penguin_12_47_0_3_3_3_3

New Line.l(r:p3udt13288-p3udt17687) Units=km Length=0.153444 bus1=p3udt17687.1.2.3 bus2=p3udt13288.1.2.3 switch=n enabled=y phases=3 Linecode=3P_OH_AL_ACSR_4/0_Penguin_12_47_0_3_3_3_3

New Line.l(r:p3udt14553-p3udt17687) Units=km Length=0.0765865 bus1=p3udt14553.1.2.3 bus2=p3udt17687.1.2.3 switch=n enabled=y phases=3 Linecode=3P_OH_AL_ACSR_4/0_Penguin_12_47_0_3_3_3_3

New Line.l(r:p3udt14553-p3udt18377) Units=km Length=0.0382887 bus1=p3udt18377.1.2.3 bus2=p3udt14553.1.2.3 switch=n enabled=y phases=3 Linecode=3P_OH_AL_ACSR_4/0_Penguin_12_47_0_3_3_3_3

New Line.l(r:p3udt1560-p3udt18377) Units=km Length=0.0574399 bus1=p3udt1560.1.2.3 bus2=p3udt18377.1.2.3 switch=n enabled=y phases=3 Linecode=3P_OH_AL_ACSR_4/0_Penguin_12_47_0_3_3_3_3

New Line.l(r:p3udt1560-p3udt20873) Units=km Length=0.129079 bus1=p3udt20873.1.2.3 bus2=p3udt1560.1.2.3 switch=n enabled=y phases=3 Linecode=3P_OH_AL_ACSR_4/0_Penguin_12_47_0_3_3_3_3

New Line.l(r:p3udt20873-p3udt27289) Units=km Length=0.0142089 bus1=p3udt27289.1.2.3 bus2=p3udt20873.1.2.3 switch=n enabled=y phases=3 Linecode=3P_OH_AL_ACSR_4/0_Penguin_12_47_0_3_3_3_3

New Line.l(r:p3udt27289lv-p3ulv55474) Units=km Length=0.0830003 bus1=p3udt27289lv.1.2.3 bus2=p3ulv55474.1.2.3 switch=n enabled=y phases=3 Linecode=3P_UG_AL_350kcmil_15_0_416_0_3_3_3_3

New Line.l(r:p3udt20873lv-p3ulv33849) Units=km Length=0.0420619 bus1=p3udt20873lv.1.2.3 bus2=p3ulv33849.1.2.3 switch=n enabled=y phases=3 Linecode=3P_UG_AL_350kcmil_15_0_416_0_3_3_3_3

New Line.l(r:p3udt1560lv-p3ulv1744) Units=km Length=0.0302354 bus1=p3udt1560lv.1.2.3 bus2=p3ulv1744.1.2.3 switch=n enabled=y phases=3 Linecode=3P_UG_AL_750kcmil_25_0_416_0_3_3_3_3

New Line.l(r:p3udt18377lv-p3ulv27664) Units=km Length=0.029457400000000005 bus1=p3udt18377lv.1.2.3 bus2=p3ulv27664.1.2.3 switch=n enabled=y phases=3 Linecode=3P_UG_AL_750kcmil_25_0_416_0_3_3_3_3

New Line.l(r:p3udt14553lv-p3ulv19783) Units=km Length=0.0228 bus1=p3udt14553lv.1.2.3 bus2=p3ulv19783.1.2.3 switch=n enabled=y phases=3 Linecode=3P_UG_AL_750kcmil_25_0_416_0_3_3_3_3

New Line.l(r:p3udt816lv-p3ulv973) Units=km Length=0.0164413 bus1=p3udt816lv.1.2.3 bus2=p3ulv973.1.2.3 switch=n enabled=y phases=3 Linecode=3P_UG_AL_750kcmil_25_0_416_0_3_3_3_3

New Line.l(r:p3udt30467lv-p3ulv70681) Units=km Length=0.04617870000000001 bus1=p3udt30467lv.1.2.3 bus2=p3ulv70681.1.2.3 switch=n enabled=y phases=3 Linecode=3P_UG_AL_350kcmil_15_0_416_0_3_3_3_3

New Line.l(r:p3udt21387lv-p3ulv35283) Units=km Length=0.001 bus1=p3udt21387lv.1.2.3 bus2=p3ulv35283.1.2.3 switch=n enabled=y phases=3 Linecode=3P_UG_AL_350kcmil_15_0_416_0_3_3_3_3

New Line.l(r:p3udt21387-p3udt9226) Units=km Length=0.189143 bus1=p3udt21387-p3udt9226xx.1.2.3 bus2=p3udt21387-p3udt9226x.1.2.3 switch=n enabled=y phases=3 Linecode=3P_UG_AL_4/0_25_12_47_0_3_3_3_3

New Line.l(r:p3udt21431lv-p3ulv35435) Units=km Length=0.017958 bus1=p3udt21431lv.1.2.3 bus2=p3ulv35435.1.2.3 switch=n enabled=y phases=3 Linecode=3P_UG_AL_350kcmil_15_0_416_0_3_3_3_3

New Line.l(r:p3udt17688lv-p3ulv26126) Units=km Length=0.0496847 bus1=p3udt17688lv.1.2.3 bus2=p3ulv26126.1.2.3 switch=n enabled=y phases=3 Linecode=3P_UG_AL_350kcmil_15_0_416_0_3_3_3_3

New Line.l(r:p3udt16523-p3udt17688) Units=km Length=0.0657171 bus1=p3udt16523-p3udt17688x.1.2.3 bus2=p3udt16523-p3udt17688xx.1.2.3 switch=n enabled=y phases=3 Linecode=3P_UG_AL_4/0_25_12_47_0_3_3_3_3

New Line.l(r:p3udt16523-p3udt21431) Units=km Length=0.0806133 bus1=p3udt16523-p3udt21431xx.1.2.3 bus2=p3udt16523-p3udt21431x.1.2.3 switch=n enabled=y phases=3 Linecode=3P_UG_AL_4/0_25_12_47_0_3_3_3_3

New Line.l(r:p3udt21431-p3udt9226) Units=km Length=0.159393 bus1=p3udt21431-p3udt9226xx.1.2.3 bus2=p3udt21431-p3udt9226x.1.2.3 switch=n enabled=y phases=3 Linecode=3P_UG_AL_4/0_25_12_47_0_3_3_3_3

New Line.l(r:p3udt31882lv-p3ulv78435) Units=km Length=0.00676646 bus1=p3udt31882lv.1.2.3 bus2=p3ulv78435.1.2.3 switch=n enabled=y phases=3 Linecode=3P_UG_AL_350kcmil_15_0_416_0_3_3_3_3

New Line.l(r:p3udt15765lv-p3ulv22094) Units=km Length=0.0152749 bus1=p3udt15765lv.1.2.3 bus2=p3ulv22094.1.2.3 switch=n enabled=y phases=3 Linecode=3P_UG_AL_750kcmil_25_0_416_0_3_3_3_3

New Line.l(r:p3udt15765-p3udt31882) Units=km Length=0.175588 bus1=p3udt31882.1.2.3 bus2=p3udt15765.1.2.3 switch=n enabled=y phases=3 Linecode=3P_OH_AL_ACSR_4/0_Penguin_12_47_0_3_3_3_3

New Line.l(r:p3udt20237-p3udt31882) Units=km Length=0.102038 bus1=p3udt20237.1.2.3 bus2=p3udt31882.1.2.3 switch=n enabled=y phases=3 Linecode=3P_OH_AL_ACSR_4/0_Penguin_12_47_0_3_3_3_3

New Line.l(r:p3udt30654lv-p3ulv71568) Units=km Length=0.0104202 bus1=p3udt30654lv.1.2.3 bus2=p3ulv71568.1.2.3 switch=n enabled=y phases=3 Linecode=3P_UG_AL_350kcmil_15_0_416_0_3_3_3_3

New Line.l(r:p3udt29893lv-p3ulv67708) Units=km Length=0.0438225 bus1=p3udt29893lv.1.2.3 bus2=p3ulv67708.1.2.3 switch=n enabled=y phases=3 Linecode=3P_UG_AL_350kcmil_15_0_416_0_3_3_3_3

New Line.l(r:p3udt26903lv-p3ulv53925) Units=km Length=0.0192649 bus1=p3udt26903lv.1.2.3 bus2=p3ulv53925.1.2.3 switch=n enabled=y phases=3 Linecode=3P_UG_AL_750kcmil_25_0_416_0_3_3_3_3

New Line.l(r:p3udt26903-p3udt29893) Units=km Length=0.122633 bus1=p3udt29893.1.2.3 bus2=p3udt26903.1.2.3 switch=n enabled=y phases=3 Linecode=3P_OH_AL_ACSR_4/0_Penguin_12_47_0_3_3_3_3

New Line.l(r:p3udt29893-p3udt30654) Units=km Length=0.014516000000000001 bus1=p3udt30654.1.2.3 bus2=p3udt29893.1.2.3 switch=n enabled=y phases=3 Linecode=3P_OH_AL_ACSR_4/0_Penguin_12_47_0_3_3_3_3

New Line.l(r:p3udt13713-p3udt30654) Units=km Length=0.0305661 bus1=p3udt13713.1.2.3 bus2=p3udt30654.1.2.3 switch=n enabled=y phases=3 Linecode=3P_OH_AL_ACSR_4/0_Penguin_12_47_0_3_3_3_3

New Line.l(r:p3udt23953lv-p3ulv43145) Units=km Length=0.0339306 bus1=p3udt23953lv.1.2.3 bus2=p3ulv43145.1.2.3 switch=n enabled=y phases=3 Linecode=3P_UG_AL_350kcmil_15_0_416_0_3_3_3_3

New Line.l(r:p3udm48687-p3ulv21321) Units=km Length=0.028070600000000005 bus1=p3udm48687.1.2.3 bus2=p3ulv21321.1.2.3 switch=n enabled=y phases=3 Linecode=3P_UG_AL_350kcmil_15_0_416_0_3_3_3_3

New Line.l(r:p3udm48687-p3udt15353lv) Units=km Length=0.037504300000000004 bus1=p3udt15353lv.1.2.3 bus2=p3udm48687.1.2.3 switch=n enabled=y phases=3 Linecode=3P_UG_AL_350kcmil_15_0_416_0_3_3_3_3

New Line.l(r:p3udm48688-p3ulv43144) Units=km Length=0.0119527 bus1=p3udm48688.1.2.3 bus2=p3ulv43144.1.2.3 switch=n enabled=y phases=3 Linecode=3P_UG_AL_750kcmil_25_0_416_0_3_3_3_3

New Line.l(r:p3udm48688-p3udt15353lv) Units=km Length=0.055372300000000006 bus1=p3udt15353lv.1.2.3 bus2=p3udm48688.1.2.3 switch=n enabled=y phases=3 Linecode=3P_UG_AL_750kcmil_25_0_416_0_3_3_3_3

New Line.l(r:p3udt29736lv-p3ulv66920) Units=km Length=0.0364342 bus1=p3udt29736lv.1.2.3 bus2=p3ulv66920.1.2.3 switch=n enabled=y phases=3 Linecode=3P_UG_AL_350kcmil_15_0_416_0_3_3_3_3

New Line.l(r:p3udt15353-p3udt29736) Units=km Length=0.0369105 bus1=p3udt15353.1.2.3 bus2=p3udt29736.1.2.3 switch=n enabled=y phases=3 Linecode=3P_OH_AL_ACSR_4/0_Penguin_12_47_0_3_3_3_3

New Line.l(r:p3udt15353-p3udt23953) Units=km Length=0.467464 bus1=p3udt23953.1.2.3 bus2=p3udt15353.1.2.3 switch=n enabled=y phases=3 Linecode=3P_OH_AL_ACSR_4/0_Penguin_12_47_0_3_3_3_3

New Line.l(r:p3udt22698lv-p3ulv39191) Units=km Length=0.0313911 bus1=p3udt22698lv.1.2.3 bus2=p3ulv39191.1.2.3 switch=n enabled=y phases=3 Linecode=3P_UG_AL_350kcmil_15_0_416_0_3_3_3_3

New Line.l(r:p3udt30803lv-p3ulv72336) Units=km Length=0.0241352 bus1=p3udt30803lv.1.2.3 bus2=p3ulv72336.1.2.3 switch=n enabled=y phases=3 Linecode=3P_UG_AL_350kcmil_15_0_416_0_3_3_3_3

New Line.l(r:p3udt29896lv-p3ulv67711) Units=km Length=0.0261987 bus1=p3udt29896lv.1.2.3 bus2=p3ulv67711.1.2.3 switch=n enabled=y phases=3 Linecode=3P_UG_AL_350kcmil_15_0_416_0_3_3_3_3

New Line.l(r:p3udt29896-p3udt9874) Units=km Length=0.009888670000000002 bus1=p3udt29896-p3udt9874xx.1.2.3 bus2=p3udt29896-p3udt9874x.1.2.3 switch=n enabled=y phases=3 Linecode=3P_UG_AL_4/0_25_12_47_0_3_3_3_3

New Line.l(r:p3udt30803-p3udt9874) Units=km Length=0.0683867 bus1=p3udt30803-p3udt9874x.1.2.3 bus2=p3udt30803-p3udt9874xx.1.2.3 switch=n enabled=y phases=3 Linecode=3P_UG_AL_4/0_25_12_47_0_3_3_3_3

New Line.l(r:p3udt27646lv-p3ulv56985) Units=km Length=0.0267757 bus1=p3udt27646lv.1.2.3 bus2=p3ulv56985.1.2.3 switch=n enabled=y phases=3 Linecode=3P_UG_AL_750kcmil_25_0_416_0_3_3_3_3

New Line.l(r:p3udt27646-p3umv42) Units=km Length=0.318953 bus1=p3udt27646.1.2.3 bus2=p3umv42.1.2.3 switch=n enabled=y phases=3 Linecode=3P_OH_AL_ACSR_4/0_Penguin_12_47_0_3_3_3_3

New Line.l(r:p3udt12407lv-p3ulv15950) Units=km Length=0.0216085 bus1=p3udt12407lv.1.2.3 bus2=p3ulv15950.1.2.3 switch=n enabled=y phases=3 Linecode=3P_UG_AL_350kcmil_15_0_416_0_3_3_3_3

New Line.l(r:p3udt12407-p3udt27646) Units=km Length=0.101737 bus1=p3udt27646.1.2.3 bus2=p3udt12407.1.2.3 switch=n enabled=y phases=3 Linecode=3P_OH_AL_ACSR_4/0_Penguin_12_47_0_3_3_3_3

New Line.l(r:p3udm67622-p3ulv43143) Units=km Length=0.020474 bus1=p3udm67622.1.2.3 bus2=p3ulv43143.1.2.3 switch=n enabled=y phases=3 Linecode=3P_UG_AL_750kcmil_25_0_416_0_3_3_3_3

New Line.l(r:p3udm67622-p3udt23952lv) Units=km Length=0.0193447 bus1=p3udt23952lv.1.2.3 bus2=p3udm67622.1.2.3 switch=n enabled=y phases=3 Linecode=3P_UG_AL_750kcmil_25_0_416_0_3_3_3_3

New Line.l(r:p3udm67623-p3ulv48575) Units=km Length=0.00989148 bus1=p3udm67623.1.2.3 bus2=p3ulv48575.1.2.3 switch=n enabled=y phases=3 Linecode=3P_UG_AL_350kcmil_15_0_416_0_3_3_3_3

New Line.l(r:p3udm67623-p3udt23952lv) Units=km Length=0.054335 bus1=p3udt23952lv.1.2.3 bus2=p3udm67623.1.2.3 switch=n enabled=y phases=3 Linecode=3P_UG_AL_350kcmil_15_0_416_0_3_3_3_3

New Line.l(r:p3udt23952-p3udt29735) Units=km Length=0.14390200000000003 bus1=p3udt29735.1.2.3 bus2=p3udt23952.1.2.3 switch=n enabled=y phases=3 Linecode=3P_OH_AL_ACSR_4/0_Penguin_12_47_0_3_3_3_3

New Line.l(r:p3udt23953-p3udt29735) Units=km Length=0.0454281 bus1=p3udt23953.1.2.3 bus2=p3udt29735.1.2.3 switch=n enabled=y phases=3 Linecode=3P_OH_AL_ACSR_4/0_Penguin_12_47_0_3_3_3_3

New Line.l(r:p3udt27648lv-p3ulv56987) Units=km Length=0.0192432 bus1=p3udt27648lv.1.2.3 bus2=p3ulv56987.1.2.3 switch=n enabled=y phases=3 Linecode=3P_UG_AL_350kcmil_15_0_416_0_3_3_3_3

New Line.l(r:p3udt5117lv-p3ulv5738) Units=km Length=0.0103982 bus1=p3udt5117lv.1.2.3 bus2=p3ulv5738.1.2.3 switch=n enabled=y phases=3 Linecode=3P_UG_AL_350kcmil_15_0_416_0_3_3_3_3

New Line.l(r:p3udt25952lv-p3ulv50105) Units=km Length=0.0147393 bus1=p3udt25952lv.1.2.3 bus2=p3ulv50105.1.2.3 switch=n enabled=y phases=3 Linecode=3P_UG_AL_350kcmil_15_0_416_0_3_3_3_3

New Line.l(r:p3udt1564lv-p3ulv1748) Units=km Length=0.0419263 bus1=p3udt1564lv.1.2.3 bus2=p3ulv1748.1.2.3 switch=n enabled=y phases=3 Linecode=3P_UG_AL_350kcmil_15_0_416_0_3_3_3_3

New Line.l(r:p3udt25742lv-p3ulv49332) Units=km Length=0.0199694 bus1=p3udt25742lv.1.2.3 bus2=p3ulv49332.1.2.3 switch=n enabled=y phases=3 Linecode=3P_UG_AL_350kcmil_15_0_416_0_3_3_3_3

New Line.l(r:p3udt1564-p3udt25742) Units=km Length=0.0198036 bus1=p3udt1564-p3udt25742x.1.2.3 bus2=p3udt1564-p3udt25742xx.1.2.3 switch=n enabled=y phases=3 Linecode=3P_UG_AL_4/0_25_12_47_0_3_3_3_3

New Line.l(r:p3udt16524lv-p3ulv47087) Units=km Length=0.0343116 bus1=p3udt16524lv.1.2.3 bus2=p3ulv47087.1.2.3 switch=n enabled=y phases=3 Linecode=3P_UG_AL_350kcmil_15_0_416_0_3_3_3_3

New Line.l(r:p3udm51656-p3ulv23669) Units=km Length=0.0819692 bus1=p3udm51656.1.2.3 bus2=p3ulv23669.1.2.3 switch=n enabled=y phases=3 Linecode=3P_UG_AL_350kcmil_15_0_416_0_3_3_3_3

New Line.l(r:p3udm51656-p3udt16524lv) Units=km Length=0.016716600000000005 bus1=p3udt16524lv.1.2.3 bus2=p3udm51656.1.2.3 switch=n enabled=y phases=3 Linecode=3P_UG_AL_350kcmil_15_0_416_0_3_3_3_3

New Line.l(r:p3udt32033lv-p3ulv79227) Units=km Length=0.0254215 bus1=p3udt32033lv.1.2.3 bus2=p3ulv79227.1.2.3 switch=n enabled=y phases=3 Linecode=3P_UG_AL_350kcmil_15_0_416_0_3_3_3_3

New Line.l(r:p3udt26719lv-p3ulv53175) Units=km Length=0.011148 bus1=p3udt26719lv.1.2.3 bus2=p3ulv53175.1.2.3 switch=n enabled=y phases=3 Linecode=3P_UG_AL_350kcmil_15_0_416_0_3_3_3_3

New Line.l(r:p3udt19358lv-p3ulv29938) Units=km Length=0.0634741 bus1=p3udt19358lv.1.2.3 bus2=p3ulv29938.1.2.3 switch=n enabled=y phases=3 Linecode=3P_UG_AL_350kcmil_15_0_416_0_3_3_3_3

New Line.l(r:p3udt15354-p3udt19358) Units=km Length=0.170871 bus1=p3udt15354.1.2.3 bus2=p3udt19358.1.2.3 switch=n enabled=y phases=3 Linecode=3P_OH_AL_ACSR_4/0_Penguin_12_47_0_3_3_3_3

New Line.l(r:p3udt30203lv-p3ulv69263) Units=km Length=0.0355832 bus1=p3udt30203lv.1.2.3 bus2=p3ulv69263.1.2.3 switch=n enabled=y phases=3 Linecode=3P_UG_AL_350kcmil_15_0_416_0_3_3_3_3

New Line.l(r:p3udt15354-p3udt30203) Units=km Length=0.0993898 bus1=p3udt15354.1.2.3 bus2=p3udt30203.1.2.3 switch=n enabled=y phases=3 Linecode=3P_OH_AL_ACSR_4/0_Penguin_12_47_0_3_3_3_3

New Line.l(r:p3udt15354-p3udt26719) Units=km Length=0.173534 bus1=p3udt26719.1.2.3 bus2=p3udt15354.1.2.3 switch=n enabled=y phases=3 Linecode=3P_OH_AL_ACSR_4/0_Penguin_12_47_0_3_3_3_3

New Line.l(r:p3udt26719-p3udt3736) Units=km Length=0.0390288 bus1=p3udt3736.1.2.3 bus2=p3udt26719.1.2.3 switch=n enabled=y phases=3 Linecode=3P_OH_AL_ACSR_4/0_Penguin_12_47_0_3_3_3_3

New Line.l(r:p3udt29417-p3udt3736) Units=km Length=0.171828 bus1=p3udt29417.1.2.3 bus2=p3udt3736.1.2.3 switch=n enabled=y phases=3 Linecode=3P_OH_AL_ACSR_4/0_Penguin_12_47_0_3_3_3_3

New Line.l(r:p3udt22430-p3udt29417) Units=km Length=0.0750518 bus1=p3udt22430.1.2.3 bus2=p3udt29417.1.2.3 switch=n enabled=y phases=3 Linecode=3P_OH_AL_ACSR_4/0_Penguin_12_47_0_3_3_3_3

New Line.l(r:p3udt22430-p3udt32033) Units=km Length=0.0750607 bus1=p3udt32033.1.2.3 bus2=p3udt22430.1.2.3 switch=n enabled=y phases=3 Linecode=3P_OH_AL_ACSR_4/0_Penguin_12_47_0_3_3_3_3

New Line.l(r:p3udt28649-p3udt32033) Units=km Length=0.0375303 bus1=p3udt28649.1.2.3 bus2=p3udt32033.1.2.3 switch=n enabled=y phases=3 Linecode=3P_OH_AL_ACSR_4/0_Penguin_12_47_0_3_3_3_3

New Line.l(r:p3udt22169-p3udt28649) Units=km Length=0.0375303 bus1=p3udt22169.1.2.3 bus2=p3udt28649.1.2.3 switch=n enabled=y phases=3 Linecode=3P_OH_AL_ACSR_4/0_Penguin_12_47_0_3_3_3_3

New Line.l(r:p3udt16524-p3udt22169) Units=km Length=0.052207 bus1=p3udt16524.1.2.3 bus2=p3udt22169.1.2.3 switch=n enabled=y phases=3 Linecode=3P_OH_AL_ACSR_4/0_Penguin_12_47_0_3_3_3_3

New Line.l(r:p3udt10385lv-p3ulv12790) Units=km Length=0.0108334 bus1=p3udt10385lv.1.2.3 bus2=p3ulv12790.1.2.3 switch=n enabled=y phases=3 Linecode=3P_UG_AL_350kcmil_15_0_416_0_3_3_3_3

New Line.l(r:p3udt10385-p3udt7630) Units=km Length=0.001 bus1=p3udt7630.1.2.3 bus2=p3udt10385.1.2.3 switch=n enabled=y phases=3 Linecode=3P_OH_AL_ACSR_4/0_Penguin_12_47_0_3_3_3_3

New Line.l(r:p3udt23703lv-p3ulv42356) Units=km Length=0.00974013 bus1=p3udt23703lv.1.2.3 bus2=p3ulv42356.1.2.3 switch=n enabled=y phases=3 Linecode=3P_UG_AL_350kcmil_15_0_416_0_3_3_3_3

New Line.l(r:p3udt23703-p3udt25952) Units=km Length=0.10778500000000002 bus1=p3udt25952.1.2.3 bus2=p3udt23703.1.2.3 switch=n enabled=y phases=3 Linecode=3P_OH_AL_ACSR_4/0_Penguin_12_47_0_3_3_3_3

New Line.l(r:p3udt21430lv-p3ulv35432) Units=km Length=0.021324700000000002 bus1=p3udt21430lv.1.2.3 bus2=p3ulv35432.1.2.3 switch=n enabled=y phases=3 Linecode=3P_UG_AL_350kcmil_15_0_416_0_3_3_3_3

New Line.l(r:p3udt17687-p3udt21430) Units=km Length=0.145551 bus1=p3udt17687.1.2.3 bus2=p3udt21430.1.2.3 switch=n enabled=y phases=3 Linecode=3P_OH_AL_ACSR_4/0_Penguin_12_47_0_3_3_3_3

New Line.l(r:p3udt16523lv-p3ulv23668)p3ud1 Units=km Length=0.0391231 bus1=p3udt16523lv.1.2.3 bus2=p3ulv23668.1.2.3 switch=n enabled=y phases=3 Linecode=3P_UG_AL_750kcmil_25_0_416_0_3_3_3_3

New Line.padswitch(r:p3udt21387-p3udt22377)p3u_170161 Units=km Length=0.001 bus1=p3udt21387-p3udt22377x.3 bus2=p3udt21387-p3udt22377xx.3 switch=y enabled=y phases=1 Linecode=padswitch_1_1_1_1

New Line.padswitch(r:p3udt21387-p3udt22377)p3u_170162 Units=km Length=0.001 bus1=p3udt21387-p3udt22377xxx.3 bus2=p3udt22377.3 switch=y enabled=y phases=1 Linecode=padswitch_1_3_1_1_1

New Line.padswitch(r:p3udt10891-p3udt22698)p3u_170181 Units=km Length=0.001 bus1=p3udt10891-p3udt22698xxx.3 bus2=p3udt10891-p3udt22698xx.3 switch=y enabled=y phases=1 Linecode=padswitch_1_3_1_1_1

New Line.padswitch(r:p3udt10891-p3udt22698)p3u_170182 Units=km Length=0.001 bus1=p3udt10891-p3udt22698x.3 bus2=p3udt10891.3 switch=y enabled=y phases=1 Linecode=padswitch_1_3_1_1_1

New Line.padswitch(r:p3udt25543-p3udt29896)p3u_170183 Units=km Length=0.001 bus1=p3udt25543-p3udt29896xxx.2 bus2=p3udt25543-p3udt29896xx.2 switch=y enabled=y phases=1 Linecode=padswitch_1_3_1_0_1_1

New Line.padswitch(r:p3udt25543-p3udt29896)p3u_170184 Units=km Length=0.001 bus1=p3udt25543-p3udt29896x.2 bus2=p3udt25543.2 switch=y enabled=y phases=1 Linecode=padswitch_1_3_1_0_1_0_1

New Line.padswitch(r:p3udt21430-p3udt5762)p3u_170195 Units=km Length=0.001 bus1=p3udt21430-p3udt5762x.3 bus2=p3udt21430-p3udt5762xx.3 switch=y enabled=y phases=1 Linecode=padswitch_1_1_1_1

New Line.padswitch(r:p3udt21430-p3udt5762)p3u_170196 Units=km Length=0.001 bus1=p3udt21430-p3udt5762xxx.3 bus2=p3udt5762.3 switch=y enabled=y phases=1 Linecode=padswitch_1_1_1_1

New Line.padswitch(r:p3udt30467-p3udt9226)p3u_170171 Units=km Length=0.001 bus1=p3udt30467.1.2.3 bus2=p3udt30467-p3udt9226x.1.2.3 switch=y enabled=y phases=3 Linecode=padswitch_3_3_3_3

New Line.padswitch(r:p3udt30467-p3udt9226)p3u_170172 Units=km Length=0.001 bus1=p3udt30467-p3udt9226xx.1.2.3 bus2=p3udt9226.1.2.3 switch=y enabled=y phases=3 Linecode=padswitch_3_4_3_3_3

New Line.padswitch(r:p3udt20237-p3udt30467)p3u_170173 Units=km Length=0.001 bus1=p3udt20237.1.2.3 bus2=p3udt20237-p3udt30467x.1.2.3 switch=y enabled=y phases=3 Linecode=padswitch_3_4_3_1_3_3

New Line.padswitch(r:p3udt20237-p3udt30467)p3u_170174 Units=km Length=0.001 bus1=p3udt20237-p3udt30467xx.1.2.3 bus2=p3udt30467.1.2.3 switch=y enabled=y phases=3 Linecode=padswitch_3_4_3_1_3_1_3

New Line.padswitch(r:p3udt20237-p3udt25510)p3u_170175 Units=km Length=0.001 bus1=p3udt25510.1.2.3 bus2=p3udt20237-p3udt25510xx.1.2.3 switch=y enabled=y phases=3 Linecode=padswitch_3_4_3_1_3_1_3_1

New Line.padswitch(r:p3udt20237-p3udt25510)p3u_170176 Units=km Length=0.001 bus1=p3udt20237-p3udt25510x.1.2.3 bus2=p3udt20237.1.2.3 switch=y enabled=y phases=3 Linecode=padswitch_3_4_3_1_3_1_3_1

New Line.padswitch(r:p3udt25510-p3udt25544)p3u_170177 Units=km Length=0.001 bus1=p3udt25544.1.2.3 bus2=p3udt25510-p3udt25544xx.1.2.3 switch=y enabled=y phases=3 Linecode=padswitch_3_4_3_1_3_1_3_1

New Line.padswitch(r:p3udt25510-p3udt25544)p3u_170178 Units=km Length=0.001 bus1=p3udt25510-p3udt25544x.1.2.3 bus2=p3udt25510.1.2.3 switch=y enabled=y phases=3 Linecode=padswitch_3_4_3_1_3_1_3_1

New Line.padswitch(r:p3udt25544-p3udt8185)p3u_170179 Units=km Length=0.001 bus1=p3udt8185.1.2.3 bus2=p3udt25544-p3udt8185xx.1.2.3 switch=y enabled=y phases=3 Linecode=padswitch_3_4_3_1_3_1_3_1

New Line.padswitch(r:p3udt25544-p3udt8185)p3u_170180 Units=km Length=0.001 bus1=p3udt25544-p3udt8185x.1.2.3 bus2=p3udt25544.1.2.3 switch=y enabled=y phases=3 Linecode=padswitch_3_4_3_1_3_1_3_1

New Line.padswitch(r:p3udt22698-p3udt30803)p3u_170189 Units=km Length=0.001 bus1=p3udt22698.1.2.3 bus2=p3udt22698-p3udt30803x.1.2.3 switch=y enabled=y phases=3 Linecode=padswitch_3_4_3_1_3_1_3_1

New Line.padswitch(r:p3udt22698-p3udt30803)p3u_170190 Units=km Length=0.001 bus1=p3udt22698-p3udt30803xx.1.2.3 bus2=p3udt30803.1.2.3 switch=y enabled=y phases=3 Linecode=padswitch_3_4_3_1_3_1_3_1

New Line.padswitch(r:p3udt22698-p3udt23953)p3u_170191 Units=km Length=0.001 bus1=p3udt23953.1.2.3 bus2=p3udt22698-p3udt23953xx.1.2.3 switch=y enabled=y phases=3 Linecode=padswitch_3_4_3_1_3_1_3_1

New Line.padswitch(r:p3udt22698-p3udt23953)p3u_170192 Units=km Length=0.001 bus1=p3udt22698-p3udt23953x.1.2.3 bus2=p3udt22698.1.2.3 switch=y enabled=y phases=3 Linecode=padswitch_3_4_3_1_3_1_3_1

New Line.padswitch(r:p3udt21387-p3udt9226)p3u_170163 Units=km Length=0.001 bus1=p3udt9226.1.2.3 bus2=p3udt21387-p3udt9226xx.1.2.3 switch=y enabled=y phases=3 Linecode=padswitch_3_4_3_1_3_1_3_1

New Line.padswitch(r:p3udt21387-p3udt9226)p3u_170164 Units=km Length=0.001 bus1=p3udt21387-p3udt9226x.1.2.3 bus2=p3udt21387.1.2.3 switch=y enabled=y phases=3 Linecode=padswitch_3_4_3_1_3_1_3_1

New Line.padswitch(r:p3udt16523-p3udt17688)p3u_170165 Units=km Length=0.001 bus1=p3udt16523.1.2.3 bus2=p3udt16523-p3udt17688x.1.2.3 switch=y enabled=y phases=3 Linecode=padswitch_3_4_3_1_3_1_3_1

New Line.padswitch(r:p3udt16523-p3udt17688)p3u_170166 Units=km Length=0.001 bus1=p3udt16523-p3udt17688xx.1.2.3 bus2=p3udt17688.1.2.3 switch=y enabled=y phases=3 Linecode=padswitch_3_4_3_1_3_3

New Line.padswitch(r:p3udt16523-p3udt21431)p3u_170167 Units=km Length=0.001 bus1=p3udt21431.1.2.3 bus2=p3udt16523-p3udt21431xx.1.2.3 switch=y enabled=y phases=3 Linecode=padswitch_3_4_3_1_3_1_3_1

New Line.padswitch(r:p3udt16523-p3udt21431)p3u_170168 Units=km Length=0.001 bus1=p3udt16523-p3udt21431x.1.2.3 bus2=p3udt16523.1.2.3 switch=y enabled=y phases=3 Linecode=padswitch_3_4_3_1_3_3

New Line.padswitch(r:p3udt21431-p3udt9226)p3u_170169 Units=km Length=0.001 bus1=p3udt9226.1.2.3 bus2=p3udt21431-p3udt9226xx.1.2.3 switch=y enabled=y phases=3 Linecode=padswitch_3_4_3_1_3_1_3_1

New Line.padswitch(r:p3udt21431-p3udt9226)p3u_170170 Units=km Length=0.001 bus1=p3udt21431-p3udt9226x.1.2.3 bus2=p3udt21431.1.2.3 switch=y enabled=y phases=3 Linecode=padswitch_3_4_3_1_3_1_3_1

New Line.padswitch(r:p3udt29896-p3udt9874)p3u_170185 Units=km Length=0.001 bus1=p3udt9874.1.2.3 bus2=p3udt29896-p3udt9874xx.1.2.3 switch=y enabled=y phases=3 Linecode=padswitch_3_4_3_1_3_1_3_1

New Line.padswitch(r:p3udt29896-p3udt9874)p3u_170186 Units=km Length=0.001 bus1=p3udt29896-p3udt9874x.1.2.3 bus2=p3udt29896.1.2.3 switch=y enabled=y phases=3 Linecode=padswitch_3_4_3_1_3_1_3_1

New Line.padswitch(r:p3udt30803-p3udt9874)p3u_170187 Units=km Length=0.001 bus1=p3udt30803.1.2.3 bus2=p3udt30803-p3udt9874x.1.2.3 switch=y enabled=y phases=3 Linecode=padswitch_3_4_3_1_3_1_3_1

New Line.padswitch(r:p3udt30803-p3udt9874)p3u_170188 Units=km Length=0.001 bus1=p3udt30803-p3udt9874xx.1.2.3 bus2=p3udt9874.1.2.3 switch=y enabled=y phases=3 Linecode=padswitch_3_4_3_1_3_1_3_1

New Line.padswitch(r:p3udt1564-p3udt25742)p3u_170193 Units=km Length=0.001 bus1=p3udt1564.1.2.3 bus2=p3udt1564-p3udt25742x.1.2.3 switch=y enabled=y phases=3 Linecode=padswitch_3_4_3_1_3_1_3_1

New Line.padswitch(r:p3udt1564-p3udt25742)p3u_170194 Units=km Length=0.001 bus1=p3udt1564-p3udt25742xx.1.2.3 bus2=p3udt25742.1.2.3 switch=y enabled=y phases=3 Linecode=padswitch_3_4_3_1_3_3

New Line.padswitch(r:p3udt19358-p3udt26335)p3u_206632 Units=km Length=0.001 bus1=p3udt19358.1.2.3 bus2=p3udt19358-p3udt26335x.1.2.3 switch=y enabled=n phases=3 Linecode=padswitch_3_4_3_1_3_1_3_1

New Line.fuse(r:p3udt18709-p3umv42)p3u_206808 Units=km Length=0.001 bus1=p3umv42.3 bus2=p3udt18709-p3umv42x.3 switch=n enabled=y phases=1 Linecode=fuse_1_1_1_1

New Fuse.Fuse_fuse(r:p3udt18709-p3umv42)p3u_206808 monitoredobj=Line.fuse(r:p3udt18709-p3umv42)p3u_206808 enabled=y ratedcurrent=100.0

New Line.fuse(r:p3udt21387-p3udt22377)p3u_208921 Units=km Length=0.001 bus1=p3udt21387.3 bus2=p3udt21387-p3udt22377x.3 switch=n enabled=y phases=1 Linecode=fuse_1_7_1_1_1

New Fuse.Fuse_fuse(r:p3udt21387-p3udt22377)p3u_208921 monitoredobj=Line.fuse(r:p3udt21387-p3udt22377)p3u_208921 enabled=y ratedcurrent=100.0

New Line.fuse(r:p3udt21430-p3udt5762)p3u_208924 Units=km Length=0.001 bus1=p3udt21430.3 bus2=p3udt21430-p3udt5762x.3 switch=n enabled=y phases=1 Linecode=fuse_1_1_1_1

New Fuse.Fuse_fuse(r:p3udt21430-p3udt5762)p3u_208924 monitoredobj=Line.fuse(r:p3udt21430-p3udt5762)p3u_208924 enabled=y ratedcurrent=100.0

New Line.fuse(r:p3udt10891-p3udt22698)p3u_209073 Units=km Length=0.001 bus1=p3udt22698.3 bus2=p3udt10891-p3udt22698xxx.3 switch=n enabled=y phases=1 Linecode=fuse_1_7_1_4_1_1

New Fuse.Fuse_fuse(r:p3udt10891-p3udt22698)p3u_209073 monitoredobj=Line.fuse(r:p3udt10891-p3udt22698)p3u_209073 enabled=y ratedcurrent=100.0

New Line.fuse(r:p3udt25743-p3udt26719)p3u_209442 Units=km Length=0.001 bus1=p3udt26719.3 bus2=p3udt25743-p3udt26719x.3 switch=n enabled=y phases=1 Linecode=fuse_1_1_1_1

New Fuse.Fuse_fuse(r:p3udt25743-p3udt26719)p3u_209442 monitoredobj=Line.fuse(r:p3udt25743-p3udt26719)p3u_209442 enabled=y ratedcurrent=100.0

New Line.fuse(r:p3udt29270-p3udt29735)p3u_209765 Units=km Length=0.001 bus1=p3udt29735.3 bus2=p3udt29270-p3udt29735x.3 switch=n enabled=y phases=1 Linecode=fuse_1_1_1_1

New Fuse.Fuse_fuse(r:p3udt29270-p3udt29735)p3u_209765 monitoredobj=Line.fuse(r:p3udt29270-p3udt29735)p3u_209765 enabled=y ratedcurrent=100.0

New Line.fuse(r:p3udt25543-p3udt29896)p3u_209785 Units=km Length=0.001 bus1=p3udt29896.2 bus2=p3udt25543-p3udt29896xxx.2 switch=n enabled=y phases=1 Linecode=fuse_1_7_1_4_1_3_1

New Fuse.Fuse_fuse(r:p3udt25543-p3udt29896)p3u_209785 monitoredobj=Line.fuse(r:p3udt25543-p3udt29896)p3u_209785 enabled=y ratedcurrent=100.0

New Line.fuse(r:p3udt13291-p3udt30203)p3u_209822 Units=km Length=0.001 bus1=p3udt30203.2 bus2=p3udt13291-p3udt30203x.2 switch=n enabled=y phases=1 Linecode=fuse_1_1_1_1

New Fuse.Fuse_fuse(r:p3udt13291-p3udt30203)p3u_209822 monitoredobj=Line.fuse(r:p3udt13291-p3udt30203)p3u_209822 enabled=y ratedcurrent=100.0

New Line.l(r:p3udt27289-p3uhs2_1247)_disconnect Units=km Length=0.001 bus1=p3udt27289-p3uhs2_1247x_b1_1.1.2.3 bus2=p3udt27289-p3uhs2_1247x_b2_1.1.2.3 switch=y enabled=y phases=3 Linecode=3P_OH_AL_ACSR_1033kcmil_Curlew_12.47_1_3_3_3_3

New Line.l(r:p3udt27289-p3uhs2_1247)_cont Units=km Length=2.5094160000000003 bus1=p3udt27289-p3uhs2_1247x_b2_1.1.2.3 bus2=p3udt27289.1.2.3 switch=n enabled=y phases=3 Linecode=3P_OH_AL_ACSR_1033kcmil_Curlew_12.47_1_3_3_3_3
