New Line.l(r:p3udm19848-p3ulv6530) Units=km Length=0.0183935 bus1=p3udm19848.1.2 bus2=p3ulv6530.1.2 switch=n enabled=y phases=2 Linecode=1P_OH_AL_2/0_Rucina_0_416_0_2_2_2_2

New Line.l(r:p3udm19848-p3udt5763lv) Units=km Length=0.0187281 bus1=p3udt5763lv.1.2 bus2=p3udm19848.1.2 switch=n enabled=y phases=2 Linecode=1P_OH_AL_2/0_Rucina_0_416_0_2_2_2_2

New Line.l(r:p3udm19849-p3ulv30705) Units=km Length=0.024377600000000003 bus1=p3udm19849.1.2 bus2=p3ulv30705.1.2 switch=n enabled=y phases=2 Linecode=1P_OH_AL_2/0_Rucina_0_416_0_2_2_2_2

New Line.l(r:p3udm19849-p3udt5763lv) Units=km Length=0.0187392 bus1=p3udt5763lv.1.2 bus2=p3udm19849.1.2 switch=n enabled=y phases=2 Linecode=1P_OH_AL_2/0_Rucina_0_416_0_2_2_2_2

New Line.l(r:p3udt6915lv-p3ulv7976) Units=km Length=0.0435556 bus1=p3udt6915lv.1.2 bus2=p3ulv7976.1.2 switch=n enabled=y phases=2 Linecode=1P_UG_AL_1/0_Brenau_0_416_0_2_2_2_2

New Line.l(r:p3udt9873lv-p3ulv12038) Units=km Length=0.0406067 bus1=p3udt9873lv.1.2 bus2=p3ulv12038.1.2 switch=n enabled=y phases=2 Linecode=1P_OH_AL_4/0_Zuzara_0_416_0_2_2_2_2

New Line.l(r:p3udt10890lv-p3ulv13568) Units=km Length=0.001 bus1=p3udt10890lv.1.2 bus2=p3ulv13568.1.2 switch=n enabled=y phases=2 Linecode=1P_OH_AL_4_Periwinkle_0_416_0_2_2_2_2

New Line.l(r:p3udt11892lv-p3ulv15137) Units=km Length=0.0529773 bus1=p3udt11892lv.1.2 bus2=p3ulv15137.1.2 switch=n enabled=y phases=2 Linecode=1P_UG_AL_1/0_Brenau_0_416_0_2_2_2_2

New Line.l(r:p3udm39048-p3ulv64439) Units=km Length=0.0390503 bus1=p3udm39048.1.2 bus2=p3ulv64439.1.2 switch=n enabled=y phases=2 Linecode=1P_UG_AL_1/0_Brenau_0_416_0_2_2_2_2

New Line.l(r:p3udm39048-p3udt11892lv) Units=km Length=0.009503060000000002 bus1=p3udt11892lv.1.2 bus2=p3udm39048.1.2 switch=n enabled=y phases=2 Linecode=1P_UG_AL_1/0_Brenau_0_416_0_2_2_2_2

New Line.l(r:p3udt16522lv-p3ulv73079) Units=km Length=0.0151418 bus1=p3udt16522lv.1.2 bus2=p3ulv73079.1.2 switch=n enabled=y phases=2 Linecode=1P_OH_AL_2/0_Rucina_0_416_0_2_2_2_2

New Line.l(r:p3udm51652-p3ulv23666) Units=km Length=0.0230406 bus1=p3udm51652.1.2 bus2=p3ulv23666.1.2 switch=n enabled=y phases=2 Linecode=1P_OH_AL_2/0_Rucina_0_416_0_2_2_2_2

New Line.l(r:p3udm51652-p3udt16522lv) Units=km Length=0.0125698 bus1=p3udt16522lv.1.2 bus2=p3udm51652.1.2 switch=n enabled=y phases=2 Linecode=1P_OH_AL_2/0_Rucina_0_416_0_2_2_2_2

New Line.l(r:p3udm51653-p3ulv27665) Units=km Length=0.0169149 bus1=p3udm51653.1.2 bus2=p3ulv27665.1.2 switch=n enabled=y phases=2 Linecode=1P_OH_AL_2/0_Rucina_0_416_0_2_2_2_2

New Line.l(r:p3udm51653-p3udt16522lv) Units=km Length=0.012559100000000002 bus1=p3udt16522lv.1.2 bus2=p3udm51653.1.2 switch=n enabled=y phases=2 Linecode=1P_OH_AL_2/0_Rucina_0_416_0_2_2_2_2

New Line.l(r:p3udt19016lv-p3ulv29163) Units=km Length=0.0271633 bus1=p3udt19016lv.1.2 bus2=p3ulv29163.1.2 switch=n enabled=y phases=2 Linecode=1P_OH_AL_4/0_Zuzara_0_416_0_2_2_2_2

New Line.l(r:p3udt20297lv-p3ulv54713) Units=km Length=0.070232 bus1=p3udt20297lv.1.2 bus2=p3ulv54713.1.2 switch=n enabled=y phases=2 Linecode=1P_OH_AL_4/0_Zuzara_0_416_0_2_2_2_2

New Line.l(r:p3udm60512-p3ulv32341) Units=km Length=0.0687859 bus1=p3udm60512.1.2 bus2=p3ulv32341.1.2 switch=n enabled=y phases=2 Linecode=1P_OH_AL_4/0_Zuzara_0_416_0_2_2_2_2

New Line.l(r:p3udm60512-p3udt20297lv) Units=km Length=0.0393503 bus1=p3udt20297lv.1.2 bus2=p3udm60512.1.2 switch=n enabled=y phases=2 Linecode=1P_OH_AL_4/0_Zuzara_0_416_0_2_2_2_2

New Line.l(r:p3udm60514-p3ulv72334) Units=km Length=0.0460135 bus1=p3udm60514.1.2 bus2=p3ulv72334.1.2 switch=n enabled=y phases=2 Linecode=1P_OH_AL_4/0_Zuzara_0_416_0_2_2_2_2

New Line.l(r:p3udm60514-p3udt20297lv) Units=km Length=0.019670900000000005 bus1=p3udt20297lv.1.2 bus2=p3udm60514.1.2 switch=n enabled=y phases=2 Linecode=1P_OH_AL_2/0_Rucina_0_416_0_2_2_2_2

New Line.l(r:p3udm62307-p3ulv34638) Units=km Length=0.0359654 bus1=p3udm62307.1.2 bus2=p3ulv34638.1.2 switch=n enabled=y phases=2 Linecode=1P_UG_AL_4/0_Sweetbriar_0_416_0_2_2_2_2

New Line.l(r:p3udm62307-p3udt21158lv) Units=km Length=0.0296471 bus1=p3udt21158lv.1.2 bus2=p3udm62307.1.2 switch=n enabled=y phases=2 Linecode=1P_UG_AL_4/0_Sweetbriar_0_416_0_2_2_2_2

New Line.l(r:p3udm62308-p3ulv61571) Units=km Length=0.01641 bus1=p3udm62308.1.2 bus2=p3ulv61571.1.2 switch=n enabled=y phases=2 Linecode=1P_UG_AL_1/0_Brenau_0_416_0_2_2_2_2

New Line.l(r:p3udm62308-p3udt21158lv) Units=km Length=0.019764700000000003 bus1=p3udt21158lv.1.2 bus2=p3udm62308.1.2 switch=n enabled=y phases=2 Linecode=1P_UG_AL_1/0_Brenau_0_416_0_2_2_2_2

New Line.l(r:p3udm63317-p3ulv55316) Units=km Length=0.0318963 bus1=p3udm63317.1.2 bus2=p3ulv55316.1.2 switch=n enabled=y phases=2 Linecode=1P_OH_AL_4/0_Zuzara_0_416_0_2_2_2_2

New Line.l(r:p3udm63316-p3ulv36179) Units=km Length=0.0278572 bus1=p3udm63316.1.2 bus2=p3ulv36179.1.2 switch=n enabled=y phases=2 Linecode=1P_OH_AL_4/0_Zuzara_0_416_0_2_2_2_2

New Line.l(r:p3udm63316-p3udm63317) Units=km Length=0.0568981 bus1=p3udm63317.1.2 bus2=p3udm63316.1.2 switch=n enabled=y phases=2 Linecode=1P_OH_AL_4/0_Zuzara_0_416_0_2_2_2_2

New Line.l(r:p3udm63317-p3udt21666lv) Units=km Length=0.00988971 bus1=p3udt21666lv.1.2 bus2=p3udm63317.1.2 switch=n enabled=y phases=2 Linecode=1P_OH_AL_2/0_Rucina_0_416_0_2_0_2_2_2

New Line.l(r:p3udt22987lv-p3ulv40006) Units=km Length=0.00555893 bus1=p3udt22987lv.1.2 bus2=p3ulv40006.1.2 switch=n enabled=y phases=2 Linecode=1P_OH_AL_2/0_Rucina_0_416_0_2_2_2_2

New Line.l(r:p3udt23911lv-p3ulv42966) Units=km Length=0.0135143 bus1=p3udt23911lv.1.2 bus2=p3ulv42966.1.2 switch=n enabled=y phases=2 Linecode=1P_OH_AL_2/0_Rucina_0_416_0_2_2_2_2

New Line.l(r:p3udt24903lv-p3ulv46325) Units=km Length=0.016986500000000005 bus1=p3udt24903lv.1.2 bus2=p3ulv46325.1.2 switch=n enabled=y phases=2 Linecode=1P_OH_AL_2/0_Rucina_0_416_0_2_2_2_2

New Line.l(r:p3udt25348lv-p3ulv47857) Units=km Length=0.00955699 bus1=p3udt25348lv.1.2 bus2=p3ulv47857.1.2 switch=n enabled=y phases=2 Linecode=1P_OH_AL_2/0_Rucina_0_416_0_2_2_2_2

New Line.l(r:p3udt28787lv-p3ulv62178) Units=km Length=0.018340100000000005 bus1=p3udt28787lv.1.2 bus2=p3ulv62178.1.2 switch=n enabled=y phases=2 Linecode=1P_OH_AL_2/0_Rucina_0_416_0_2_2_2_2

New Line.l(r:p3udt29894lv-p3ulv67709) Units=km Length=0.0773555 bus1=p3udt29894lv.1.2 bus2=p3ulv67709.1.2 switch=n enabled=y phases=2 Linecode=1P_OH_AL_4/0_Zuzara_0_416_0_2_2_2_2

New Line.l(r:p3udt31206lv-p3ulv74608) Units=km Length=0.001 bus1=p3udt31206lv.1.2 bus2=p3ulv74608.1.2 switch=n enabled=y phases=2 Linecode=1P_OH_AL_4_Periwinkle_0_416_0_2_2_2_2

New Line.l(r:p3udt11892-p3udt6915) Units=km Length=0.047528 bus1=p3udt11892-p3udt6915x.1 bus2=p3udt11892-p3udt6915xx.1 switch=n enabled=y phases=1 Linecode=1P_UG_AL_#2_15_12_47_0_1_1_1_1

New Line.l(r:p3udt11892-p3udt1561) Units=km Length=0.181151 bus1=p3udt11892-p3udt1561x.1 bus2=p3udt11892.1 switch=n enabled=y phases=1 Linecode=1P_OH_AL_ACSR_#2_Sparrow_12_47_0_1_1_1_1

New Line.l(r:p3udt10890-p3udt20297) Units=km Length=0.18646 bus1=p3udt10890-p3udt20297x.2 bus2=p3udt10890.2 switch=n enabled=y phases=1 Linecode=1P_OH_AL_ACSR_#2_Sparrow_12_47_0_1_1_1_1

New Line.l(r:p3udt16522-p3udt19016) Units=km Length=0.104374 bus1=p3udt19016.1 bus2=p3udt16522.1 switch=n enabled=y phases=1 Linecode=1P_OH_AL_ACSR_#2_Sparrow_12_47_0_1_1_1_1

New Line.l(r:p3udt19016-p3udt9873) Units=km Length=0.170929 bus1=p3udt19016-p3udt9873x.1 bus2=p3udt19016.1 switch=n enabled=y phases=1 Linecode=1P_OH_AL_ACSR_#2_Sparrow_12_47_0_1_1_1_1

New Line.l(r:p3udt25348-p3umv31) Units=km Length=0.304624 bus1=p3udt25348-p3umv31x.3 bus2=p3udt25348.3 switch=n enabled=y phases=1 Linecode=1P_OH_AL_ACSR_#2_Sparrow_12_47_0_1_1_1_1

New Line.l(r:p3udt29894-p3udt31206) Units=km Length=0.119336 bus1=p3udt29894.3 bus2=p3udt31206.3 switch=n enabled=y phases=1 Linecode=1P_OH_AL_ACSR_#2_Sparrow_12_47_0_1_1_1_1

New Line.l(r:p3udt16521-p3udt29894) Units=km Length=0.042606 bus1=p3udt16521-p3udt29894x.3 bus2=p3udt29894.3 switch=n enabled=y phases=1 Linecode=1P_OH_AL_ACSR_#2_Sparrow_12_47_0_1_1_1_1

New Line.l(r:p3udt21158-p3udt9329) Units=km Length=0.019764700000000003 bus1=p3udt21158-p3udt9329xx.2 bus2=p3udt21158-p3udt9329x.2 switch=n enabled=y phases=1 Linecode=1P_UG_AL_#2_15_12_47_0_1_1_1_1

New Line.l(r:p3udt31865-p3uhs2_1247) Units=km Length=0.223144 bus1=p3udt31865-p3uhs2_1247x.1.2.3 bus2=p3udt31865-p3uhs2_1247x_b1_1.1.2.3 switch=n enabled=y phases=3 Linecode=3P_OH_AL_ACSR_1033kcmil_Curlew_12.47_1_3_3_3_3

New Line.l(r:p3udt13714-p3udt24903) Units=km Length=0.155444 bus1=p3udt24903.1.2.3 bus2=p3udt13714.1.2.3 switch=n enabled=y phases=3 Linecode=3P_OH_AL_ACSR_4/0_Penguin_12_47_0_3_3_3_3

New Line.l(r:p3udt24903-p3udt9873) Units=km Length=0.282365 bus1=p3udt9873.1.2.3 bus2=p3udt24903.1.2.3 switch=n enabled=y phases=3 Linecode=3P_OH_AL_ACSR_4/0_Penguin_12_47_0_3_3_3_3

New Line.l(r:p3udt5763-p3udt9873) Units=km Length=0.311668 bus1=p3udt5763.1.2.3 bus2=p3udt9873.1.2.3 switch=n enabled=y phases=3 Linecode=3P_OH_AL_ACSR_4/0_Penguin_12_47_0_3_3_3_3

New Line.l(r:p3udt13289-p3udt5763) Units=km Length=0.0187281 bus1=p3udt13289.1.2.3 bus2=p3udt5763.1.2.3 switch=n enabled=y phases=3 Linecode=3P_OH_AL_ACSR_4/0_Penguin_12_47_0_3_3_3_3

New Line.l(r:p3udt13289-p3udt16521) Units=km Length=0.24949 bus1=p3udt16521.1.2.3 bus2=p3udt13289.1.2.3 switch=n enabled=y phases=3 Linecode=3P_OH_AL_ACSR_4/0_Penguin_12_47_0_3_3_3_3

New Line.l(r:p3udt16521-p3udt31205) Units=km Length=0.144398 bus1=p3udt31205.1.2.3 bus2=p3udt16521.1.2.3 switch=n enabled=y phases=3 Linecode=3P_OH_AL_ACSR_4/0_Penguin_12_47_0_3_3_3_3

New Line.l(r:p3udt20297-p3udt31205) Units=km Length=0.09837000000000001 bus1=p3udt20297.1.2.3 bus2=p3udt31205.1.2.3 switch=n enabled=y phases=3 Linecode=3P_OH_AL_ACSR_4/0_Penguin_12_47_0_3_3_3_3

New Line.l(r:p3udt18706-p3udt20297) Units=km Length=0.23525700000000002 bus1=p3udt18706.1.2.3 bus2=p3udt20297.1.2.3 switch=n enabled=y phases=3 Linecode=3P_OH_AL_ACSR_4/0_Penguin_12_47_0_3_3_3_3

New Line.l(r:p3udt1561-p3udt18706) Units=km Length=0.182045 bus1=p3udt1561.1.2.3 bus2=p3udt18706.1.2.3 switch=n enabled=y phases=3 Linecode=3P_OH_AL_ACSR_4/0_Penguin_12_47_0_3_3_3_3

New Line.l(r:p3udt1561-p3udt23911) Units=km Length=0.217997 bus1=p3udt23911.1.2.3 bus2=p3udt1561.1.2.3 switch=n enabled=y phases=3 Linecode=3P_OH_AL_ACSR_4/0_Penguin_12_47_0_3_3_3_3

New Line.l(r:p3udt23911-p3udt28787) Units=km Length=0.131394 bus1=p3udt28787.1.2.3 bus2=p3udt23911.1.2.3 switch=n enabled=y phases=3 Linecode=3P_OH_AL_ACSR_4/0_Penguin_12_47_0_3_3_3_3

New Line.l(r:p3udt28787-p3udt31865) Units=km Length=0.141017 bus1=p3udt31865.1.2.3 bus2=p3udt28787.1.2.3 switch=n enabled=y phases=3 Linecode=3P_OH_AL_ACSR_4/0_Penguin_12_47_0_3_3_3_3

New Line.l(r:p3udt31865lv-p3ulv78291) Units=km Length=0.0543797 bus1=p3udt31865lv.1.2.3 bus2=p3ulv78291.1.2.3 switch=n enabled=y phases=3 Linecode=3P_UG_AL_350kcmil_15_0_416_0_3_3_3_3

New Line.l(r:p3udt24858lv-p3ulv46157) Units=km Length=0.009434800000000002 bus1=p3udt24858lv.1.2.3 bus2=p3ulv46157.1.2.3 switch=n enabled=y phases=3 Linecode=3P_UG_AL_350kcmil_15_0_416_0_3_3_3_3

New Line.l(r:p3udt24858-p3udt31865) Units=km Length=0.129961 bus1=p3udt31865.1.2.3 bus2=p3udt24858.1.2.3 switch=n enabled=y phases=3 Linecode=3P_OH_AL_ACSR_4/0_Penguin_12_47_0_3_3_3_3

New Line.l(r:p3udt1561lv-p3ulv1745) Units=km Length=0.0205999 bus1=p3udt1561lv.1.2.3 bus2=p3ulv1745.1.2.3 switch=n enabled=y phases=3 Linecode=3P_UG_AL_350kcmil_15_0_416_0_3_3_3_3

New Line.l(r:p3udt18706lv-p3ulv28425) Units=km Length=0.0264346 bus1=p3udt18706lv.1.2.3 bus2=p3ulv28425.1.2.3 switch=n enabled=y phases=3 Linecode=3P_UG_AL_350kcmil_15_0_416_0_3_3_3_3

New Line.l(r:p3udt31205lv-p3ulv74607) Units=km Length=0.0407221 bus1=p3udt31205lv.1.2.3 bus2=p3ulv74607.1.2.3 switch=n enabled=y phases=3 Linecode=3P_UG_AL_750kcmil_25_0_416_0_3_3_3_3

New Line.l(r:p3udt16521lv-p3ulv23665) Units=km Length=0.0143757 bus1=p3udt16521lv.1.2.3 bus2=p3ulv23665.1.2.3 switch=n enabled=y phases=3 Linecode=3P_UG_AL_350kcmil_15_0_416_0_3_3_3_3

New Line.l(r:p3udt13289lv-p3ulv17484) Units=km Length=0.029826700000000005 bus1=p3udt13289lv.1.2.3 bus2=p3ulv17484.1.2.3 switch=n enabled=y phases=3 Linecode=3P_UG_AL_350kcmil_15_0_416_0_3_3_3_3

New Line.l(r:p3udt29895lv-p3ulv67710) Units=km Length=0.00620919 bus1=p3udt29895lv.1.2.3 bus2=p3ulv67710.1.2.3 switch=n enabled=y phases=3 Linecode=3P_UG_AL_750kcmil_25_0_416_0_3_3_3_3

New Line.l(r:p3udt22987-p3udt29895) Units=km Length=0.226336 bus1=p3udt22987.1.2.3 bus2=p3udt29895.1.2.3 switch=n enabled=y phases=3 Linecode=3P_OH_AL_ACSR_4/0_Penguin_12_47_0_3_3_3_3

New Line.l(r:p3udt22987-p3udt9873) Units=km Length=0.19878600000000002 bus1=p3udt9873.1.2.3 bus2=p3udt22987.1.2.3 switch=n enabled=y phases=3 Linecode=3P_OH_AL_ACSR_4/0_Penguin_12_47_0_3_3_3_3

New Line.l(r:p3udt13714lv-p3ulv18268) Units=km Length=0.0099506 bus1=p3udt13714lv.1.2.3 bus2=p3ulv18268.1.2.3 switch=n enabled=y phases=3 Linecode=3P_UG_AL_750kcmil_25_0_416_0_3_3_3_3

New Line.l(r:p3udt13714-p3umv4) Units=km Length=0.125847 bus1=p3udt13714.1.2.3 bus2=p3umv4.1.2.3 switch=n enabled=y phases=3 Linecode=3P_OH_AL_ACSR_4/0_Penguin_12_47_0_3_3_3_3

New Line.l(r:p3udt13714-p3umv31) Units=km Length=0.232227 bus1=p3udt13714.1.2.3 bus2=p3umv31.1.2.3 switch=n enabled=y phases=3 Linecode=3P_OH_AL_ACSR_4/0_Penguin_12_47_0_3_3_3_3

New Line.l(r:p3udt24652lv-p3ulv45541) Units=km Length=0.00752601 bus1=p3udt24652lv.1.2.3 bus2=p3ulv45541.1.2.3 switch=n enabled=y phases=3 Linecode=3P_UG_AL_350kcmil_15_0_416_0_3_3_3_3

New Line.l(r:p3udt24652-p3udt24903) Units=km Length=0.288836 bus1=p3udt24903.1.2.3 bus2=p3udt24652.1.2.3 switch=n enabled=y phases=3 Linecode=3P_OH_AL_ACSR_4/0_Penguin_12_47_0_3_3_3_3

New Line.l(r:p3udt31620lv-p3ulv76918) Units=km Length=0.0599304 bus1=p3udt31620lv.1.2.3 bus2=p3ulv76918.1.2.3 switch=n enabled=y phases=3 Linecode=3P_UG_AL_350kcmil_15_0_416_0_3_3_3_3

New Line.l(r:p3udt31620-p3udt9873) Units=km Length=0.001 bus1=p3udt9873.1.2.3 bus2=p3udt31620.1.2.3 switch=n enabled=y phases=3 Linecode=3P_OH_AL_ACSR_4/0_Penguin_12_47_0_3_3_3_3

New Line.l(r:p3udt26332lv-p3ulv51598) Units=km Length=0.0279813 bus1=p3udt26332lv.1.2.3 bus2=p3ulv51598.1.2.3 switch=n enabled=y phases=3 Linecode=3P_UG_AL_350kcmil_15_0_416_0_3_3_3_3

New Line.l(r:p3udt32163lv-p3ulv79984) Units=km Length=0.03639800000000001 bus1=p3udt32163lv.1.2.3 bus2=p3ulv79984.1.2.3 switch=n enabled=y phases=3 Linecode=3P_UG_AL_350kcmil_15_0_416_0_3_3_3_3

New Line.l(r:p3udt26904lv-p3ulv53926) Units=km Length=0.0141238 bus1=p3udt26904lv.1.2.3 bus2=p3ulv53926.1.2.3 switch=n enabled=y phases=3 Linecode=3P_UG_AL_350kcmil_15_0_416_0_3_3_3_3

New Line.l(r:p3udt9329lv-p3ulv11257) Units=km Length=0.0150846 bus1=p3udt9329lv.1.2.3 bus2=p3ulv11257.1.2.3 switch=n enabled=y phases=3 Linecode=3P_UG_AL_350kcmil_15_0_416_0_3_3_3_3

New Line.l(r:p3udt26904-p3udt9329) Units=km Length=0.0493982 bus1=p3udt26904-p3udt9329x.1.2.3 bus2=p3udt26904-p3udt9329xx.1.2.3 switch=n enabled=y phases=3 Linecode=3P_UG_AL_4/0_25_12_47_0_3_3_3_3

New Line.l(r:p3udt10382lv-p3ulv12787) Units=km Length=0.0261485 bus1=p3udt10382lv.1.2.3 bus2=p3ulv12787.1.2.3 switch=n enabled=y phases=3 Linecode=3P_UG_AL_350kcmil_15_0_416_0_3_3_3_3

New Line.l(r:p3udt10382-p3udt26904) Units=km Length=0.096254 bus1=p3udt26904.1.2.3 bus2=p3udt10382.1.2.3 switch=n enabled=y phases=3 Linecode=3P_OH_AL_ACSR_4/0_Penguin_12_47_0_3_3_3_3

New Line.l(r:p3udt26904-p3udt32163) Units=km Length=0.162205 bus1=p3udt32163.1.2.3 bus2=p3udt26904.1.2.3 switch=n enabled=y phases=3 Linecode=3P_OH_AL_ACSR_4/0_Penguin_12_47_0_3_3_3_3

New Line.l(r:p3udt26332-p3udt32163) Units=km Length=0.0771858 bus1=p3udt26332.1.2.3 bus2=p3udt32163.1.2.3 switch=n enabled=y phases=3 Linecode=3P_OH_AL_ACSR_4/0_Penguin_12_47_0_3_3_3_3

New Line.l(r:p3udt18706-p3udt26332) Units=km Length=0.192973 bus1=p3udt18706.1.2.3 bus2=p3udt26332.1.2.3 switch=n enabled=y phases=3 Linecode=3P_OH_AL_ACSR_4/0_Penguin_12_47_0_3_3_3_3

New Line.l(r:p3udt2153lv-p3ulv2377) Units=km Length=0.0202884 bus1=p3udt2153lv.1.2.3 bus2=p3ulv2377.1.2.3 switch=n enabled=y phases=3 Linecode=3P_UG_AL_350kcmil_15_0_416_0_3_3_3_3

New Line.l(r:p3udt27290lv-p3ulv55475) Units=km Length=0.0369977 bus1=p3udt27290lv.1.2.3 bus2=p3ulv55475.1.2.3 switch=n enabled=y phases=3 Linecode=3P_UG_AL_350kcmil_15_0_416_0_3_3_3_3

New Line.l(r:p3udt21666-p3udt27290) Units=km Length=0.0259163 bus1=p3udt21666.1.2.3 bus2=p3udt27290.1.2.3 switch=n enabled=y phases=3 Linecode=3P_OH_AL_ACSR_4/0_Penguin_12_47_0_3_3_3_3

New Line.l(r:p3udt2153-p3udt21666) Units=km Length=0.12491100000000001 bus1=p3udt2153.1.2.3 bus2=p3udt21666.1.2.3 switch=n enabled=y phases=3 Linecode=3P_OH_AL_ACSR_4/0_Penguin_12_47_0_3_3_3_3

New Line.l(r:p3udt26311lv-p3ulv51442) Units=km Length=0.0286214 bus1=p3udt26311lv.1.2.3 bus2=p3ulv51442.1.2.3 switch=n enabled=y phases=3 Linecode=3P_UG_AL_350kcmil_15_0_416_0_3_3_3_3

New Line.l(r:p3udt2153-p3udt26311) Units=km Length=0.0369215 bus1=p3udt2153.1.2.3 bus2=p3udt26311.1.2.3 switch=n enabled=y phases=3 Linecode=3P_OH_AL_ACSR_4/0_Penguin_12_47_0_3_3_3_3

New Line.l(r:p3udt2153-p3udt23911) Units=km Length=0.164864 bus1=p3udt23911.1.2.3 bus2=p3udt2153.1.2.3 switch=n enabled=y phases=3 Linecode=3P_OH_AL_ACSR_4/0_Penguin_12_47_0_3_3_3_3

New Line.l(r:p3udt16094lv-p3ulv22745) Units=km Length=0.0444251 bus1=p3udt16094lv.1.2.3 bus2=p3ulv22745.1.2.3 switch=n enabled=y phases=3 Linecode=3P_UG_AL_350kcmil_15_0_416_0_3_3_3_3

New Line.l(r:p3udt16094-p3udt23911) Units=km Length=0.233023 bus1=p3udt23911.1.2.3 bus2=p3udt16094.1.2.3 switch=n enabled=y phases=3 Linecode=3P_OH_AL_ACSR_4/0_Penguin_12_47_0_3_3_3_3

New Line.l(r:p3udt27259-p3udt27290) Units=km Length=0.0803033 bus1=p3udt27259-p3udt27290x.1.2.3 bus2=p3udt27290.1.2.3 switch=n enabled=y phases=3 Linecode=3P_OH_AL_ACSR_1033kcmil_Curlew_12.47_1_3_3_3_3

New Line.l(r:p3udt24144-p3udt24858) Units=km Length=0.078838 bus1=p3udt24144-p3udt24858x.1.2.3 bus2=p3udt24858.1.2.3 switch=n enabled=y phases=3 Linecode=3P_OH_AL_ACSR_1033kcmil_Curlew_12.47_1_3_3_3_3

New Line.l(r:p3udt16094-p3udt19937) Units=km Length=0.131241 bus1=p3udt16094-p3udt19937x.1.2.3 bus2=p3udt19937.1.2.3 switch=n enabled=y phases=3 Linecode=3P_OH_AL_ACSR_1033kcmil_Curlew_12.47_1_3_3_3_3

New Line.padswitch(r:p3udt11892-p3udt6915)p3u_170198 Units=km Length=0.001 bus1=p3udt11892.1 bus2=p3udt11892-p3udt6915x.1 switch=y enabled=y phases=1 Linecode=padswitch_1_1_1_1

New Line.padswitch(r:p3udt11892-p3udt6915)p3u_170199 Units=km Length=0.001 bus1=p3udt11892-p3udt6915xx.1 bus2=p3udt6915.1 switch=y enabled=y phases=1 Linecode=padswitch_1_3_1_1_1

New Line.padswitch(r:p3udt21158-p3udt9329)p3u_170200 Units=km Length=0.001 bus1=p3udt21158-p3udt9329xxx.2 bus2=p3udt21158-p3udt9329xx.2 switch=y enabled=y phases=1 Linecode=padswitch_1_3_1_1_1

New Line.padswitch(r:p3udt21158-p3udt9329)p3u_170201 Units=km Length=0.001 bus1=p3udt21158-p3udt9329x.2 bus2=p3udt21158.2 switch=y enabled=y phases=1 Linecode=padswitch_1_3_1_0_1_1

New Line.padswitch(r:p3udt26904-p3udt9329)p3u_170202 Units=km Length=0.001 bus1=p3udt26904.1.2.3 bus2=p3udt26904-p3udt9329x.1.2.3 switch=y enabled=y phases=3 Linecode=padswitch_3_3_3_3

New Line.padswitch(r:p3udt26904-p3udt9329)p3u_170203 Units=km Length=0.001 bus1=p3udt26904-p3udt9329xx.1.2.3 bus2=p3udt9329.1.2.3 switch=y enabled=y phases=3 Linecode=padswitch_3_4_3_3_3

New Line.elbswitch(r:p3udt10382-p3udt20296)p3u_206640 Units=km Length=0.001 bus1=p3udt10382.1.2.3 bus2=p3udt10382-p3udt20296x.1.2.3 switch=y enabled=n phases=3 Linecode=elbswitch_3_3_3_3

New Line.elbswitch(r:p3udt16094-p3udt19937)p3u_206672 Units=km Length=0.001 bus1=p3udt16094.1.2.3 bus2=p3udt16094-p3udt19937x.1.2.3 switch=y enabled=n phases=3 Linecode=elbswitch_3_3_3_3

New Line.fuse(r:p3udt25348-p3umv31)p3u_206806 Units=km Length=0.001 bus1=p3umv31.3 bus2=p3udt25348-p3umv31x.3 switch=n enabled=y phases=1 Linecode=fuse_1_1_1_1

New Fuse.Fuse_fuse(r:p3udt25348-p3umv31)p3u_206806 monitoredobj=Line.fuse(r:p3udt25348-p3umv31)p3u_206806 enabled=y ratedcurrent=100.0

New Line.fuse(r:p3udt11892-p3udt1561)p3u_206973 Units=km Length=0.001 bus1=p3udt1561.1 bus2=p3udt11892-p3udt1561x.1 switch=n enabled=y phases=1 Linecode=fuse_1_1_1_1

New Fuse.Fuse_fuse(r:p3udt11892-p3udt1561)p3u_206973 monitoredobj=Line.fuse(r:p3udt11892-p3udt1561)p3u_206973 enabled=y ratedcurrent=100.0

New Line.fuse(r:p3udt21158-p3udt9329)p3u_207744 Units=km Length=0.001 bus1=p3udt9329.2 bus2=p3udt21158-p3udt9329xxx.2 switch=n enabled=y phases=1 Linecode=fuse_1_7_1_1_1

New Fuse.Fuse_fuse(r:p3udt21158-p3udt9329)p3u_207744 monitoredobj=Line.fuse(r:p3udt21158-p3udt9329)p3u_207744 enabled=y ratedcurrent=100.0

New Line.fuse(r:p3udt19016-p3udt9873)p3u_207775 Units=km Length=0.001 bus1=p3udt9873.1 bus2=p3udt19016-p3udt9873x.1 switch=n enabled=y phases=1 Linecode=fuse_1_1_1_1

New Fuse.Fuse_fuse(r:p3udt19016-p3udt9873)p3u_207775 monitoredobj=Line.fuse(r:p3udt19016-p3udt9873)p3u_207775 enabled=y ratedcurrent=100.0

New Line.fuse(r:p3udt16521-p3udt29894)p3u_208421 Units=km Length=0.001 bus1=p3udt16521.3 bus2=p3udt16521-p3udt29894x.3 switch=n enabled=y phases=1 Linecode=fuse_1_1_1_1

New Fuse.Fuse_fuse(r:p3udt16521-p3udt29894)p3u_208421 monitoredobj=Line.fuse(r:p3udt16521-p3udt29894)p3u_208421 enabled=y ratedcurrent=100.0

New Line.fuse(r:p3udt10890-p3udt20297)p3u_208793 Units=km Length=0.001 bus1=p3udt20297.2 bus2=p3udt10890-p3udt20297x.2 switch=n enabled=y phases=1 Linecode=fuse_1_1_1_1

New Fuse.Fuse_fuse(r:p3udt10890-p3udt20297)p3u_208793 monitoredobj=Line.fuse(r:p3udt10890-p3udt20297)p3u_208793 enabled=y ratedcurrent=100.0

New Line.l(r:p3udt31865-p3uhs2_1247)_disconnect Units=km Length=0.001 bus1=p3udt31865-p3uhs2_1247x_b1_1.1.2.3 bus2=p3udt31865-p3uhs2_1247x_b2_1.1.2.3 switch=y enabled=y phases=3 Linecode=3P_OH_AL_ACSR_1033kcmil_Curlew_12.47_1_3_3_3_3

New Line.l(r:p3udt31865-p3uhs2_1247)_cont Units=km Length=2.017296 bus1=p3udt31865-p3uhs2_1247x_b2_1.1.2.3 bus2=p3udt31865.1.2.3 switch=n enabled=y phases=3 Linecode=3P_OH_AL_ACSR_1033kcmil_Curlew_12.47_1_3_3_3_3
