New Capacitor.p3uc21 Bus1=p3umv26 phases=3 Kv=12.47 conn=Wye Kvar=300.0

New CapControl.p3uc21 Capacitor=p3uc21 Element=Line.l(r:p3umv13-p3umv26) Terminal=1 delay=100.0 Type=voltage Vmin=120.5 Vmax=125.0 Ptratio=59.99631547328862 Ctratio=100.0
