New Capacitor.p3uc20 Bus1=p3udt14046 phases=3 Kv=12.47 conn=Wye Kvar=300.0

New CapControl.p3uc20 Capacitor=p3uc20 Element=Line.l(r:p3udt14046-p3udt1417) Terminal=1 delay=100.0 Type=voltage Vmin=120.5 Vmax=125.0 Ptratio=59.99631547328862 Ctratio=100.0
