New Capacitor.p3uc31 Bus1=p3udt8326 phases=3 Kv=12.47 conn=Wye Kvar=450.0

New CapControl.p3uc31 Capacitor=p3uc31 Element=Line.padswitch(r:p3udt23771-p3udt8326)p3u_170751 Terminal=1 delay=100.0 Type=voltage Vmin=120.5 Vmax=125.0 Ptratio=59.99631547328862 Ctratio=100.0
