New Capacitor.p3uc26 Bus1=p3udt9989 phases=3 Kv=12.47 conn=Wye Kvar=300.0

New CapControl.p3uc26 Capacitor=p3uc26 Element=Line.l(r:p3udt29190-p3udt9989) Terminal=1 delay=100.0 Type=voltage Vmin=120.5 Vmax=125.0 Ptratio=59.99631547328862 Ctratio=100.0

New Capacitor.p3uc30 Bus1=p3udt9464 phases=3 Kv=12.47 conn=Wye Kvar=300.0

New CapControl.p3uc30 Capacitor=p3uc30 Element=Line.padswitch(r:p3udt18118-p3udt9464)p3u_171030 Terminal=1 delay=100.0 Type=voltage Vmin=120.5 Vmax=125.0 Ptratio=59.99631547328862 Ctratio=100.0
