New Load.load_p3umv8 conn=wye bus1=p3umv8.1.2.3 kV=12.47 Vminpu=0.8 Vmaxpu=1.2 model=1 kW=1391.05 kvar=282.46474987493167 Phases=3

New Load.load_p3ulv41715 conn=wye bus1=p3ulv41715.1.2.3 kV=0.48 Vminpu=0.8 Vmaxpu=1.2 model=1 kW=234.662 kvar=47.65015142169672 Phases=3

New Load.load_p3ulv46481 conn=wye bus1=p3ulv46481.1.2.3 kV=0.48 Vminpu=0.8 Vmaxpu=1.2 model=1 kW=327.5729999999999 kvar=66.51653463986268 Phases=3

New Load.load_p3umv21 conn=wye bus1=p3umv21.1.2.3 kV=12.47 Vminpu=0.8 Vmaxpu=1.2 model=1 kW=944.259 kvar=191.73996783160425 Phases=3
