New Line.l(r:p3udt232lv-p3ulv378) Units=km Length=0.0488276 bus1=p3udt232lv.1.2 bus2=p3ulv378.1.2 switch=n enabled=y phases=2 Linecode=1P_OH_AL_4/0_Zuzara_0_416_0_2_2_2_2

New Line.l(r:p3udt233lv-p3ulv379) Units=km Length=0.0191922 bus1=p3udt233lv.1.2 bus2=p3ulv379.1.2 switch=n enabled=y phases=2 Linecode=1P_OH_AL_2/0_Rucina_0_416_0_2_2_2_2

New Line.l(r:p3udt233lv-p3ulv65521) Units=km Length=0.0191922 bus1=p3udt233lv.1.2 bus2=p3ulv65521.1.2 switch=n enabled=y phases=2 Linecode=1P_OH_AL_2/0_Rucina_0_416_0_2_2_2_2

New Line.l(r:p3udt6526lv-p3ulv7483) Units=km Length=0.0355091 bus1=p3udt6526lv.1.2 bus2=p3ulv7483.1.2 switch=n enabled=y phases=2 Linecode=1P_OH_AL_4/0_Zuzara_0_416_0_2_2_2_2

New Line.l(r:p3udt6526lv-p3ulv10601) Units=km Length=0.0577955 bus1=p3udt6526lv.1.2 bus2=p3ulv10601.1.2 switch=n enabled=y phases=2 Linecode=1P_OH_AL_4/0_Zuzara_0_416_0_2_2_2_2

New Line.l(r:p3udt6526lv-p3ulv32491) Units=km Length=0.0460122 bus1=p3udt6526lv.1.2 bus2=p3ulv32491.1.2 switch=n enabled=y phases=2 Linecode=1P_OH_AL_4/0_Zuzara_0_416_0_2_2_2_2

New Line.l(r:p3udt7181lv-p3ulv71736) Units=km Length=0.0309637 bus1=p3udt7181lv.1.2 bus2=p3ulv71736.1.2 switch=n enabled=y phases=2 Linecode=1P_OH_AL_4/0_Zuzara_0_416_0_2_2_2_2

New Line.l(r:p3udm24475-p3ulv8306) Units=km Length=0.020592500000000003 bus1=p3udm24475.1.2 bus2=p3ulv8306.1.2 switch=n enabled=y phases=2 Linecode=1P_OH_AL_2/0_Rucina_0_416_0_2_2_2_2

New Line.l(r:p3udm24475-p3ulv60973) Units=km Length=0.0498862 bus1=p3udm24475.1.2 bus2=p3ulv60973.1.2 switch=n enabled=y phases=2 Linecode=1P_OH_AL_4/0_Zuzara_0_416_0_2_2_2_2

New Line.l(r:p3udm24475-p3udt7181lv) Units=km Length=0.0199891 bus1=p3udt7181lv.1.2 bus2=p3udm24475.1.2 switch=n enabled=y phases=2 Linecode=1P_OH_AL_2/0_Rucina_0_416_0_2_2_2_2

New Line.l(r:p3udm24476-p3ulv17657) Units=km Length=0.0199076 bus1=p3udm24476.1.2 bus2=p3ulv17657.1.2 switch=n enabled=y phases=2 Linecode=1P_OH_AL_2/0_Rucina_0_416_0_2_2_2_2

New Line.l(r:p3udm24476-p3udt7181lv) Units=km Length=0.0199891 bus1=p3udt7181lv.1.2 bus2=p3udm24476.1.2 switch=n enabled=y phases=2 Linecode=1P_OH_AL_2/0_Rucina_0_416_0_2_2_2_2

New Line.l(r:p3udt7756lv-p3ulv9060) Units=km Length=0.0211006 bus1=p3udt7756lv.1.2 bus2=p3ulv9060.1.2 switch=n enabled=y phases=2 Linecode=1P_UG_AL_1/0_Brenau_0_416_0_2_2_2_2

New Line.l(r:p3udt7757lv-p3ulv9061) Units=km Length=0.0117007 bus1=p3udt7757lv.1.2 bus2=p3ulv9061.1.2 switch=n enabled=y phases=2 Linecode=1P_OH_AL_2/0_Rucina_0_416_0_2_2_2_2

New Line.l(r:p3udt7765lv-p3ulv9073) Units=km Length=0.04520110000000001 bus1=p3udt7765lv.1.2 bus2=p3ulv9073.1.2 switch=n enabled=y phases=2 Linecode=1P_OH_AL_4/0_Zuzara_0_416_0_2_2_2_2

New Line.l(r:p3udt7765lv-p3ulv62494) Units=km Length=0.0530369 bus1=p3udt7765lv.1.2 bus2=p3ulv62494.1.2 switch=n enabled=y phases=2 Linecode=1P_OH_AL_4/0_Zuzara_0_416_0_2_2_2_2

New Line.l(r:p3udt7769lv-p3ulv9077) Units=km Length=0.0281889 bus1=p3udt7769lv.1.2 bus2=p3ulv9077.1.2 switch=n enabled=y phases=2 Linecode=1P_OH_AL_4/0_Zuzara_0_416_0_2_2_2_2

New Line.l(r:p3udt8328lv-p3ulv9814) Units=km Length=0.032046500000000006 bus1=p3udt8328lv.1.2 bus2=p3ulv9814.1.2 switch=n enabled=y phases=2 Linecode=1P_UG_AL_1/0_Brenau_0_416_0_2_2_2_2

New Line.l(r:p3udt8329lv-p3ulv9815) Units=km Length=0.0143994 bus1=p3udt8329lv.1.2 bus2=p3ulv9815.1.2 switch=n enabled=y phases=2 Linecode=1P_UG_AL_1/0_Brenau_0_416_0_2_2_2_2

New Line.l(r:p3udt8881lv-p3ulv10583) Units=km Length=0.00293157 bus1=p3udt8881lv.1.2 bus2=p3ulv10583.1.2 switch=n enabled=y phases=2 Linecode=1P_UG_AL_1/0_Brenau_0_416_0_2_2_2_2

New Line.l(r:p3udt9463lv-p3ulv11431) Units=km Length=0.00870566 bus1=p3udt9463lv.1.2 bus2=p3ulv11431.1.2 switch=n enabled=y phases=2 Linecode=1P_OH_AL_2/0_Rucina_0_416_0_2_2_2_2

New Line.l(r:p3udt9469lv-p3ulv11441) Units=km Length=0.0259153 bus1=p3udt9469lv.1.2 bus2=p3ulv11441.1.2 switch=n enabled=y phases=2 Linecode=1P_OH_AL_2/0_Rucina_0_416_0_2_2_2_2

New Line.l(r:p3udm31655-p3ulv12957) Units=km Length=0.0281032 bus1=p3udm31655.1.2 bus2=p3ulv12957.1.2 switch=n enabled=y phases=2 Linecode=1P_OH_AL_4/0_Zuzara_0_416_0_2_2_2_2

New Line.l(r:p3udm31655-p3udt9469lv) Units=km Length=0.019694 bus1=p3udt9469lv.1.2 bus2=p3udm31655.1.2 switch=n enabled=y phases=2 Linecode=1P_OH_AL_2/0_Rucina_0_416_0_2_2_2_2

New Line.l(r:p3udt9470lv-p3ulv11442) Units=km Length=0.019842300000000004 bus1=p3udt9470lv.1.2 bus2=p3ulv11442.1.2 switch=n enabled=y phases=2 Linecode=1P_OH_AL_2/0_Rucina_0_416_0_2_2_2_2

New Line.l(r:p3udm34769-p3ulv12928) Units=km Length=0.0569342 bus1=p3udm34769.1.2 bus2=p3ulv12928.1.2 switch=n enabled=y phases=2 Linecode=1P_UG_AL_1/0_Brenau_0_416_0_2_2_2_2

New Line.l(r:p3udm34769-p3udt10482lv) Units=km Length=0.0234276 bus1=p3udt10482lv.1.2 bus2=p3udm34769.1.2 switch=n enabled=y phases=2 Linecode=1P_OH_AL_2/0_Rucina_0_416_0_2_2_2_2

New Line.l(r:p3udm34770-p3ulv37814) Units=km Length=0.030898100000000005 bus1=p3udm34770.1.2 bus2=p3ulv37814.1.2 switch=n enabled=y phases=2 Linecode=1P_OH_AL_4/0_Zuzara_0_416_0_2_2_2_2

New Line.l(r:p3udm34770-p3udt10482lv) Units=km Length=0.0179056 bus1=p3udt10482lv.1.2 bus2=p3udm34770.1.2 switch=n enabled=y phases=2 Linecode=1P_OH_AL_2/0_Rucina_0_416_0_2_2_2_2

New Line.l(r:p3udm34771-p3ulv12929) Units=km Length=0.00427468 bus1=p3udm34771.1.2 bus2=p3ulv12929.1.2 switch=n enabled=y phases=2 Linecode=1P_UG_AL_1/0_Brenau_0_416_0_2_2_2_2

New Line.l(r:p3udm34771-p3udt10483lv) Units=km Length=0.0156166 bus1=p3udt10483lv.1.2 bus2=p3udm34771.1.2 switch=n enabled=y phases=2 Linecode=1P_UG_AL_1/0_Brenau_0_416_0_2_2_2_2

New Line.l(r:p3udm34772-p3ulv63991) Units=km Length=0.00565265 bus1=p3udm34772.1.2 bus2=p3ulv63991.1.2 switch=n enabled=y phases=2 Linecode=1P_UG_AL_1/0_Brenau_0_416_0_2_2_2_2

New Line.l(r:p3udm34772-p3udt10483lv) Units=km Length=0.0237385 bus1=p3udt10483lv.1.2 bus2=p3udm34772.1.2 switch=n enabled=y phases=2 Linecode=1P_UG_AL_1/0_Brenau_0_416_0_2_2_2_2

New Line.l(r:p3udt11022lv-p3ulv13751) Units=km Length=0.0422165 bus1=p3udt11022lv.1.2 bus2=p3ulv13751.1.2 switch=n enabled=y phases=2 Linecode=1P_OH_AL_4/0_Zuzara_0_416_0_2_2_2_2

New Line.l(r:p3udm36474-p3ulv28572) Units=km Length=0.0297011 bus1=p3udm36474.1.2 bus2=p3ulv28572.1.2 switch=n enabled=y phases=2 Linecode=1P_OH_AL_4/0_Zuzara_0_416_0_2_2_2_2

New Line.l(r:p3udm36474-p3udt11022lv) Units=km Length=0.0199616 bus1=p3udt11022lv.1.2 bus2=p3udm36474.1.2 switch=n enabled=y phases=2 Linecode=1P_OH_AL_2/0_Rucina_0_416_0_2_2_2_2

New Line.l(r:p3udm36475-p3ulv71013) Units=km Length=0.047672 bus1=p3udm36475.1.2 bus2=p3ulv71013.1.2 switch=n enabled=y phases=2 Linecode=1P_OH_AL_4/0_Zuzara_0_416_0_2_2_2_2

New Line.l(r:p3udm36475-p3udt11022lv) Units=km Length=0.0199534 bus1=p3udt11022lv.1.2 bus2=p3udm36475.1.2 switch=n enabled=y phases=2 Linecode=1P_OH_AL_2/0_Rucina_0_416_0_2_2_2_2

New Line.l(r:p3udm36487-p3ulv33287) Units=km Length=0.0375869 bus1=p3udm36487.1.2 bus2=p3ulv33287.1.2 switch=n enabled=y phases=2 Linecode=1P_OH_AL_4/0_Zuzara_0_416_0_2_2_2_2

New Line.l(r:p3udm36486-p3ulv13758) Units=km Length=0.0292341 bus1=p3udm36486.1.2 bus2=p3ulv13758.1.2 switch=n enabled=y phases=2 Linecode=1P_OH_AL_4/0_Zuzara_0_416_0_2_2_2_2

New Line.l(r:p3udm36486-p3udm36487) Units=km Length=0.0199534 bus1=p3udm36487.1.2 bus2=p3udm36486.1.2 switch=n enabled=y phases=2 Linecode=1P_OH_AL_2/0_Rucina_0_416_0_2_2_2_2

New Line.l(r:p3udm36487-p3udt11026lv) Units=km Length=0.0199534 bus1=p3udt11026lv.1.2 bus2=p3udm36487.1.2 switch=n enabled=y phases=2 Linecode=1P_OH_AL_2/0_Rucina_0_416_0_2_2_2_2

New Line.l(r:p3udm36488-p3ulv63305) Units=km Length=0.0315826 bus1=p3udm36488.1.2 bus2=p3ulv63305.1.2 switch=n enabled=y phases=2 Linecode=1P_OH_AL_4/0_Zuzara_0_416_0_2_2_2_2

New Line.l(r:p3udm36488-p3udt11026lv) Units=km Length=0.0399149 bus1=p3udt11026lv.1.2 bus2=p3udm36488.1.2 switch=n enabled=y phases=2 Linecode=1P_OH_AL_4/0_Zuzara_0_416_0_2_2_2_2

New Line.l(r:p3udm37931-p3ulv14514) Units=km Length=0.031220100000000004 bus1=p3udm37931.1.2 bus2=p3ulv14514.1.2 switch=n enabled=y phases=2 Linecode=1P_OH_AL_4/0_Zuzara_0_416_0_2_2_2_2

New Line.l(r:p3udm37931-p3udt11522lv) Units=km Length=0.0191296 bus1=p3udt11522lv.1.2 bus2=p3udm37931.1.2 switch=n enabled=y phases=2 Linecode=1P_OH_AL_2/0_Rucina_0_416_0_2_2_2_2

New Line.l(r:p3udm37932-p3ulv35592) Units=km Length=0.0161969 bus1=p3udm37932.1.2 bus2=p3ulv35592.1.2 switch=n enabled=y phases=2 Linecode=1P_OH_AL_2/0_Rucina_0_416_0_2_2_2_2

New Line.l(r:p3udm37932-p3udt11522lv) Units=km Length=0.0191396 bus1=p3udt11522lv.1.2 bus2=p3udm37932.1.2 switch=n enabled=y phases=2 Linecode=1P_OH_AL_2/0_Rucina_0_416_0_2_2_2_2

New Line.l(r:p3udt11533lv-p3ulv14531) Units=km Length=0.07921800000000001 bus1=p3udt11533lv.1.2 bus2=p3ulv14531.1.2 switch=n enabled=y phases=2 Linecode=1P_OH_AL_4/0_Zuzara_0_416_0_2_2_2_2

New Line.l(r:p3udt12013lv-p3ulv15305) Units=km Length=0.0243956 bus1=p3udt12013lv.1.2 bus2=p3ulv15305.1.2 switch=n enabled=y phases=2 Linecode=1P_UG_AL_4/0_Sweetbriar_0_416_0_2_2_2_2

New Line.l(r:p3udm40834-p3ulv16113) Units=km Length=0.0398717 bus1=p3udm40834.1.2 bus2=p3ulv16113.1.2 switch=n enabled=y phases=2 Linecode=1P_OH_AL_4/0_Zuzara_0_416_0_2_2_2_2

New Line.l(r:p3udm40834-p3udt12519lv) Units=km Length=0.018938 bus1=p3udt12519lv.1.2 bus2=p3udm40834.1.2 switch=n enabled=y phases=2 Linecode=1P_OH_AL_2/0_Rucina_0_416_0_2_2_2_2

New Line.l(r:p3udm40835-p3ulv28564) Units=km Length=0.051833 bus1=p3udm40835.1.2 bus2=p3ulv28564.1.2 switch=n enabled=y phases=2 Linecode=1P_OH_AL_4/0_Zuzara_0_416_0_2_2_2_2

New Line.l(r:p3udm40835-p3udt12519lv) Units=km Length=0.018924 bus1=p3udt12519lv.1.2 bus2=p3udm40835.1.2 switch=n enabled=y phases=2 Linecode=1P_OH_AL_2/0_Rucina_0_416_0_2_2_2_2

New Line.l(r:p3udt12983lv-p3ulv16921) Units=km Length=0.0189734 bus1=p3udt12983lv.1.2 bus2=p3ulv16921.1.2 switch=n enabled=y phases=2 Linecode=1P_OH_AL_2/0_Rucina_0_416_0_2_2_2_2

New Line.l(r:p3udt13399lv-p3ulv30890) Units=km Length=0.122401 bus1=p3udt13399lv.1.2 bus2=p3ulv30890.1.2 switch=n enabled=y phases=2 Linecode=1P_OH_AL_4/0_Zuzara_0_416_0_2_2_2_2

New Line.l(r:p3udt13399lv-p3ulv56426) Units=km Length=0.0526959 bus1=p3udt13399lv.1.2 bus2=p3ulv56426.1.2 switch=n enabled=y phases=2 Linecode=1P_OH_AL_4/0_Zuzara_0_416_0_2_2_2_2

New Line.l(r:p3udm43356-p3ulv17659) Units=km Length=0.0251319 bus1=p3udm43356.1.2 bus2=p3ulv17659.1.2 switch=n enabled=y phases=2 Linecode=1P_OH_AL_2/0_Rucina_0_416_0_2_2_2_2

New Line.l(r:p3udm43356-p3udt13399lv) Units=km Length=0.0199891 bus1=p3udt13399lv.1.2 bus2=p3udm43356.1.2 switch=n enabled=y phases=2 Linecode=1P_OH_AL_2/0_Rucina_0_416_0_2_2_2_2

New Line.l(r:p3udt13404lv-p3ulv17666) Units=km Length=0.0272155 bus1=p3udt13404lv.1.2 bus2=p3ulv17666.1.2 switch=n enabled=y phases=2 Linecode=1P_OH_AL_4/0_Zuzara_0_416_0_2_2_2_2

New Line.l(r:p3udt13791lv-p3ulv67866) Units=km Length=0.0378151 bus1=p3udt13791lv.1.2 bus2=p3ulv67866.1.2 switch=n enabled=y phases=2 Linecode=1P_OH_AL_4/0_Zuzara_0_416_0_2_2_2_2

New Line.l(r:p3udm44503-p3ulv18410) Units=km Length=0.0491944 bus1=p3udm44503.1.2 bus2=p3ulv18410.1.2 switch=n enabled=y phases=2 Linecode=1P_OH_AL_4/0_Zuzara_0_416_0_2_2_2_2

New Line.l(r:p3udm44503-p3udt13791lv) Units=km Length=0.0199534 bus1=p3udt13791lv.1.2 bus2=p3udm44503.1.2 switch=n enabled=y phases=2 Linecode=1P_OH_AL_2/0_Rucina_0_416_0_2_2_2_2

New Line.l(r:p3udm44505-p3ulv68651) Units=km Length=0.0366977 bus1=p3udm44505.1.2 bus2=p3ulv68651.1.2 switch=n enabled=y phases=2 Linecode=1P_OH_AL_4/0_Zuzara_0_416_0_2_2_2_2

New Line.l(r:p3udm44505-p3udt13791lv) Units=km Length=0.0199534 bus1=p3udt13791lv.1.2 bus2=p3udm44505.1.2 switch=n enabled=y phases=2 Linecode=1P_OH_AL_2/0_Rucina_0_416_0_2_2_2_2

New Line.l(r:p3udt14655lv-p3ulv19952) Units=km Length=0.0326427 bus1=p3udt14655lv.1.2 bus2=p3ulv19952.1.2 switch=n enabled=y phases=2 Linecode=1P_OH_AL_4/0_Zuzara_0_416_0_2_2_2_2

New Line.l(r:p3udm47885-p3ulv20690) Units=km Length=0.0272171 bus1=p3udm47885.1.2 bus2=p3ulv20690.1.2 switch=n enabled=y phases=2 Linecode=1P_OH_AL_4/0_Zuzara_0_416_0_2_2_2_2

New Line.l(r:p3udm47885-p3udt15043lv) Units=km Length=0.0520694 bus1=p3udt15043lv.1.2 bus2=p3udm47885.1.2 switch=n enabled=y phases=2 Linecode=1P_OH_AL_4/0_Zuzara_0_416_0_2_2_2_2

New Line.l(r:p3udm47886-p3ulv64008) Units=km Length=0.0577654 bus1=p3udm47886.1.2 bus2=p3ulv64008.1.2 switch=n enabled=y phases=2 Linecode=1P_OH_AL_4/0_Zuzara_0_416_0_2_2_2_2

New Line.l(r:p3udm47886-p3ulv66300) Units=km Length=0.0208333 bus1=p3udm47886.1.2 bus2=p3ulv66300.1.2 switch=n enabled=y phases=2 Linecode=1P_OH_AL_2/0_Rucina_0_416_0_2_2_2_2

New Line.l(r:p3udm47886-p3udt15043lv) Units=km Length=0.0173564 bus1=p3udt15043lv.1.2 bus2=p3udm47886.1.2 switch=n enabled=y phases=2 Linecode=1P_OH_AL_2/0_Rucina_0_416_0_2_2_2_2

New Line.l(r:p3udt15466lv-p3ulv21491) Units=km Length=0.0172869 bus1=p3udt15466lv.1.2 bus2=p3ulv21491.1.2 switch=n enabled=y phases=2 Linecode=1P_OH_AL_2/0_Rucina_0_416_0_2_2_2_2

New Line.l(r:p3udm49928-p3ulv22252) Units=km Length=0.00534303 bus1=p3udm49928.1.2 bus2=p3ulv22252.1.2 switch=n enabled=y phases=2 Linecode=1P_UG_AL_1/0_Brenau_0_416_0_2_2_2_2

New Line.l(r:p3udm49928-p3udt15861lv) Units=km Length=0.0217672 bus1=p3udt15861lv.1.2 bus2=p3udm49928.1.2 switch=n enabled=y phases=2 Linecode=1P_UG_AL_1/0_Brenau_0_416_0_2_2_2_2

New Line.l(r:p3udm49929-p3ulv28552) Units=km Length=0.005793510000000001 bus1=p3udm49929.1.2 bus2=p3ulv28552.1.2 switch=n enabled=y phases=2 Linecode=1P_UG_AL_1/0_Brenau_0_416_0_2_2_2_2

New Line.l(r:p3udm49929-p3udt15861lv) Units=km Length=0.0257592 bus1=p3udt15861lv.1.2 bus2=p3udm49929.1.2 switch=n enabled=y phases=2 Linecode=1P_UG_AL_1/0_Brenau_0_416_0_2_2_2_2

New Line.l(r:p3udt15870lv-p3ulv22268) Units=km Length=0.00768016 bus1=p3udt15870lv.1.2 bus2=p3ulv22268.1.2 switch=n enabled=y phases=2 Linecode=1P_OH_AL_2/0_Rucina_0_416_0_2_2_2_2

New Line.l(r:p3udt16254lv-p3ulv23066) Units=km Length=0.0490251 bus1=p3udt16254lv.1.2 bus2=p3ulv23066.1.2 switch=n enabled=y phases=2 Linecode=1P_OH_AL_4/0_Zuzara_0_416_0_2_2_2_2

New Line.l(r:p3udt16609lv-p3ulv58679) Units=km Length=0.0445009 bus1=p3udt16609lv.1.2 bus2=p3ulv58679.1.2 switch=n enabled=y phases=2 Linecode=1P_OH_AL_4/0_Zuzara_0_416_0_2_2_2_2

New Line.l(r:p3udm51847-p3ulv23815) Units=km Length=0.0495388 bus1=p3udm51847.1.2 bus2=p3ulv23815.1.2 switch=n enabled=y phases=2 Linecode=1P_OH_AL_4/0_Zuzara_0_416_0_2_2_2_2

New Line.l(r:p3udm51847-p3udt16609lv) Units=km Length=0.019030600000000005 bus1=p3udt16609lv.1.2 bus2=p3udm51847.1.2 switch=n enabled=y phases=2 Linecode=1P_OH_AL_2/0_Rucina_0_416_0_2_2_2_2

New Line.l(r:p3udt17028lv-p3ulv24709) Units=km Length=0.0161217 bus1=p3udt17028lv.1.2 bus2=p3ulv24709.1.2 switch=n enabled=y phases=2 Linecode=1P_OH_AL_2/0_Rucina_0_416_0_2_2_2_2

New Line.l(r:p3udt17031lv-p3ulv24713) Units=km Length=0.025684 bus1=p3udt17031lv.1.2 bus2=p3ulv24713.1.2 switch=n enabled=y phases=2 Linecode=1P_OH_AL_2/0_Rucina_0_416_0_2_2_2_2

New Line.l(r:p3udt17399lv-p3ulv25493) Units=km Length=0.0264861 bus1=p3udt17399lv.1.2 bus2=p3ulv25493.1.2 switch=n enabled=y phases=2 Linecode=1P_OH_AL_2/0_Rucina_0_416_0_2_2_2_2

New Line.l(r:p3udt18117lv-p3ulv27068) Units=km Length=0.0152655 bus1=p3udt18117lv.1.2 bus2=p3ulv27068.1.2 switch=n enabled=y phases=2 Linecode=1P_OH_AL_2/0_Rucina_0_416_0_2_2_2_2

New Line.l(r:p3udt18122lv-p3ulv27084) Units=km Length=0.023708 bus1=p3udt18122lv.1.2 bus2=p3ulv27084.1.2 switch=n enabled=y phases=2 Linecode=1P_UG_AL_2/0_Converse_0_416_0_2_2_2_2

New Line.l(r:p3udt18463lv-p3ulv27819) Units=km Length=0.03624260000000001 bus1=p3udt18463lv.1.2 bus2=p3ulv27819.1.2 switch=n enabled=y phases=2 Linecode=1P_OH_AL_4/0_Zuzara_0_416_0_2_2_2_2

New Line.l(r:p3udt18463lv-p3ulv79393) Units=km Length=0.0165324 bus1=p3udt18463lv.1.2 bus2=p3ulv79393.1.2 switch=n enabled=y phases=2 Linecode=1P_OH_AL_2/0_Rucina_0_416_0_2_2_2_2

New Line.l(r:p3udt18779lv-p3ulv39396) Units=km Length=0.0134009 bus1=p3udt18779lv.1.2 bus2=p3ulv39396.1.2 switch=n enabled=y phases=2 Linecode=1P_OH_AL_2/0_Rucina_0_416_0_2_2_2_2

New Line.l(r:p3udm57022-p3ulv28565) Units=km Length=0.0156757 bus1=p3udm57022.1.2 bus2=p3ulv28565.1.2 switch=n enabled=y phases=2 Linecode=1P_OH_AL_2/0_Rucina_0_416_0_2_2_2_2

New Line.l(r:p3udm57022-p3udt18779lv) Units=km Length=0.0155302 bus1=p3udt18779lv.1.2 bus2=p3udm57022.1.2 switch=n enabled=y phases=2 Linecode=1P_OH_AL_2/0_Rucina_0_416_0_2_2_2_2

New Line.l(r:p3udm62957-p3ulv35598) Units=km Length=0.020376 bus1=p3udm62957.1.2 bus2=p3ulv35598.1.2 switch=n enabled=y phases=2 Linecode=1P_OH_AL_2/0_Rucina_0_416_0_2_2_2_2

New Line.l(r:p3udm62957-p3udt21496lv) Units=km Length=0.019694 bus1=p3udt21496lv.1.2 bus2=p3udm62957.1.2 switch=n enabled=y phases=2 Linecode=1P_OH_AL_2/0_Rucina_0_416_0_2_2_2_2

New Line.l(r:p3udm62958-p3ulv71735) Units=km Length=0.042556500000000004 bus1=p3udm62958.1.2 bus2=p3ulv71735.1.2 switch=n enabled=y phases=2 Linecode=1P_OH_AL_4/0_Zuzara_0_416_0_2_2_2_2

New Line.l(r:p3udm62958-p3udt21496lv) Units=km Length=0.019696 bus1=p3udt21496lv.1.2 bus2=p3udm62958.1.2 switch=n enabled=y phases=2 Linecode=1P_OH_AL_2/0_Rucina_0_416_0_2_2_2_2

New Line.l(r:p3udt21962lv-p3ulv37033) Units=km Length=0.00563153 bus1=p3udt21962lv.1.2 bus2=p3ulv37033.1.2 switch=n enabled=y phases=2 Linecode=1P_OH_AL_2/0_Rucina_0_416_0_2_2_2_2

New Line.l(r:p3udt22510lv-p3ulv38604) Units=km Length=0.0349762 bus1=p3udt22510lv.1.2 bus2=p3ulv38604.1.2 switch=n enabled=y phases=2 Linecode=1P_OH_AL_4/0_Zuzara_0_416_0_2_2_2_2

New Line.l(r:p3udt24015lv-p3ulv43301) Units=km Length=0.0318321 bus1=p3udt24015lv.1.2 bus2=p3ulv43301.1.2 switch=n enabled=y phases=2 Linecode=1P_OH_AL_4/0_Zuzara_0_416_0_2_2_2_2

New Line.l(r:p3udm67716-p3ulv71012) Units=km Length=0.0558199 bus1=p3udm67716.1.2 bus2=p3ulv71012.1.2 switch=n enabled=y phases=2 Linecode=1P_OH_AL_4/0_Zuzara_0_416_0_2_2_2_2

New Line.l(r:p3udm67716-p3udt24015lv) Units=km Length=0.0199891 bus1=p3udt24015lv.1.2 bus2=p3udm67716.1.2 switch=n enabled=y phases=2 Linecode=1P_OH_AL_2/0_Rucina_0_416_0_2_2_2_2

New Line.l(r:p3udm68932-p3ulv45682) Units=km Length=0.0438812 bus1=p3udm68932.1.2 bus2=p3ulv45682.1.2 switch=n enabled=y phases=2 Linecode=1P_OH_AL_4/0_Zuzara_0_416_0_2_2_2_2

New Line.l(r:p3udm68932-p3udt24718lv) Units=km Length=0.0190144 bus1=p3udt24718lv.1.2 bus2=p3udm68932.1.2 switch=n enabled=y phases=2 Linecode=1P_OH_AL_2/0_Rucina_0_416_0_2_2_2_2

New Line.l(r:p3udm68933-p3ulv55620) Units=km Length=0.007443510000000001 bus1=p3udm68933.1.2 bus2=p3ulv55620.1.2 switch=n enabled=y phases=2 Linecode=1P_OH_AL_2/0_Rucina_0_416_0_2_2_2_2

New Line.l(r:p3udm68933-p3udt24718lv) Units=km Length=0.0479079 bus1=p3udt24718lv.1.2 bus2=p3udm68933.1.2 switch=n enabled=y phases=2 Linecode=1P_OH_AL_4/0_Zuzara_0_416_0_2_2_2_2

New Line.l(r:p3udt24972lv-p3ulv46499) Units=km Length=0.0935348 bus1=p3udt24972lv.1.2 bus2=p3ulv46499.1.2 switch=n enabled=y phases=2 Linecode=1P_OH_AL_4/0_Zuzara_0_416_0_2_2_2_2

New Line.l(r:p3udt24973lv-p3ulv46500) Units=km Length=0.0192715 bus1=p3udt24973lv.1.2 bus2=p3ulv46500.1.2 switch=n enabled=y phases=2 Linecode=1P_OH_AL_2/0_Rucina_0_416_0_2_2_2_2

New Line.l(r:p3udm69354-p3ulv59438) Units=km Length=0.00489745 bus1=p3udm69354.1.2 bus2=p3ulv59438.1.2 switch=n enabled=y phases=2 Linecode=1P_OH_AL_2/0_Rucina_0_416_0_2_2_2_2

New Line.l(r:p3udm69354-p3udt24973lv) Units=km Length=0.00862212 bus1=p3udt24973lv.1.2 bus2=p3udm69354.1.2 switch=n enabled=y phases=2 Linecode=1P_OH_AL_2/0_Rucina_0_416_0_2_2_2_2

New Line.l(r:p3udt24977lv-p3ulv46511) Units=km Length=0.0248159 bus1=p3udt24977lv.1.2 bus2=p3ulv46511.1.2 switch=n enabled=y phases=2 Linecode=1P_OH_AL_2/0_Rucina_0_416_0_2_2_2_2

New Line.l(r:p3udt25603lv-p3ulv48724) Units=km Length=0.0231549 bus1=p3udt25603lv.1.2 bus2=p3ulv48724.1.2 switch=n enabled=y phases=2 Linecode=1P_OH_AL_2/0_Rucina_0_416_0_2_2_2_2

New Line.l(r:p3udt26382lv-p3ulv51738) Units=km Length=0.00619317 bus1=p3udt26382lv.1.2 bus2=p3ulv51738.1.2 switch=n enabled=y phases=2 Linecode=1P_UG_AL_1/0_Brenau_0_416_0_2_2_2_2

New Line.l(r:p3udt27165lv-p3ulv54889) Units=km Length=0.0191176 bus1=p3udt27165lv.1.2 bus2=p3ulv54889.1.2 switch=n enabled=y phases=2 Linecode=1P_OH_AL_2/0_Rucina_0_416_0_2_2_2_2

New Line.l(r:p3udm72994-p3ulv55619) Units=km Length=0.0576527 bus1=p3udm72994.1.2 bus2=p3ulv55619.1.2 switch=n enabled=y phases=2 Linecode=1P_UG_AL_1/0_Brenau_0_416_0_2_2_2_2

New Line.l(r:p3udm72994-p3udt27336lv) Units=km Length=0.019871 bus1=p3udt27336lv.1.2 bus2=p3udm72994.1.2 switch=n enabled=y phases=2 Linecode=1P_UG_AL_1/0_Brenau_0_416_0_2_2_2_2

New Line.l(r:p3udm72995-p3ulv61731) Units=km Length=0.05682910000000001 bus1=p3udm72995.1.2 bus2=p3ulv61731.1.2 switch=n enabled=y phases=2 Linecode=1P_UG_AL_1/0_Brenau_0_416_0_2_2_2_2

New Line.l(r:p3udm72995-p3udt27336lv) Units=km Length=0.009928470000000002 bus1=p3udt27336lv.1.2 bus2=p3udm72995.1.2 switch=n enabled=y phases=2 Linecode=1P_UG_AL_1/0_Brenau_0_416_0_2_2_2_2

New Line.l(r:p3udt27338lv-p3ulv55634) Units=km Length=0.0294669 bus1=p3udt27338lv.1.2 bus2=p3ulv55634.1.2 switch=n enabled=y phases=2 Linecode=1P_OH_AL_4/0_Zuzara_0_416_0_2_2_2_2

New Line.l(r:p3udt27531lv-p3ulv56425) Units=km Length=0.0566273 bus1=p3udt27531lv.1.2 bus2=p3ulv56425.1.2 switch=n enabled=y phases=2 Linecode=1P_OH_AL_4/0_Zuzara_0_416_0_2_2_2_2

New Line.l(r:p3udt27709lv-p3ulv57158) Units=km Length=0.0260713 bus1=p3udt27709lv.1.2 bus2=p3ulv57158.1.2 switch=n enabled=y phases=2 Linecode=1P_OH_AL_2/0_Rucina_0_416_0_2_2_2_2

New Line.l(r:p3udt27884lv-p3ulv57943) Units=km Length=0.020222200000000003 bus1=p3udt27884lv.1.2 bus2=p3ulv57943.1.2 switch=n enabled=y phases=2 Linecode=1P_OH_AL_2/0_Rucina_0_416_0_2_2_2_2

New Line.l(r:p3udt28541lv-p3ulv60945) Units=km Length=0.0781231 bus1=p3udt28541lv.1.2 bus2=p3ulv60945.1.2 switch=n enabled=y phases=2 Linecode=1P_UG_AL_4/0_Sweetbriar_0_416_0_2_2_2_2

New Line.l(r:p3udt28703lv-p3ulv61740) Units=km Length=0.0564469 bus1=p3udt28703lv.1.2 bus2=p3ulv61740.1.2 switch=n enabled=y phases=2 Linecode=1P_OH_AL_4/0_Zuzara_0_416_0_2_2_2_2

New Line.l(r:p3udm74809-p3ulv71010) Units=km Length=0.0322168 bus1=p3udm74809.1.2 bus2=p3ulv71010.1.2 switch=n enabled=y phases=2 Linecode=1P_OH_AL_4/0_Zuzara_0_416_0_2_2_2_2

New Line.l(r:p3udm74809-p3udt28703lv) Units=km Length=0.0199891 bus1=p3udt28703lv.1.2 bus2=p3udm74809.1.2 switch=n enabled=y phases=2 Linecode=1P_OH_AL_2/0_Rucina_0_416_0_2_2_2_2

New Line.l(r:p3udt28854lv-p3ulv62488) Units=km Length=0.0197939 bus1=p3udt28854lv.1.2 bus2=p3ulv62488.1.2 switch=n enabled=y phases=2 Linecode=1P_UG_AL_1/0_Brenau_0_416_0_2_2_2_2

New Line.l(r:p3udt29316lv-p3ulv64771) Units=km Length=0.0346848 bus1=p3udt29316lv.1.2 bus2=p3ulv64771.1.2 switch=n enabled=y phases=2 Linecode=1P_OH_AL_4/0_Zuzara_0_416_0_2_2_2_2

New Line.l(r:p3udt29623lv-p3ulv66299) Units=km Length=0.056631 bus1=p3udt29623lv.1.2 bus2=p3ulv66299.1.2 switch=n enabled=y phases=2 Linecode=1P_OH_AL_4/0_Zuzara_0_416_0_2_2_2_2

New Line.l(r:p3udt29779lv-p3ulv67081) Units=km Length=0.00799091 bus1=p3udt29779lv.1.2 bus2=p3ulv67081.1.2 switch=n enabled=y phases=2 Linecode=1P_OH_AL_2/0_Rucina_0_416_0_2_2_2_2

New Line.l(r:p3udt29935lv-p3ulv67876) Units=km Length=0.0303389 bus1=p3udt29935lv.1.2 bus2=p3ulv67876.1.2 switch=n enabled=y phases=2 Linecode=1P_OH_AL_4/0_Zuzara_0_416_0_2_2_2_2

New Line.l(r:p3udm77009-p3ulv71011) Units=km Length=0.0507076 bus1=p3udm77009.1.2 bus2=p3ulv71011.1.2 switch=n enabled=y phases=2 Linecode=1P_UG_AL_1/0_Brenau_0_416_0_2_2_2_2

New Line.l(r:p3udm77009-p3udt30551lv) Units=km Length=0.0198479 bus1=p3udt30551lv.1.2 bus2=p3udm77009.1.2 switch=n enabled=y phases=2 Linecode=1P_UG_AL_1/0_Brenau_0_416_0_2_2_2_2

New Line.l(r:p3udm77010-p3ulv79405) Units=km Length=0.028687 bus1=p3udm77010.1.2 bus2=p3ulv79405.1.2 switch=n enabled=y phases=2 Linecode=1P_UG_AL_2/0_Converse_0_416_0_2_2_2_2

New Line.l(r:p3udm77010-p3udt30551lv) Units=km Length=0.0198412 bus1=p3udt30551lv.1.2 bus2=p3udm77010.1.2 switch=n enabled=y phases=2 Linecode=1P_UG_AL_2/0_Converse_0_416_0_2_2_2_2

New Line.l(r:p3udt30699lv-p3ulv71721) Units=km Length=0.00475896 bus1=p3udt30699lv.1.2 bus2=p3ulv71721.1.2 switch=n enabled=y phases=2 Linecode=1P_UG_AL_1/0_Brenau_0_416_0_2_2_2_2

New Line.l(r:p3udt30996lv-p3ulv73253) Units=km Length=0.0263735 bus1=p3udt30996lv.1.2 bus2=p3ulv73253.1.2 switch=n enabled=y phases=2 Linecode=1P_OH_AL_2/0_Rucina_0_416_0_2_2_2_2

New Line.l(r:p3udt31244lv-p3ulv74765) Units=km Length=0.0688224 bus1=p3udt31244lv.1.2 bus2=p3ulv74765.1.2 switch=n enabled=y phases=2 Linecode=1P_OH_AL_4/0_Zuzara_0_416_0_2_2_2_2

New Line.l(r:p3udt31381lv-p3ulv75493) Units=km Length=0.0157447 bus1=p3udt31381lv.1.2 bus2=p3ulv75493.1.2 switch=n enabled=y phases=2 Linecode=1P_OH_AL_2/0_Rucina_0_416_0_2_2_2_2

New Line.l(r:p3udt31513lv-p3ulv76278) Units=km Length=0.0144314 bus1=p3udt31513lv.1.2 bus2=p3ulv76278.1.2 switch=n enabled=y phases=2 Linecode=1P_OH_AL_2/0_Rucina_0_416_0_2_2_2_2

New Line.l(r:p3udt31515lv-p3ulv76297) Units=km Length=0.037624 bus1=p3udt31515lv.1.2 bus2=p3ulv76297.1.2 switch=n enabled=y phases=2 Linecode=1P_UG_AL_1/0_Brenau_0_416_0_2_2_2_2

New Line.l(r:p3udt31517lv-p3ulv76304) Units=km Length=0.0253145 bus1=p3udt31517lv.1.2 bus2=p3ulv76304.1.2 switch=n enabled=y phases=2 Linecode=1P_OH_AL_2/0_Rucina_0_416_0_2_2_2_2

New Line.l(r:p3udt31793lv-p3ulv77833) Units=km Length=0.0203863 bus1=p3udt31793lv.1.2 bus2=p3ulv77833.1.2 switch=n enabled=y phases=2 Linecode=1P_UG_AL_1/0_Brenau_0_416_0_2_2_2_2

New Line.l(r:p3udt32204lv-p3ulv80120) Units=km Length=0.00487822 bus1=p3udt32204lv.1.2 bus2=p3ulv80120.1.2 switch=n enabled=y phases=2 Linecode=1P_UG_AL_2/0_Converse_0_416_0_2_2_2_2

New Line.l(r:p3udt15870-p3udt232) Units=km Length=0.517895 bus1=p3udt15870.1 bus2=p3udt232.1 switch=n enabled=y phases=1 Linecode=1P_OH_AL_ACSR_#2_Sparrow_12_47_0_1_1_1_1

New Line.l(r:p3udt12519-p3udt15870) Units=km Length=0.239854 bus1=p3udt12519-p3udt15870x.1 bus2=p3udt15870.1 switch=n enabled=y phases=1 Linecode=1P_OH_AL_ACSR_#2_Sparrow_12_47_0_1_1_1_1

New Line.l(r:p3udt233-p3udt2461) Units=km Length=0.241109 bus1=p3udt233-p3udt2461x.1 bus2=p3udt233.1 switch=n enabled=y phases=1 Linecode=1P_OH_AL_ACSR_#2_Sparrow_12_47_0_1_1_1_1

New Line.l(r:p3udt24973-p3udt29779) Units=km Length=0.0494165 bus1=p3udt24973.2 bus2=p3udt29779.2 switch=n enabled=y phases=1 Linecode=1P_OH_AL_ACSR_#2_Sparrow_12_47_0_1_1_1_1

New Line.l(r:p3udt24973-p3udt7757) Units=km Length=0.0829922 bus1=p3udt24973-p3udt7757x.2 bus2=p3udt24973.2 switch=n enabled=y phases=1 Linecode=1P_OH_AL_ACSR_#2_Sparrow_12_47_0_1_1_1_1

New Line.l(r:p3udt10482-p3udt16609) Units=km Length=0.321529 bus1=p3udt10482-p3udt16609x.1 bus2=p3udt10482.1 switch=n enabled=y phases=1 Linecode=1P_OH_AL_ACSR_#2_Sparrow_12_47_0_1_1_1_1

New Line.l(r:p3udt14218-p3udt28541) Units=km Length=0.0146445 bus1=p3udt14218-p3udt28541xx.3 bus2=p3udt14218-p3udt28541xxx.3 switch=n enabled=y phases=1 Linecode=1P_UG_AL_#2_15_12_47_0_1_1_1_1

New Line.l(r:p3udt30699-p3udt32204) Units=km Length=0.0494405 bus1=p3udt30699-p3udt32204x.2 bus2=p3udt30699-p3udt32204xx.2 switch=n enabled=y phases=1 Linecode=1P_UG_AL_#2_15_12_47_0_1_1_1_1

New Line.l(r:p3udt19109-p3udt30699) Units=km Length=0.00779663 bus1=p3udt19109-p3udt30699xx.2 bus2=p3udt19109-p3udt30699xxx.2 switch=n enabled=y phases=1 Linecode=1P_UG_AL_#2_15_12_47_0_1_1_1_1

New Line.l(r:p3udt15043-p3udt2461) Units=km Length=0.001 bus1=p3udt15043-p3udt2461x.3 bus2=p3udt15043.3 switch=n enabled=y phases=1 Linecode=1P_OH_AL_ACSR_#2_Sparrow_12_47_0_1_1_1_1

New Line.l(r:p3udt17028-p3udt9463) Units=km Length=0.553009 bus1=p3udt9463.2 bus2=p3udt17028.2 switch=n enabled=y phases=1 Linecode=1P_OH_AL_ACSR_#2_Sparrow_12_47_0_1_1_1_1

New Line.l(r:p3udt31132-p3udt9463) Units=km Length=0.184973 bus1=p3udt31132-p3udt9463x.2 bus2=p3udt9463.2 switch=n enabled=y phases=1 Linecode=1P_OH_AL_ACSR_#2_Sparrow_12_47_0_1_1_1_1

New Line.l(r:p3udt18463-p3udt30996) Units=km Length=0.225604 bus1=p3udt18463-p3udt30996x.3 bus2=p3udt18463.3 switch=n enabled=y phases=1 Linecode=1P_OH_AL_ACSR_#2_Sparrow_12_47_0_1_1_1_1

New Line.l(r:p3udt28854-p3udt7756) Units=km Length=0.0695274 bus1=p3udt28854-p3udt7756xx.2 bus2=p3udt28854-p3udt7756x.2 switch=n enabled=y phases=1 Linecode=1P_UG_AL_#2_15_12_47_0_1_1_1_1

New Line.l(r:p3udt31515-p3udt7756) Units=km Length=0.0099348 bus1=p3udt31515-p3udt7756x.2 bus2=p3udt31515-p3udt7756xx.2 switch=n enabled=y phases=1 Linecode=1P_UG_AL_#2_15_12_47_0_1_1_1_1

New Line.l(r:p3udt25603-p3udt31515) Units=km Length=0.109533 bus1=p3udt25603-p3udt31515x.2 bus2=p3udt31515.2 switch=n enabled=y phases=1 Linecode=1P_OH_AL_ACSR_#2_Sparrow_12_47_0_1_1_1_1

New Line.l(r:p3udt13399-p3udt14655) Units=km Length=0.001 bus1=p3udt13399.1 bus2=p3udt14655.1 switch=n enabled=y phases=1 Linecode=1P_OH_AL_ACSR_#2_Sparrow_12_47_0_1_1_1_1

New Line.l(r:p3udt17031-p3udt8329) Units=km Length=0.159596 bus1=p3udt17031.1 bus2=p3udt8329.1 switch=n enabled=y phases=1 Linecode=1P_OH_AL_ACSR_#2_Sparrow_12_47_0_1_1_1_1

New Line.l(r:p3udt12983-p3udt29316) Units=km Length=0.0632996 bus1=p3udt29316.1 bus2=p3udt12983.1 switch=n enabled=y phases=1 Linecode=1P_OH_AL_ACSR_#2_Sparrow_12_47_0_1_1_1_1

New Line.l(r:p3udt22510-p3udt29316) Units=km Length=0.0166961 bus1=p3udt22510.1 bus2=p3udt29316.1 switch=n enabled=y phases=1 Linecode=1P_OH_AL_ACSR_#2_Sparrow_12_47_0_1_1_1_1

New Line.l(r:p3udt22510-p3udt8328) Units=km Length=0.046940100000000005 bus1=p3udt8328.1 bus2=p3udt22510.1 switch=n enabled=y phases=1 Linecode=1P_OH_AL_ACSR_#2_Sparrow_12_47_0_1_1_1_1

New Line.l(r:p3udt16254-p3udt9469) Units=km Length=0.0377533 bus1=p3udt9469.1 bus2=p3udt16254.1 switch=n enabled=y phases=1 Linecode=1P_OH_AL_ACSR_#2_Sparrow_12_47_0_1_1_1_1

New Line.l(r:p3udt27338-p3udt9469) Units=km Length=0.0590901 bus1=p3udt27338.1 bus2=p3udt9469.1 switch=n enabled=y phases=1 Linecode=1P_OH_AL_ACSR_#2_Sparrow_12_47_0_1_1_1_1

New Line.l(r:p3udt27338-p3udt31381) Units=km Length=0.0393881 bus1=p3udt31381.1 bus2=p3udt27338.1 switch=n enabled=y phases=1 Linecode=1P_OH_AL_ACSR_#2_Sparrow_12_47_0_1_1_1_1

New Line.l(r:p3udt21496-p3udt31381) Units=km Length=0.019696 bus1=p3udt21496.1 bus2=p3udt31381.1 switch=n enabled=y phases=1 Linecode=1P_OH_AL_ACSR_#2_Sparrow_12_47_0_1_1_1_1

New Line.l(r:p3udt21496-p3udt31517) Units=km Length=0.0913389 bus1=p3udt31517.1 bus2=p3udt21496.1 switch=n enabled=y phases=1 Linecode=1P_OH_AL_ACSR_#2_Sparrow_12_47_0_1_1_1_1

New Line.l(r:p3udt31517-p3udt8328) Units=km Length=0.0618747 bus1=p3udt8328.1 bus2=p3udt31517.1 switch=n enabled=y phases=1 Linecode=1P_OH_AL_ACSR_#2_Sparrow_12_47_0_1_1_1_1

New Line.l(r:p3udt31793-p3udt8328) Units=km Length=0.059537 bus1=p3udt31793-p3udt8328x.1 bus2=p3udt31793-p3udt8328xx.1 switch=n enabled=y phases=1 Linecode=1P_UG_AL_#2_15_12_47_0_1_1_1_1

New Line.l(r:p3udt30551-p3udt31793) Units=km Length=0.029765200000000002 bus1=p3udt30551-p3udt31793x.1 bus2=p3udt30551-p3udt31793xx.1 switch=n enabled=y phases=1 Linecode=1P_UG_AL_#2_15_12_47_0_1_1_1_1

New Line.l(r:p3udt18122-p3udt30551) Units=km Length=0.049613 bus1=p3udt18122-p3udt30551x.1 bus2=p3udt18122-p3udt30551xx.1 switch=n enabled=y phases=1 Linecode=1P_UG_AL_#2_15_12_47_0_1_1_1_1

New Line.l(r:p3udt17031-p3udt18122) Units=km Length=0.162479 bus1=p3udt17031.1 bus2=p3udt18122.1 switch=n enabled=y phases=1 Linecode=1P_OH_AL_ACSR_#2_Sparrow_12_47_0_1_1_1_1

New Line.l(r:p3udt15466-p3udt17031) Units=km Length=0.0748777 bus1=p3udt15466.1 bus2=p3udt17031.1 switch=n enabled=y phases=1 Linecode=1P_OH_AL_ACSR_#2_Sparrow_12_47_0_1_1_1_1

New Line.l(r:p3udt15466-p3udt27336) Units=km Length=0.109401 bus1=p3udt15466.1 bus2=p3udt27336.1 switch=n enabled=y phases=1 Linecode=1P_OH_AL_ACSR_#2_Sparrow_12_47_0_1_1_1_1

New Line.l(r:p3udt15466-p3udt17399) Units=km Length=0.0799564 bus1=p3udt17399.1 bus2=p3udt15466.1 switch=n enabled=y phases=1 Linecode=1P_OH_AL_ACSR_#2_Sparrow_12_47_0_1_1_1_1

New Line.l(r:p3udt13399-p3udt17399) Units=km Length=0.0599673 bus1=p3udt13399.1 bus2=p3udt17399.1 switch=n enabled=y phases=1 Linecode=1P_OH_AL_ACSR_#2_Sparrow_12_47_0_1_1_1_1

New Line.l(r:p3udt13399-p3udt7765) Units=km Length=0.03998580000000001 bus1=p3udt7765.1 bus2=p3udt13399.1 switch=n enabled=y phases=1 Linecode=1P_OH_AL_ACSR_#2_Sparrow_12_47_0_1_1_1_1

New Line.l(r:p3udt27884-p3udt7765) Units=km Length=0.0399782 bus1=p3udt27884.1 bus2=p3udt7765.1 switch=n enabled=y phases=1 Linecode=1P_OH_AL_ACSR_#2_Sparrow_12_47_0_1_1_1_1

New Line.l(r:p3udt27884-p3udt7181) Units=km Length=0.0599673 bus1=p3udt7181.1 bus2=p3udt27884.1 switch=n enabled=y phases=1 Linecode=1P_OH_AL_ACSR_#2_Sparrow_12_47_0_1_1_1_1

New Line.l(r:p3udt24015-p3udt7181) Units=km Length=0.0199891 bus1=p3udt24015.1 bus2=p3udt7181.1 switch=n enabled=y phases=1 Linecode=1P_OH_AL_ACSR_#2_Sparrow_12_47_0_1_1_1_1

New Line.l(r:p3udt24015-p3udt27531) Units=km Length=0.0399782 bus1=p3udt27531.1 bus2=p3udt24015.1 switch=n enabled=y phases=1 Linecode=1P_OH_AL_ACSR_#2_Sparrow_12_47_0_1_1_1_1

New Line.l(r:p3udt27531-p3udt9470) Units=km Length=0.079964 bus1=p3udt9470.1 bus2=p3udt27531.1 switch=n enabled=y phases=1 Linecode=1P_OH_AL_ACSR_#2_Sparrow_12_47_0_1_1_1_1

New Line.l(r:p3udt28703-p3udt9470) Units=km Length=0.001 bus1=p3udt9470.1 bus2=p3udt28703.1 switch=n enabled=y phases=1 Linecode=1P_OH_AL_ACSR_#2_Sparrow_12_47_0_1_1_1_1

New Line.l(r:p3udt29935-p3udt9470) Units=km Length=0.05997380000000001 bus1=p3udt29935.1 bus2=p3udt9470.1 switch=n enabled=y phases=1 Linecode=1P_OH_AL_ACSR_#2_Sparrow_12_47_0_1_1_1_1

New Line.l(r:p3udt27709-p3udt29935) Units=km Length=0.0599749 bus1=p3udt27709.1 bus2=p3udt29935.1 switch=n enabled=y phases=1 Linecode=1P_OH_AL_ACSR_#2_Sparrow_12_47_0_1_1_1_1

New Line.l(r:p3udt27165-p3udt27709) Units=km Length=0.0599673 bus1=p3udt27165.1 bus2=p3udt27709.1 switch=n enabled=y phases=1 Linecode=1P_OH_AL_ACSR_#2_Sparrow_12_47_0_1_1_1_1

New Line.l(r:p3udt24977-p3udt27165) Units=km Length=0.0644826 bus1=p3udt24977.1 bus2=p3udt27165.1 switch=n enabled=y phases=1 Linecode=1P_OH_AL_ACSR_#2_Sparrow_12_47_0_1_1_1_1

New Line.l(r:p3udt24977-p3udt28548) Units=km Length=0.0973002 bus1=p3udt24977-p3udt28548x.1 bus2=p3udt24977.1 switch=n enabled=y phases=1 Linecode=1P_OH_AL_ACSR_#2_Sparrow_12_47_0_1_1_1_1

New Line.l(r:p3udt16609-p3udt31513) Units=km Length=0.08452140000000001 bus1=p3udt16609.1.2.3 bus2=p3udt16609_b1_1.1.2.3 switch=n enabled=y phases=3 Linecode=3P_OH_AL_ACSR_4/0_Penguin_12_47_0_3_3_3_3

New Line.l(r:p3udt16609-p3udt16620) Units=km Length=0.226222 bus1=p3udt16620.1.2.3 bus2=p3udt16609.1.2.3 switch=n enabled=y phases=3 Linecode=3P_OH_AL_ACSR_4/0_Penguin_12_47_0_3_3_3_3

New Line.l(r:p3udt16620-p3udt31244) Units=km Length=0.0324172 bus1=p3udt31244.1.2.3 bus2=p3udt16620.1.2.3 switch=n enabled=y phases=3 Linecode=3P_OH_AL_ACSR_4/0_Penguin_12_47_0_3_3_3_3

New Line.l(r:p3udt31244-p3udt6526) Units=km Length=0.0165861 bus1=p3udt6526.1.2.3 bus2=p3udt31244.1.2.3 switch=n enabled=y phases=3 Linecode=3P_OH_AL_ACSR_4/0_Penguin_12_47_0_3_3_3_3

New Line.l(r:p3udt12013-p3udt6526) Units=km Length=0.0646621 bus1=p3udt12013.1.2.3 bus2=p3udt6526.1.2.3 switch=n enabled=y phases=3 Linecode=3P_OH_AL_ACSR_4/0_Penguin_12_47_0_3_3_3_3

New Line.l(r:p3udt12013-p3udt2461) Units=km Length=0.35416800000000004 bus1=p3udt2461.1.2.3 bus2=p3udt12013.1.2.3 switch=n enabled=y phases=3 Linecode=3P_OH_AL_ACSR_4/0_Penguin_12_47_0_3_3_3_3

New Line.l(r:p3udt2461-p3udt30996) Units=km Length=0.342001 bus1=p3udt30996.1.2.3 bus2=p3udt2461.1.2.3 switch=n enabled=y phases=3 Linecode=3P_OH_AL_ACSR_4/0_Penguin_12_47_0_3_3_3_3

New Line.l(r:p3udt12519-p3udt30996) Units=km Length=0.181822 bus1=p3udt12519.1.2.3 bus2=p3udt30996.1.2.3 switch=n enabled=y phases=3 Linecode=3P_OH_AL_ACSR_4/0_Penguin_12_47_0_3_3_3_3

New Line.l(r:p3udt12519-p3udt25603) Units=km Length=0.135587 bus1=p3udt25603.1.2.3 bus2=p3udt12519.1.2.3 switch=n enabled=y phases=3 Linecode=3P_OH_AL_ACSR_4/0_Penguin_12_47_0_3_3_3_3

New Line.l(r:p3udt13791-p3udt25603) Units=km Length=0.0798216 bus1=p3udt13791.1.2.3 bus2=p3udt25603.1.2.3 switch=n enabled=y phases=3 Linecode=3P_OH_AL_ACSR_4/0_Penguin_12_47_0_3_3_3_3

New Line.l(r:p3udt13791-p3udt23536) Units=km Length=0.0399092 bus1=p3udt23536.1.2.3 bus2=p3udt13791.1.2.3 switch=n enabled=y phases=3 Linecode=3P_OH_AL_ACSR_4/0_Penguin_12_47_0_3_3_3_3

New Line.l(r:p3udt23536-p3udt24972) Units=km Length=0.0199534 bus1=p3udt24972.1.2.3 bus2=p3udt23536.1.2.3 switch=n enabled=y phases=3 Linecode=3P_OH_AL_ACSR_4/0_Penguin_12_47_0_3_3_3_3

New Line.l(r:p3udt11022-p3udt24972) Units=km Length=0.09978320000000002 bus1=p3udt11022.1.2.3 bus2=p3udt24972.1.2.3 switch=n enabled=y phases=3 Linecode=3P_OH_AL_ACSR_4/0_Penguin_12_47_0_3_3_3_3

New Line.l(r:p3udt11022-p3udt11533) Units=km Length=0.0997693 bus1=p3udt11533.1.2.3 bus2=p3udt11022.1.2.3 switch=n enabled=y phases=3 Linecode=3P_OH_AL_ACSR_4/0_Penguin_12_47_0_3_3_3_3

New Line.l(r:p3udt11026-p3udt11533) Units=km Length=0.0399149 bus1=p3udt11026.1.2.3 bus2=p3udt11533.1.2.3 switch=n enabled=y phases=3 Linecode=3P_OH_AL_ACSR_4/0_Penguin_12_47_0_3_3_3_3

New Line.l(r:p3udt11026-p3udt13404) Units=km Length=0.159638 bus1=p3udt13404.1.2.3 bus2=p3udt11026.1.2.3 switch=n enabled=y phases=3 Linecode=3P_OH_AL_ACSR_4/0_Penguin_12_47_0_3_3_3_3

New Line.l(r:p3udt13404-p3udt7769) Units=km Length=0.0399149 bus1=p3udt7769.1.2.3 bus2=p3udt13404.1.2.3 switch=n enabled=y phases=3 Linecode=3P_OH_AL_ACSR_4/0_Penguin_12_47_0_3_3_3_3

New Line.l(r:p3udt28548-p3udt7769) Units=km Length=0.03942330000000001 bus1=p3udt28548.1.2.3 bus2=p3udt7769.1.2.3 switch=n enabled=y phases=3 Linecode=3P_OH_AL_ACSR_4/0_Penguin_12_47_0_3_3_3_3

New Line.l(r:p3udt28548-p3uhs3_1247) Units=km Length=0.0594155 bus1=p3udt28548-p3uhs3_1247x.1.2.3 bus2=p3udt28548.1.2.3 switch=n enabled=y phases=3 Linecode=3P_OH_AL_ACSR_4/0_Penguin_12_47_0_3_3_3_3

New Line.l(r:p3udt28548lv-p3ulv60979) Units=km Length=0.0233653 bus1=p3udt28548lv.1.2.3 bus2=p3ulv60979.1.2.3 switch=n enabled=y phases=3 Linecode=3P_UG_AL_350kcmil_15_0_416_0_3_3_3_3

New Line.l(r:p3udt23536lv-p3ulv41733) Units=km Length=0.0515847 bus1=p3udt23536lv.1.2.3 bus2=p3ulv41733.1.2.3 switch=n enabled=y phases=3 Linecode=3P_UG_AL_350kcmil_15_0_416_0_3_3_3_3

New Line.l(r:p3udt17396lv-p3ulv25485) Units=km Length=0.043825800000000005 bus1=p3udt17396lv.1.2.3 bus2=p3ulv25485.1.2.3 switch=n enabled=y phases=3 Linecode=3P_UG_AL_350kcmil_15_0_416_0_3_3_3_3

New Line.l(r:p3udt13791-p3udt17396) Units=km Length=0.001 bus1=p3udt13791.1.2.3 bus2=p3udt17396.1.2.3 switch=n enabled=y phases=3 Linecode=3P_OH_AL_ACSR_4/0_Penguin_12_47_0_3_3_3_3

New Line.l(r:p3udt2461lv-p3ulv2719) Units=km Length=0.0152707 bus1=p3udt2461lv.1.2.3 bus2=p3ulv2719.1.2.3 switch=n enabled=y phases=3 Linecode=3P_UG_AL_350kcmil_15_0_416_0_3_3_3_3

New Line.l(r:p3udt24255lv-p3ulv44078) Units=km Length=0.0101924 bus1=p3udt24255lv.1.2.3 bus2=p3ulv44078.1.2.3 switch=n enabled=y phases=3 Linecode=3P_UG_AL_350kcmil_15_0_416_0_3_3_3_3

New Line.l(r:p3udt24255-p3udt7757) Units=km Length=0.001 bus1=p3udt7757.1.2.3 bus2=p3udt24255.1.2.3 switch=n enabled=y phases=3 Linecode=3P_OH_AL_ACSR_4/0_Penguin_12_47_0_3_3_3_3

New Line.l(r:p3udt2461-p3udt7757) Units=km Length=0.276794 bus1=p3udt2461.1.2.3 bus2=p3udt7757.1.2.3 switch=n enabled=y phases=3 Linecode=3P_OH_AL_ACSR_4/0_Penguin_12_47_0_3_3_3_3

New Line.l(r:p3udt16620lv-p3ulv23834) Units=km Length=0.00384887 bus1=p3udt16620lv.1.2.3 bus2=p3ulv23834.1.2.3 switch=n enabled=y phases=3 Linecode=3P_UG_AL_750kcmil_25_0_416_0_3_3_3_3

New Line.l(r:p3udt15467lv-p3ulv21492) Units=km Length=0.00980418 bus1=p3udt15467lv.1.2.3 bus2=p3ulv21492.1.2.3 switch=n enabled=y phases=3 Linecode=3P_UG_AL_350kcmil_15_0_416_0_3_3_3_3

New Line.l(r:p3udt15467-p3udt18117) Units=km Length=0.0728166 bus1=p3udt18117.1.2.3 bus2=p3udt15467.1.2.3 switch=n enabled=y phases=3 Linecode=3P_OH_AL_ACSR_4/0_Penguin_12_47_0_3_3_3_3

New Line.l(r:p3udt11522-p3udt18117) Units=km Length=0.0382692 bus1=p3udt11522.1.2.3 bus2=p3udt18117.1.2.3 switch=n enabled=y phases=3 Linecode=3P_OH_AL_ACSR_4/0_Penguin_12_47_0_3_3_3_3

New Line.l(r:p3udt11522-p3udt16620) Units=km Length=0.223212 bus1=p3udt16620.1.2.3 bus2=p3udt11522.1.2.3 switch=n enabled=y phases=3 Linecode=3P_OH_AL_ACSR_4/0_Penguin_12_47_0_3_3_3_3

New Line.l(r:p3udt6512lv-p3ulv7468) Units=km Length=0.0165672 bus1=p3udt6512lv.1.2.3 bus2=p3ulv7468.1.2.3 switch=n enabled=y phases=3 Linecode=3P_UG_AL_350kcmil_15_0_416_0_3_3_3_3

New Line.l(r:p3udt25996lv-p3ulv50243) Units=km Length=0.0112633 bus1=p3udt25996lv.1.2.3 bus2=p3ulv50243.1.2.3 switch=n enabled=y phases=3 Linecode=3P_UG_AL_350kcmil_15_0_416_0_3_3_3_3

New Line.l(r:p3udt8880lv-p3ulv10582) Units=km Length=0.0157802 bus1=p3udt8880lv.1.2.3 bus2=p3ulv10582.1.2.3 switch=n enabled=y phases=3 Linecode=3P_UG_AL_350kcmil_15_0_416_0_3_3_3_3

New Line.l(r:p3udt3169lv-p3ulv3495) Units=km Length=0.0156781 bus1=p3udt3169lv.1.2.3 bus2=p3ulv3495.1.2.3 switch=n enabled=y phases=3 Linecode=3P_UG_AL_350kcmil_15_0_416_0_3_3_3_3

New Line.l(r:p3udt221lv-p3ulv367) Units=km Length=0.0179382 bus1=p3udt221lv.1.2.3 bus2=p3ulv367.1.2.3 switch=n enabled=y phases=3 Linecode=3P_UG_AL_350kcmil_15_0_416_0_3_3_3_3

New Line.l(r:p3udt221-p3udt3169) Units=km Length=0.0843468 bus1=p3udt221-p3udt3169xx.1.2.3 bus2=p3udt221-p3udt3169x.1.2.3 switch=n enabled=y phases=3 Linecode=3P_UG_AL_4/0_25_12_47_0_3_3_3_3

New Line.l(r:p3udt27702lv-p3ulv57132) Units=km Length=0.0124184 bus1=p3udt27702lv.1.2.3 bus2=p3ulv57132.1.2.3 switch=n enabled=y phases=3 Linecode=3P_UG_AL_350kcmil_15_0_416_0_3_3_3_3

New Line.l(r:p3udt16610lv-p3ulv23816) Units=km Length=0.0167382 bus1=p3udt16610lv.1.2.3 bus2=p3ulv23816.1.2.3 switch=n enabled=y phases=3 Linecode=3P_UG_AL_350kcmil_15_0_416_0_3_3_3_3

New Line.l(r:p3udt25791lv-p3ulv49479) Units=km Length=0.0129989 bus1=p3udt25791lv.1.2.3 bus2=p3ulv49479.1.2.3 switch=n enabled=y phases=3 Linecode=3P_UG_AL_350kcmil_15_0_416_0_3_3_3_3

New Line.l(r:p3udt23532lv-p3ulv43285) Units=km Length=0.017644 bus1=p3udt23532lv.1.2.3 bus2=p3ulv43285.1.2.3 switch=n enabled=y phases=3 Linecode=3P_UG_AL_350kcmil_15_0_416_0_3_3_3_3

New Line.l(r:p3udm66855-p3ulv41716) Units=km Length=0.015834 bus1=p3udm66855.1.2.3 bus2=p3ulv41716.1.2.3 switch=n enabled=y phases=3 Linecode=3P_UG_AL_350kcmil_15_0_416_0_3_3_3_3

New Line.l(r:p3udm66855-p3udt23532lv) Units=km Length=0.00790438 bus1=p3udt23532lv.1.2.3 bus2=p3udm66855.1.2.3 switch=n enabled=y phases=3 Linecode=3P_UG_AL_350kcmil_15_0_416_0_3_3_3_3

New Line.l(r:p3udt23532-p3udt25791) Units=km Length=0.102223 bus1=p3udt23532-p3udt25791xx.1.2.3 bus2=p3udt23532-p3udt25791x.1.2.3 switch=n enabled=y phases=3 Linecode=3P_UG_AL_4/0_25_12_47_0_3_3_3_3

New Line.l(r:p3udt16610-p3udt25791) Units=km Length=0.05901490000000001 bus1=p3udt16610-p3udt25791x.1.2.3 bus2=p3udt16610-p3udt25791xx.1.2.3 switch=n enabled=y phases=3 Linecode=3P_UG_AL_4/0_25_12_47_0_3_3_3_3

New Line.l(r:p3udt16610-p3udt26382) Units=km Length=0.0429458 bus1=p3udt16610-p3udt26382xx.1.2.3 bus2=p3udt16610-p3udt26382x.1.2.3 switch=n enabled=y phases=3 Linecode=3P_UG_AL_4/0_25_12_47_0_3_3_3_3

New Line.l(r:p3udt26382-p3udt27702) Units=km Length=0.0725451 bus1=p3udt26382-p3udt27702xx.1.2.3 bus2=p3udt26382-p3udt27702x.1.2.3 switch=n enabled=y phases=3 Linecode=3P_UG_AL_4/0_25_12_47_0_3_3_3_3

New Line.l(r:p3udt27702-p3udt3169) Units=km Length=0.0751553 bus1=p3udt27702-p3udt3169xx.1.2.3 bus2=p3udt27702-p3udt3169x.1.2.3 switch=n enabled=y phases=3 Linecode=3P_UG_AL_4/0_25_12_47_0_3_3_3_3

New Line.l(r:p3udt3169-p3udt8881) Units=km Length=0.059756 bus1=p3udt3169-p3udt8881xx.1.2.3 bus2=p3udt3169-p3udt8881x.1.2.3 switch=n enabled=y phases=3 Linecode=3P_UG_AL_4/0_25_12_47_0_3_3_3_3

New Line.l(r:p3udt8880-p3udt8881) Units=km Length=0.0580803 bus1=p3udt8880-p3udt8881x.1.2.3 bus2=p3udt8880-p3udt8881xx.1.2.3 switch=n enabled=y phases=3 Linecode=3P_UG_AL_4/0_25_12_47_0_3_3_3_3

New Line.l(r:p3udt25996-p3udt8880) Units=km Length=0.0392154 bus1=p3udt25996-p3udt8880x.1.2.3 bus2=p3udt25996-p3udt8880xx.1.2.3 switch=n enabled=y phases=3 Linecode=3P_UG_AL_4/0_25_12_47_0_3_3_3_3

New Line.l(r:p3udt25996-p3udt6512) Units=km Length=0.179709 bus1=p3udt25996-p3udt6512xx.1.2.3 bus2=p3udt25996-p3udt6512x.1.2.3 switch=n enabled=y phases=3 Linecode=3P_UG_AL_4/0_25_12_47_0_3_3_3_3

New Line.l(r:p3udt31513-p3udt6512) Units=km Length=0.0274556 bus1=p3udt31513.1.2.3 bus2=p3udt6512.1.2.3 switch=n enabled=y phases=3 Linecode=3P_OH_AL_ACSR_4/0_Penguin_12_47_0_3_3_3_3

New Line.l(r:p3udt13390lv-p3ulv17630) Units=km Length=0.0152131 bus1=p3udt13390lv.1.2.3 bus2=p3ulv17630.1.2.3 switch=n enabled=y phases=3 Linecode=3P_UG_AL_350kcmil_15_0_416_0_3_3_3_3

New Line.l(r:p3udm29867-p3ulv10584) Units=km Length=0.00511004 bus1=p3udm29867.1.2.3 bus2=p3ulv10584.1.2.3 switch=n enabled=y phases=3 Linecode=3P_UG_AL_350kcmil_15_0_416_0_3_3_3_3

New Line.l(r:p3udm29867-p3udt8882lv) Units=km Length=0.0382692 bus1=p3udt8882lv.1.2.3 bus2=p3udm29867.1.2.3 switch=n enabled=y phases=3 Linecode=3P_UG_AL_350kcmil_15_0_416_0_3_3_3_3

New Line.l(r:p3udm29868-p3ulv40948) Units=km Length=0.0159299 bus1=p3udm29868.1.2.3 bus2=p3ulv40948.1.2.3 switch=n enabled=y phases=3 Linecode=3P_UG_AL_350kcmil_15_0_416_0_3_3_3_3

New Line.l(r:p3udm29868-p3udt8882lv) Units=km Length=0.0322578 bus1=p3udt8882lv.1.2.3 bus2=p3udm29868.1.2.3 switch=n enabled=y phases=3 Linecode=3P_UG_AL_350kcmil_15_0_416_0_3_3_3_3

New Line.l(r:p3udt21963lv-p3ulv37034) Units=km Length=0.0136127 bus1=p3udt21963lv.1.2.3 bus2=p3ulv37034.1.2.3 switch=n enabled=y phases=3 Linecode=3P_UG_AL_350kcmil_15_0_416_0_3_3_3_3

New Line.l(r:p3udt28540lv-p3ulv60944) Units=km Length=0.0175631 bus1=p3udt28540lv.1.2.3 bus2=p3ulv60944.1.2.3 switch=n enabled=y phases=3 Linecode=3P_UG_AL_350kcmil_15_0_416_0_3_3_3_3

New Line.l(r:p3udt14218lv-p3ulv19153) Units=km Length=0.01088 bus1=p3udt14218lv.1.2.3 bus2=p3ulv19153.1.2.3 switch=n enabled=y phases=3 Linecode=3P_UG_AL_350kcmil_15_0_416_0_3_3_3_3

New Line.l(r:p3udt14218-p3udt28540) Units=km Length=0.0380204 bus1=p3udt14218-p3udt28540xx.1.2.3 bus2=p3udt14218-p3udt28540x.1.2.3 switch=n enabled=y phases=3 Linecode=3P_UG_AL_4/0_25_12_47_0_3_3_3_3

New Line.l(r:p3udt10483-p3udt28540) Units=km Length=0.0488276 bus1=p3udt10483-p3udt28540x.1.2.3 bus2=p3udt10483-p3udt28540xx.1.2.3 switch=n enabled=y phases=3 Linecode=3P_UG_AL_4/0_25_12_47_0_3_3_3_3

New Line.l(r:p3udt10483-p3udt21963) Units=km Length=0.0577312 bus1=p3udt10483-p3udt21963xx.1.2.3 bus2=p3udt10483-p3udt21963x.1.2.3 switch=n enabled=y phases=3 Linecode=3P_UG_AL_4/0_25_12_47_0_3_3_3_3

New Line.l(r:p3udt21963-p3udt8882) Units=km Length=0.0643074 bus1=p3udt21963-p3udt8882xx.1.2.3 bus2=p3udt21963-p3udt8882x.1.2.3 switch=n enabled=y phases=3 Linecode=3P_UG_AL_4/0_25_12_47_0_3_3_3_3

New Line.l(r:p3udt15861-p3udt8882) Units=km Length=0.054025 bus1=p3udt15861-p3udt8882x.1.2.3 bus2=p3udt15861-p3udt8882xx.1.2.3 switch=n enabled=y phases=3 Linecode=3P_UG_AL_4/0_25_12_47_0_3_3_3_3

New Line.l(r:p3udt13390-p3udt15861) Units=km Length=0.0352097 bus1=p3udt13390-p3udt15861x.1.2.3 bus2=p3udt13390-p3udt15861xx.1.2.3 switch=n enabled=y phases=3 Linecode=3P_UG_AL_4/0_25_12_47_0_3_3_3_3

New Line.l(r:p3udt19109lv-p3ulv29314) Units=km Length=0.013490200000000003 bus1=p3udt19109lv.1.2.3 bus2=p3ulv29314.1.2.3 switch=n enabled=y phases=3 Linecode=3P_UG_AL_350kcmil_15_0_416_0_3_3_3_3

New Line.l(r:p3udt13390-p3udt19109) Units=km Length=0.0789044 bus1=p3udt13390-p3udt19109x.1.2.3 bus2=p3udt13390-p3udt19109xx.1.2.3 switch=n enabled=y phases=3 Linecode=3P_UG_AL_4/0_25_12_47_0_3_3_3_3

New Line.l(r:p3udt13390-p3udt21962) Units=km Length=0.105384 bus1=p3udt21962.1.2.3 bus2=p3udt13390.1.2.3 switch=n enabled=y phases=3 Linecode=3P_OH_AL_ACSR_4/0_Penguin_12_47_0_3_3_3_3

New Line.l(r:p3udt22499lv-p3ulv38576) Units=km Length=0.014957 bus1=p3udt22499lv.1.2.3 bus2=p3ulv38576.1.2.3 switch=n enabled=y phases=3 Linecode=3P_UG_AL_350kcmil_15_0_416_0_3_3_3_3

New Line.l(r:p3udt15462lv-p3ulv21480) Units=km Length=0.0150944 bus1=p3udt15462lv.1.2.3 bus2=p3ulv21480.1.2.3 switch=n enabled=y phases=3 Linecode=3P_UG_AL_350kcmil_15_0_416_0_3_3_3_3

New Line.l(r:p3udt15462-p3udt22499) Units=km Length=0.0155743 bus1=p3udt15462-p3udt22499xx.1.2.3 bus2=p3udt15462-p3udt22499x.1.2.3 switch=n enabled=y phases=3 Linecode=3P_UG_AL_4/0_25_12_47_0_3_3_3_3

New Line.l(r:p3udt21962-p3udt22499) Units=km Length=0.0221281 bus1=p3udt21962.1.2.3 bus2=p3udt22499.1.2.3 switch=n enabled=y phases=3 Linecode=3P_OH_AL_ACSR_4/0_Penguin_12_47_0_3_3_3_3

New Line.l(r:p3udt21962-p3udt31513) Units=km Length=0.13303 bus1=p3udt31513.1.2.3 bus2=p3udt21962.1.2.3 switch=n enabled=y phases=3 Linecode=3P_OH_AL_ACSR_4/0_Penguin_12_47_0_3_3_3_3

New Line.l(r:p3udt26588lv-p3ulv52546) Units=km Length=0.027753 bus1=p3udt26588lv.1.2.3 bus2=p3ulv52546.1.2.3 switch=n enabled=y phases=3 Linecode=3P_UG_AL_350kcmil_15_0_416_0_3_3_3_3

New Line.l(r:p3udt31132lv-p3ulv74024) Units=km Length=0.0236275 bus1=p3udt31132lv.1.2.3 bus2=p3ulv74024.1.2.3 switch=n enabled=y phases=3 Linecode=3P_UG_AL_350kcmil_15_0_416_0_3_3_3_3

New Line.l(r:p3udt973lv-p3ulv1136) Units=km Length=0.0133554 bus1=p3udt973lv.1.2.3 bus2=p3ulv1136.1.2.3 switch=n enabled=y phases=3 Linecode=3P_UG_AL_350kcmil_15_0_416_0_3_3_3_3

New Line.l(r:p3udt24718-p3udt973) Units=km Length=0.0380186 bus1=p3udt24718.1.2.3 bus2=p3udt973.1.2.3 switch=n enabled=y phases=3 Linecode=3P_OH_AL_ACSR_4/0_Penguin_12_47_0_3_3_3_3

New Line.l(r:p3udt24718-p3udt31132) Units=km Length=0.0748044 bus1=p3udt31132.1.2.3 bus2=p3udt24718.1.2.3 switch=n enabled=y phases=3 Linecode=3P_OH_AL_ACSR_4/0_Penguin_12_47_0_3_3_3_3

New Line.l(r:p3udt26588-p3udt31132) Units=km Length=0.0625661 bus1=p3udt26588.1.2.3 bus2=p3udt31132.1.2.3 switch=n enabled=y phases=3 Linecode=3P_OH_AL_ACSR_4/0_Penguin_12_47_0_3_3_3_3

New Line.l(r:p3udt2461-p3udt26588) Units=km Length=0.196446 bus1=p3udt2461.1.2.3 bus2=p3udt26588.1.2.3 switch=n enabled=y phases=3 Linecode=3P_OH_AL_ACSR_4/0_Penguin_12_47_0_3_3_3_3

New Line.l(r:p3udt31246lv-p3ulv74770) Units=km Length=0.0114868 bus1=p3udt31246lv.1.2.3 bus2=p3ulv74770.1.2.3 switch=n enabled=y phases=3 Linecode=3P_UG_AL_350kcmil_15_0_416_0_3_3_3_3

New Line.l(r:p3udt18779-p3udt31246) Units=km Length=0.143871 bus1=p3udt18779.1.2.3 bus2=p3udt31246.1.2.3 switch=n enabled=y phases=3 Linecode=3P_OH_AL_ACSR_4/0_Penguin_12_47_0_3_3_3_3

New Line.l(r:p3udt18779-p3udt29623) Units=km Length=0.140761 bus1=p3udt29623.1.2.3 bus2=p3udt18779.1.2.3 switch=n enabled=y phases=3 Linecode=3P_OH_AL_ACSR_4/0_Penguin_12_47_0_3_3_3_3

New Line.l(r:p3udt29623-p3udt30996) Units=km Length=0.0913821 bus1=p3udt30996.1.2.3 bus2=p3udt29623.1.2.3 switch=n enabled=y phases=3 Linecode=3P_OH_AL_ACSR_4/0_Penguin_12_47_0_3_3_3_3

New Line.padswitch(r:p3udt14218-p3udt28541)p3u_171239 Units=km Length=0.001 bus1=p3udt14218-p3udt28541x.3 bus2=p3udt14218-p3udt28541xx.3 switch=y enabled=y phases=1 Linecode=padswitch_1_1_1_1

New Line.padswitch(r:p3udt14218-p3udt28541)p3u_171240 Units=km Length=0.001 bus1=p3udt14218-p3udt28541xxx.3 bus2=p3udt28541.3 switch=y enabled=y phases=1 Linecode=padswitch_1_3_1_1_1

New Line.padswitch(r:p3udt30699-p3udt32204)p3u_171253 Units=km Length=0.001 bus1=p3udt30699.2 bus2=p3udt30699-p3udt32204x.2 switch=y enabled=y phases=1 Linecode=padswitch_1_1_1_1

New Line.padswitch(r:p3udt30699-p3udt32204)p3u_171254 Units=km Length=0.001 bus1=p3udt30699-p3udt32204xx.2 bus2=p3udt32204.2 switch=y enabled=y phases=1 Linecode=padswitch_1_3_1_0_1_1

New Line.padswitch(r:p3udt19109-p3udt30699)p3u_171255 Units=km Length=0.001 bus1=p3udt19109-p3udt30699x.2 bus2=p3udt19109-p3udt30699xx.2 switch=y enabled=y phases=1 Linecode=padswitch_1_1_1_1

New Line.padswitch(r:p3udt19109-p3udt30699)p3u_171256 Units=km Length=0.001 bus1=p3udt19109-p3udt30699xxx.2 bus2=p3udt30699.2 switch=y enabled=y phases=1 Linecode=padswitch_1_1_1_1

New Line.padswitch(r:p3udt28854-p3udt7756)p3u_171261 Units=km Length=0.001 bus1=p3udt7756.2 bus2=p3udt28854-p3udt7756xx.2 switch=y enabled=y phases=1 Linecode=padswitch_1_1_1_1

New Line.padswitch(r:p3udt28854-p3udt7756)p3u_171262 Units=km Length=0.001 bus1=p3udt28854-p3udt7756x.2 bus2=p3udt28854.2 switch=y enabled=y phases=1 Linecode=padswitch_1_3_1_1_1

New Line.padswitch(r:p3udt31515-p3udt7756)p3u_171263 Units=km Length=0.001 bus1=p3udt31515.2 bus2=p3udt31515-p3udt7756x.2 switch=y enabled=y phases=1 Linecode=padswitch_1_1_1_1

New Line.padswitch(r:p3udt31515-p3udt7756)p3u_171264 Units=km Length=0.001 bus1=p3udt31515-p3udt7756xx.2 bus2=p3udt7756.2 switch=y enabled=y phases=1 Linecode=padswitch_1_3_1_1_1

New Line.padswitch(r:p3udt31793-p3udt8328)p3u_171265 Units=km Length=0.001 bus1=p3udt31793.1 bus2=p3udt31793-p3udt8328x.1 switch=y enabled=y phases=1 Linecode=padswitch_1_3_1_0_1_0_1

New Line.padswitch(r:p3udt31793-p3udt8328)p3u_171266 Units=km Length=0.001 bus1=p3udt31793-p3udt8328xx.1 bus2=p3udt8328.1 switch=y enabled=y phases=1 Linecode=padswitch_1_3_1_0_1_0_1

New Line.padswitch(r:p3udt30551-p3udt31793)p3u_171267 Units=km Length=0.001 bus1=p3udt30551.1 bus2=p3udt30551-p3udt31793x.1 switch=y enabled=y phases=1 Linecode=padswitch_1_1_1_1

New Line.padswitch(r:p3udt30551-p3udt31793)p3u_171268 Units=km Length=0.001 bus1=p3udt30551-p3udt31793xx.1 bus2=p3udt31793.1 switch=y enabled=y phases=1 Linecode=padswitch_1_1_1_1

New Line.padswitch(r:p3udt18122-p3udt30551)p3u_171269 Units=km Length=0.001 bus1=p3udt18122.1 bus2=p3udt18122-p3udt30551x.1 switch=y enabled=y phases=1 Linecode=padswitch_1_3_1_0_1_0_1

New Line.padswitch(r:p3udt18122-p3udt30551)p3u_171270 Units=km Length=0.001 bus1=p3udt18122-p3udt30551xx.1 bus2=p3udt30551.1 switch=y enabled=y phases=1 Linecode=padswitch_1_1_1_1

New Line.padswitch(r:p3udt221-p3udt3169)p3u_171219 Units=km Length=0.001 bus1=p3udt3169.1.2.3 bus2=p3udt221-p3udt3169xx.1.2.3 switch=y enabled=y phases=3 Linecode=padswitch_3_3_3_3

New Line.padswitch(r:p3udt221-p3udt3169)p3u_171220 Units=km Length=0.001 bus1=p3udt221-p3udt3169x.1.2.3 bus2=p3udt221.1.2.3 switch=y enabled=y phases=3 Linecode=padswitch_3_4_3_3_3

New Line.padswitch(r:p3udt23532-p3udt25791)p3u_171221 Units=km Length=0.001 bus1=p3udt25791.1.2.3 bus2=p3udt23532-p3udt25791xx.1.2.3 switch=y enabled=y phases=3 Linecode=padswitch_3_4_3_1_3_3

New Line.padswitch(r:p3udt23532-p3udt25791)p3u_171222 Units=km Length=0.001 bus1=p3udt23532-p3udt25791x.1.2.3 bus2=p3udt23532.1.2.3 switch=y enabled=y phases=3 Linecode=padswitch_3_4_3_1_3_3

New Line.padswitch(r:p3udt16610-p3udt25791)p3u_171223 Units=km Length=0.001 bus1=p3udt16610.1.2.3 bus2=p3udt16610-p3udt25791x.1.2.3 switch=y enabled=y phases=3 Linecode=padswitch_3_4_3_1_3_3

New Line.padswitch(r:p3udt16610-p3udt25791)p3u_171224 Units=km Length=0.001 bus1=p3udt16610-p3udt25791xx.1.2.3 bus2=p3udt25791.1.2.3 switch=y enabled=y phases=3 Linecode=padswitch_3_4_3_1_3_1_3

New Line.padswitch(r:p3udt16610-p3udt26382)p3u_171225 Units=km Length=0.001 bus1=p3udt26382.1.2.3 bus2=p3udt16610-p3udt26382xx.1.2.3 switch=y enabled=y phases=3 Linecode=padswitch_3_4_3_1_3_1_3_1

New Line.padswitch(r:p3udt16610-p3udt26382)p3u_171226 Units=km Length=0.001 bus1=p3udt16610-p3udt26382x.1.2.3 bus2=p3udt16610.1.2.3 switch=y enabled=y phases=3 Linecode=padswitch_3_4_3_1_3_1_3_1

New Line.padswitch(r:p3udt26382-p3udt27702)p3u_171227 Units=km Length=0.001 bus1=p3udt27702.1.2.3 bus2=p3udt26382-p3udt27702xx.1.2.3 switch=y enabled=y phases=3 Linecode=padswitch_3_4_3_1_3_1_3_1

New Line.padswitch(r:p3udt26382-p3udt27702)p3u_171228 Units=km Length=0.001 bus1=p3udt26382-p3udt27702x.1.2.3 bus2=p3udt26382.1.2.3 switch=y enabled=y phases=3 Linecode=padswitch_3_4_3_1_3_1_3_1

New Line.padswitch(r:p3udt27702-p3udt3169)p3u_171229 Units=km Length=0.001 bus1=p3udt3169.1.2.3 bus2=p3udt27702-p3udt3169xx.1.2.3 switch=y enabled=y phases=3 Linecode=padswitch_3_4_3_1_3_1_3_1

New Line.padswitch(r:p3udt27702-p3udt3169)p3u_171230 Units=km Length=0.001 bus1=p3udt27702-p3udt3169x.1.2.3 bus2=p3udt27702.1.2.3 switch=y enabled=y phases=3 Linecode=padswitch_3_4_3_1_3_1_3_1

New Line.padswitch(r:p3udt3169-p3udt8881)p3u_171231 Units=km Length=0.001 bus1=p3udt8881.1.2.3 bus2=p3udt3169-p3udt8881xx.1.2.3 switch=y enabled=y phases=3 Linecode=padswitch_3_4_3_1_3_1_3_1

New Line.padswitch(r:p3udt3169-p3udt8881)p3u_171232 Units=km Length=0.001 bus1=p3udt3169-p3udt8881x.1.2.3 bus2=p3udt3169.1.2.3 switch=y enabled=y phases=3 Linecode=padswitch_3_4_3_1_3_1_3_1

New Line.padswitch(r:p3udt8880-p3udt8881)p3u_171233 Units=km Length=0.001 bus1=p3udt8880.1.2.3 bus2=p3udt8880-p3udt8881x.1.2.3 switch=y enabled=y phases=3 Linecode=padswitch_3_4_3_1_3_1_3_1

New Line.padswitch(r:p3udt8880-p3udt8881)p3u_171234 Units=km Length=0.001 bus1=p3udt8880-p3udt8881xx.1.2.3 bus2=p3udt8881.1.2.3 switch=y enabled=y phases=3 Linecode=padswitch_3_4_3_1_3_1_3_1

New Line.padswitch(r:p3udt25996-p3udt8880)p3u_171235 Units=km Length=0.001 bus1=p3udt25996.1.2.3 bus2=p3udt25996-p3udt8880x.1.2.3 switch=y enabled=y phases=3 Linecode=padswitch_3_4_3_1_3_1_3_1

New Line.padswitch(r:p3udt25996-p3udt8880)p3u_171236 Units=km Length=0.001 bus1=p3udt25996-p3udt8880xx.1.2.3 bus2=p3udt8880.1.2.3 switch=y enabled=y phases=3 Linecode=padswitch_3_4_3_1_3_1_3_1

New Line.padswitch(r:p3udt25996-p3udt6512)p3u_171237 Units=km Length=0.001 bus1=p3udt6512.1.2.3 bus2=p3udt25996-p3udt6512xx.1.2.3 switch=y enabled=y phases=3 Linecode=padswitch_3_4_3_1_3_1_3_1

New Line.padswitch(r:p3udt25996-p3udt6512)p3u_171238 Units=km Length=0.001 bus1=p3udt25996-p3udt6512x.1.2.3 bus2=p3udt25996.1.2.3 switch=y enabled=y phases=3 Linecode=padswitch_3_4_3_1_3_1_3_1

New Line.padswitch(r:p3udt14218-p3udt28540)p3u_171241 Units=km Length=0.001 bus1=p3udt28540.1.2.3 bus2=p3udt14218-p3udt28540xx.1.2.3 switch=y enabled=y phases=3 Linecode=padswitch_3_4_3_1_3_1_3_1

New Line.padswitch(r:p3udt14218-p3udt28540)p3u_171242 Units=km Length=0.001 bus1=p3udt14218-p3udt28540x.1.2.3 bus2=p3udt14218.1.2.3 switch=y enabled=y phases=3 Linecode=padswitch_3_4_3_1_3_1_3_1

New Line.padswitch(r:p3udt10483-p3udt28540)p3u_171243 Units=km Length=0.001 bus1=p3udt10483.1.2.3 bus2=p3udt10483-p3udt28540x.1.2.3 switch=y enabled=y phases=3 Linecode=padswitch_3_4_3_1_3_1_3_1

New Line.padswitch(r:p3udt10483-p3udt28540)p3u_171244 Units=km Length=0.001 bus1=p3udt10483-p3udt28540xx.1.2.3 bus2=p3udt28540.1.2.3 switch=y enabled=y phases=3 Linecode=padswitch_3_4_3_1_3_1_3_1

New Line.padswitch(r:p3udt10483-p3udt21963)p3u_171245 Units=km Length=0.001 bus1=p3udt21963.1.2.3 bus2=p3udt10483-p3udt21963xx.1.2.3 switch=y enabled=y phases=3 Linecode=padswitch_3_4_3_1_3_1_3_1

New Line.padswitch(r:p3udt10483-p3udt21963)p3u_171246 Units=km Length=0.001 bus1=p3udt10483-p3udt21963x.1.2.3 bus2=p3udt10483.1.2.3 switch=y enabled=y phases=3 Linecode=padswitch_3_4_3_1_3_1_3_1

New Line.padswitch(r:p3udt21963-p3udt8882)p3u_171247 Units=km Length=0.001 bus1=p3udt8882.1.2.3 bus2=p3udt21963-p3udt8882xx.1.2.3 switch=y enabled=y phases=3 Linecode=padswitch_3_4_3_1_3_1_3_1

New Line.padswitch(r:p3udt21963-p3udt8882)p3u_171248 Units=km Length=0.001 bus1=p3udt21963-p3udt8882x.1.2.3 bus2=p3udt21963.1.2.3 switch=y enabled=y phases=3 Linecode=padswitch_3_4_3_1_3_1_3_1

New Line.padswitch(r:p3udt15861-p3udt8882)p3u_171249 Units=km Length=0.001 bus1=p3udt15861.1.2.3 bus2=p3udt15861-p3udt8882x.1.2.3 switch=y enabled=y phases=3 Linecode=padswitch_3_4_3_1_3_1_3_1

New Line.padswitch(r:p3udt15861-p3udt8882)p3u_171250 Units=km Length=0.001 bus1=p3udt15861-p3udt8882xx.1.2.3 bus2=p3udt8882.1.2.3 switch=y enabled=y phases=3 Linecode=padswitch_3_4_3_1_3_1_3_1

New Line.padswitch(r:p3udt13390-p3udt15861)p3u_171251 Units=km Length=0.001 bus1=p3udt13390.1.2.3 bus2=p3udt13390-p3udt15861x.1.2.3 switch=y enabled=y phases=3 Linecode=padswitch_3_4_3_1_3_1_3_1

New Line.padswitch(r:p3udt13390-p3udt15861)p3u_171252 Units=km Length=0.001 bus1=p3udt13390-p3udt15861xx.1.2.3 bus2=p3udt15861.1.2.3 switch=y enabled=y phases=3 Linecode=padswitch_3_4_3_1_3_1_3_1

New Line.padswitch(r:p3udt13390-p3udt19109)p3u_171257 Units=km Length=0.001 bus1=p3udt13390.1.2.3 bus2=p3udt13390-p3udt19109x.1.2.3 switch=y enabled=y phases=3 Linecode=padswitch_3_4_3_1_3_1_3_1

New Line.padswitch(r:p3udt13390-p3udt19109)p3u_171258 Units=km Length=0.001 bus1=p3udt13390-p3udt19109xx.1.2.3 bus2=p3udt19109.1.2.3 switch=y enabled=y phases=3 Linecode=padswitch_3_4_3_1_3_1_3_1

New Line.padswitch(r:p3udt15462-p3udt22499)p3u_171259 Units=km Length=0.001 bus1=p3udt22499.1.2.3 bus2=p3udt15462-p3udt22499xx.1.2.3 switch=y enabled=y phases=3 Linecode=padswitch_3_4_3_1_3_1_3_1

New Line.padswitch(r:p3udt15462-p3udt22499)p3u_171260 Units=km Length=0.001 bus1=p3udt15462-p3udt22499x.1.2.3 bus2=p3udt15462.1.2.3 switch=y enabled=y phases=3 Linecode=padswitch_3_4_3_1_3_3

New Line.elbswitch(r:p3udt20362-p3udt973)p3u_206705 Units=km Length=0.001 bus1=p3udt973.1.2.3 bus2=p3udt20362-p3udt973x.1.2.3 switch=y enabled=n phases=3 Linecode=elbswitch_3_3_3_3

New Line.fuse(r:p3udt233-p3udt2461)p3u_207055 Units=km Length=0.001 bus1=p3udt2461.1 bus2=p3udt233-p3udt2461x.1 switch=n enabled=y phases=1 Linecode=fuse_1_1_1_1

New Fuse.Fuse_fuse(r:p3udt233-p3udt2461)p3u_207055 monitoredobj=Line.fuse(r:p3udt233-p3udt2461)p3u_207055 enabled=y ratedcurrent=100.0

New Line.fuse(r:p3udt15043-p3udt2461)p3u_207056 Units=km Length=0.001 bus1=p3udt2461.3 bus2=p3udt15043-p3udt2461x.3 switch=n enabled=y phases=1 Linecode=fuse_1_1_1_1

New Fuse.Fuse_fuse(r:p3udt15043-p3udt2461)p3u_207056 monitoredobj=Line.fuse(r:p3udt15043-p3udt2461)p3u_207056 enabled=y ratedcurrent=100.0

New Line.fuse(r:p3udt24973-p3udt7757)p3u_207594 Units=km Length=0.001 bus1=p3udt7757.2 bus2=p3udt24973-p3udt7757x.2 switch=n enabled=y phases=1 Linecode=fuse_1_1_1_1

New Fuse.Fuse_fuse(r:p3udt24973-p3udt7757)p3u_207594 monitoredobj=Line.fuse(r:p3udt24973-p3udt7757)p3u_207594 enabled=y ratedcurrent=100.0

New Line.fuse(r:p3udt12519-p3udt15870)p3u_208025 Units=km Length=0.001 bus1=p3udt12519.1 bus2=p3udt12519-p3udt15870x.1 switch=n enabled=y phases=1 Linecode=fuse_1_1_1_1

New Fuse.Fuse_fuse(r:p3udt12519-p3udt15870)p3u_208025 monitoredobj=Line.fuse(r:p3udt12519-p3udt15870)p3u_208025 enabled=y ratedcurrent=100.0

New Line.fuse(r:p3udt14218-p3udt28541)p3u_208197 Units=km Length=0.001 bus1=p3udt14218.3 bus2=p3udt14218-p3udt28541x.3 switch=n enabled=y phases=1 Linecode=fuse_1_7_1_1_1

New Fuse.Fuse_fuse(r:p3udt14218-p3udt28541)p3u_208197 monitoredobj=Line.fuse(r:p3udt14218-p3udt28541)p3u_208197 enabled=y ratedcurrent=100.0

New Line.fuse(r:p3udt10482-p3udt16609)p3u_208427 Units=km Length=0.001 bus1=p3udt16609.1 bus2=p3udt10482-p3udt16609x.1 switch=n enabled=y phases=1 Linecode=fuse_1_1_1_1

New Fuse.Fuse_fuse(r:p3udt10482-p3udt16609)p3u_208427 monitoredobj=Line.fuse(r:p3udt10482-p3udt16609)p3u_208427 enabled=y ratedcurrent=100.0

New Line.fuse(r:p3udt19109-p3udt30699)p3u_208677 Units=km Length=0.001 bus1=p3udt19109.2 bus2=p3udt19109-p3udt30699x.2 switch=n enabled=y phases=1 Linecode=fuse_1_7_1_4_1_1

New Fuse.Fuse_fuse(r:p3udt19109-p3udt30699)p3u_208677 monitoredobj=Line.fuse(r:p3udt19109-p3udt30699)p3u_208677 enabled=y ratedcurrent=100.0

New Line.fuse(r:p3udt25603-p3udt31515)p3u_209350 Units=km Length=0.001 bus1=p3udt25603.2 bus2=p3udt25603-p3udt31515x.2 switch=n enabled=y phases=1 Linecode=fuse_1_1_1_1

New Fuse.Fuse_fuse(r:p3udt25603-p3udt31515)p3u_209350 monitoredobj=Line.fuse(r:p3udt25603-p3udt31515)p3u_209350 enabled=y ratedcurrent=100.0

New Line.fuse(r:p3udt24977-p3udt28548)p3u_209655 Units=km Length=0.001 bus1=p3udt28548.1 bus2=p3udt24977-p3udt28548x.1 switch=n enabled=y phases=1 Linecode=fuse_1_1_1_1

New Fuse.Fuse_fuse(r:p3udt24977-p3udt28548)p3u_209655 monitoredobj=Line.fuse(r:p3udt24977-p3udt28548)p3u_209655 enabled=y ratedcurrent=100.0

New Line.fuse(r:p3udt18463-p3udt30996)p3u_209906 Units=km Length=0.001 bus1=p3udt30996.3 bus2=p3udt18463-p3udt30996x.3 switch=n enabled=y phases=1 Linecode=fuse_1_1_1_1

New Fuse.Fuse_fuse(r:p3udt18463-p3udt30996)p3u_209906 monitoredobj=Line.fuse(r:p3udt18463-p3udt30996)p3u_209906 enabled=y ratedcurrent=100.0

New Line.fuse(r:p3udt31132-p3udt9463)p3u_209917 Units=km Length=0.001 bus1=p3udt31132.2 bus2=p3udt31132-p3udt9463x.2 switch=n enabled=y phases=1 Linecode=fuse_1_1_1_1

New Fuse.Fuse_fuse(r:p3udt31132-p3udt9463)p3u_209917 monitoredobj=Line.fuse(r:p3udt31132-p3udt9463)p3u_209917 enabled=y ratedcurrent=100.0

New Line.l(r:p3udt16609-p3udt31513)_disconnect Units=km Length=0.001 bus1=p3udt16609_b1_1.1.2.3 bus2=p3udt16609_b2_1.1.2.3 switch=y enabled=y phases=3 Linecode=3P_OH_AL_ACSR_4/0_Penguin_12_47_0_3_3_3_3

New Line.l(r:p3udt16609-p3udt31513)_cont Units=km Length=0.7696926000000001 bus1=p3udt16609_b2_1.1.2.3 bus2=p3udt31513.1.2.3 switch=n enabled=y phases=3 Linecode=3P_OH_AL_ACSR_4/0_Penguin_12_47_0_3_3_3_3
