New Capacitor.p3uc28 Bus1=p3udt24259 phases=3 Kv=12.47 conn=Wye Kvar=300.0

New CapControl.p3uc28 Capacitor=p3uc28 Element=Line.padswitch(r:p3udt17034-p3udt24259)p3u_170372 Terminal=1 delay=100.0 Type=voltage Vmin=120.5 Vmax=125.0 Ptratio=59.99631547328862 Ctratio=100.0
