New Capacitor.p3uc42 Bus1=p3udt30419 phases=3 Kv=12.47 conn=Wye Kvar=450.0

New CapControl.p3uc42 Capacitor=p3uc42 Element=Line.l(r:p3udt28394-p3udt30419) Terminal=1 delay=100.0 Type=voltage Vmin=120.5 Vmax=125.0 Ptratio=59.99631547328862 Ctratio=100.0
