New Line.l(r:p3udt265lv-p3ulv411) Units=km Length=0.015783 bus1=p3udt265lv.1.2 bus2=p3ulv411.1.2 switch=n enabled=y phases=2 Linecode=1P_OH_AL_2/0_Rucina_0_416_0_2_2_2_2

New Line.l(r:p3udm787-p3ulv16142) Units=km Length=0.0227434 bus1=p3udm787.1.2 bus2=p3ulv16142.1.2 switch=n enabled=y phases=2 Linecode=1P_OH_AL_2/0_Rucina_0_416_0_2_2_2_2

New Line.l(r:p3udm787-p3udt265lv) Units=km Length=0.0155147 bus1=p3udt265lv.1.2 bus2=p3udm787.1.2 switch=n enabled=y phases=2 Linecode=1P_OH_AL_2/0_Rucina_0_416_0_2_2_2_2

New Line.l(r:p3udm3424-p3ulv1167) Units=km Length=0.0140502 bus1=p3udm3424.1.2 bus2=p3ulv1167.1.2 switch=n enabled=y phases=2 Linecode=1P_UG_AL_1/0_Brenau_0_416_0_2_2_2_2

New Line.l(r:p3udm3424-p3udt1004lv) Units=km Length=0.00941516 bus1=p3udt1004lv.1.2 bus2=p3udm3424.1.2 switch=n enabled=y phases=2 Linecode=1P_UG_AL_1/0_Brenau_0_416_0_2_2_2_2

New Line.l(r:p3udm3425-p3ulv34056) Units=km Length=0.014131500000000002 bus1=p3udm3425.1.2 bus2=p3ulv34056.1.2 switch=n enabled=y phases=2 Linecode=1P_UG_AL_1/0_Brenau_0_416_0_2_2_2_2

New Line.l(r:p3udm3425-p3ulv68693) Units=km Length=0.0161643 bus1=p3udm3425.1.2 bus2=p3ulv68693.1.2 switch=n enabled=y phases=2 Linecode=1P_UG_AL_1/0_Brenau_0_416_0_2_2_2_2

New Line.l(r:p3udm3425-p3udt1004lv) Units=km Length=0.00941516 bus1=p3udt1004lv.1.2 bus2=p3udm3425.1.2 switch=n enabled=y phases=2 Linecode=1P_UG_AL_4/0_Sweetbriar_0_416_0_2_2_2_2

New Line.l(r:p3udt1750lv-p3ulv1947) Units=km Length=0.0295363 bus1=p3udt1750lv.1.2 bus2=p3ulv1947.1.2 switch=n enabled=y phases=2 Linecode=1P_OH_AL_4/0_Zuzara_0_416_0_2_2_2_2

New Line.l(r:p3udt1750lv-p3ulv11469) Units=km Length=0.013407800000000001 bus1=p3udt1750lv.1.2 bus2=p3ulv11469.1.2 switch=n enabled=y phases=2 Linecode=1P_OH_AL_2/0_Rucina_0_416_0_2_2_2_2

New Line.l(r:p3udt5287lv-p3ulv5932) Units=km Length=0.0157825 bus1=p3udt5287lv.1.2 bus2=p3ulv5932.1.2 switch=n enabled=y phases=2 Linecode=1P_UG_AL_1/0_Brenau_0_416_0_2_2_2_2

New Line.l(r:p3udt5287lv-p3ulv41766) Units=km Length=0.0169984 bus1=p3udt5287lv.1.2 bus2=p3ulv41766.1.2 switch=n enabled=y phases=2 Linecode=1P_UG_AL_1/0_Brenau_0_416_0_2_2_2_2

New Line.l(r:p3udt5287lv-p3ulv53365) Units=km Length=0.0145348 bus1=p3udt5287lv.1.2 bus2=p3ulv53365.1.2 switch=n enabled=y phases=2 Linecode=1P_UG_AL_1/0_Brenau_0_416_0_2_2_2_2

New Line.l(r:p3udt5930lv-p3ulv6725) Units=km Length=0.0344369 bus1=p3udt5930lv.1.2 bus2=p3ulv6725.1.2 switch=n enabled=y phases=2 Linecode=1P_OH_AL_4/0_Zuzara_0_416_0_2_2_2_2

New Line.l(r:p3udt5930lv-p3ulv57181) Units=km Length=0.021824 bus1=p3udt5930lv.1.2 bus2=p3ulv57181.1.2 switch=n enabled=y phases=2 Linecode=1P_OH_AL_2/0_Rucina_0_416_0_2_2_2_2

New Line.l(r:p3udm20321-p3ulv44120) Units=km Length=0.0281506 bus1=p3udm20321.1.2 bus2=p3ulv44120.1.2 switch=n enabled=y phases=2 Linecode=1P_OH_AL_4/0_Zuzara_0_416_0_2_2_2_2

New Line.l(r:p3udm20321-p3udt5930lv) Units=km Length=0.010821500000000001 bus1=p3udt5930lv.1.2 bus2=p3udm20321.1.2 switch=n enabled=y phases=2 Linecode=1P_OH_AL_2/0_Rucina_0_416_0_2_2_2_2

New Line.l(r:p3udt7786lv-p3ulv9098) Units=km Length=0.028798000000000004 bus1=p3udt7786lv.1.2 bus2=p3ulv9098.1.2 switch=n enabled=y phases=2 Linecode=1P_UG_AL_1/0_Brenau_0_416_0_2_2_2_2

New Line.l(r:p3udt7786lv-p3ulv18444) Units=km Length=0.034105800000000006 bus1=p3udt7786lv.1.2 bus2=p3ulv18444.1.2 switch=n enabled=y phases=2 Linecode=1P_UG_AL_1/0_Brenau_0_416_0_2_2_2_2

New Line.l(r:p3udt7786lv-p3ulv26333) Units=km Length=0.0226061 bus1=p3udt7786lv.1.2 bus2=p3ulv26333.1.2 switch=n enabled=y phases=2 Linecode=1P_UG_AL_1/0_Brenau_0_416_0_2_2_2_2

New Line.l(r:p3udt7786lv-p3ulv27855) Units=km Length=0.0259778 bus1=p3udt7786lv.1.2 bus2=p3ulv27855.1.2 switch=n enabled=y phases=2 Linecode=1P_UG_AL_2/0_Converse_0_416_0_2_2_2_2

New Line.l(r:p3udm28186-p3ulv9839) Units=km Length=0.0103944 bus1=p3udm28186.1.2 bus2=p3ulv9839.1.2 switch=n enabled=y phases=2 Linecode=1P_OH_AL_2/0_Rucina_0_416_0_2_2_2_2

New Line.l(r:p3udm28186-p3udt8350lv) Units=km Length=0.035284100000000006 bus1=p3udt8350lv.1.2 bus2=p3udm28186.1.2 switch=n enabled=y phases=2 Linecode=1P_OH_AL_4/0_Zuzara_0_416_0_2_2_2_2

New Line.l(r:p3udm28187-p3ulv33313) Units=km Length=0.0135506 bus1=p3udm28187.1.2 bus2=p3ulv33313.1.2 switch=n enabled=y phases=2 Linecode=1P_OH_AL_2/0_Rucina_0_416_0_2_2_2_2

New Line.l(r:p3udm28187-p3udt8350lv) Units=km Length=0.0270479 bus1=p3udt8350lv.1.2 bus2=p3udm28187.1.2 switch=n enabled=y phases=2 Linecode=1P_OH_AL_4/0_Zuzara_0_416_0_2_2_2_2

New Line.l(r:p3udm30024-p3ulv10653) Units=km Length=0.0211958 bus1=p3udm30024.1.2 bus2=p3ulv10653.1.2 switch=n enabled=y phases=2 Linecode=1P_UG_AL_1/0_Brenau_0_416_0_2_2_2_2

New Line.l(r:p3udm30024-p3udt8931lv) Units=km Length=0.0195798 bus1=p3udt8931lv.1.2 bus2=p3udm30024.1.2 switch=n enabled=y phases=2 Linecode=1P_UG_AL_1/0_Brenau_0_416_0_2_2_2_2

New Line.l(r:p3udm30025-p3ulv26332) Units=km Length=0.0171209 bus1=p3udm30025.1.2 bus2=p3ulv26332.1.2 switch=n enabled=y phases=2 Linecode=1P_UG_AL_1/0_Brenau_0_416_0_2_2_2_2

New Line.l(r:p3udm30025-p3ulv50293) Units=km Length=0.0205034 bus1=p3udm30025.1.2 bus2=p3ulv50293.1.2 switch=n enabled=y phases=2 Linecode=1P_UG_AL_2/0_Converse_0_416_0_2_2_2_2

New Line.l(r:p3udm30025-p3ulv75517) Units=km Length=0.013465600000000001 bus1=p3udm30025.1.2 bus2=p3ulv75517.1.2 switch=n enabled=y phases=2 Linecode=1P_UG_AL_2/0_Converse_0_416_0_2_2_2_2

New Line.l(r:p3udm30025-p3udt8931lv) Units=km Length=0.00979343 bus1=p3udt8931lv.1.2 bus2=p3udm30025.1.2 switch=n enabled=y phases=2 Linecode=1P_UG_AL_4/0_Sweetbriar_0_416_0_2_2_2_2

New Line.l(r:p3udt10520lv-p3ulv37077) Units=km Length=0.016434300000000002 bus1=p3udt10520lv.1.2 bus2=p3ulv37077.1.2 switch=n enabled=y phases=2 Linecode=1P_UG_AL_1/0_Brenau_0_416_0_2_2_2_2

New Line.l(r:p3udm34890-p3ulv12987) Units=km Length=0.0160524 bus1=p3udm34890.1.2 bus2=p3ulv12987.1.2 switch=n enabled=y phases=2 Linecode=1P_UG_AL_1/0_Brenau_0_416_0_2_2_2_2

New Line.l(r:p3udm34890-p3udt10520lv) Units=km Length=0.00905615 bus1=p3udt10520lv.1.2 bus2=p3udm34890.1.2 switch=n enabled=y phases=2 Linecode=1P_UG_AL_1/0_Brenau_0_416_0_2_2_2_2

New Line.l(r:p3udm34892-p3ulv47277) Units=km Length=0.01434 bus1=p3udm34892.1.2 bus2=p3ulv47277.1.2 switch=n enabled=y phases=2 Linecode=1P_UG_AL_1/0_Brenau_0_416_0_2_2_2_2

New Line.l(r:p3udm34892-p3udt10520lv) Units=km Length=0.00906259 bus1=p3udt10520lv.1.2 bus2=p3udm34892.1.2 switch=n enabled=y phases=2 Linecode=1P_UG_AL_1/0_Brenau_0_416_0_2_2_2_2

New Line.l(r:p3udt11048lv-p3ulv13786) Units=km Length=0.00661547 bus1=p3udt11048lv.1.2 bus2=p3ulv13786.1.2 switch=n enabled=y phases=2 Linecode=1P_UG_AL_4/0_Sweetbriar_0_416_0_2_2_2_2

New Line.l(r:p3udt14252lv-p3ulv19210) Units=km Length=0.00334006 bus1=p3udt14252lv.1.2 bus2=p3ulv19210.1.2 switch=n enabled=y phases=2 Linecode=1P_OH_AL_4_Periwinkle_0_416_0_2_2_2_2

New Line.l(r:p3udt18479lv-p3ulv35616) Units=km Length=0.0163119 bus1=p3udt18479lv.1.2 bus2=p3ulv35616.1.2 switch=n enabled=y phases=2 Linecode=1P_UG_AL_1/0_Brenau_0_416_0_2_2_2_2

New Line.l(r:p3udm56312-p3ulv30909) Units=km Length=0.0160999 bus1=p3udm56312.1.2 bus2=p3ulv30909.1.2 switch=n enabled=y phases=2 Linecode=1P_UG_AL_1/0_Brenau_0_416_0_2_2_2_2

New Line.l(r:p3udm56311-p3ulv27854) Units=km Length=0.0158457 bus1=p3udm56311.1.2 bus2=p3ulv27854.1.2 switch=n enabled=y phases=2 Linecode=1P_UG_AL_2/0_Converse_0_416_0_2_2_2_2

New Line.l(r:p3udm56311-p3udm56312) Units=km Length=0.00959986 bus1=p3udm56312.1.2 bus2=p3udm56311.1.2 switch=n enabled=y phases=2 Linecode=1P_UG_AL_2/0_Converse_0_416_0_2_2_2_2

New Line.l(r:p3udm56312-p3udt18479lv) Units=km Length=0.00994682 bus1=p3udt18479lv.1.2 bus2=p3udm56312.1.2 switch=n enabled=y phases=2 Linecode=1P_UG_AL_4/0_Sweetbriar_0_416_0_2_2_2_2

New Line.l(r:p3udm56314-p3ulv36374) Units=km Length=0.020753600000000004 bus1=p3udm56314.1.2 bus2=p3ulv36374.1.2 switch=n enabled=y phases=2 Linecode=1P_UG_AL_1/0_Brenau_0_416_0_2_2_2_2

New Line.l(r:p3udm56314-p3udt18479lv) Units=km Length=0.0199206 bus1=p3udt18479lv.1.2 bus2=p3udm56314.1.2 switch=n enabled=y phases=2 Linecode=1P_UG_AL_1/0_Brenau_0_416_0_2_2_2_2

New Line.l(r:p3udt18792lv-p3ulv28593) Units=km Length=0.0146167 bus1=p3udt18792lv.1.2 bus2=p3ulv28593.1.2 switch=n enabled=y phases=2 Linecode=1P_OH_AL_2/0_Rucina_0_416_0_2_2_2_2

New Line.l(r:p3udt19451lv-p3ulv30123) Units=km Length=0.0336657 bus1=p3udt19451lv.1.2 bus2=p3ulv30123.1.2 switch=n enabled=y phases=2 Linecode=1P_UG_AL_2/0_Converse_0_416_0_2_2_2_2

New Line.l(r:p3udt19453lv-p3ulv30125) Units=km Length=0.019915 bus1=p3udt19453lv.1.2 bus2=p3ulv30125.1.2 switch=n enabled=y phases=2 Linecode=1P_UG_AL_1/0_Brenau_0_416_0_2_2_2_2

New Line.l(r:p3udt20374lv-p3ulv32523) Units=km Length=0.00711689 bus1=p3udt20374lv.1.2 bus2=p3ulv32523.1.2 switch=n enabled=y phases=2 Linecode=1P_OH_AL_2/0_Rucina_0_416_0_2_2_2_2

New Line.l(r:p3udt21235lv-p3ulv34839) Units=km Length=0.015134100000000001 bus1=p3udt21235lv.1.2 bus2=p3ulv34839.1.2 switch=n enabled=y phases=2 Linecode=1P_OH_AL_2/0_Rucina_0_416_0_2_2_2_2

New Line.l(r:p3udt24029lv-p3ulv43324) Units=km Length=0.0142979 bus1=p3udt24029lv.1.2 bus2=p3ulv43324.1.2 switch=n enabled=y phases=2 Linecode=1P_UG_AL_2/0_Converse_0_416_0_2_2_2_2

New Line.l(r:p3udt24731lv-p3ulv45713) Units=km Length=0.0194894 bus1=p3udt24731lv.1.2 bus2=p3ulv45713.1.2 switch=n enabled=y phases=2 Linecode=1P_UG_AL_1/0_Brenau_0_416_0_2_2_2_2

New Line.l(r:p3udt24985lv-p3ulv46527) Units=km Length=0.0118936 bus1=p3udt24985lv.1.2 bus2=p3ulv46527.1.2 switch=n enabled=y phases=2 Linecode=1P_OH_AL_2/0_Rucina_0_416_0_2_2_2_2

New Line.l(r:p3udt26398lv-p3ulv51797) Units=km Length=0.0143827 bus1=p3udt26398lv.1.2 bus2=p3ulv51797.1.2 switch=n enabled=y phases=2 Linecode=1P_OH_AL_2/0_Rucina_0_416_0_2_2_2_2

New Line.l(r:p3udt26964lv-p3ulv54106) Units=km Length=0.00985321 bus1=p3udt26964lv.1.2 bus2=p3ulv54106.1.2 switch=n enabled=y phases=2 Linecode=1P_OH_AL_2/0_Rucina_0_416_0_2_2_2_2

New Line.l(r:p3udt27714lv-p3ulv57179) Units=km Length=0.010220500000000002 bus1=p3udt27714lv.1.2 bus2=p3ulv57179.1.2 switch=n enabled=y phases=2 Linecode=1P_UG_AL_1/0_Brenau_0_416_0_2_2_2_2

New Line.l(r:p3udt28713lv-p3ulv61771) Units=km Length=0.0162651 bus1=p3udt28713lv.1.2 bus2=p3ulv61771.1.2 switch=n enabled=y phases=2 Linecode=1P_UG_AL_1/0_Brenau_0_416_0_2_2_2_2

New Line.l(r:p3udt28863lv-p3ulv62519) Units=km Length=0.0149029 bus1=p3udt28863lv.1.2 bus2=p3ulv62519.1.2 switch=n enabled=y phases=2 Linecode=1P_OH_AL_2/0_Rucina_0_416_0_2_2_2_2

New Line.l(r:p3udt29788lv-p3ulv67116) Units=km Length=0.0229422 bus1=p3udt29788lv.1.2 bus2=p3ulv67116.1.2 switch=n enabled=y phases=2 Linecode=1P_UG_AL_1/0_Brenau_0_416_0_2_2_2_2

New Line.l(r:p3udt30250lv-p3ulv69420) Units=km Length=0.0165835 bus1=p3udt30250lv.1.2 bus2=p3ulv69420.1.2 switch=n enabled=y phases=2 Linecode=1P_OH_AL_2/0_Rucina_0_416_0_2_2_2_2

New Line.l(r:p3udt30855lv-p3ulv72523) Units=km Length=0.0141013 bus1=p3udt30855lv.1.2 bus2=p3ulv72523.1.2 switch=n enabled=y phases=2 Linecode=1P_UG_AL_2/0_Converse_0_416_0_2_2_2_2

New Line.l(r:p3udt32084lv-p3ulv79431) Units=km Length=0.0174375 bus1=p3udt32084lv.1.2 bus2=p3ulv79431.1.2 switch=n enabled=y phases=2 Linecode=1P_UG_AL_1/0_Brenau_0_416_0_2_2_2_2

New Line.l(r:p3udt32214lv-p3ulv80162) Units=km Length=0.0108639 bus1=p3udt32214lv.1.2 bus2=p3ulv80162.1.2 switch=n enabled=y phases=2 Linecode=1P_OH_AL_2/0_Rucina_0_416_0_2_2_2_2

New Line.l(r:p3udt32215lv-p3ulv80163) Units=km Length=0.0121852 bus1=p3udt32215lv.1.2 bus2=p3ulv80163.1.2 switch=n enabled=y phases=2 Linecode=1P_OH_AL_2/0_Rucina_0_416_0_2_2_2_2

New Line.l(r:p3udt18792-p3udt8350) Units=km Length=0.0501102 bus1=p3udt18792-p3udt8350x.3 bus2=p3udt18792.3 switch=n enabled=y phases=1 Linecode=1P_OH_AL_ACSR_#2_Sparrow_12_47_0_1_1_1_1

New Line.l(r:p3udt10521-p3udt20374) Units=km Length=0.05353080000000001 bus1=p3udt10521-p3udt20374x.2 bus2=p3udt20374.2 switch=n enabled=y phases=1 Linecode=1P_OH_AL_ACSR_#2_Sparrow_12_47_0_1_1_1_1

New Line.l(r:p3udt30119-p3udt32215) Units=km Length=0.001 bus1=p3udt30119-p3udt32215x.1 bus2=p3udt32215.1 switch=n enabled=y phases=1 Linecode=1P_OH_AL_ACSR_#2_Sparrow_12_47_0_1_1_1_1

New Line.l(r:p3udt11048-p3udt24985) Units=km Length=0.0439481 bus1=p3udt24985.3 bus2=p3udt11048.3 switch=n enabled=y phases=1 Linecode=1P_OH_AL_ACSR_#2_Sparrow_12_47_0_1_1_1_1

New Line.l(r:p3udt24985-p3udt31252) Units=km Length=0.032705700000000004 bus1=p3udt24985-p3udt31252x.3 bus2=p3udt24985.3 switch=n enabled=y phases=1 Linecode=1P_OH_AL_ACSR_#2_Sparrow_12_47_0_1_1_1_1

New Line.l(r:p3udt19453-p3udt7786) Units=km Length=0.00638771 bus1=p3udt19453-p3udt7786x.2 bus2=p3udt19453-p3udt7786xx.2 switch=n enabled=y phases=1 Linecode=1P_UG_AL_#2_15_12_47_0_1_1_1_1

New Line.l(r:p3udt18479-p3udt19453) Units=km Length=0.03625780000000001 bus1=p3udt18479-p3udt19453x.2 bus2=p3udt18479-p3udt19453xx.2 switch=n enabled=y phases=1 Linecode=1P_UG_AL_#2_15_12_47_0_1_1_1_1

New Line.l(r:p3udt18479-p3udt30855) Units=km Length=0.0483391 bus1=p3udt18479-p3udt30855xx.2 bus2=p3udt18479-p3udt30855x.2 switch=n enabled=y phases=1 Linecode=1P_UG_AL_#2_15_12_47_0_1_1_1_1

New Line.l(r:p3udt30855-p3udt32084) Units=km Length=0.0191962 bus1=p3udt30855-p3udt32084xx.2 bus2=p3udt30855-p3udt32084x.2 switch=n enabled=y phases=1 Linecode=1P_UG_AL_#2_15_12_47_0_1_1_1_1

New Line.l(r:p3udt32084-p3udt5287) Units=km Length=0.0287925 bus1=p3udt32084-p3udt5287xx.2 bus2=p3udt32084-p3udt5287x.2 switch=n enabled=y phases=1 Linecode=1P_UG_AL_#2_15_12_47_0_1_1_1_1

New Line.l(r:p3udt10520-p3udt5287) Units=km Length=0.0496457 bus1=p3udt10520-p3udt5287x.2 bus2=p3udt10520-p3udt5287xx.2 switch=n enabled=y phases=1 Linecode=1P_UG_AL_#2_15_12_47_0_1_1_1_1

New Line.l(r:p3udt10520-p3udt24731) Units=km Length=0.0181187 bus1=p3udt10520-p3udt24731xx.2 bus2=p3udt10520-p3udt24731x.2 switch=n enabled=y phases=1 Linecode=1P_UG_AL_#2_15_12_47_0_1_1_1_1

New Line.l(r:p3udt24029-p3udt24731) Units=km Length=0.0184778 bus1=p3udt24029-p3udt24731x.2 bus2=p3udt24029-p3udt24731xx.2 switch=n enabled=y phases=1 Linecode=1P_UG_AL_#2_15_12_47_0_1_1_1_1

New Line.l(r:p3udt1004-p3udt24029) Units=km Length=0.0282455 bus1=p3udt1004-p3udt24029x.2 bus2=p3udt1004-p3udt24029xx.2 switch=n enabled=y phases=1 Linecode=1P_UG_AL_#2_15_12_47_0_1_1_1_1

New Line.l(r:p3udt1004-p3udt29788) Units=km Length=0.0267996 bus1=p3udt1004-p3udt29788xx.2 bus2=p3udt1004-p3udt29788x.2 switch=n enabled=y phases=1 Linecode=1P_UG_AL_#2_15_12_47_0_1_1_1_1

New Line.l(r:p3udt28713-p3udt29788) Units=km Length=0.0404032 bus1=p3udt28713-p3udt29788xx.2 bus2=p3udt28713-p3udt29788xxx.2 switch=n enabled=y phases=1 Linecode=1P_UG_AL_#2_15_12_47_0_1_1_1_1

New Line.l(r:p3udt14252-p3udt31137) Units=km Length=0.0174295 bus1=p3udt14252-p3udt31137x.3 bus2=p3udt14252.3 switch=n enabled=y phases=1 Linecode=1P_OH_AL_ACSR_#2_Sparrow_12_47_0_1_1_1_1

New Line.l(r:p3udt26597-p3udt31388) Units=km Length=0.699674 bus1=p3udt31388.1.2.3 bus2=p3udt26597.1.2.3 switch=n enabled=y phases=3 Linecode=3P_OH_AL_ACSR_1033kcmil_Curlew_12.47_1_3_3_3_3

New Line.l(r:p3udt31388-p3uhs5_1247) Units=km Length=0.29891300000000004 bus1=p3udt31388-p3uhs5_1247x.1.2.3 bus2=p3udt31388-p3uhs5_1247x_b1_1.1.2.3 switch=n enabled=y phases=3 Linecode=3P_OH_AL_ACSR_1033kcmil_Curlew_12.47_1_3_3_3_3

New Line.l(r:p3udt27714-p3udt3222) Units=km Length=0.0600061 bus1=p3udt27714-p3udt3222x.1.2.3 bus2=p3udt27714-p3udt3222xx.1.2.3 switch=n enabled=y phases=3 Linecode=3P_UG_AL_4/0_25_12_47_0_3_3_3_3

New Line.l(r:p3udt27714-p3udt28713) Units=km Length=0.0532605 bus1=p3udt27714-p3udt28713xx.1.2.3 bus2=p3udt27714-p3udt28713x.1.2.3 switch=n enabled=y phases=3 Linecode=3P_UG_AL_4/0_25_12_47_0_3_3_3_3

New Line.l(r:p3udt28713-p3udt8931) Units=km Length=0.0357168 bus1=p3udt28713-p3udt8931xx.1.2.3 bus2=p3udt28713-p3udt8931x.1.2.3 switch=n enabled=y phases=3 Linecode=3P_UG_AL_4/0_25_12_47_0_3_3_3_3

New Line.l(r:p3udt19451-p3udt8931) Units=km Length=0.0349339 bus1=p3udt19451-p3udt8931x.1.2.3 bus2=p3udt19451-p3udt8931xx.1.2.3 switch=n enabled=y phases=3 Linecode=3P_UG_AL_4/0_25_12_47_0_3_3_3_3

New Line.l(r:p3udt10519-p3udt19451) Units=km Length=0.124188 bus1=p3udt10519.1.2.3 bus2=p3udt19451.1.2.3 switch=n enabled=y phases=3 Linecode=3P_OH_AL_ACSR_4/0_Penguin_12_47_0_3_3_3_3

New Line.l(r:p3udt10519-p3udt25803) Units=km Length=0.0687991 bus1=p3udt25803.1.2.3 bus2=p3udt10519.1.2.3 switch=n enabled=y phases=3 Linecode=3P_OH_AL_ACSR_4/0_Penguin_12_47_0_3_3_3_3

New Line.l(r:p3udt14667-p3udt25803) Units=km Length=0.209237 bus1=p3udt14667.1.2.3 bus2=p3udt25803.1.2.3 switch=n enabled=y phases=3 Linecode=3P_OH_AL_ACSR_4/0_Penguin_12_47_0_3_3_3_3

New Line.l(r:p3udt14667-p3udt26597) Units=km Length=0.09898050000000001 bus1=p3udt26597.1.2.3 bus2=p3udt26597_b1_1.1.2.3 switch=n enabled=y phases=3 Linecode=3P_OH_AL_ACSR_4/0_Penguin_12_47_0_3_3_3_3

New Line.l(r:p3udt31388lv-p3ulv75525) Units=km Length=0.0130354 bus1=p3udt31388lv.1.2.3 bus2=p3ulv75525.1.2.3 switch=n enabled=y phases=3 Linecode=3P_UG_AL_750kcmil_25_0_416_0_3_3_3_3

New Line.l(r:p3udt26597lv-p3ulv52578) Units=km Length=0.0363895 bus1=p3udt26597lv.1.2.3 bus2=p3ulv52578.1.2.3 switch=n enabled=y phases=3 Linecode=3P_UG_AL_750kcmil_25_0_416_0_3_3_3_3

New Line.l(r:p3udt1002lv-p3ulv1165) Units=km Length=0.0349769 bus1=p3udt1002lv.1.2.3 bus2=p3ulv1165.1.2.3 switch=n enabled=y phases=3 Linecode=3P_UG_AL_750kcmil_25_0_416_0_3_3_3_3

New Line.l(r:p3udt10001lv-p3ulv12216) Units=km Length=0.025501800000000005 bus1=p3udt10001lv.1.2.3 bus2=p3ulv12216.1.2.3 switch=n enabled=y phases=3 Linecode=3P_UG_AL_750kcmil_25_0_416_0_3_3_3_3

New Line.l(r:p3udt10001-p3udt1002) Units=km Length=0.07224280000000001 bus1=p3udt1002.1.2.3 bus2=p3udt10001.1.2.3 switch=n enabled=y phases=3 Linecode=3P_OH_AL_ACSR_4/0_Penguin_12_47_0_3_3_3_3

New Line.l(r:p3udt1002-p3udt26597) Units=km Length=0.410284 bus1=p3udt26597.1.2.3 bus2=p3udt1002.1.2.3 switch=n enabled=y phases=3 Linecode=3P_OH_AL_ACSR_4/0_Penguin_12_47_0_3_3_3_3

New Line.l(r:p3udt14667lv-p3ulv19969) Units=km Length=0.0212853 bus1=p3udt14667lv.1.2.3 bus2=p3ulv19969.1.2.3 switch=n enabled=y phases=3 Linecode=3P_UG_AL_350kcmil_15_0_416_0_3_3_3_3

New Line.l(r:p3udt3221lv-p3ulv3551) Units=km Length=0.014342200000000001 bus1=p3udt3221lv.1.2.3 bus2=p3ulv3551.1.2.3 switch=n enabled=y phases=3 Linecode=3P_UG_AL_750kcmil_25_0_416_0_3_3_3_3

New Line.l(r:p3udt3221-p3umv7) Units=km Length=0.150111 bus1=p3umv7.1.2.3 bus2=p3udt3221.1.2.3 switch=n enabled=y phases=3 Linecode=3P_OH_AL_ACSR_4/0_Penguin_12_47_0_3_3_3_3

New Line.l(r:p3udt14667-p3umv7) Units=km Length=0.192666 bus1=p3udt14667.1.2.3 bus2=p3umv7.1.2.3 switch=n enabled=y phases=3 Linecode=3P_OH_AL_ACSR_4/0_Penguin_12_47_0_3_3_3_3

New Line.l(r:p3udt999lv-p3ulv1162) Units=km Length=0.007219540000000001 bus1=p3udt999lv.1.2.3 bus2=p3ulv1162.1.2.3 switch=n enabled=y phases=3 Linecode=3P_UG_AL_750kcmil_25_0_416_0_3_3_3_3

New Line.l(r:p3udt14667-p3udt999) Units=km Length=0.176275 bus1=p3udt14667.1.2.3 bus2=p3udt999.1.2.3 switch=n enabled=y phases=3 Linecode=3P_OH_AL_ACSR_4/0_Penguin_12_47_0_3_3_3_3

New Line.l(r:p3udt25803lv-p3ulv49528) Units=km Length=0.011492600000000002 bus1=p3udt25803lv.1.2.3 bus2=p3ulv49528.1.2.3 switch=n enabled=y phases=3 Linecode=3P_UG_AL_350kcmil_15_0_416_0_3_3_3_3

New Line.l(r:p3udt10519lv-p3ulv12986) Units=km Length=0.00506969 bus1=p3udt10519lv.1.2.3 bus2=p3ulv12986.1.2.3 switch=n enabled=y phases=3 Linecode=3P_UG_AL_350kcmil_15_0_416_0_3_3_3_3

New Line.l(r:p3udt10519lv-p3ulv44962) Units=km Length=0.00989059 bus1=p3udt10519lv.1.2.3 bus2=p3ulv44962.1.2.3 switch=n enabled=y phases=3 Linecode=3P_UG_AL_350kcmil_15_0_416_0_3_3_3_3

New Line.l(r:p3udt3222lv-p3ulv3552) Units=km Length=0.011227 bus1=p3udt3222lv.1.2.3 bus2=p3ulv3552.1.2.3 switch=n enabled=y phases=3 Linecode=3P_UG_AL_350kcmil_15_0_416_0_3_3_3_3

New Line.l(r:p3udt11049lv-p3ulv48038) Units=km Length=0.0147494 bus1=p3udt11049lv.1.2.3 bus2=p3ulv48038.1.2.3 switch=n enabled=y phases=3 Linecode=3P_UG_AL_350kcmil_15_0_416_0_3_3_3_3

New Line.l(r:p3udm36536-p3ulv13787) Units=km Length=0.0147644 bus1=p3udm36536.1.2.3 bus2=p3ulv13787.1.2.3 switch=n enabled=y phases=3 Linecode=3P_UG_AL_350kcmil_15_0_416_0_3_3_3_3

New Line.l(r:p3udm36536-p3udt11049lv) Units=km Length=0.0121758 bus1=p3udt11049lv.1.2.3 bus2=p3udm36536.1.2.3 switch=n enabled=y phases=3 Linecode=3P_UG_AL_350kcmil_15_0_416_0_3_3_3_3

New Line.l(r:p3udt10521lv-p3ulv12988) Units=km Length=0.0136073 bus1=p3udt10521lv.1.2.3 bus2=p3ulv12988.1.2.3 switch=n enabled=y phases=3 Linecode=3P_UG_AL_350kcmil_15_0_416_0_3_3_3_3

New Line.l(r:p3udm34894-p3ulv33312) Units=km Length=0.009670260000000002 bus1=p3udm34894.1.2.3 bus2=p3ulv33312.1.2.3 switch=n enabled=y phases=3 Linecode=3P_UG_AL_350kcmil_15_0_416_0_3_3_3_3

New Line.l(r:p3udm34894-p3udt10521lv) Units=km Length=0.0191988 bus1=p3udt10521lv.1.2.3 bus2=p3udm34894.1.2.3 switch=n enabled=y phases=3 Linecode=3P_UG_AL_350kcmil_15_0_416_0_3_3_3_3

New Line.l(r:p3udt266lv-p3ulv412) Units=km Length=0.0122979 bus1=p3udt266lv.1.2.3 bus2=p3ulv412.1.2.3 switch=n enabled=y phases=3 Linecode=3P_UG_AL_350kcmil_15_0_416_0_3_3_3_3

New Line.l(r:p3udt27715lv-p3ulv57180) Units=km Length=0.0149981 bus1=p3udt27715lv.1.2.3 bus2=p3ulv57180.1.2.3 switch=n enabled=y phases=3 Linecode=3P_UG_AL_350kcmil_15_0_416_0_3_3_3_3

New Line.l(r:p3udt27715-p3udt8350) Units=km Length=0.0172345 bus1=p3udt8350.1.2.3 bus2=p3udt27715.1.2.3 switch=n enabled=y phases=3 Linecode=3P_OH_AL_ACSR_4/0_Penguin_12_47_0_3_3_3_3

New Line.l(r:p3udt266-p3udt8350) Units=km Length=0.0176391 bus1=p3udt266.1.2.3 bus2=p3udt8350.1.2.3 switch=n enabled=y phases=3 Linecode=3P_OH_AL_ACSR_4/0_Penguin_12_47_0_3_3_3_3

New Line.l(r:p3udt10521-p3udt266) Units=km Length=0.0544829 bus1=p3udt10521.1.2.3 bus2=p3udt266.1.2.3 switch=n enabled=y phases=3 Linecode=3P_OH_AL_ACSR_4/0_Penguin_12_47_0_3_3_3_3

New Line.l(r:p3udt10521-p3udt11049) Units=km Length=0.0771432 bus1=p3udt11049.1.2.3 bus2=p3udt10521.1.2.3 switch=n enabled=y phases=3 Linecode=3P_OH_AL_ACSR_4/0_Penguin_12_47_0_3_3_3_3

New Line.l(r:p3udt11049-p3udt32214) Units=km Length=0.023501400000000002 bus1=p3udt32214.1.2.3 bus2=p3udt11049.1.2.3 switch=n enabled=y phases=3 Linecode=3P_OH_AL_ACSR_4/0_Penguin_12_47_0_3_3_3_3

New Line.l(r:p3udt3902lv-p3ulv4334) Units=km Length=0.0121083 bus1=p3udt3902lv.1.2.3 bus2=p3ulv4334.1.2.3 switch=n enabled=y phases=3 Linecode=3P_UG_AL_350kcmil_15_0_416_0_3_3_3_3

New Line.l(r:p3udt3902lv-p3ulv21523) Units=km Length=0.0134257 bus1=p3udt3902lv.1.2.3 bus2=p3ulv21523.1.2.3 switch=n enabled=y phases=3 Linecode=3P_UG_AL_350kcmil_15_0_416_0_3_3_3_3

New Line.l(r:p3udt30119lv-p3ulv68695) Units=km Length=0.0084032 bus1=p3udt30119lv.1.2.3 bus2=p3ulv68695.1.2.3 switch=n enabled=y phases=3 Linecode=3P_UG_AL_350kcmil_15_0_416_0_3_3_3_3

New Line.l(r:p3udt29194lv-p3ulv64041) Units=km Length=0.035390200000000004 bus1=p3udt29194lv.1.2.3 bus2=p3ulv64041.1.2.3 switch=n enabled=y phases=3 Linecode=3P_UG_AL_350kcmil_15_0_416_0_3_3_3_3

New Line.l(r:p3udt265-p3udt29194) Units=km Length=0.0155147 bus1=p3udt265.1.2.3 bus2=p3udt29194.1.2.3 switch=n enabled=y phases=3 Linecode=3P_OH_AL_ACSR_4/0_Penguin_12_47_0_3_3_3_3

New Line.l(r:p3udt265-p3udt5930) Units=km Length=0.0155178 bus1=p3udt5930.1.2.3 bus2=p3udt265.1.2.3 switch=n enabled=y phases=3 Linecode=3P_OH_AL_ACSR_4/0_Penguin_12_47_0_3_3_3_3

New Line.l(r:p3udt30119-p3udt5930) Units=km Length=0.0464333 bus1=p3udt30119.1.2.3 bus2=p3udt5930.1.2.3 switch=n enabled=y phases=3 Linecode=3P_OH_AL_ACSR_4/0_Penguin_12_47_0_3_3_3_3

New Line.l(r:p3udt26398-p3udt30119) Units=km Length=0.0367815 bus1=p3udt26398.1.2.3 bus2=p3udt30119.1.2.3 switch=n enabled=y phases=3 Linecode=3P_OH_AL_ACSR_4/0_Penguin_12_47_0_3_3_3_3

New Line.l(r:p3udt31387lv-p3ulv75520) Units=km Length=0.0133901 bus1=p3udt31387lv.1.2.3 bus2=p3ulv75520.1.2.3 switch=n enabled=y phases=3 Linecode=3P_UG_AL_350kcmil_15_0_416_0_3_3_3_3

New Line.l(r:p3udt26398-p3udt31387) Units=km Length=0.0138826 bus1=p3udt26398.1.2.3 bus2=p3udt31387.1.2.3 switch=n enabled=y phases=3 Linecode=3P_OH_AL_ACSR_4/0_Penguin_12_47_0_3_3_3_3

New Line.l(r:p3udt26398-p3udt3902) Units=km Length=0.049965600000000006 bus1=p3udt3902.1.2.3 bus2=p3udt26398.1.2.3 switch=n enabled=y phases=3 Linecode=3P_OH_AL_ACSR_4/0_Penguin_12_47_0_3_3_3_3

New Line.l(r:p3udt28863-p3udt3902) Units=km Length=0.0181155 bus1=p3udt28863.1.2.3 bus2=p3udt3902.1.2.3 switch=n enabled=y phases=3 Linecode=3P_OH_AL_ACSR_4/0_Penguin_12_47_0_3_3_3_3

New Line.l(r:p3udt28863-p3udt32214) Units=km Length=0.0345419 bus1=p3udt32214.1.2.3 bus2=p3udt28863.1.2.3 switch=n enabled=y phases=3 Linecode=3P_OH_AL_ACSR_4/0_Penguin_12_47_0_3_3_3_3

New Line.l(r:p3udt1750-p3udt32214) Units=km Length=0.0337718 bus1=p3udt1750.1.2.3 bus2=p3udt32214.1.2.3 switch=n enabled=y phases=3 Linecode=3P_OH_AL_ACSR_4/0_Penguin_12_47_0_3_3_3_3

New Line.l(r:p3udt1750-p3udt21235) Units=km Length=0.0344904 bus1=p3udt21235.1.2.3 bus2=p3udt1750.1.2.3 switch=n enabled=y phases=3 Linecode=3P_OH_AL_ACSR_4/0_Penguin_12_47_0_3_3_3_3

New Line.l(r:p3udt21235-p3udt30250) Units=km Length=0.0342782 bus1=p3udt30250.1.2.3 bus2=p3udt21235.1.2.3 switch=n enabled=y phases=3 Linecode=3P_OH_AL_ACSR_4/0_Penguin_12_47_0_3_3_3_3

New Line.l(r:p3udt30250-p3udt3222) Units=km Length=0.0664696 bus1=p3udt3222.1.2.3 bus2=p3udt30250.1.2.3 switch=n enabled=y phases=3 Linecode=3P_OH_AL_ACSR_4/0_Penguin_12_47_0_3_3_3_3

New Line.l(r:p3udt31252lv-p3ulv74795) Units=km Length=0.0093787 bus1=p3udt31252lv.1.2.3 bus2=p3ulv74795.1.2.3 switch=n enabled=y phases=3 Linecode=3P_UG_AL_350kcmil_15_0_416_0_3_3_3_3

New Line.l(r:p3udt31252-p3udt3222) Units=km Length=0.146309 bus1=p3udt3222.1.2.3 bus2=p3udt31252.1.2.3 switch=n enabled=y phases=3 Linecode=3P_OH_AL_ACSR_4/0_Penguin_12_47_0_3_3_3_3

New Line.l(r:p3udt12031lv-p3ulv27856) Units=km Length=0.00952572 bus1=p3udt12031lv.1.2.3 bus2=p3ulv27856.1.2.3 switch=n enabled=y phases=3 Linecode=3P_UG_AL_350kcmil_15_0_416_0_3_3_3_3

New Line.l(r:p3udm39387-p3ulv45714) Units=km Length=0.00449802 bus1=p3udm39387.1.2.3 bus2=p3ulv45714.1.2.3 switch=n enabled=y phases=3 Linecode=3P_UG_AL_350kcmil_15_0_416_0_3_3_3_3

New Line.l(r:p3udm39387-p3udt12031lv) Units=km Length=0.0528426 bus1=p3udt12031lv.1.2.3 bus2=p3udm39387.1.2.3 switch=n enabled=y phases=3 Linecode=3P_UG_AL_350kcmil_15_0_416_0_3_3_3_3

New Line.l(r:p3udm39388-p3ulv67117) Units=km Length=0.0120152 bus1=p3udm39388.1.2.3 bus2=p3ulv67117.1.2.3 switch=n enabled=y phases=3 Linecode=3P_UG_AL_750kcmil_25_0_416_0_3_3_3_3

New Line.l(r:p3udm39385-p3ulv15336) Units=km Length=0.011024 bus1=p3udm39385.1.2.3 bus2=p3ulv15336.1.2.3 switch=n enabled=y phases=3 Linecode=3P_UG_AL_350kcmil_15_0_416_0_3_3_3_3

New Line.l(r:p3udm39385-p3udm39388) Units=km Length=0.0149751 bus1=p3udm39388.1.2.3 bus2=p3udm39385.1.2.3 switch=n enabled=y phases=3 Linecode=3P_UG_AL_350kcmil_15_0_416_0_3_3_3_3

New Line.l(r:p3udm39388-p3udt12031lv) Units=km Length=0.00855468 bus1=p3udt12031lv.1.2.3 bus2=p3udm39388.1.2.3 switch=n enabled=y phases=3 Linecode=3P_UG_AL_750kcmil_25_0_416_0_3_3_3_3

New Line.l(r:p3udt31137lv-p3ulv74051) Units=km Length=0.009661930000000003 bus1=p3udt31137lv.1.2.3 bus2=p3ulv74051.1.2.3 switch=n enabled=y phases=3 Linecode=3P_UG_AL_350kcmil_15_0_416_0_3_3_3_3

New Line.l(r:p3udt12031-p3udt31137) Units=km Length=0.163363 bus1=p3udt12031.1.2.3 bus2=p3udt31137.1.2.3 switch=n enabled=y phases=3 Linecode=3P_OH_AL_ACSR_4/0_Penguin_12_47_0_3_3_3_3

New Line.l(r:p3udt12031-p3udt25803) Units=km Length=0.152517 bus1=p3udt25803.1.2.3 bus2=p3udt12031.1.2.3 switch=n enabled=y phases=3 Linecode=3P_OH_AL_ACSR_4/0_Penguin_12_47_0_3_3_3_3

New Line.l(r:p3udt30118lv-p3ulv68694) Units=km Length=0.00793459 bus1=p3udt30118lv.1.2.3 bus2=p3ulv68694.1.2.3 switch=n enabled=y phases=3 Linecode=3P_UG_AL_350kcmil_15_0_416_0_3_3_3_3

New Line.l(r:p3udt12536lv-p3ulv16141) Units=km Length=0.00824073 bus1=p3udt12536lv.1.2.3 bus2=p3ulv16141.1.2.3 switch=n enabled=y phases=3 Linecode=3P_UG_AL_350kcmil_15_0_416_0_3_3_3_3

New Line.l(r:p3udt29633lv-p3ulv66329) Units=km Length=0.0120054 bus1=p3udt29633lv.1.2.3 bus2=p3ulv66329.1.2.3 switch=n enabled=y phases=3 Linecode=3P_UG_AL_350kcmil_15_0_416_0_3_3_3_3

New Line.l(r:p3udt23323lv-p3ulv41001) Units=km Length=0.0110392 bus1=p3udt23323lv.1.2.3 bus2=p3ulv41001.1.2.3 switch=n enabled=y phases=3 Linecode=3P_UG_AL_350kcmil_15_0_416_0_3_3_3_3

New Line.l(r:p3udt23323-p3udt29633) Units=km Length=0.054772 bus1=p3udt29633.1.2.3 bus2=p3udt23323.1.2.3 switch=n enabled=y phases=3 Linecode=3P_OH_AL_ACSR_4/0_Penguin_12_47_0_3_3_3_3

New Line.l(r:p3udt12536-p3udt29633) Units=km Length=0.0616815 bus1=p3udt12536.1.2.3 bus2=p3udt29633.1.2.3 switch=n enabled=y phases=3 Linecode=3P_OH_AL_ACSR_4/0_Penguin_12_47_0_3_3_3_3

New Line.l(r:p3udt12536-p3udt30118) Units=km Length=0.09813910000000002 bus1=p3udt30118.1.2.3 bus2=p3udt12536.1.2.3 switch=n enabled=y phases=3 Linecode=3P_OH_AL_ACSR_4/0_Penguin_12_47_0_3_3_3_3

New Line.l(r:p3udt26964-p3udt30118) Units=km Length=0.0140563 bus1=p3udt26964.1.2.3 bus2=p3udt30118.1.2.3 switch=n enabled=y phases=3 Linecode=3P_OH_AL_ACSR_4/0_Penguin_12_47_0_3_3_3_3

New Line.l(r:p3udt25803-p3udt26964) Units=km Length=0.116855 bus1=p3udt25803.1.2.3 bus2=p3udt26964.1.2.3 switch=n enabled=y phases=3 Linecode=3P_OH_AL_ACSR_4/0_Penguin_12_47_0_3_3_3_3

New Line.l(r:p3udt31388-p3udt31936) Units=km Length=0.23875800000000003 bus1=p3udt31388-p3udt31936x.1.2.3 bus2=p3udt31936.1.2.3 switch=n enabled=y phases=3 Linecode=3P_OH_AL_ACSR_1033kcmil_Curlew_12.47_1_3_3_3_3

New Line.l(r:p3udt10001-p3udt24264) Units=km Length=0.122861 bus1=p3udt10001-p3udt24264x.1.2.3 bus2=p3udt10001-p3udt24264x_b1_1.1.2.3 switch=n enabled=y phases=3 Linecode=3P_OH_AL_ACSR_1033kcmil_Curlew_12.47_1_3_3_3_3

New Line.l(r:p3udt23323-p3udt31137) Units=km Length=0.112758 bus1=p3udt23323-p3udt31137x.1.2.3 bus2=p3udt31137.1.2.3 switch=n enabled=y phases=3 Linecode=3P_OH_AL_ACSR_1033kcmil_Curlew_12.47_1_3_3_3_3

New Line.padswitch(r:p3udt19453-p3udt7786)p3u_175322 Units=km Length=0.001 bus1=p3udt19453.2 bus2=p3udt19453-p3udt7786x.2 switch=y enabled=y phases=1 Linecode=padswitch_1_1_1_1

New Line.padswitch(r:p3udt19453-p3udt7786)p3u_175323 Units=km Length=0.001 bus1=p3udt19453-p3udt7786xx.2 bus2=p3udt7786.2 switch=y enabled=y phases=1 Linecode=padswitch_1_3_1_1_1

New Line.padswitch(r:p3udt18479-p3udt19453)p3u_175324 Units=km Length=0.001 bus1=p3udt18479.2 bus2=p3udt18479-p3udt19453x.2 switch=y enabled=y phases=1 Linecode=padswitch_1_1_1_1

New Line.padswitch(r:p3udt18479-p3udt19453)p3u_175325 Units=km Length=0.001 bus1=p3udt18479-p3udt19453xx.2 bus2=p3udt19453.2 switch=y enabled=y phases=1 Linecode=padswitch_1_1_1_1

New Line.padswitch(r:p3udt18479-p3udt30855)p3u_175326 Units=km Length=0.001 bus1=p3udt30855.2 bus2=p3udt18479-p3udt30855xx.2 switch=y enabled=y phases=1 Linecode=padswitch_1_1_1_1

New Line.padswitch(r:p3udt18479-p3udt30855)p3u_175327 Units=km Length=0.001 bus1=p3udt18479-p3udt30855x.2 bus2=p3udt18479.2 switch=y enabled=y phases=1 Linecode=padswitch_1_1_1_1

New Line.padswitch(r:p3udt30855-p3udt32084)p3u_175328 Units=km Length=0.001 bus1=p3udt32084.2 bus2=p3udt30855-p3udt32084xx.2 switch=y enabled=y phases=1 Linecode=padswitch_1_1_1_1

New Line.padswitch(r:p3udt30855-p3udt32084)p3u_175329 Units=km Length=0.001 bus1=p3udt30855-p3udt32084x.2 bus2=p3udt30855.2 switch=y enabled=y phases=1 Linecode=padswitch_1_1_1_1

New Line.padswitch(r:p3udt32084-p3udt5287)p3u_175330 Units=km Length=0.001 bus1=p3udt5287.2 bus2=p3udt32084-p3udt5287xx.2 switch=y enabled=y phases=1 Linecode=padswitch_1_1_1_1

New Line.padswitch(r:p3udt32084-p3udt5287)p3u_175331 Units=km Length=0.001 bus1=p3udt32084-p3udt5287x.2 bus2=p3udt32084.2 switch=y enabled=y phases=1 Linecode=padswitch_1_1_1_1

New Line.padswitch(r:p3udt10520-p3udt5287)p3u_175332 Units=km Length=0.001 bus1=p3udt10520.2 bus2=p3udt10520-p3udt5287x.2 switch=y enabled=y phases=1 Linecode=padswitch_1_1_1_1

New Line.padswitch(r:p3udt10520-p3udt5287)p3u_175333 Units=km Length=0.001 bus1=p3udt10520-p3udt5287xx.2 bus2=p3udt5287.2 switch=y enabled=y phases=1 Linecode=padswitch_1_1_1_1

New Line.padswitch(r:p3udt10520-p3udt24731)p3u_175334 Units=km Length=0.001 bus1=p3udt24731.2 bus2=p3udt10520-p3udt24731xx.2 switch=y enabled=y phases=1 Linecode=padswitch_1_3_1_1_1

New Line.padswitch(r:p3udt10520-p3udt24731)p3u_175335 Units=km Length=0.001 bus1=p3udt10520-p3udt24731x.2 bus2=p3udt10520.2 switch=y enabled=y phases=1 Linecode=padswitch_1_1_1_1

New Line.padswitch(r:p3udt24029-p3udt24731)p3u_175336 Units=km Length=0.001 bus1=p3udt24029.2 bus2=p3udt24029-p3udt24731x.2 switch=y enabled=y phases=1 Linecode=padswitch_1_3_1_1_1

New Line.padswitch(r:p3udt24029-p3udt24731)p3u_175337 Units=km Length=0.001 bus1=p3udt24029-p3udt24731xx.2 bus2=p3udt24731.2 switch=y enabled=y phases=1 Linecode=padswitch_1_3_1_1_1

New Line.padswitch(r:p3udt1004-p3udt24029)p3u_175338 Units=km Length=0.001 bus1=p3udt1004.2 bus2=p3udt1004-p3udt24029x.2 switch=y enabled=y phases=1 Linecode=padswitch_1_1_1_1

New Line.padswitch(r:p3udt1004-p3udt24029)p3u_175339 Units=km Length=0.001 bus1=p3udt1004-p3udt24029xx.2 bus2=p3udt24029.2 switch=y enabled=y phases=1 Linecode=padswitch_1_3_1_1_1

New Line.padswitch(r:p3udt1004-p3udt29788)p3u_175340 Units=km Length=0.001 bus1=p3udt29788.2 bus2=p3udt1004-p3udt29788xx.2 switch=y enabled=y phases=1 Linecode=padswitch_1_1_1_1

New Line.padswitch(r:p3udt1004-p3udt29788)p3u_175341 Units=km Length=0.001 bus1=p3udt1004-p3udt29788x.2 bus2=p3udt1004.2 switch=y enabled=y phases=1 Linecode=padswitch_1_1_1_1

New Line.padswitch(r:p3udt28713-p3udt29788)p3u_175342 Units=km Length=0.001 bus1=p3udt28713-p3udt29788x.2 bus2=p3udt28713-p3udt29788xx.2 switch=y enabled=y phases=1 Linecode=padswitch_1_1_1_1

New Line.padswitch(r:p3udt28713-p3udt29788)p3u_175343 Units=km Length=0.001 bus1=p3udt28713-p3udt29788xxx.2 bus2=p3udt29788.2 switch=y enabled=y phases=1 Linecode=padswitch_1_1_1_1

New Line.padswitch(r:p3udt27714-p3udt3222)p3u_175318 Units=km Length=0.001 bus1=p3udt27714.1.2.3 bus2=p3udt27714-p3udt3222x.1.2.3 switch=y enabled=y phases=3 Linecode=padswitch_3_3_3_3

New Line.padswitch(r:p3udt27714-p3udt3222)p3u_175319 Units=km Length=0.001 bus1=p3udt27714-p3udt3222xx.1.2.3 bus2=p3udt3222.1.2.3 switch=y enabled=y phases=3 Linecode=padswitch_3_4_3_3_3

New Line.padswitch(r:p3udt27714-p3udt28713)p3u_175320 Units=km Length=0.001 bus1=p3udt28713.1.2.3 bus2=p3udt27714-p3udt28713xx.1.2.3 switch=y enabled=y phases=3 Linecode=padswitch_3_4_3_1_3_3

New Line.padswitch(r:p3udt27714-p3udt28713)p3u_175321 Units=km Length=0.001 bus1=p3udt27714-p3udt28713x.1.2.3 bus2=p3udt27714.1.2.3 switch=y enabled=y phases=3 Linecode=padswitch_3_4_3_1_3_1_3

New Line.padswitch(r:p3udt28713-p3udt8931)p3u_175344 Units=km Length=0.001 bus1=p3udt8931.1.2.3 bus2=p3udt28713-p3udt8931xx.1.2.3 switch=y enabled=y phases=3 Linecode=padswitch_3_4_3_1_3_1_3_1

New Line.padswitch(r:p3udt28713-p3udt8931)p3u_175345 Units=km Length=0.001 bus1=p3udt28713-p3udt8931x.1.2.3 bus2=p3udt28713.1.2.3 switch=y enabled=y phases=3 Linecode=padswitch_3_4_3_1_3_1_3_1

New Line.padswitch(r:p3udt19451-p3udt8931)p3u_175346 Units=km Length=0.001 bus1=p3udt19451.1.2.3 bus2=p3udt19451-p3udt8931x.1.2.3 switch=y enabled=y phases=3 Linecode=padswitch_3_4_3_1_3_1_3_1

New Line.padswitch(r:p3udt19451-p3udt8931)p3u_175347 Units=km Length=0.001 bus1=p3udt19451-p3udt8931xx.1.2.3 bus2=p3udt8931.1.2.3 switch=y enabled=y phases=3 Linecode=padswitch_3_4_3_1_3_1_3_1

New Line.elbswitch(r:p3udt31388-p3udt31936)p3u_206654 Units=km Length=0.001 bus1=p3udt31388.1.2.3 bus2=p3udt31388-p3udt31936x.1.2.3 switch=y enabled=n phases=3 Linecode=elbswitch_3_3_3_3

New Line.elbswitch(r:p3udt10001-p3udt24264)p3u_206704 Units=km Length=0.001 bus1=p3udt10001.1.2.3 bus2=p3udt10001-p3udt24264x.1.2.3 switch=y enabled=n phases=3 Linecode=elbswitch_3_3_3_3

New Line.elbswitch(r:p3udt23323-p3udt31137)p3u_206733 Units=km Length=0.001 bus1=p3udt23323.1.2.3 bus2=p3udt23323-p3udt31137x.1.2.3 switch=y enabled=n phases=3 Linecode=elbswitch_3_3_3_3

New Line.fuse(r:p3udt18792-p3udt8350)p3u_207639 Units=km Length=0.001 bus1=p3udt8350.3 bus2=p3udt18792-p3udt8350x.3 switch=n enabled=y phases=1 Linecode=fuse_1_1_1_1

New Fuse.Fuse_fuse(r:p3udt18792-p3udt8350)p3u_207639 monitoredobj=Line.fuse(r:p3udt18792-p3udt8350)p3u_207639 enabled=y ratedcurrent=100.0

New Line.fuse(r:p3udt10521-p3udt20374)p3u_207834 Units=km Length=0.001 bus1=p3udt10521.2 bus2=p3udt10521-p3udt20374x.2 switch=n enabled=y phases=1 Linecode=fuse_1_1_1_1

New Fuse.Fuse_fuse(r:p3udt10521-p3udt20374)p3u_207834 monitoredobj=Line.fuse(r:p3udt10521-p3udt20374)p3u_207834 enabled=y ratedcurrent=100.0

New Line.fuse(r:p3udt28713-p3udt29788)p3u_209669 Units=km Length=0.001 bus1=p3udt28713.2 bus2=p3udt28713-p3udt29788x.2 switch=n enabled=y phases=1 Linecode=fuse_1_7_1_1_1

New Fuse.Fuse_fuse(r:p3udt28713-p3udt29788)p3u_209669 monitoredobj=Line.fuse(r:p3udt28713-p3udt29788)p3u_209669 enabled=y ratedcurrent=100.0

New Line.fuse(r:p3udt30119-p3udt32215)p3u_209816 Units=km Length=0.001 bus1=p3udt30119.1 bus2=p3udt30119-p3udt32215x.1 switch=n enabled=y phases=1 Linecode=fuse_1_1_1_1

New Fuse.Fuse_fuse(r:p3udt30119-p3udt32215)p3u_209816 monitoredobj=Line.fuse(r:p3udt30119-p3udt32215)p3u_209816 enabled=y ratedcurrent=100.0

New Line.fuse(r:p3udt14252-p3udt31137)p3u_209918 Units=km Length=0.001 bus1=p3udt31137.3 bus2=p3udt14252-p3udt31137x.3 switch=n enabled=y phases=1 Linecode=fuse_1_7_1_1_1

New Fuse.Fuse_fuse(r:p3udt14252-p3udt31137)p3u_209918 monitoredobj=Line.fuse(r:p3udt14252-p3udt31137)p3u_209918 enabled=y ratedcurrent=100.0

New Line.fuse(r:p3udt24985-p3udt31252)p3u_209933 Units=km Length=0.001 bus1=p3udt31252.3 bus2=p3udt24985-p3udt31252x.3 switch=n enabled=y phases=1 Linecode=fuse_1_1_1_1

New Fuse.Fuse_fuse(r:p3udt24985-p3udt31252)p3u_209933 monitoredobj=Line.fuse(r:p3udt24985-p3udt31252)p3u_209933 enabled=y ratedcurrent=100.0

New Line.l(r:p3udt31388-p3uhs5_1247)_disconnect Units=km Length=0.001 bus1=p3udt31388-p3uhs5_1247x_b1_1.1.2.3 bus2=p3udt31388-p3uhs5_1247x_b2_1.1.2.3 switch=y enabled=y phases=3 Linecode=3P_OH_AL_ACSR_1033kcmil_Curlew_12.47_1_3_3_3_3

New Line.l(r:p3udt31388-p3uhs5_1247)_cont Units=km Length=2.699217 bus1=p3udt31388-p3uhs5_1247x_b2_1.1.2.3 bus2=p3udt31388.1.2.3 switch=n enabled=y phases=3 Linecode=3P_OH_AL_ACSR_1033kcmil_Curlew_12.47_1_3_3_3_3

New Line.l(r:p3udt14667-p3udt26597)_disconnect Units=km Length=0.001 bus1=p3udt26597_b1_1.1.2.3 bus2=p3udt26597_b2_1.1.2.3 switch=y enabled=y phases=3 Linecode=3P_OH_AL_ACSR_4/0_Penguin_12_47_0_3_3_3_3

New Line.l(r:p3udt14667-p3udt26597)_cont Units=km Length=0.8998245 bus1=p3udt26597_b2_1.1.2.3 bus2=p3udt14667.1.2.3 switch=n enabled=y phases=3 Linecode=3P_OH_AL_ACSR_4/0_Penguin_12_47_0_3_3_3_3

New Line.l(r:p3udt10001-p3udt24264)_disconnect Units=km Length=0.001 bus1=p3udt10001-p3udt24264x_b1_1.1.2.3 bus2=p3udt10001-p3udt24264x_b2_1.1.2.3 switch=y enabled=y phases=3 Linecode=3P_OH_AL_ACSR_1033kcmil_Curlew_12.47_1_3_3_3_3

New Line.l(r:p3udt10001-p3udt24264)_cont Units=km Length=1.114749 bus1=p3udt10001-p3udt24264x_b2_1.1.2.3 bus2=p3udt24264.1.2.3 switch=n enabled=y phases=3 Linecode=3P_OH_AL_ACSR_1033kcmil_Curlew_12.47_1_3_3_3_3
