New Capacitor.p3uc45 Bus1=p3udt27044 phases=3 Kv=12.47 conn=Wye Kvar=450.0

New CapControl.p3uc45 Capacitor=p3uc45 Element=Line.l(r:p3udt21085-p3udt27044) Terminal=1 delay=100.0 Type=voltage Vmin=120.5 Vmax=125.0 Ptratio=59.99631547328862 Ctratio=100.0

New Capacitor.p3uc48 Bus1=p3udt10738 phases=3 Kv=12.47 conn=Wye Kvar=450.0

New CapControl.p3uc48 Capacitor=p3uc48 Element=Line.l(r:p3udt10738-p3udt32132) Terminal=1 delay=100.0 Type=voltage Vmin=120.5 Vmax=125.0 Ptratio=59.99631547328862 Ctratio=100.0
