New Capacitor.p3uc44 Bus1=p3udt25511 phases=3 Kv=12.47 conn=Wye Kvar=600.0

New CapControl.p3uc44 Capacitor=p3uc44 Element=Line.l(r:p3udt24847-p3udt25511) Terminal=1 delay=100.0 Type=voltage Vmin=120.5 Vmax=125.0 Ptratio=59.99631547328862 Ctratio=100.0

New Capacitor.p3uc47 Bus1=p3udt29395 phases=3 Kv=12.47 conn=Wye Kvar=450.0

New CapControl.p3uc47 Capacitor=p3uc47 Element=Line.padswitch(r:p3udt16435-p3udt29395)p3u_176651 Terminal=1 delay=100.0 Type=voltage Vmin=120.5 Vmax=125.0 Ptratio=59.99631547328862 Ctratio=100.0
