New Capacitor.p3uc46 Bus1=p3udt20238 phases=3 Kv=12.47 conn=Wye Kvar=450.0

New CapControl.p3uc46 Capacitor=p3uc46 Element=Line.l(r:p3udt14896-p3udt20238) Terminal=1 delay=100.0 Type=voltage Vmin=120.5 Vmax=125.0 Ptratio=59.99631547328862 Ctratio=100.0
