New Line.l(r:p3udt3224lv-p3ulv3554) Units=km Length=0.00806558 bus1=p3udt3224lv.1.2 bus2=p3ulv3554.1.2 switch=n enabled=y phases=2 Linecode=1P_OH_AL_2/0_Rucina_0_416_0_2_2_2_2

New Line.l(r:p3udt5931lv-p3ulv6726) Units=km Length=0.00961216 bus1=p3udt5931lv.1.2 bus2=p3ulv6726.1.2 switch=n enabled=y phases=2 Linecode=1P_OH_AL_2/0_Rucina_0_416_0_2_2_2_2

New Line.l(r:p3udt8351lv-p3ulv9840) Units=km Length=0.0159138 bus1=p3udt8351lv.1.2 bus2=p3ulv9840.1.2 switch=n enabled=y phases=2 Linecode=1P_OH_AL_2/0_Rucina_0_416_0_2_2_2_2

New Line.l(r:p3udt8932lv-p3ulv10654) Units=km Length=0.00107056 bus1=p3udt8932lv.1.2 bus2=p3ulv10654.1.2 switch=n enabled=y phases=2 Linecode=1P_OH_AL_4_Periwinkle_0_416_0_2_2_2_2

New Line.l(r:p3udt14253lv-p3ulv19211) Units=km Length=0.0143059 bus1=p3udt14253lv.1.2 bus2=p3ulv19211.1.2 switch=n enabled=y phases=2 Linecode=1P_OH_AL_2/0_Rucina_0_416_0_2_2_2_2

New Line.l(r:p3udt17054lv-p3ulv24746) Units=km Length=0.00473194 bus1=p3udt17054lv.1.2 bus2=p3ulv24746.1.2 switch=n enabled=y phases=2 Linecode=1P_OH_AL_2/0_Rucina_0_416_0_2_2_2_2

New Line.l(r:p3udt17054lv-p3ulv60203) Units=km Length=0.012084100000000002 bus1=p3udt17054lv.1.2 bus2=p3ulv60203.1.2 switch=n enabled=y phases=2 Linecode=1P_OH_AL_2/0_Rucina_0_416_0_2_2_2_2

New Line.l(r:p3udt17789lv-p3ulv26334) Units=km Length=0.00600427 bus1=p3udt17789lv.1.2 bus2=p3ulv26334.1.2 switch=n enabled=y phases=2 Linecode=1P_OH_AL_2/0_Rucina_0_416_0_2_2_2_2

New Line.l(r:p3udt18793lv-p3ulv28594) Units=km Length=0.00568251 bus1=p3udt18793lv.1.2 bus2=p3ulv28594.1.2 switch=n enabled=y phases=2 Linecode=1P_OH_AL_2/0_Rucina_0_416_0_2_2_2_2

New Line.l(r:p3udt19130lv-p3ulv77112) Units=km Length=0.0134072 bus1=p3udt19130lv.1.2 bus2=p3ulv77112.1.2 switch=n enabled=y phases=2 Linecode=1P_OH_AL_2/0_Rucina_0_416_0_2_2_2_2

New Line.l(r:p3udm57867-p3ulv29363) Units=km Length=0.00842093 bus1=p3udm57867.1.2 bus2=p3ulv29363.1.2 switch=n enabled=y phases=2 Linecode=1P_OH_AL_2/0_Rucina_0_416_0_2_2_2_2

New Line.l(r:p3udm57867-p3udt19130lv) Units=km Length=0.0109801 bus1=p3udt19130lv.1.2 bus2=p3udm57867.1.2 switch=n enabled=y phases=2 Linecode=1P_OH_AL_2/0_Rucina_0_416_0_2_2_2_2

New Line.l(r:p3udt19454lv-p3ulv30126) Units=km Length=0.00899255 bus1=p3udt19454lv.1.2 bus2=p3ulv30126.1.2 switch=n enabled=y phases=2 Linecode=1P_OH_AL_2/0_Rucina_0_416_0_2_2_2_2

New Line.l(r:p3udt23783lv-p3ulv42553) Units=km Length=0.0107976 bus1=p3udt23783lv.1.2 bus2=p3ulv42553.1.2 switch=n enabled=y phases=2 Linecode=1P_OH_AL_2/0_Rucina_0_416_0_2_2_2_2

New Line.l(r:p3udt24030lv-p3ulv43325) Units=km Length=0.00672943 bus1=p3udt24030lv.1.2 bus2=p3ulv43325.1.2 switch=n enabled=y phases=2 Linecode=1P_OH_AL_2/0_Rucina_0_416_0_2_0_2_2_2

New Line.l(r:p3udm71634-p3ulv51799) Units=km Length=0.00444855 bus1=p3udm71634.1.2 bus2=p3ulv51799.1.2 switch=n enabled=y phases=2 Linecode=1P_OH_AL_2/0_Rucina_0_416_0_2_2_2_2

New Line.l(r:p3udm71634-p3udt26400lv) Units=km Length=0.0119432 bus1=p3udt26400lv.1.2 bus2=p3udm71634.1.2 switch=n enabled=y phases=2 Linecode=1P_OH_AL_2/0_Rucina_0_416_0_2_2_2_2

New Line.l(r:p3udm71635-p3ulv77113) Units=km Length=0.003986 bus1=p3udm71635.1.2 bus2=p3ulv77113.1.2 switch=n enabled=y phases=2 Linecode=1P_OH_AL_4_Periwinkle_0_416_0_2_2_2_2

New Line.l(r:p3udm71635-p3udt26400lv) Units=km Length=0.0119571 bus1=p3udt26400lv.1.2 bus2=p3udm71635.1.2 switch=n enabled=y phases=2 Linecode=1P_OH_AL_2/0_Rucina_0_416_0_2_2_2_2

New Line.l(r:p3udt28864lv-p3ulv62520) Units=km Length=0.00726935 bus1=p3udt28864lv.1.2 bus2=p3ulv62520.1.2 switch=n enabled=y phases=2 Linecode=1P_OH_AL_2/0_Rucina_0_416_0_2_2_2_2

New Line.l(r:p3udt29786lv-p3ulv67111) Units=km Length=0.0105973 bus1=p3udt29786lv.1.2 bus2=p3ulv67111.1.2 switch=n enabled=y phases=2 Linecode=1P_OH_AL_2/0_Rucina_0_416_0_2_2_2_2

New Line.l(r:p3udm76132-p3ulv72517) Units=km Length=0.008695110000000002 bus1=p3udm76132.1.2 bus2=p3ulv72517.1.2 switch=n enabled=y phases=2 Linecode=1P_OH_AL_2/0_Rucina_0_416_0_2_2_2_2

New Line.l(r:p3udm76132-p3udt29786lv) Units=km Length=0.00907167 bus1=p3udt29786lv.1.2 bus2=p3udm76132.1.2 switch=n enabled=y phases=2 Linecode=1P_OH_AL_2/0_Rucina_0_416_0_2_2_2_2

New Line.l(r:p3udt29789lv-p3ulv67118) Units=km Length=0.0102196 bus1=p3udt29789lv.1.2 bus2=p3ulv67118.1.2 switch=n enabled=y phases=2 Linecode=1P_OH_AL_2/0_Rucina_0_416_0_2_2_2_2

New Line.l(r:p3udt30709lv-p3ulv71760) Units=km Length=0.00627204 bus1=p3udt30709lv.1.2 bus2=p3ulv71760.1.2 switch=n enabled=y phases=2 Linecode=1P_OH_AL_2/0_Rucina_0_416_0_2_2_2_2

New Line.l(r:p3udt30709lv-p3ulv73277) Units=km Length=0.00793305 bus1=p3udt30709lv.1.2 bus2=p3ulv73277.1.2 switch=n enabled=y phases=2 Linecode=1P_OH_AL_2/0_Rucina_0_416_0_2_2_2_2

New Line.l(r:p3udt30710lv-p3ulv71761) Units=km Length=0.00621072 bus1=p3udt30710lv.1.2 bus2=p3ulv71761.1.2 switch=n enabled=y phases=2 Linecode=1P_OH_AL_2/0_Rucina_0_416_0_2_2_2_2

New Line.l(r:p3udt3223-p3udt5931) Units=km Length=0.001 bus1=p3udt3223-p3udt5931x.1 bus2=p3udt5931.1 switch=n enabled=y phases=1 Linecode=1P_OH_AL_ACSR_#2_Sparrow_12_47_0_1_1_1_1

New Line.l(r:p3udt19130-p3udt3223) Units=km Length=0.0528914 bus1=p3udt19130-p3udt3223x.2 bus2=p3udt19130.2 switch=n enabled=y phases=1 Linecode=1P_OH_AL_ACSR_#2_Sparrow_12_47_0_1_1_1_1

New Line.l(r:p3udt17789-p3udt8932) Units=km Length=0.0367094 bus1=p3udt17789.3 bus2=p3udt8932.3 switch=n enabled=y phases=1 Linecode=1P_OH_AL_ACSR_#2_Sparrow_12_47_0_1_1_1_1

New Line.l(r:p3udt17789-p3udt30710) Units=km Length=0.0367094 bus1=p3udt30710.3 bus2=p3udt17789.3 switch=n enabled=y phases=1 Linecode=1P_OH_AL_ACSR_#2_Sparrow_12_47_0_1_1_1_1

New Line.l(r:p3udt15487-p3udt30710) Units=km Length=0.0415467 bus1=p3udt15487-p3udt30710x.3 bus2=p3udt30710.3 switch=n enabled=y phases=1 Linecode=1P_OH_AL_ACSR_#2_Sparrow_12_47_0_1_1_1_1

New Line.l(r:p3udt21745-p3udt24030) Units=km Length=0.001 bus1=p3udt21745-p3udt24030x.3 bus2=p3udt24030.3 switch=n enabled=y phases=1 Linecode=1P_OH_AL_ACSR_#2_Sparrow_12_47_0_1_1_1_1

New Line.l(r:p3udt12032-p3udt28864) Units=km Length=0.001 bus1=p3udt12032-p3udt28864x.2 bus2=p3udt28864.2 switch=n enabled=y phases=1 Linecode=1P_OH_AL_ACSR_#2_Sparrow_12_47_0_1_1_1_1

New Line.l(r:p3udt23783-p3udt26400) Units=km Length=0.0338698 bus1=p3udt26400.2 bus2=p3udt23783.2 switch=n enabled=y phases=1 Linecode=1P_OH_AL_ACSR_#2_Sparrow_12_47_0_1_1_1_1

New Line.l(r:p3udt26400-p3udt30709) Units=km Length=0.0250896 bus1=p3udt26400-p3udt30709x.2 bus2=p3udt26400.2 switch=n enabled=y phases=1 Linecode=1P_OH_AL_ACSR_#2_Sparrow_12_47_0_1_1_1_1

New Line.l(r:p3udt27347-p3udt32212) Units=km Length=0.217206 bus1=p3udt27347.1.2.3 bus2=p3udt32212.1.2.3 switch=n enabled=y phases=3 Linecode=3P_OH_AL_ACSR_4/0_Penguin_12_47_0_3_3_3_3

New Line.l(r:p3udt19128-p3udt27347) Units=km Length=0.223418 bus1=p3udt19128.1.2.3 bus2=p3udt27347.1.2.3 switch=n enabled=y phases=3 Linecode=3P_OH_AL_ACSR_4/0_Penguin_12_47_0_3_3_3_3

New Line.l(r:p3udt19128-p3uhs7_1247) Units=km Length=0.4366130000000001 bus1=p3udt19128-p3uhs7_1247x.1.2.3 bus2=p3udt19128-p3uhs7_1247x_b1_1.1.2.3 switch=n enabled=y phases=3 Linecode=3P_OH_AL_ACSR_4/0_Penguin_12_47_0_3_3_3_3

New Line.l(r:p3udt19128lv-p3ulv29357) Units=km Length=0.0237813 bus1=p3udt19128lv.1.2.3 bus2=p3ulv29357.1.2.3 switch=n enabled=y phases=3 Linecode=3P_UG_AL_750kcmil_25_0_416_0_3_3_3_3

New Line.l(r:p3udm73008-p3ulv55654) Units=km Length=0.00470677 bus1=p3udm73008.1.2.3 bus2=p3ulv55654.1.2.3 switch=n enabled=y phases=3 Linecode=3P_UG_AL_750kcmil_25_0_416_0_3_3_3_3

New Line.l(r:p3udm73008-p3udt27347lv) Units=km Length=0.0506927 bus1=p3udt27347lv.1.2.3 bus2=p3udm73008.1.2.3 switch=n enabled=y phases=3 Linecode=3P_UG_AL_750kcmil_25_0_416_0_3_3_3_3

New Line.l(r:p3udm73009-p3ulv75510) Units=km Length=0.0315137 bus1=p3udm73009.1.2.3 bus2=p3ulv75510.1.2.3 switch=n enabled=y phases=3 Linecode=3P_UG_AL_350kcmil_15_0_416_0_3_3_3_3

New Line.l(r:p3udm73009-p3udt27347lv) Units=km Length=0.0269972 bus1=p3udt27347lv.1.2.3 bus2=p3udm73009.1.2.3 switch=n enabled=y phases=3 Linecode=3P_UG_AL_350kcmil_15_0_416_0_3_3_3_3

New Line.l(r:p3udt15486lv-p3ulv21524) Units=km Length=0.0155657 bus1=p3udt15486lv.1.2.3 bus2=p3ulv21524.1.2.3 switch=n enabled=y phases=3 Linecode=3P_UG_AL_350kcmil_15_0_416_0_3_3_3_3

New Line.l(r:p3udt27716lv-p3ulv57182) Units=km Length=0.0095607 bus1=p3udt27716lv.1.2.3 bus2=p3ulv57182.1.2.3 switch=n enabled=y phases=3 Linecode=3P_UG_AL_350kcmil_15_0_416_0_3_3_3_3

New Line.l(r:p3udt31935lv-p3ulv78650) Units=km Length=0.00996488 bus1=p3udt31935lv.1.2.3 bus2=p3ulv78650.1.2.3 switch=n enabled=y phases=3 Linecode=3P_UG_AL_350kcmil_15_0_416_0_3_3_3_3

New Line.l(r:p3udt7787lv-p3ulv9099) Units=km Length=0.019003100000000002 bus1=p3udt7787lv.1.2.3 bus2=p3ulv9099.1.2.3 switch=n enabled=y phases=3 Linecode=3P_UG_AL_350kcmil_15_0_416_0_3_3_3_3

New Line.l(r:p3udt30708lv-p3ulv71759) Units=km Length=0.0174533 bus1=p3udt30708lv.1.2.3 bus2=p3ulv71759.1.2.3 switch=n enabled=y phases=3 Linecode=3P_UG_AL_350kcmil_15_0_416_0_3_3_3_3

New Line.l(r:p3udt19791lv-p3ulv52581) Units=km Length=0.0152249 bus1=p3udt19791lv.1.2.3 bus2=p3ulv52581.1.2.3 switch=n enabled=y phases=3 Linecode=3P_UG_AL_350kcmil_15_0_416_0_3_3_3_3

New Line.l(r:p3udm59365-p3ulv30910) Units=km Length=0.013227 bus1=p3udm59365.1.2.3 bus2=p3ulv30910.1.2.3 switch=n enabled=y phases=3 Linecode=3P_UG_AL_350kcmil_15_0_416_0_3_3_3_3

New Line.l(r:p3udm59365-p3udt19791lv) Units=km Length=0.0124539 bus1=p3udt19791lv.1.2.3 bus2=p3udm59365.1.2.3 switch=n enabled=y phases=3 Linecode=3P_UG_AL_350kcmil_15_0_416_0_3_3_3_3

New Line.l(r:p3udt19791-p3udt30708) Units=km Length=0.0284262 bus1=p3udt30708.1.2.3 bus2=p3udt19791.1.2.3 switch=n enabled=y phases=3 Linecode=3P_OH_AL_ACSR_4/0_Penguin_12_47_0_3_3_3_3

New Line.l(r:p3udt30708-p3udt7787) Units=km Length=0.0634419 bus1=p3udt7787.1.2.3 bus2=p3udt30708.1.2.3 switch=n enabled=y phases=3 Linecode=3P_OH_AL_ACSR_4/0_Penguin_12_47_0_3_3_3_3

New Line.l(r:p3udt14253-p3udt7787) Units=km Length=0.0795331 bus1=p3udt14253.1.2.3 bus2=p3udt7787.1.2.3 switch=n enabled=y phases=3 Linecode=3P_OH_AL_ACSR_4/0_Penguin_12_47_0_3_3_3_3

New Line.l(r:p3udt14253-p3udt31935) Units=km Length=0.0257143 bus1=p3udt31935.1.2.3 bus2=p3udt14253.1.2.3 switch=n enabled=y phases=3 Linecode=3P_OH_AL_ACSR_4/0_Penguin_12_47_0_3_3_3_3

New Line.l(r:p3udt27716-p3udt31935) Units=km Length=0.0628263 bus1=p3udt27716.1.2.3 bus2=p3udt31935.1.2.3 switch=n enabled=y phases=3 Linecode=3P_OH_AL_ACSR_4/0_Penguin_12_47_0_3_3_3_3

New Line.l(r:p3udt15486-p3udt27716) Units=km Length=0.0426885 bus1=p3udt15486.1.2.3 bus2=p3udt27716.1.2.3 switch=n enabled=y phases=3 Linecode=3P_OH_AL_ACSR_4/0_Penguin_12_47_0_3_3_3_3

New Line.l(r:p3udt28057lv-p3ulv58739) Units=km Length=0.014885400000000002 bus1=p3udt28057lv.1.2.3 bus2=p3ulv58739.1.2.3 switch=n enabled=y phases=3 Linecode=3P_UG_AL_350kcmil_15_0_416_0_3_3_3_3

New Line.l(r:p3udt25202lv-p3ulv47278) Units=km Length=0.0174397 bus1=p3udt25202lv.1.2.3 bus2=p3ulv47278.1.2.3 switch=n enabled=y phases=3 Linecode=3P_UG_AL_350kcmil_15_0_416_0_3_3_3_3

New Line.l(r:p3udt25202-p3udt28057) Units=km Length=0.0750961 bus1=p3udt28057.1.2.3 bus2=p3udt25202.1.2.3 switch=n enabled=y phases=3 Linecode=3P_OH_AL_ACSR_4/0_Penguin_12_47_0_3_3_3_3

New Line.l(r:p3udt15486-p3udt28057) Units=km Length=0.0731115 bus1=p3udt15486.1.2.3 bus2=p3udt28057.1.2.3 switch=n enabled=y phases=3 Linecode=3P_OH_AL_ACSR_4/0_Penguin_12_47_0_3_3_3_3

New Line.l(r:p3udt15486-p3udt8351) Units=km Length=0.0661657 bus1=p3udt8351.1.2.3 bus2=p3udt15486.1.2.3 switch=n enabled=y phases=3 Linecode=3P_OH_AL_ACSR_4/0_Penguin_12_47_0_3_3_3_3

New Line.l(r:p3udt27347-p3udt8351) Units=km Length=0.223354 bus1=p3udt27347.1.2.3 bus2=p3udt8351.1.2.3 switch=n enabled=y phases=3 Linecode=3P_OH_AL_ACSR_4/0_Penguin_12_47_0_3_3_3_3

New Line.l(r:p3udt28381lv-p3ulv60199) Units=km Length=0.0146338 bus1=p3udt28381lv.1.2.3 bus2=p3ulv60199.1.2.3 switch=n enabled=y phases=3 Linecode=3P_UG_AL_350kcmil_15_0_416_0_3_3_3_3

New Line.l(r:p3udt28381-p3udt29786) Units=km Length=0.026806 bus1=p3udt29786.1.2.3 bus2=p3udt28381.1.2.3 switch=n enabled=y phases=3 Linecode=3P_OH_AL_ACSR_4/0_Penguin_12_47_0_3_3_3_3

New Line.l(r:p3udt27347-p3udt29786) Units=km Length=0.159312 bus1=p3udt27347.1.2.3 bus2=p3udt29786.1.2.3 switch=n enabled=y phases=3 Linecode=3P_OH_AL_ACSR_4/0_Penguin_12_47_0_3_3_3_3

New Line.l(r:p3udt26196lv-p3ulv51017) Units=km Length=0.013167 bus1=p3udt26196lv.1.2.3 bus2=p3ulv51017.1.2.3 switch=n enabled=y phases=3 Linecode=3P_UG_AL_350kcmil_15_0_416_0_3_3_3_3

New Line.l(r:p3udt15064lv-p3ulv20726) Units=km Length=0.0157588 bus1=p3udt15064lv.1.2.3 bus2=p3ulv20726.1.2.3 switch=n enabled=y phases=3 Linecode=3P_UG_AL_350kcmil_15_0_416_0_3_3_3_3

New Line.l(r:p3udt13814lv-p3ulv18445) Units=km Length=0.0127447 bus1=p3udt13814lv.1.2.3 bus2=p3ulv18445.1.2.3 switch=n enabled=y phases=3 Linecode=3P_UG_AL_350kcmil_15_0_416_0_3_3_3_3

New Line.l(r:p3udt13814-p3udt15064) Units=km Length=0.102071 bus1=p3udt15064.1.2.3 bus2=p3udt13814.1.2.3 switch=n enabled=y phases=3 Linecode=3P_OH_AL_ACSR_4/0_Penguin_12_47_0_3_3_3_3

New Line.l(r:p3udt15064-p3udt26196) Units=km Length=0.09977200000000001 bus1=p3udt26196.1.2.3 bus2=p3udt15064.1.2.3 switch=n enabled=y phases=3 Linecode=3P_OH_AL_ACSR_4/0_Penguin_12_47_0_3_3_3_3

New Line.l(r:p3udt1005lv-p3ulv1168) Units=km Length=0.0136954 bus1=p3udt1005lv.1.2.3 bus2=p3ulv1168.1.2.3 switch=n enabled=y phases=3 Linecode=3P_UG_AL_350kcmil_15_0_416_0_3_3_3_3

New Line.l(r:p3udt17416lv-p3ulv25515) Units=km Length=0.015046900000000002 bus1=p3udt17416lv.1.2.3 bus2=p3ulv25515.1.2.3 switch=n enabled=y phases=3 Linecode=3P_UG_AL_350kcmil_15_0_416_0_3_3_3_3

New Line.l(r:p3udt17416lv-p3ulv38631) Units=km Length=0.0151699 bus1=p3udt17416lv.1.2.3 bus2=p3ulv38631.1.2.3 switch=n enabled=y phases=3 Linecode=3P_UG_AL_350kcmil_15_0_416_0_3_3_3_3

New Line.l(r:p3udt7202lv-p3ulv8333) Units=km Length=0.0171205 bus1=p3udt7202lv.1.2.3 bus2=p3ulv8333.1.2.3 switch=n enabled=y phases=3 Linecode=3P_UG_AL_350kcmil_15_0_416_0_3_3_3_3

New Line.l(r:p3udt7202lv-p3ulv69416) Units=km Length=0.0145549 bus1=p3udt7202lv.1.2.3 bus2=p3ulv69416.1.2.3 switch=n enabled=y phases=3 Linecode=3P_UG_AL_350kcmil_15_0_416_0_3_3_3_3

New Line.l(r:p3udt9487lv-p3ulv11470) Units=km Length=0.0127322 bus1=p3udt9487lv.1.2.3 bus2=p3ulv11470.1.2.3 switch=n enabled=y phases=3 Linecode=3P_UG_AL_350kcmil_15_0_416_0_3_3_3_3

New Line.l(r:p3udt7202-p3udt9487) Units=km Length=0.0392425 bus1=p3udt7202.1.2.3 bus2=p3udt9487.1.2.3 switch=n enabled=y phases=3 Linecode=3P_OH_AL_ACSR_4/0_Penguin_12_47_0_3_3_3_3

New Line.l(r:p3udt17416-p3udt7202) Units=km Length=0.0541455 bus1=p3udt17416.1.2.3 bus2=p3udt7202.1.2.3 switch=n enabled=y phases=3 Linecode=3P_OH_AL_ACSR_4/0_Penguin_12_47_0_3_3_3_3

New Line.l(r:p3udt1005-p3udt17416) Units=km Length=0.071743 bus1=p3udt1005.1.2.3 bus2=p3udt17416.1.2.3 switch=n enabled=y phases=3 Linecode=3P_OH_AL_ACSR_4/0_Penguin_12_47_0_3_3_3_3

New Line.l(r:p3udt1005-p3udt17054) Units=km Length=0.0203374 bus1=p3udt17054.1.2.3 bus2=p3udt1005.1.2.3 switch=n enabled=y phases=3 Linecode=3P_OH_AL_ACSR_4/0_Penguin_12_47_0_3_3_3_3

New Line.l(r:p3udt17054-p3udt26196) Units=km Length=0.0379351 bus1=p3udt26196.1.2.3 bus2=p3udt17054.1.2.3 switch=n enabled=y phases=3 Linecode=3P_OH_AL_ACSR_4/0_Penguin_12_47_0_3_3_3_3

New Line.l(r:p3udt26196-p3udt29789) Units=km Length=0.021183600000000004 bus1=p3udt29789.1.2.3 bus2=p3udt26196.1.2.3 switch=n enabled=y phases=3 Linecode=3P_OH_AL_ACSR_4/0_Penguin_12_47_0_3_3_3_3

New Line.l(r:p3udt27347-p3udt29789) Units=km Length=0.20595 bus1=p3udt27347.1.2.3 bus2=p3udt29789.1.2.3 switch=n enabled=y phases=3 Linecode=3P_OH_AL_ACSR_4/0_Penguin_12_47_0_3_3_3_3

New Line.l(r:p3udt32212lv-p3ulv80156) Units=km Length=0.00534619 bus1=p3udt32212lv.1.2.3 bus2=p3ulv80156.1.2.3 switch=n enabled=y phases=3 Linecode=3P_UG_AL_750kcmil_25_0_416_0_3_3_3_3

New Line.l(r:p3udt15487lv-p3ulv21525) Units=km Length=0.00617148 bus1=p3udt15487lv.1.2.3 bus2=p3ulv21525.1.2.3 switch=n enabled=y phases=3 Linecode=3P_UG_AL_350kcmil_15_0_416_0_3_3_3_3

New Line.l(r:p3udt28225lv-p3ulv59469) Units=km Length=0.00655046 bus1=p3udt28225lv.1.2.3 bus2=p3ulv59469.1.2.3 switch=n enabled=y phases=3 Linecode=3P_UG_AL_350kcmil_15_0_416_0_3_3_3_3

New Line.l(r:p3udt1751lv-p3ulv1948) Units=km Length=0.009155350000000001 bus1=p3udt1751lv.1.2.3 bus2=p3ulv1948.1.2.3 switch=n enabled=y phases=3 Linecode=3P_UG_AL_350kcmil_15_0_416_0_3_3_3_3

New Line.l(r:p3udt1751-p3udt28225) Units=km Length=0.06176000000000001 bus1=p3udt28225.1.2.3 bus2=p3udt1751.1.2.3 switch=n enabled=y phases=3 Linecode=3P_OH_AL_ACSR_4/0_Penguin_12_47_0_3_3_3_3

New Line.l(r:p3udt3223lv-p3ulv3553) Units=km Length=0.00594079 bus1=p3udt3223lv.1.2.3 bus2=p3ulv3553.1.2.3 switch=n enabled=y phases=3 Linecode=3P_UG_AL_350kcmil_15_0_416_0_3_3_3_3

New Line.l(r:p3udt28225-p3udt3223) Units=km Length=0.063362 bus1=p3udt28225.1.2.3 bus2=p3udt3223.1.2.3 switch=n enabled=y phases=3 Linecode=3P_OH_AL_ACSR_4/0_Penguin_12_47_0_3_3_3_3

New Line.l(r:p3udt15487-p3udt28225) Units=km Length=0.0406933 bus1=p3udt15487.1.2.3 bus2=p3udt28225.1.2.3 switch=n enabled=y phases=3 Linecode=3P_OH_AL_ACSR_4/0_Penguin_12_47_0_3_3_3_3

New Line.l(r:p3udt15487-p3udt3224) Units=km Length=0.03044 bus1=p3udt3224.1.2.3 bus2=p3udt15487.1.2.3 switch=n enabled=y phases=3 Linecode=3P_OH_AL_ACSR_4/0_Penguin_12_47_0_3_3_3_3

New Line.l(r:p3udt21745lv-p3ulv36376) Units=km Length=0.00884119 bus1=p3udt21745lv.1.2.3 bus2=p3ulv36376.1.2.3 switch=n enabled=y phases=3 Linecode=3P_UG_AL_350kcmil_15_0_416_0_3_3_3_3

New Line.l(r:p3udt12032lv-p3ulv29362) Units=km Length=0.00837244 bus1=p3udt12032lv.1.2.3 bus2=p3ulv29362.1.2.3 switch=n enabled=y phases=3 Linecode=3P_UG_AL_350kcmil_15_0_416_0_3_3_3_3

New Line.l(r:p3udm39389-p3ulv15337) Units=km Length=0.00564163 bus1=p3udm39389.1.2.3 bus2=p3ulv15337.1.2.3 switch=n enabled=y phases=3 Linecode=3P_UG_AL_350kcmil_15_0_416_0_3_3_3_3

New Line.l(r:p3udm39389-p3udt12032lv) Units=km Length=0.0120909 bus1=p3udt12032lv.1.2.3 bus2=p3udm39389.1.2.3 switch=n enabled=y phases=3 Linecode=3P_UG_AL_350kcmil_15_0_416_0_3_3_3_3

New Line.l(r:p3udt12032-p3udt19454) Units=km Length=0.0340298 bus1=p3udt19454.1.2.3 bus2=p3udt12032.1.2.3 switch=n enabled=y phases=3 Linecode=3P_OH_AL_ACSR_4/0_Penguin_12_47_0_3_3_3_3

New Line.l(r:p3udt18793-p3udt19454) Units=km Length=0.030450900000000003 bus1=p3udt18793.1.2.3 bus2=p3udt19454.1.2.3 switch=n enabled=y phases=3 Linecode=3P_OH_AL_ACSR_4/0_Penguin_12_47_0_3_3_3_3

New Line.l(r:p3udt18793-p3udt30709) Units=km Length=0.04144840000000001 bus1=p3udt30709.1.2.3 bus2=p3udt18793.1.2.3 switch=n enabled=y phases=3 Linecode=3P_OH_AL_ACSR_4/0_Penguin_12_47_0_3_3_3_3

New Line.l(r:p3udt21745-p3udt30709) Units=km Length=0.0523002 bus1=p3udt21745.1.2.3 bus2=p3udt30709.1.2.3 switch=n enabled=y phases=3 Linecode=3P_OH_AL_ACSR_4/0_Penguin_12_47_0_3_3_3_3

New Line.l(r:p3udt21745-p3udt3224) Units=km Length=0.036023 bus1=p3udt3224.1.2.3 bus2=p3udt21745.1.2.3 switch=n enabled=y phases=3 Linecode=3P_OH_AL_ACSR_4/0_Penguin_12_47_0_3_3_3_3

New Line.l(r:p3udt32212-p3udt3224) Units=km Length=0.385169 bus1=p3udt32212.1.2.3 bus2=p3udt3224.1.2.3 switch=n enabled=y phases=3 Linecode=3P_OH_AL_ACSR_4/0_Penguin_12_47_0_3_3_3_3

New Line.l(r:p3udt1005-p3udt18134) Units=km Length=0.197266 bus1=p3udt1005-p3udt18134x.1.2.3 bus2=p3udt18134.1.2.3 switch=n enabled=y phases=3 Linecode=3P_OH_AL_ACSR_1033kcmil_Curlew_12.47_1_3_3_3_3

New Line.l(r:p3udt1751-p3udt29194) Units=km Length=0.103673 bus1=p3udt1751-p3udt29194x.1.2.3 bus2=p3udt1751-p3udt29194x_b1_1.1.2.3 switch=n enabled=y phases=3 Linecode=3P_OH_AL_ACSR_1033kcmil_Curlew_12.47_1_3_3_3_3

New Line.l(r:p3udt15064-p3udt8351) Units=km Length=0.0649896 bus1=p3udt15064-p3udt8351x.1.2.3 bus2=p3udt15064.1.2.3 switch=n enabled=y phases=3 Linecode=3P_OH_AL_ACSR_1033kcmil_Curlew_12.47_1_3_3_3_3

New Line.elbswitch(r:p3udt1005-p3udt18134)p3u_206638 Units=km Length=0.001 bus1=p3udt1005.1.2.3 bus2=p3udt1005-p3udt18134x.1.2.3 switch=y enabled=n phases=3 Linecode=elbswitch_3_3_3_3

New Line.elbswitch(r:p3udt1751-p3udt29194)p3u_206685 Units=km Length=0.001 bus1=p3udt1751.1.2.3 bus2=p3udt1751-p3udt29194x.1.2.3 switch=y enabled=n phases=3 Linecode=elbswitch_3_3_3_3

New Line.elbswitch(r:p3udt15064-p3udt8351)p3u_206747 Units=km Length=0.001 bus1=p3udt8351.1.2.3 bus2=p3udt15064-p3udt8351x.1.2.3 switch=y enabled=n phases=3 Linecode=elbswitch_3_3_3_3

New Line.fuse(r:p3udt3223-p3udt5931)p3u_207142 Units=km Length=0.001 bus1=p3udt3223.1 bus2=p3udt3223-p3udt5931x.1 switch=n enabled=y phases=1 Linecode=fuse_1_1_1_1

New Fuse.Fuse_fuse(r:p3udt3223-p3udt5931)p3u_207142 monitoredobj=Line.fuse(r:p3udt3223-p3udt5931)p3u_207142 enabled=y ratedcurrent=100.0

New Line.fuse(r:p3udt19130-p3udt3223)p3u_207143 Units=km Length=0.001 bus1=p3udt3223.2 bus2=p3udt19130-p3udt3223x.2 switch=n enabled=y phases=1 Linecode=fuse_1_1_1_1

New Fuse.Fuse_fuse(r:p3udt19130-p3udt3223)p3u_207143 monitoredobj=Line.fuse(r:p3udt19130-p3udt3223)p3u_207143 enabled=y ratedcurrent=100.0

New Line.fuse(r:p3udt12032-p3udt28864)p3u_207976 Units=km Length=0.001 bus1=p3udt12032.2 bus2=p3udt12032-p3udt28864x.2 switch=n enabled=y phases=1 Linecode=fuse_1_7_1_1_1

New Fuse.Fuse_fuse(r:p3udt12032-p3udt28864)p3u_207976 monitoredobj=Line.fuse(r:p3udt12032-p3udt28864)p3u_207976 enabled=y ratedcurrent=100.0

New Line.fuse(r:p3udt15487-p3udt30710)p3u_208319 Units=km Length=0.001 bus1=p3udt15487.3 bus2=p3udt15487-p3udt30710x.3 switch=n enabled=y phases=1 Linecode=fuse_1_1_1_1

New Fuse.Fuse_fuse(r:p3udt15487-p3udt30710)p3u_208319 monitoredobj=Line.fuse(r:p3udt15487-p3udt30710)p3u_208319 enabled=y ratedcurrent=100.0

New Line.fuse(r:p3udt21745-p3udt24030)p3u_208957 Units=km Length=0.001 bus1=p3udt21745.3 bus2=p3udt21745-p3udt24030x.3 switch=n enabled=y phases=1 Linecode=fuse_1_1_1_1

New Fuse.Fuse_fuse(r:p3udt21745-p3udt24030)p3u_208957 monitoredobj=Line.fuse(r:p3udt21745-p3udt24030)p3u_208957 enabled=y ratedcurrent=100.0

New Line.fuse(r:p3udt26400-p3udt30709)p3u_209877 Units=km Length=0.001 bus1=p3udt30709.2 bus2=p3udt26400-p3udt30709x.2 switch=n enabled=y phases=1 Linecode=fuse_1_1_1_1

New Fuse.Fuse_fuse(r:p3udt26400-p3udt30709)p3u_209877 monitoredobj=Line.fuse(r:p3udt26400-p3udt30709)p3u_209877 enabled=y ratedcurrent=100.0

New Line.l(r:p3udt19128-p3uhs7_1247)_disconnect Units=km Length=0.001 bus1=p3udt19128-p3uhs7_1247x_b1_1.1.2.3 bus2=p3udt19128-p3uhs7_1247x_b2_1.1.2.3 switch=y enabled=y phases=3 Linecode=3P_OH_AL_ACSR_4/0_Penguin_12_47_0_3_3_3_3

New Line.l(r:p3udt19128-p3uhs7_1247)_cont Units=km Length=3.9385170000000005 bus1=p3udt19128-p3uhs7_1247x_b2_1.1.2.3 bus2=p3udt19128.1.2.3 switch=n enabled=y phases=3 Linecode=3P_OH_AL_ACSR_4/0_Penguin_12_47_0_3_3_3_3

New Line.l(r:p3udt1751-p3udt29194)_disconnect Units=km Length=0.001 bus1=p3udt1751-p3udt29194x_b1_1.1.2.3 bus2=p3udt1751-p3udt29194x_b2_1.1.2.3 switch=y enabled=y phases=3 Linecode=3P_OH_AL_ACSR_1033kcmil_Curlew_12.47_1_3_3_3_3

New Line.l(r:p3udt1751-p3udt29194)_cont Units=km Length=0.942057 bus1=p3udt1751-p3udt29194x_b2_1.1.2.3 bus2=p3udt29194.1.2.3 switch=n enabled=y phases=3 Linecode=3P_OH_AL_ACSR_1033kcmil_Curlew_12.47_1_3_3_3_3
