New Capacitor.p3uc55 Bus1=p3umv3 phases=3 Kv=12.47 conn=Wye Kvar=450.0

New CapControl.p3uc55 Capacitor=p3uc55 Element=Line.l(r:p3udt30632-p3umv3) Terminal=1 delay=100.0 Type=voltage Vmin=120.5 Vmax=125.0 Ptratio=59.99631547328862 Ctratio=100.0
