New Capacitor.p3uc62 Bus1=p3udt3021 phases=3 Kv=12.47 conn=Wye Kvar=300.0

New CapControl.p3uc62 Capacitor=p3uc62 Element=Line.l(r:p3udt25745-p3udt3021) Terminal=1 delay=100.0 Type=voltage Vmin=120.5 Vmax=125.0 Ptratio=59.99631547328862 Ctratio=100.0
