New Line.l(r:p3udt823lv-p3ulv980) Units=km Length=0.009352010000000001 bus1=p3udt823lv.1.2 bus2=p3ulv980.1.2 switch=n enabled=y phases=2 Linecode=1P_OH_AL_2/0_Rucina_0_416_0_2_2_2_2

New Line.l(r:p3udt823lv-p3ulv47862) Units=km Length=0.0479203 bus1=p3udt823lv.1.2 bus2=p3ulv47862.1.2 switch=n enabled=y phases=2 Linecode=1P_OH_AL_4/0_Zuzara_0_416_0_2_2_2_2

New Line.l(r:p3udt2310lv-p3ulv2553) Units=km Length=0.0102874 bus1=p3udt2310lv.1.2 bus2=p3ulv2553.1.2 switch=n enabled=y phases=2 Linecode=1P_OH_AL_2/0_Rucina_0_416_0_2_2_2_2

New Line.l(r:p3udt2312lv-p3ulv2555) Units=km Length=0.0239128 bus1=p3udt2312lv.1.2 bus2=p3ulv2555.1.2 switch=n enabled=y phases=2 Linecode=1P_OH_AL_2/0_Rucina_0_416_0_2_2_2_2

New Line.l(r:p3udt3022lv-p3ulv3337) Units=km Length=0.0101784 bus1=p3udt3022lv.1.2 bus2=p3ulv3337.1.2 switch=n enabled=y phases=2 Linecode=1P_OH_AL_2/0_Rucina_0_416_0_2_2_2_2

New Line.l(r:p3udt3022lv-p3ulv32351) Units=km Length=0.0101784 bus1=p3udt3022lv.1.2 bus2=p3ulv32351.1.2 switch=n enabled=y phases=2 Linecode=1P_OH_AL_2/0_Rucina_0_416_0_2_2_2_2

New Line.l(r:p3udt4430lv-p3ulv4923) Units=km Length=0.01018 bus1=p3udt4430lv.1.2 bus2=p3ulv4923.1.2 switch=n enabled=y phases=2 Linecode=1P_UG_AL_2/0_Converse_0_416_0_2_2_2_2

New Line.l(r:p3udt4430lv-p3ulv37666) Units=km Length=0.00980808 bus1=p3udt4430lv.1.2 bus2=p3ulv37666.1.2 switch=n enabled=y phases=2 Linecode=1P_UG_AL_2/0_Converse_0_416_0_2_2_2_2

New Line.l(r:p3udt5122lv-p3ulv5746) Units=km Length=0.0201759 bus1=p3udt5122lv.1.2 bus2=p3ulv5746.1.2 switch=n enabled=y phases=2 Linecode=1P_OH_AL_2/0_Rucina_0_416_0_2_2_2_2

New Line.l(r:p3udt7632lv-p3ulv8907) Units=km Length=0.0427945 bus1=p3udt7632lv.1.2 bus2=p3ulv8907.1.2 switch=n enabled=y phases=2 Linecode=1P_OH_AL_4/0_Zuzara_0_416_0_2_2_2_2

New Line.l(r:p3udt7632lv-p3ulv58542) Units=km Length=0.0427945 bus1=p3udt7632lv.1.2 bus2=p3ulv58542.1.2 switch=n enabled=y phases=2 Linecode=1P_OH_AL_4/0_Zuzara_0_416_0_2_2_2_2

New Line.l(r:p3udt11898lv-p3ulv15143) Units=km Length=0.031283 bus1=p3udt11898lv.1.2 bus2=p3ulv15143.1.2 switch=n enabled=y phases=2 Linecode=1P_OH_AL_4/0_Zuzara_0_416_0_2_2_2_2

New Line.l(r:p3udt11898lv-p3ulv19791) Units=km Length=0.007316530000000001 bus1=p3udt11898lv.1.2 bus2=p3ulv19791.1.2 switch=n enabled=y phases=2 Linecode=1P_OH_AL_2/0_Rucina_0_416_0_2_2_2_2

New Line.l(r:p3udt11898lv-p3ulv40819) Units=km Length=0.0707723 bus1=p3udt11898lv.1.2 bus2=p3ulv40819.1.2 switch=n enabled=y phases=2 Linecode=1P_OH_AL_4/0_Zuzara_0_416_0_2_2_2_2

New Line.l(r:p3udt11898lv-p3ulv50853) Units=km Length=0.0324127 bus1=p3udt11898lv.1.2 bus2=p3ulv50853.1.2 switch=n enabled=y phases=2 Linecode=1P_OH_AL_4/0_Zuzara_0_416_0_2_2_2_2

New Line.l(r:p3udm39069-p3ulv69272) Units=km Length=0.069699 bus1=p3udm39069.1.2 bus2=p3ulv69272.1.2 switch=n enabled=y phases=2 Linecode=1P_OH_AL_4/0_Zuzara_0_416_0_2_2_2_2

New Line.l(r:p3udm39066-p3ulv34654) Units=km Length=0.0292561 bus1=p3udm39066.1.2 bus2=p3ulv34654.1.2 switch=n enabled=y phases=2 Linecode=1P_OH_AL_4/0_Zuzara_0_416_0_2_2_2_2

New Line.l(r:p3udm39066-p3udm39069) Units=km Length=0.0351891 bus1=p3udm39069.1.2 bus2=p3udm39066.1.2 switch=n enabled=y phases=2 Linecode=1P_OH_AL_4/0_Zuzara_0_416_0_2_2_2_2

New Line.l(r:p3udm39069-p3udt11898lv) Units=km Length=0.017589900000000002 bus1=p3udt11898lv.1.2 bus2=p3udm39069.1.2 switch=n enabled=y phases=2 Linecode=1P_OH_AL_2/0_Rucina_0_416_0_2_2_2_2

New Line.l(r:p3udt12416lv-p3ulv15963) Units=km Length=0.0148936 bus1=p3udt12416lv.1.2 bus2=p3ulv15963.1.2 switch=n enabled=y phases=2 Linecode=1P_UG_AL_4/0_Sweetbriar_0_416_0_2_2_2_2

New Line.l(r:p3udt13296lv-p3ulv17494) Units=km Length=0.00593297 bus1=p3udt13296lv.1.2 bus2=p3ulv17494.1.2 switch=n enabled=y phases=2 Linecode=1P_OH_AL_2/0_Rucina_0_416_0_2_2_2_2

New Line.l(r:p3udt13297lv-p3ulv17495) Units=km Length=0.0924764 bus1=p3udt13297lv.1.2 bus2=p3ulv17495.1.2 switch=n enabled=y phases=2 Linecode=1P_UG_AL_2/0_Converse_0_416_0_2_2_2_2

New Line.l(r:p3udt14555lv-p3ulv19790) Units=km Length=0.00917493 bus1=p3udt14555lv.1.2 bus2=p3ulv19790.1.2 switch=n enabled=y phases=2 Linecode=1P_OH_AL_2/0_Rucina_0_416_0_2_2_2_2

New Line.l(r:p3udt14960lv-p3ulv20557) Units=km Length=0.001 bus1=p3udt14960lv.1.2 bus2=p3ulv20557.1.2 switch=n enabled=y phases=2 Linecode=1P_OH_AL_4_Periwinkle_0_416_0_2_2_2_2

New Line.l(r:p3udm50748-p3ulv22911) Units=km Length=0.0249609 bus1=p3udm50748.1.2 bus2=p3ulv22911.1.2 switch=n enabled=y phases=2 Linecode=1P_OH_AL_2/0_Rucina_0_416_0_2_2_2_2

New Line.l(r:p3udm50748-p3udt16174lv) Units=km Length=0.019527 bus1=p3udt16174lv.1.2 bus2=p3udm50748.1.2 switch=n enabled=y phases=2 Linecode=1P_OH_AL_2/0_Rucina_0_416_0_2_2_2_2

New Line.l(r:p3udm50749-p3ulv56999) Units=km Length=0.0191015 bus1=p3udm50749.1.2 bus2=p3ulv56999.1.2 switch=n enabled=y phases=2 Linecode=1P_OH_AL_2/0_Rucina_0_416_0_2_2_2_2

New Line.l(r:p3udm50749-p3udt16174lv) Units=km Length=0.0390574 bus1=p3udt16174lv.1.2 bus2=p3udm50749.1.2 switch=n enabled=y phases=2 Linecode=1P_OH_AL_4/0_Zuzara_0_416_0_2_2_2_2

New Line.l(r:p3udm52637-p3ulv24534) Units=km Length=0.00677575 bus1=p3udm52637.1.2 bus2=p3ulv24534.1.2 switch=n enabled=y phases=2 Linecode=1P_OH_AL_2/0_Rucina_0_416_0_2_2_2_2

New Line.l(r:p3udm52637-p3udt16925lv) Units=km Length=0.0398133 bus1=p3udt16925lv.1.2 bus2=p3udm52637.1.2 switch=n enabled=y phases=2 Linecode=1P_OH_AL_4/0_Zuzara_0_416_0_2_2_2_2

New Line.l(r:p3udm52638-p3ulv70033) Units=km Length=0.00444987 bus1=p3udm52638.1.2 bus2=p3ulv70033.1.2 switch=n enabled=y phases=2 Linecode=1P_OH_AL_2/0_Rucina_0_416_0_2_2_2_2

New Line.l(r:p3udm52638-p3udt16925lv) Units=km Length=0.0706017 bus1=p3udt16925lv.1.2 bus2=p3udm52638.1.2 switch=n enabled=y phases=2 Linecode=1P_OH_AL_4/0_Zuzara_0_416_0_2_2_2_2

New Line.l(r:p3udt17296lv-p3ulv25324) Units=km Length=0.012693 bus1=p3udt17296lv.1.2 bus2=p3ulv25324.1.2 switch=n enabled=y phases=2 Linecode=1P_OH_AL_2/0_Rucina_0_416_0_2_2_2_2

New Line.l(r:p3udt18035lv-p3ulv26913) Units=km Length=0.0219897 bus1=p3udt18035lv.1.2 bus2=p3ulv26913.1.2 switch=n enabled=y phases=2 Linecode=1P_UG_AL_1/0_Brenau_0_416_0_2_2_2_2

New Line.l(r:p3udt18035lv-p3ulv40820) Units=km Length=0.022040800000000003 bus1=p3udt18035lv.1.2 bus2=p3ulv40820.1.2 switch=n enabled=y phases=2 Linecode=1P_UG_AL_1/0_Brenau_0_416_0_2_2_2_2

New Line.l(r:p3udt18381lv-p3ulv27675) Units=km Length=0.00968746 bus1=p3udt18381lv.1.2 bus2=p3ulv27675.1.2 switch=n enabled=y phases=2 Linecode=1P_OH_AL_2/0_Rucina_0_416_0_2_2_2_2

New Line.l(r:p3udt19022lv-p3ulv29177) Units=km Length=0.0106919 bus1=p3udt19022lv.1.2 bus2=p3ulv29177.1.2 switch=n enabled=y phases=2 Linecode=1P_OH_AL_2/0_Rucina_0_416_0_2_2_2_2

New Line.l(r:p3udt19361lv-p3ulv29948) Units=km Length=0.0176132 bus1=p3udt19361lv.1.2 bus2=p3ulv29948.1.2 switch=n enabled=y phases=2 Linecode=1P_UG_AL_4/0_Sweetbriar_0_416_0_2_2_2_2

New Line.l(r:p3udt21166lv-p3ulv34653) Units=km Length=0.0749576 bus1=p3udt21166lv.1.2 bus2=p3ulv34653.1.2 switch=n enabled=y phases=2 Linecode=1P_OH_AL_4/0_Zuzara_0_416_0_2_2_2_2

New Line.l(r:p3udt22434lv-p3ulv38439) Units=km Length=0.0154148 bus1=p3udt22434lv.1.2 bus2=p3ulv38439.1.2 switch=n enabled=y phases=2 Linecode=1P_UG_AL_1/0_Brenau_0_416_0_2_2_2_2

New Line.l(r:p3udt22434lv-p3ulv63120) Units=km Length=0.0217523 bus1=p3udt22434lv.1.2 bus2=p3ulv63120.1.2 switch=n enabled=y phases=2 Linecode=1P_UG_AL_1/0_Brenau_0_416_0_2_2_2_2

New Line.l(r:p3udt22434lv-p3ulv70841) Units=km Length=0.0169103 bus1=p3udt22434lv.1.2 bus2=p3ulv70841.1.2 switch=n enabled=y phases=2 Linecode=1P_UG_AL_4/0_Sweetbriar_0_416_0_2_2_2_2

New Line.l(r:p3udt23248lv-p3ulv40818) Units=km Length=0.001 bus1=p3udt23248lv.1.2 bus2=p3ulv40818.1.2 switch=n enabled=y phases=2 Linecode=1P_OH_AL_4_Periwinkle_0_416_0_2_2_2_2

New Line.l(r:p3udt24653lv-p3ulv45542) Units=km Length=0.0687485 bus1=p3udt24653lv.1.2 bus2=p3ulv45542.1.2 switch=n enabled=y phases=2 Linecode=1P_UG_AL_4/0_Sweetbriar_0_416_0_2_2_2_2

New Line.l(r:p3udt25122lv-p3ulv47088) Units=km Length=0.0173363 bus1=p3udt25122lv.1.2 bus2=p3ulv47088.1.2 switch=n enabled=y phases=2 Linecode=1P_UG_AL_4/0_Sweetbriar_0_416_0_2_2_2_2

New Line.l(r:p3udt25127lv-p3ulv47099) Units=km Length=0.00643936 bus1=p3udt25127lv.1.2 bus2=p3ulv47099.1.2 switch=n enabled=y phases=2 Linecode=1P_UG_AL_1/0_Brenau_0_416_0_2_2_2_2

New Line.l(r:p3udt25351lv-p3ulv47861) Units=km Length=0.0127663 bus1=p3udt25351lv.1.2 bus2=p3ulv47861.1.2 switch=n enabled=y phases=2 Linecode=1P_OH_AL_2/0_Rucina_0_416_0_2_2_2_2

New Line.l(r:p3udt25547lv-p3ulv48585) Units=km Length=0.0161057 bus1=p3udt25547lv.1.2 bus2=p3ulv48585.1.2 switch=n enabled=y phases=2 Linecode=1P_OH_AL_2/0_Rucina_0_416_0_2_2_2_2

New Line.l(r:p3udt25953lv-p3ulv50110) Units=km Length=0.09819980000000002 bus1=p3udt25953lv.1.2 bus2=p3ulv50110.1.2 switch=n enabled=y phases=2 Linecode=1P_OH_AL_4/0_Zuzara_0_416_0_2_2_2_2

New Line.l(r:p3udt26337lv-p3ulv51609) Units=km Length=0.0119828 bus1=p3udt26337lv.1.2 bus2=p3ulv51609.1.2 switch=n enabled=y phases=2 Linecode=1P_OH_AL_2/0_Rucina_0_416_0_2_2_2_2

New Line.l(r:p3udt27466lv-p3ulv56245) Units=km Length=0.001 bus1=p3udt27466lv.1.2 bus2=p3ulv56245.1.2 switch=n enabled=y phases=2 Linecode=1P_OH_AL_4_Periwinkle_0_416_0_2_2_2_2

New Line.l(r:p3udt29419lv-p3ulv65372) Units=km Length=0.0122943 bus1=p3udt29419lv.1.2 bus2=p3ulv65372.1.2 switch=n enabled=y phases=2 Linecode=1P_OH_AL_2/0_Rucina_0_416_0_2_2_2_2

New Line.l(r:p3udt30494lv-p3ulv70842) Units=km Length=0.001 bus1=p3udt30494lv.1.2 bus2=p3ulv70842.1.2 switch=n enabled=y phases=2 Linecode=1P_OH_AL_4_Periwinkle_0_416_0_2_2_2_2

New Line.l(r:p3udt31087lv-p3ulv73864) Units=km Length=0.00587439 bus1=p3udt31087lv.1.2 bus2=p3ulv73864.1.2 switch=n enabled=y phases=2 Linecode=1P_OH_AL_2/0_Rucina_0_416_0_2_2_2_2

New Line.l(r:p3udt31333lv-p3ulv75343) Units=km Length=0.068343 bus1=p3udt31333lv.1.2 bus2=p3ulv75343.1.2 switch=n enabled=y phases=2 Linecode=1P_OH_AL_4/0_Zuzara_0_416_0_2_2_2_2

New Line.l(r:p3udt31884lv-p3ulv78446) Units=km Length=0.04998260000000001 bus1=p3udt31884lv.1.2 bus2=p3ulv78446.1.2 switch=n enabled=y phases=2 Linecode=1P_OH_AL_4/0_Zuzara_0_416_0_2_2_2_2

New Line.l(r:p3udt32164lv-p3ulv79987) Units=km Length=0.0394727 bus1=p3udt32164lv.1.2 bus2=p3ulv79987.1.2 switch=n enabled=y phases=2 Linecode=1P_OH_AL_4/0_Zuzara_0_416_0_2_2_2_2

New Line.l(r:p3udt14126-p3udt23248) Units=km Length=0.173435 bus1=p3udt14126-p3udt23248x.3 bus2=p3udt23248.3 switch=n enabled=y phases=1 Linecode=1P_OH_AL_ACSR_#2_Sparrow_12_47_0_1_1_1_1

New Line.l(r:p3udt14555-p3udt26337) Units=km Length=0.0787111 bus1=p3udt26337.2 bus2=p3udt14555.2 switch=n enabled=y phases=1 Linecode=1P_OH_AL_ACSR_#2_Sparrow_12_47_0_1_1_1_1

New Line.l(r:p3udt11898-p3udt25953) Units=km Length=0.052779 bus1=p3udt25953.2 bus2=p3udt11898.2 switch=n enabled=y phases=1 Linecode=1P_OH_AL_ACSR_#2_Sparrow_12_47_0_1_1_1_1

New Line.l(r:p3udt25953-p3udt26337) Units=km Length=0.0515084 bus1=p3udt26337.2 bus2=p3udt25953.2 switch=n enabled=y phases=1 Linecode=1P_OH_AL_ACSR_#2_Sparrow_12_47_0_1_1_1_1

New Line.l(r:p3udt26337-p3udt31087) Units=km Length=0.0561705 bus1=p3udt26337.2 bus2=p3udt31087.2 switch=n enabled=y phases=1 Linecode=1P_OH_AL_ACSR_#2_Sparrow_12_47_0_1_1_1_1

New Line.l(r:p3udt13296-p3udt26337) Units=km Length=0.116154 bus1=p3udt13296-p3udt26337x.2 bus2=p3udt26337.2 switch=n enabled=y phases=1 Linecode=1P_OH_AL_ACSR_#2_Sparrow_12_47_0_1_1_1_1

New Line.l(r:p3udt18035-p3udt4430) Units=km Length=0.0352426 bus1=p3udt18035-p3udt4430xx.2 bus2=p3udt18035-p3udt4430x.2 switch=n enabled=y phases=1 Linecode=1P_UG_AL_#2_15_12_47_0_1_1_1_1

New Line.l(r:p3udt12416-p3udt4430) Units=km Length=0.0292769 bus1=p3udt12416-p3udt4430xx.2 bus2=p3udt12416-p3udt4430xxx.2 switch=n enabled=y phases=1 Linecode=1P_UG_AL_#2_15_12_47_0_1_1_1_1

New Line.l(r:p3udt2312-p3udt3023) Units=km Length=0.0893953 bus1=p3udt2312-p3udt3023x.1 bus2=p3udt2312.1 switch=n enabled=y phases=1 Linecode=1P_OH_AL_ACSR_#2_Sparrow_12_47_0_1_1_1_1

New Line.l(r:p3udt19022-p3udt2310) Units=km Length=0.0938146 bus1=p3udt19022-p3udt2310x.1 bus2=p3udt2310.1 switch=n enabled=y phases=1 Linecode=1P_OH_AL_ACSR_#2_Sparrow_12_47_0_1_1_1_1

New Line.l(r:p3udt25547-p3udt29419) Units=km Length=0.106457 bus1=p3udt25547-p3udt29419x.3 bus2=p3udt29419.3 switch=n enabled=y phases=1 Linecode=1P_OH_AL_ACSR_#2_Sparrow_12_47_0_1_1_1_1

New Line.l(r:p3udt13297-p3udt22434) Units=km Length=0.001 bus1=p3udt13297-p3udt22434xx.1 bus2=p3udt13297-p3udt22434x.1 switch=n enabled=y phases=1 Linecode=1P_UG_AL_#2_15_12_47_0_1_1_1_1

New Line.l(r:p3udt31333-p3udt5122) Units=km Length=0.27716500000000005 bus1=p3udt5122.3 bus2=p3udt31333.3 switch=n enabled=y phases=1 Linecode=1P_OH_AL_ACSR_#2_Sparrow_12_47_0_1_1_1_1

New Line.l(r:p3udt5122-p3udt7632)_s0 Units=km Length=0.221478 bus1=p3udt5122-p3udt7632xx.3 bus2=p3udt5122-p3udt7632x.3 switch=n enabled=y phases=1 Linecode=1P_OH_AL_ACSR_#2_Sparrow_12_47_0_1_1_1_1

New Line.l(r:p3udt5122-p3udt7632)_s1 Units=km Length=0.227082 bus1=p3udt5122-p3udt7632x.3 bus2=p3udt5122.3 switch=n enabled=y phases=1 Linecode=1P_OH_AL_ACSR_#2_Sparrow_12_47_0_1_1_1_1

New Line.l(r:p3udt17296-p3udt30494)_s0 Units=km Length=0.169191 bus1=p3udt17296-p3udt30494x.1 bus2=p3udt17296-p3udt30494xx.1 switch=n enabled=y phases=1 Linecode=1P_OH_AL_ACSR_#2_Sparrow_12_47_0_1_1_1_1

New Line.l(r:p3udt17296-p3udt30494)_s1 Units=km Length=0.20100700000000002 bus1=p3udt17296-p3udt30494xx.1 bus2=p3udt30494.1 switch=n enabled=y phases=1 Linecode=1P_OH_AL_ACSR_#2_Sparrow_12_47_0_1_1_1_1

New Line.l(r:p3udt16925-p3udt823) Units=km Length=0.0466096 bus1=p3udt16925.3 bus2=p3udt823.3 switch=n enabled=y phases=1 Linecode=1P_OH_AL_ACSR_#2_Sparrow_12_47_0_1_1_1_1

New Line.l(r:p3udt16925-p3udt31884) Units=km Length=0.545169 bus1=p3udt31884.3 bus2=p3udt16925.3 switch=n enabled=y phases=1 Linecode=1P_OH_AL_ACSR_#2_Sparrow_12_47_0_1_1_1_1

New Line.l(r:p3udt16174-p3udt31884) Units=km Length=0.0585844 bus1=p3udt16174-p3udt31884x.3 bus2=p3udt31884.3 switch=n enabled=y phases=1 Linecode=1P_OH_AL_ACSR_#2_Sparrow_12_47_0_1_1_1_1

New Line.l(r:p3udt18381-p3udt3022)_s0 Units=km Length=0.162984 bus1=p3udt3022.1.2.3 bus2=p3udt18381-p3udt3022x.1.2.3 switch=n enabled=y phases=3 Linecode=3P_OH_AL_ACSR_4/0_Penguin_12_47_0_3_3_3_3

New Line.l(r:p3udt18381-p3udt3022)_s1 Units=km Length=0.01782 bus1=p3udt18381-p3udt3022x.1.2.3 bus2=p3udt18381.1.2.3 switch=n enabled=y phases=3 Linecode=3P_OH_AL_ACSR_4/0_Penguin_12_47_0_3_3_3_3

New Line.l(r:p3udt25745-p3udt3021) Units=km Length=0.169792 bus1=p3udt25745.1.2.3 bus2=p3udt3021.1.2.3 switch=n enabled=y phases=3 Linecode=3P_OH_AL_ACSR_4/0_Penguin_12_47_0_3_3_3_3

New Line.l(r:p3udt22704-p3udt25745) Units=km Length=0.2670100000000001 bus1=p3udt22704.1.2.3 bus2=p3udt25745.1.2.3 switch=n enabled=y phases=3 Linecode=3P_OH_AL_ACSR_4/0_Penguin_12_47_0_3_3_3_3

New Line.l(r:p3udt22704-p3udt25127) Units=km Length=0.35294100000000006 bus1=p3udt25127.1.2.3 bus2=p3udt22704.1.2.3 switch=n enabled=y phases=3 Linecode=3P_OH_AL_ACSR_4/0_Penguin_12_47_0_3_3_3_3

New Line.l(r:p3udt25127-p3udt25351)_s0 Units=km Length=0.12400500000000002 bus1=p3udt25351.1.2.3 bus2=p3udt25127-p3udt25351xx.1.2.3 switch=n enabled=y phases=3 Linecode=3P_OH_AL_ACSR_4/0_Penguin_12_47_0_3_3_3_3

New Line.l(r:p3udt25127-p3udt25351)_s1 Units=km Length=0.0111146 bus1=p3udt25127-p3udt25351xx.1.2.3 bus2=p3udt25127-p3udt25351x.1.2.3 switch=n enabled=y phases=3 Linecode=3P_OH_AL_ACSR_4/0_Penguin_12_47_0_3_3_3_3

New Line.l(r:p3udt25127-p3udt25351)_s2 Units=km Length=0.504355 bus1=p3udt25127-p3udt25351x.1.2.3 bus2=p3udt25127.1.2.3 switch=n enabled=y phases=3 Linecode=3P_OH_AL_ACSR_4/0_Penguin_12_47_0_3_3_3_3

New Line.l(r:p3udt19022-p3udt25351) Units=km Length=0.0669367 bus1=p3udt19022.1.2.3 bus2=p3udt25351.1.2.3 switch=n enabled=y phases=3 Linecode=3P_OH_AL_ACSR_4/0_Penguin_12_47_0_3_3_3_3

New Line.l(r:p3udt19022-p3udt3023) Units=km Length=0.0883206 bus1=p3udt3023.1.2.3 bus2=p3udt19022.1.2.3 switch=n enabled=y phases=3 Linecode=3P_OH_AL_ACSR_4/0_Penguin_12_47_0_3_3_3_3

New Line.l(r:p3udt25547-p3udt3023) Units=km Length=0.156613 bus1=p3udt25547.1.2.3 bus2=p3udt3023.1.2.3 switch=n enabled=y phases=3 Linecode=3P_OH_AL_ACSR_4/0_Penguin_12_47_0_3_3_3_3

New Line.l(r:p3udt19361-p3udt25547) Units=km Length=0.129238 bus1=p3udt19361.1.2.3 bus2=p3udt25547.1.2.3 switch=n enabled=y phases=3 Linecode=3P_OH_AL_ACSR_4/0_Penguin_12_47_0_3_3_3_3

New Line.l(r:p3udt12416-p3udt19361) Units=km Length=0.0275726 bus1=p3udt12416-p3udt19361x.1.2.3 bus2=p3udt12416-p3udt19361xx.1.2.3 switch=n enabled=y phases=3 Linecode=3P_UG_AL_4/0_25_12_47_0_3_3_3_3

New Line.l(r:p3udt12416-p3udt22434) Units=km Length=0.0573659 bus1=p3udt12416-p3udt22434xx.1.2.3 bus2=p3udt12416-p3udt22434x.1.2.3 switch=n enabled=y phases=3 Linecode=3P_UG_AL_4/0_25_12_47_0_3_3_3_3

New Line.l(r:p3udt14960-p3udt22434)_s0 Units=km Length=0.289545 bus1=p3udt14960.1.2.3 bus2=p3udt14960-p3udt22434x.1.2.3 switch=n enabled=y phases=3 Linecode=3P_OH_AL_ACSR_4/0_Penguin_12_47_0_3_3_3_3

New Line.l(r:p3udt14960-p3udt22434)_s1 Units=km Length=0.001 bus1=p3udt14960-p3udt22434x.1.2.3 bus2=p3udt14960-p3udt22434xx.1.2.3 switch=n enabled=y phases=3 Linecode=3P_OH_AL_ACSR_4/0_Penguin_12_47_0_3_3_3_3

New Line.l(r:p3udt14960-p3udt22434)_s2 Units=km Length=0.138793 bus1=p3udt14960-p3udt22434xx.1.2.3 bus2=p3udt22434.1.2.3 switch=n enabled=y phases=3 Linecode=3P_OH_AL_ACSR_4/0_Penguin_12_47_0_3_3_3_3

New Line.l(r:p3udt14960-p3udt27466)_s0 Units=km Length=0.262713 bus1=p3udt27466.1.2.3 bus2=p3udt14960-p3udt27466x.1.2.3 switch=n enabled=y phases=3 Linecode=3P_OH_AL_ACSR_4/0_Penguin_12_47_0_3_3_3_3

New Line.l(r:p3udt14960-p3udt27466)_s1 Units=km Length=0.0163549 bus1=p3udt14960-p3udt27466x.1.2.3 bus2=p3udt14960.1.2.3 switch=n enabled=y phases=3 Linecode=3P_OH_AL_ACSR_4/0_Penguin_12_47_0_3_3_3_3

New Line.l(r:p3udt27466-p3udt3022) Units=km Length=0.424148 bus1=p3udt3022.1.2.3 bus2=p3udt27466.1.2.3 switch=n enabled=y phases=3 Linecode=3P_OH_AL_ACSR_4/0_Penguin_12_47_0_3_3_3_3

New Line.l(r:p3udt3022-p3udt7632) Units=km Length=0.258211 bus1=p3udt7632.1.2.3 bus2=p3udt3022.1.2.3 switch=n enabled=y phases=3 Linecode=3P_OH_AL_ACSR_4/0_Penguin_12_47_0_3_3_3_3

New Line.l(r:p3udt17296-p3udt7632)_s0 Units=km Length=0.44567400000000007 bus1=p3udt17296.1.2.3 bus2=p3udt17296-p3udt7632x.1.2.3 switch=n enabled=y phases=3 Linecode=3P_OH_AL_ACSR_4/0_Penguin_12_47_0_3_3_3_3

New Line.l(r:p3udt17296-p3udt7632)_s1 Units=km Length=0.218968 bus1=p3udt17296-p3udt7632x.1.2.3 bus2=p3udt7632.1.2.3 switch=n enabled=y phases=3 Linecode=3P_OH_AL_ACSR_4/0_Penguin_12_47_0_3_3_3_3

New Line.l(r:p3udt16174-p3udt17296)_s0 Units=km Length=0.210573 bus1=p3udt16174.1.2.3 bus2=p3udt16174-p3udt17296x.1.2.3 switch=n enabled=y phases=3 Linecode=3P_OH_AL_ACSR_4/0_Penguin_12_47_0_3_3_3_3

New Line.l(r:p3udt16174-p3udt17296)_s1 Units=km Length=0.212992 bus1=p3udt16174-p3udt17296x.1.2.3 bus2=p3udt16174-p3udt17296xx.1.2.3 switch=n enabled=y phases=3 Linecode=3P_OH_AL_ACSR_4/0_Penguin_12_47_0_3_3_3_3

New Line.l(r:p3udt16174-p3udt17296)_s2 Units=km Length=0.12102300000000002 bus1=p3udt16174-p3udt17296xx.1.2.3 bus2=p3udt17296.1.2.3 switch=n enabled=y phases=3 Linecode=3P_OH_AL_ACSR_4/0_Penguin_12_47_0_3_3_3_3

New Line.l(r:p3udt16174-p3uhs9_1247)_s1 Units=km Length=0.195621 bus1=p3udt16174-p3uhs9_1247x.1.2.3 bus2=p3udt16174.1.2.3 switch=n enabled=y phases=3 Linecode=3P_OH_AL_ACSR_4/0_Penguin_12_47_0_3_3_3_3

New Line.l(r:p3udt14126lv-p3ulv19030) Units=km Length=0.0140639 bus1=p3udt14126lv.1.2.3 bus2=p3ulv19030.1.2.3 switch=n enabled=y phases=3 Linecode=3P_UG_AL_750kcmil_25_0_416_0_3_3_3_3

New Line.l(r:p3udt13296-p3udt14126) Units=km Length=0.073567 bus1=p3udt13296.1.2.3 bus2=p3udt14126.1.2.3 switch=n enabled=y phases=3 Linecode=3P_OH_AL_ACSR_4/0_Penguin_12_47_0_3_3_3_3

New Line.l(r:p3udt13296-p3udt18381) Units=km Length=0.0317324 bus1=p3udt18381.1.2.3 bus2=p3udt13296.1.2.3 switch=n enabled=y phases=3 Linecode=3P_OH_AL_ACSR_4/0_Penguin_12_47_0_3_3_3_3

New Line.l(r:p3udm5522-p3ulv1764) Units=km Length=0.00433389 bus1=p3udm5522.1.2.3 bus2=p3ulv1764.1.2.3 switch=n enabled=y phases=3 Linecode=3P_UG_AL_750kcmil_25_0_416_0_3_3_3_3

New Line.l(r:p3udm5522-p3udt1579lv) Units=km Length=0.0110485 bus1=p3udt1579lv.1.2.3 bus2=p3udm5522.1.2.3 switch=n enabled=y phases=3 Linecode=3P_UG_AL_750kcmil_25_0_416_0_3_3_3_3

New Line.l(r:p3udm5523-p3ulv22910) Units=km Length=0.0150838 bus1=p3udm5523.1.2.3 bus2=p3ulv22910.1.2.3 switch=n enabled=y phases=3 Linecode=3P_UG_AL_350kcmil_15_0_416_0_3_3_3_3

New Line.l(r:p3udm5523-p3udt1579lv) Units=km Length=0.00494616 bus1=p3udt1579lv.1.2.3 bus2=p3udm5523.1.2.3 switch=n enabled=y phases=3 Linecode=3P_UG_AL_350kcmil_15_0_416_0_3_3_3_3

New Line.l(r:p3udt1579-p3udt21166) Units=km Length=0.001 bus1=p3udt21166.1.2.3 bus2=p3udt1579.1.2.3 switch=n enabled=y phases=3 Linecode=3P_OH_AL_ACSR_4/0_Penguin_12_47_0_3_3_3_3

New Line.l(r:p3udt18381-p3udt21166) Units=km Length=0.17044600000000001 bus1=p3udt18381.1.2.3 bus2=p3udt21166.1.2.3 switch=n enabled=y phases=3 Linecode=3P_OH_AL_ACSR_4/0_Penguin_12_47_0_3_3_3_3

New Line.l(r:p3udt3023lv-p3ulv3338) Units=km Length=0.0172369 bus1=p3udt3023lv.1.2.3 bus2=p3ulv3338.1.2.3 switch=n enabled=y phases=3 Linecode=3P_UG_AL_350kcmil_15_0_416_0_3_3_3_3

New Line.l(r:p3udt3023lv-p3ulv56997) Units=km Length=0.012827200000000002 bus1=p3udt3023lv.1.2.3 bus2=p3ulv56997.1.2.3 switch=n enabled=y phases=3 Linecode=3P_UG_AL_350kcmil_15_0_416_0_3_3_3_3

New Line.l(r:p3udt22704lv-p3ulv39206) Units=km Length=0.005995680000000001 bus1=p3udt22704lv.1.2.3 bus2=p3ulv39206.1.2.3 switch=n enabled=y phases=3 Linecode=3P_UG_AL_350kcmil_15_0_416_0_3_3_3_3

New Line.l(r:p3udt25745lv-p3ulv49346) Units=km Length=0.00951408 bus1=p3udt25745lv.1.2.3 bus2=p3ulv49346.1.2.3 switch=n enabled=y phases=3 Linecode=3P_UG_AL_350kcmil_15_0_416_0_3_3_3_3

New Line.l(r:p3udt3021lv-p3ulv3336) Units=km Length=0.0187307 bus1=p3udt3021lv.1.2.3 bus2=p3ulv3336.1.2.3 switch=n enabled=y phases=3 Linecode=3P_UG_AL_750kcmil_25_0_416_0_3_3_3_3

New Line.l(r:p3udt25546lv-p3ulv48584) Units=km Length=0.0267684 bus1=p3udt25546lv.1.2.3 bus2=p3ulv48584.1.2.3 switch=n enabled=y phases=3 Linecode=3P_UG_AL_750kcmil_25_0_416_0_3_3_3_3

New Line.l(r:p3udt29135lv-p3ulv63851) Units=km Length=0.0175108 bus1=p3udt29135lv.1.2.3 bus2=p3ulv63851.1.2.3 switch=n enabled=y phases=3 Linecode=3P_UG_AL_350kcmil_15_0_416_0_3_3_3_3

New Line.l(r:p3udt3737lv-p3ulv4147) Units=km Length=0.0268767 bus1=p3udt3737lv.1.2.3 bus2=p3ulv4147.1.2.3 switch=n enabled=y phases=3 Linecode=3P_UG_AL_350kcmil_15_0_416_0_3_3_3_3

New Line.l(r:p3udt13293lv-p3ulv17488) Units=km Length=0.0364444 bus1=p3udt13293lv.1.2.3 bus2=p3ulv17488.1.2.3 switch=n enabled=y phases=3 Linecode=3P_UG_AL_350kcmil_15_0_416_0_3_3_3_3

New Line.l(r:p3udt29136lv-p3ulv63852) Units=km Length=0.0333552 bus1=p3udt29136lv.1.2.3 bus2=p3ulv63852.1.2.3 switch=n enabled=y phases=3 Linecode=3P_UG_AL_350kcmil_15_0_416_0_3_3_3_3

New Line.l(r:p3udt13293-p3udt29136) Units=km Length=0.001 bus1=p3udt13293-p3udt29136x.1.2.3 bus2=p3udt13293-p3udt29136xx.1.2.3 switch=n enabled=y phases=3 Linecode=3P_UG_AL_4/0_25_12_47_0_3_3_3_3

New Line.l(r:p3udt13293-p3udt24653) Units=km Length=0.238331 bus1=p3udt13293-p3udt24653xx.1.2.3 bus2=p3udt13293-p3udt24653x.1.2.3 switch=n enabled=y phases=3 Linecode=3P_UG_AL_4/0_25_12_47_0_3_3_3_3

New Line.l(r:p3udt24653-p3udt3737) Units=km Length=0.049649 bus1=p3udt24653-p3udt3737xx.1.2.3 bus2=p3udt24653-p3udt3737x.1.2.3 switch=n enabled=y phases=3 Linecode=3P_UG_AL_4/0_25_12_47_0_3_3_3_3

New Line.l(r:p3udt29135-p3udt3737) Units=km Length=0.00992833 bus1=p3udt29135-p3udt3737x.1.2.3 bus2=p3udt29135-p3udt3737xx.1.2.3 switch=n enabled=y phases=3 Linecode=3P_UG_AL_4/0_25_12_47_0_3_3_3_3

New Line.l(r:p3udt25122-p3udt29135) Units=km Length=0.0297923 bus1=p3udt25122-p3udt29135x.1.2.3 bus2=p3udt25122-p3udt29135xx.1.2.3 switch=n enabled=y phases=3 Linecode=3P_UG_AL_4/0_25_12_47_0_3_3_3_3

New Line.l(r:p3udt25122-p3udt32164) Units=km Length=0.596927 bus1=p3udt32164.1.2.3 bus2=p3udt25122.1.2.3 switch=n enabled=y phases=3 Linecode=3P_OH_AL_ACSR_4/0_Penguin_12_47_0_3_3_3_3

New Line.l(r:p3udt25546-p3udt32164) Units=km Length=0.658396 bus1=p3udt25546.1.2.3 bus2=p3udt32164.1.2.3 switch=n enabled=y phases=3 Linecode=3P_OH_AL_ACSR_4/0_Penguin_12_47_0_3_3_3_3

New Line.l(r:p3udt25546-p3udt3021) Units=km Length=0.0184702 bus1=p3udt3021.1.2.3 bus2=p3udt25546.1.2.3 switch=n enabled=y phases=3 Linecode=3P_OH_AL_ACSR_4/0_Penguin_12_47_0_3_3_3_3

New Line.l(r:p3udt32035lv-p3ulv79241) Units=km Length=0.021356000000000003 bus1=p3udt32035lv.1.2.3 bus2=p3ulv79241.1.2.3 switch=n enabled=y phases=3 Linecode=3P_UG_AL_350kcmil_15_0_416_0_3_3_3_3

New Line.l(r:p3udt25127-p3udt32035) Units=km Length=0.001 bus1=p3udt25127-p3udt32035x.1.2.3 bus2=p3udt25127-p3udt32035xx.1.2.3 switch=n enabled=y phases=3 Linecode=3P_UG_AL_4/0_25_12_47_0_3_3_3_3

New Line.l(r:p3udt18717-p3udt32035) Units=km Length=0.0599655 bus1=p3udt18717-p3udt32035xx.1.2.3 bus2=p3udt18717-p3udt32035x.1.2.3 switch=n enabled=y phases=3 Linecode=3P_OH_AL_ACSR_1033kcmil_Curlew_12.47_1_3_3_3_3

New Line.padswitch(r:p3udt18035-p3udt4430)p3u_180451 Units=km Length=0.001 bus1=p3udt4430.2 bus2=p3udt18035-p3udt4430xx.2 switch=y enabled=y phases=1 Linecode=padswitch_1_1_1_1

New Line.padswitch(r:p3udt18035-p3udt4430)p3u_180452 Units=km Length=0.001 bus1=p3udt18035-p3udt4430x.2 bus2=p3udt18035.2 switch=y enabled=y phases=1 Linecode=padswitch_1_3_1_1_1

New Line.padswitch(r:p3udt12416-p3udt4430)p3u_180453 Units=km Length=0.001 bus1=p3udt12416-p3udt4430x.2 bus2=p3udt12416-p3udt4430xx.2 switch=y enabled=y phases=1 Linecode=padswitch_1_1_1_1

New Line.padswitch(r:p3udt12416-p3udt4430)p3u_180454 Units=km Length=0.001 bus1=p3udt12416-p3udt4430xxx.2 bus2=p3udt4430.2 switch=y enabled=y phases=1 Linecode=padswitch_1_3_1_1_1

New Line.padswitch(r:p3udt13297-p3udt22434)p3u_180471 Units=km Length=0.001 bus1=p3udt13297-p3udt22434xxx.1 bus2=p3udt13297-p3udt22434xx.1 switch=y enabled=y phases=1 Linecode=padswitch_1_1_1_1

New Line.padswitch(r:p3udt13297-p3udt22434)p3u_180472 Units=km Length=0.001 bus1=p3udt13297-p3udt22434x.1 bus2=p3udt13297.1 switch=y enabled=y phases=1 Linecode=padswitch_1_3_1_0_1_1

New Line.padswitch(r:p3udt12416-p3udt19361)p3u_180467 Units=km Length=0.001 bus1=p3udt12416.1.2.3 bus2=p3udt12416-p3udt19361x.1.2.3 switch=y enabled=y phases=3 Linecode=padswitch_3_3_3_3

New Line.padswitch(r:p3udt12416-p3udt19361)p3u_180468 Units=km Length=0.001 bus1=p3udt12416-p3udt19361xx.1.2.3 bus2=p3udt19361.1.2.3 switch=y enabled=y phases=3 Linecode=padswitch_3_4_3_3_3

New Line.padswitch(r:p3udt12416-p3udt22434)p3u_180469 Units=km Length=0.001 bus1=p3udt22434.1.2.3 bus2=p3udt12416-p3udt22434xx.1.2.3 switch=y enabled=y phases=3 Linecode=padswitch_3_4_3_1_3_3

New Line.padswitch(r:p3udt12416-p3udt22434)p3u_180470 Units=km Length=0.001 bus1=p3udt12416-p3udt22434x.1.2.3 bus2=p3udt12416.1.2.3 switch=y enabled=y phases=3 Linecode=padswitch_3_4_3_1_3_1_3

New Line.padswitch(r:p3udt13293-p3udt29136)p3u_180455 Units=km Length=0.001 bus1=p3udt13293.1.2.3 bus2=p3udt13293-p3udt29136x.1.2.3 switch=y enabled=y phases=3 Linecode=padswitch_3_4_3_1_3_1_3_1

New Line.padswitch(r:p3udt13293-p3udt29136)p3u_180456 Units=km Length=0.001 bus1=p3udt13293-p3udt29136xx.1.2.3 bus2=p3udt29136.1.2.3 switch=y enabled=y phases=3 Linecode=padswitch_3_4_3_1_3_3

New Line.padswitch(r:p3udt13293-p3udt24653)p3u_180457 Units=km Length=0.001 bus1=p3udt24653.1.2.3 bus2=p3udt13293-p3udt24653xx.1.2.3 switch=y enabled=y phases=3 Linecode=padswitch_3_4_3_1_3_1_3_1

New Line.padswitch(r:p3udt13293-p3udt24653)p3u_180458 Units=km Length=0.001 bus1=p3udt13293-p3udt24653x.1.2.3 bus2=p3udt13293.1.2.3 switch=y enabled=y phases=3 Linecode=padswitch_3_4_3_1_3_3

New Line.padswitch(r:p3udt24653-p3udt3737)p3u_180459 Units=km Length=0.001 bus1=p3udt3737.1.2.3 bus2=p3udt24653-p3udt3737xx.1.2.3 switch=y enabled=y phases=3 Linecode=padswitch_3_4_3_1_3_1_3_1

New Line.padswitch(r:p3udt24653-p3udt3737)p3u_180460 Units=km Length=0.001 bus1=p3udt24653-p3udt3737x.1.2.3 bus2=p3udt24653.1.2.3 switch=y enabled=y phases=3 Linecode=padswitch_3_4_3_1_3_3

New Line.padswitch(r:p3udt29135-p3udt3737)p3u_180461 Units=km Length=0.001 bus1=p3udt29135.1.2.3 bus2=p3udt29135-p3udt3737x.1.2.3 switch=y enabled=y phases=3 Linecode=padswitch_3_4_3_1_3_1_3_1

New Line.padswitch(r:p3udt29135-p3udt3737)p3u_180462 Units=km Length=0.001 bus1=p3udt29135-p3udt3737xx.1.2.3 bus2=p3udt3737.1.2.3 switch=y enabled=y phases=3 Linecode=padswitch_3_4_3_1_3_1_3_1

New Line.padswitch(r:p3udt25122-p3udt29135)p3u_180463 Units=km Length=0.001 bus1=p3udt25122.1.2.3 bus2=p3udt25122-p3udt29135x.1.2.3 switch=y enabled=y phases=3 Linecode=padswitch_3_4_3_1_3_1_3_1

New Line.padswitch(r:p3udt25122-p3udt29135)p3u_180464 Units=km Length=0.001 bus1=p3udt25122-p3udt29135xx.1.2.3 bus2=p3udt29135.1.2.3 switch=y enabled=y phases=3 Linecode=padswitch_3_4_3_1_3_1_3_1

New Line.padswitch(r:p3udt25127-p3udt32035)p3u_180465 Units=km Length=0.001 bus1=p3udt25127.1.2.3 bus2=p3udt25127-p3udt32035x.1.2.3 switch=y enabled=y phases=3 Linecode=padswitch_3_4_3_1_3_1_3_1

New Line.padswitch(r:p3udt25127-p3udt32035)p3u_180466 Units=km Length=0.001 bus1=p3udt25127-p3udt32035xx.1.2.3 bus2=p3udt32035.1.2.3 switch=y enabled=y phases=3 Linecode=padswitch_3_4_3_1_3_1_3_1

New Line.padswitch(r:p3udt18717-p3udt32035)p3u_206602 Units=km Length=0.001 bus1=p3udt32035.1.2.3 bus2=p3udt18717-p3udt32035xx.1.2.3 switch=y enabled=n phases=3 Linecode=padswitch_3_4_3_1_3_1_3_1

New Line.padswitch(r:p3udt18717-p3udt32035)p3u_206603 Units=km Length=0.001 bus1=p3udt18717-p3udt32035x.1.2.3 bus2=p3udt18717.1.2.3 switch=y enabled=n phases=3 Linecode=padswitch_3_4_3_1_3_1_3_1

New Line.padswitch(r:p3udt25122-p3udt26335)p3u_206781 Units=km Length=0.001 bus1=p3udt25122.1.2.3 bus2=p3udt25122-p3udt26335x.1.2.3 switch=y enabled=n phases=3 Linecode=padswitch_3_4_3_1_3_1_3_1

New Line.fuse(r:p3udt2312-p3udt3023)p3u_207119 Units=km Length=0.001 bus1=p3udt3023.1 bus2=p3udt2312-p3udt3023x.1 switch=n enabled=y phases=1 Linecode=fuse_1_1_1_1

New Fuse.Fuse_fuse(r:p3udt2312-p3udt3023)p3u_207119 monitoredobj=Line.fuse(r:p3udt2312-p3udt3023)p3u_207119 enabled=y ratedcurrent=100.0

New Line.fuse(r:p3udt5122-p3udt7632)p3u_207584 Units=km Length=0.001 bus1=p3udt7632.3 bus2=p3udt5122-p3udt7632xx.3 switch=n enabled=y phases=1 Linecode=fuse_1_1_1_1

New Fuse.Fuse_fuse(r:p3udt5122-p3udt7632)p3u_207584 monitoredobj=Line.fuse(r:p3udt5122-p3udt7632)p3u_207584 enabled=y ratedcurrent=100.0

New Line.fuse(r:p3udt12416-p3udt4430)p3u_208014 Units=km Length=0.001 bus1=p3udt12416.2 bus2=p3udt12416-p3udt4430x.2 switch=n enabled=y phases=1 Linecode=fuse_1_7_1_1_1

New Fuse.Fuse_fuse(r:p3udt12416-p3udt4430)p3u_208014 monitoredobj=Line.fuse(r:p3udt12416-p3udt4430)p3u_208014 enabled=y ratedcurrent=100.0

New Line.fuse(r:p3udt13296-p3udt26337)p3u_208098 Units=km Length=0.001 bus1=p3udt13296.2 bus2=p3udt13296-p3udt26337x.2 switch=n enabled=y phases=1 Linecode=fuse_1_1_1_1

New Fuse.Fuse_fuse(r:p3udt13296-p3udt26337)p3u_208098 monitoredobj=Line.fuse(r:p3udt13296-p3udt26337)p3u_208098 enabled=y ratedcurrent=100.0

New Line.fuse(r:p3udt14126-p3udt23248)p3u_208183 Units=km Length=0.001 bus1=p3udt14126.3 bus2=p3udt14126-p3udt23248x.3 switch=n enabled=y phases=1 Linecode=fuse_1_7_1_4_1_1

New Fuse.Fuse_fuse(r:p3udt14126-p3udt23248)p3u_208183 monitoredobj=Line.fuse(r:p3udt14126-p3udt23248)p3u_208183 enabled=y ratedcurrent=100.0

New Line.fuse(r:p3udt16174-p3udt31884)p3u_208392 Units=km Length=0.001 bus1=p3udt16174.3 bus2=p3udt16174-p3udt31884x.3 switch=n enabled=y phases=1 Linecode=fuse_1_1_1_1

New Fuse.Fuse_fuse(r:p3udt16174-p3udt31884)p3u_208392 monitoredobj=Line.fuse(r:p3udt16174-p3udt31884)p3u_208392 enabled=y ratedcurrent=100.0

New Line.fuse(r:p3udt17296-p3udt30494)p3u_208510 Units=km Length=0.001 bus1=p3udt17296.1 bus2=p3udt17296-p3udt30494x.1 switch=n enabled=y phases=1 Linecode=fuse_1_1_1_1

New Fuse.Fuse_fuse(r:p3udt17296-p3udt30494)p3u_208510 monitoredobj=Line.fuse(r:p3udt17296-p3udt30494)p3u_208510 enabled=y ratedcurrent=100.0

New Line.fuse(r:p3udt19022-p3udt2310)p3u_208669 Units=km Length=0.001 bus1=p3udt19022.1 bus2=p3udt19022-p3udt2310x.1 switch=n enabled=y phases=1 Linecode=fuse_1_1_1_1

New Fuse.Fuse_fuse(r:p3udt19022-p3udt2310)p3u_208669 monitoredobj=Line.fuse(r:p3udt19022-p3udt2310)p3u_208669 enabled=y ratedcurrent=100.0

New Line.fuse(r:p3udt13297-p3udt22434)p3u_209041 Units=km Length=0.001 bus1=p3udt22434.1 bus2=p3udt13297-p3udt22434xxx.1 switch=n enabled=y phases=1 Linecode=fuse_1_1_1_1

New Fuse.Fuse_fuse(r:p3udt13297-p3udt22434)p3u_209041 monitoredobj=Line.fuse(r:p3udt13297-p3udt22434)p3u_209041 enabled=y ratedcurrent=100.0

New Line.fuse(r:p3udt25547-p3udt29419)p3u_209345 Units=km Length=0.001 bus1=p3udt25547.3 bus2=p3udt25547-p3udt29419x.3 switch=n enabled=y phases=1 Linecode=fuse_1_1_1_1

New Fuse.Fuse_fuse(r:p3udt25547-p3udt29419)p3u_209345 monitoredobj=Line.fuse(r:p3udt25547-p3udt29419)p3u_209345 enabled=y ratedcurrent=100.0
