New Capacitor.p3uc64 Bus1=p3udt5126 phases=3 Kv=12.47 conn=Wye Kvar=300.0

New CapControl.p3uc64 Capacitor=p3uc64 Element=Line.l(r:p3udt4431-p3udt5126) Terminal=1 delay=100.0 Type=voltage Vmin=120.5 Vmax=125.0 Ptratio=59.99631547328862 Ctratio=100.0
