New Line.l(r:p3udt824lv-p3ulv981) Units=km Length=0.0423792 bus1=p3udt824lv.1.2 bus2=p3ulv981.1.2 switch=n enabled=y phases=2 Linecode=1P_OH_AL_4/0_Zuzara_0_416_0_2_2_2_2

New Line.l(r:p3udt824lv-p3ulv40824) Units=km Length=0.0239621 bus1=p3udt824lv.1.2 bus2=p3ulv40824.1.2 switch=n enabled=y phases=2 Linecode=1P_OH_AL_2/0_Rucina_0_416_0_2_2_2_2

New Line.l(r:p3udm2859-p3ulv9634) Units=km Length=0.0221157 bus1=p3udm2859.1.2 bus2=p3ulv9634.1.2 switch=n enabled=y phases=2 Linecode=1P_UG_AL_1/0_Brenau_0_416_0_2_2_2_2

New Line.l(r:p3udm2859-p3udt824lv) Units=km Length=0.0664871 bus1=p3udt824lv.1.2 bus2=p3udm2859.1.2 switch=n enabled=y phases=2 Linecode=1P_OH_AL_4/0_Zuzara_0_416_0_2_2_2_2

New Line.l(r:p3udm2861-p3ulv46337) Units=km Length=0.0635527 bus1=p3udm2861.1.2 bus2=p3ulv46337.1.2 switch=n enabled=y phases=2 Linecode=1P_OH_AL_4/0_Zuzara_0_416_0_2_2_2_2

New Line.l(r:p3udm2861-p3ulv79247) Units=km Length=0.05603910000000001 bus1=p3udm2861.1.2 bus2=p3ulv79247.1.2 switch=n enabled=y phases=2 Linecode=1P_OH_AL_4/0_Zuzara_0_416_0_2_2_2_2

New Line.l(r:p3udm2861-p3udt824lv) Units=km Length=0.0189765 bus1=p3udt824lv.1.2 bus2=p3udm2861.1.2 switch=n enabled=y phases=2 Linecode=1P_OH_AL_2/0_Rucina_0_416_0_2_2_2_2

New Line.l(r:p3udt825lv-p3ulv38443) Units=km Length=0.0855936 bus1=p3udt825lv.1.2 bus2=p3ulv38443.1.2 switch=n enabled=y phases=2 Linecode=1P_OH_AL_4/0_Zuzara_0_416_0_2_2_2_2

New Line.l(r:p3udm2863-p3ulv982) Units=km Length=0.07024220000000002 bus1=p3udm2863.1.2 bus2=p3ulv982.1.2 switch=n enabled=y phases=2 Linecode=1P_OH_AL_4/0_Zuzara_0_416_0_2_2_2_2

New Line.l(r:p3udm2863-p3ulv983) Units=km Length=0.0769608 bus1=p3udm2863.1.2 bus2=p3ulv983.1.2 switch=n enabled=y phases=2 Linecode=1P_OH_AL_4/0_Zuzara_0_416_0_2_2_2_2

New Line.l(r:p3udm2863-p3udt825lv) Units=km Length=0.0189853 bus1=p3udt825lv.1.2 bus2=p3udm2863.1.2 switch=n enabled=y phases=2 Linecode=1P_OH_AL_2/0_Rucina_0_416_0_2_2_2_2

New Line.l(r:p3udm2865-p3ulv19032) Units=km Length=0.0541956 bus1=p3udm2865.1.2 bus2=p3ulv19032.1.2 switch=n enabled=y phases=2 Linecode=1P_OH_AL_4/0_Zuzara_0_416_0_2_2_2_2

New Line.l(r:p3udm2865-p3udt825lv) Units=km Length=0.0189765 bus1=p3udt825lv.1.2 bus2=p3udm2865.1.2 switch=n enabled=y phases=2 Linecode=1P_OH_AL_2/0_Rucina_0_416_0_2_2_2_2

New Line.l(r:p3udt1581lv-p3ulv1766) Units=km Length=0.0440441 bus1=p3udt1581lv.1.2 bus2=p3ulv1766.1.2 switch=n enabled=y phases=2 Linecode=1P_OH_AL_4/0_Zuzara_0_416_0_2_2_2_2

New Line.l(r:p3udt1582lv-p3ulv1767) Units=km Length=0.0676888 bus1=p3udt1582lv.1.2 bus2=p3ulv1767.1.2 switch=n enabled=y phases=2 Linecode=1P_OH_AL_4/0_Zuzara_0_416_0_2_2_2_2

New Line.l(r:p3udt1582lv-p3ulv60019) Units=km Length=0.0676888 bus1=p3udt1582lv.1.2 bus2=p3ulv60019.1.2 switch=n enabled=y phases=2 Linecode=1P_OH_AL_4/0_Zuzara_0_416_0_2_2_2_2

New Line.l(r:p3udm5528-p3ulv1768) Units=km Length=0.026411 bus1=p3udm5528.1.2 bus2=p3ulv1768.1.2 switch=n enabled=y phases=2 Linecode=1P_OH_AL_2/0_Rucina_0_416_0_2_2_2_2

New Line.l(r:p3udm5528-p3udt1583lv) Units=km Length=0.019528 bus1=p3udt1583lv.1.2 bus2=p3udm5528.1.2 switch=n enabled=y phases=2 Linecode=1P_OH_AL_2/0_Rucina_0_416_0_2_2_2_2

New Line.l(r:p3udm5529-p3ulv73866) Units=km Length=0.0286365 bus1=p3udm5529.1.2 bus2=p3ulv73866.1.2 switch=n enabled=y phases=2 Linecode=1P_OH_AL_4/0_Zuzara_0_416_0_2_2_2_2

New Line.l(r:p3udm5529-p3udt1583lv) Units=km Length=0.0195234 bus1=p3udt1583lv.1.2 bus2=p3udm5529.1.2 switch=n enabled=y phases=2 Linecode=1P_OH_AL_2/0_Rucina_0_416_0_2_2_2_2

New Line.l(r:p3udm8088-p3ulv2556) Units=km Length=0.0173589 bus1=p3udm8088.1.2 bus2=p3ulv2556.1.2 switch=n enabled=y phases=2 Linecode=1P_OH_AL_2/0_Rucina_0_416_0_2_2_2_2

New Line.l(r:p3udm8088-p3udt2313lv) Units=km Length=0.0195234 bus1=p3udt2313lv.1.2 bus2=p3udm8088.1.2 switch=n enabled=y phases=2 Linecode=1P_OH_AL_2/0_Rucina_0_416_0_2_2_2_2

New Line.l(r:p3udm8089-p3ulv40017) Units=km Length=0.0196257 bus1=p3udm8089.1.2 bus2=p3ulv40017.1.2 switch=n enabled=y phases=2 Linecode=1P_OH_AL_2/0_Rucina_0_416_0_2_2_2_2

New Line.l(r:p3udm8089-p3udt2313lv) Units=km Length=0.0195234 bus1=p3udt2313lv.1.2 bus2=p3udm8089.1.2 switch=n enabled=y phases=2 Linecode=1P_OH_AL_2/0_Rucina_0_416_0_2_2_2_2

New Line.l(r:p3udm8090-p3ulv2557) Units=km Length=0.019302500000000004 bus1=p3udm8090.1.2 bus2=p3ulv2557.1.2 switch=n enabled=y phases=2 Linecode=1P_OH_AL_2/0_Rucina_0_416_0_2_2_2_2

New Line.l(r:p3udm8090-p3udt2314lv) Units=km Length=0.0772347 bus1=p3udt2314lv.1.2 bus2=p3udm8090.1.2 switch=n enabled=y phases=2 Linecode=1P_OH_AL_4/0_Zuzara_0_416_0_2_2_2_2

New Line.l(r:p3udm8091-p3ulv64600) Units=km Length=0.0266711 bus1=p3udm8091.1.2 bus2=p3ulv64600.1.2 switch=n enabled=y phases=2 Linecode=1P_OH_AL_2/0_Rucina_0_416_0_2_2_2_2

New Line.l(r:p3udm8091-p3udt2314lv) Units=km Length=0.0173403 bus1=p3udt2314lv.1.2 bus2=p3udm8091.1.2 switch=n enabled=y phases=2 Linecode=1P_OH_AL_2/0_Rucina_0_416_0_2_2_2_2

New Line.l(r:p3udt2315lv-p3ulv2558) Units=km Length=0.0349463 bus1=p3udt2315lv.1.2 bus2=p3ulv2558.1.2 switch=n enabled=y phases=2 Linecode=1P_OH_AL_4/0_Zuzara_0_416_0_2_2_2_2

New Line.l(r:p3udm8093-p3ulv4160) Units=km Length=0.0403689 bus1=p3udm8093.1.2 bus2=p3ulv4160.1.2 switch=n enabled=y phases=2 Linecode=1P_OH_AL_4/0_Zuzara_0_416_0_2_2_2_2

New Line.l(r:p3udm8093-p3udt2315lv) Units=km Length=0.0177222 bus1=p3udt2315lv.1.2 bus2=p3udm8093.1.2 switch=n enabled=y phases=2 Linecode=1P_OH_AL_2/0_Rucina_0_416_0_2_2_2_2

New Line.l(r:p3udm10578-p3ulv3340) Units=km Length=0.0384433 bus1=p3udm10578.1.2 bus2=p3ulv3340.1.2 switch=n enabled=y phases=2 Linecode=1P_OH_AL_4/0_Zuzara_0_416_0_2_2_2_2

New Line.l(r:p3udm10578-p3udt3025lv) Units=km Length=0.0189155 bus1=p3udt3025lv.1.2 bus2=p3udm10578.1.2 switch=n enabled=y phases=2 Linecode=1P_OH_AL_2/0_Rucina_0_416_0_2_2_2_2

New Line.l(r:p3udm10579-p3ulv4158) Units=km Length=0.0256944 bus1=p3udm10579.1.2 bus2=p3ulv4158.1.2 switch=n enabled=y phases=2 Linecode=1P_OH_AL_2/0_Rucina_0_416_0_2_2_2_2

New Line.l(r:p3udm10579-p3udt3025lv) Units=km Length=0.0189082 bus1=p3udt3025lv.1.2 bus2=p3udm10579.1.2 switch=n enabled=y phases=2 Linecode=1P_OH_AL_2/0_Rucina_0_416_0_2_2_2_2

New Line.l(r:p3udt3745lv-p3ulv62336) Units=km Length=0.109404 bus1=p3udt3745lv.1.2 bus2=p3ulv62336.1.2 switch=n enabled=y phases=2 Linecode=1P_OH_AL_4/0_Zuzara_0_416_0_2_2_2_2

New Line.l(r:p3udm13013-p3ulv4157) Units=km Length=0.0887056 bus1=p3udm13013.1.2 bus2=p3ulv4157.1.2 switch=n enabled=y phases=2 Linecode=1P_OH_AL_4/0_Zuzara_0_416_0_2_2_2_2

New Line.l(r:p3udm13013-p3udt3745lv) Units=km Length=0.0192842 bus1=p3udt3745lv.1.2 bus2=p3udm13013.1.2 switch=n enabled=y phases=2 Linecode=1P_OH_AL_2/0_Rucina_0_416_0_2_2_2_2

New Line.l(r:p3udt3746lv-p3ulv76929) Units=km Length=0.0345234 bus1=p3udt3746lv.1.2 bus2=p3ulv76929.1.2 switch=n enabled=y phases=2 Linecode=1P_OH_AL_4/0_Zuzara_0_416_0_2_2_2_2

New Line.l(r:p3udm13015-p3ulv4159) Units=km Length=0.0158165 bus1=p3udm13015.1.2 bus2=p3ulv4159.1.2 switch=n enabled=y phases=2 Linecode=1P_OH_AL_2/0_Rucina_0_416_0_2_2_2_2

New Line.l(r:p3udm13015-p3udt3746lv) Units=km Length=0.0394977 bus1=p3udt3746lv.1.2 bus2=p3udm13015.1.2 switch=n enabled=y phases=2 Linecode=1P_OH_AL_4/0_Zuzara_0_416_0_2_2_2_2

New Line.l(r:p3udm13016-p3ulv29949) Units=km Length=0.0332895 bus1=p3udm13016.1.2 bus2=p3ulv29949.1.2 switch=n enabled=y phases=2 Linecode=1P_OH_AL_4/0_Zuzara_0_416_0_2_2_2_2

New Line.l(r:p3udm13016-p3ulv40821) Units=km Length=0.0150283 bus1=p3udm13016.1.2 bus2=p3ulv40821.1.2 switch=n enabled=y phases=2 Linecode=1P_OH_AL_2/0_Rucina_0_416_0_2_2_2_2

New Line.l(r:p3udm13016-p3udt3746lv) Units=km Length=0.0197465 bus1=p3udt3746lv.1.2 bus2=p3udm13016.1.2 switch=n enabled=y phases=2 Linecode=1P_OH_AL_2/0_Rucina_0_416_0_2_2_2_2

New Line.l(r:p3udt4431lv-p3ulv30716) Units=km Length=0.0254902 bus1=p3udt4431lv.1.2 bus2=p3ulv30716.1.2 switch=n enabled=y phases=2 Linecode=1P_OH_AL_2/0_Rucina_0_416_0_2_2_2_2

New Line.l(r:p3udt4431lv-p3ulv38442) Units=km Length=0.0551454 bus1=p3udt4431lv.1.2 bus2=p3ulv38442.1.2 switch=n enabled=y phases=2 Linecode=1P_OH_AL_4/0_Zuzara_0_416_0_2_2_2_2

New Line.l(r:p3udm15377-p3ulv4924) Units=km Length=0.0380475 bus1=p3udm15377.1.2 bus2=p3ulv4924.1.2 switch=n enabled=y phases=2 Linecode=1P_OH_AL_4/0_Zuzara_0_416_0_2_2_2_2

New Line.l(r:p3udm15377-p3udt4431lv) Units=km Length=0.0195577 bus1=p3udt4431lv.1.2 bus2=p3udm15377.1.2 switch=n enabled=y phases=2 Linecode=1P_OH_AL_2/0_Rucina_0_416_0_2_2_2_2

New Line.l(r:p3udm15380-p3ulv46336) Units=km Length=0.0668611 bus1=p3udm15380.1.2 bus2=p3ulv46336.1.2 switch=n enabled=y phases=2 Linecode=1P_OH_AL_4/0_Zuzara_0_416_0_2_2_2_2

New Line.l(r:p3udm15380-p3udt4431lv) Units=km Length=0.0195479 bus1=p3udt4431lv.1.2 bus2=p3udm15380.1.2 switch=n enabled=y phases=2 Linecode=1P_OH_AL_2/0_Rucina_0_416_0_2_2_2_2

New Line.l(r:p3udm17701-p3ulv5747) Units=km Length=0.0170658 bus1=p3udm17701.1.2 bus2=p3ulv5747.1.2 switch=n enabled=y phases=2 Linecode=1P_OH_AL_2/0_Rucina_0_416_0_2_2_2_2

New Line.l(r:p3udm17701-p3udt5123lv) Units=km Length=0.0197465 bus1=p3udt5123lv.1.2 bus2=p3udm17701.1.2 switch=n enabled=y phases=2 Linecode=1P_OH_AL_2/0_Rucina_0_416_0_2_2_2_2

New Line.l(r:p3udm17702-p3ulv40822) Units=km Length=0.016448500000000005 bus1=p3udm17702.1.2 bus2=p3ulv40822.1.2 switch=n enabled=y phases=2 Linecode=1P_OH_AL_2/0_Rucina_0_416_0_2_2_2_2

New Line.l(r:p3udm17702-p3udt5123lv) Units=km Length=0.0394977 bus1=p3udt5123lv.1.2 bus2=p3udm17702.1.2 switch=n enabled=y phases=2 Linecode=1P_OH_AL_4/0_Zuzara_0_416_0_2_2_2_2

New Line.l(r:p3udt5124lv-p3ulv5748) Units=km Length=0.0268159 bus1=p3udt5124lv.1.2 bus2=p3ulv5748.1.2 switch=n enabled=y phases=2 Linecode=1P_OH_AL_2/0_Rucina_0_416_0_2_2_2_2

New Line.l(r:p3udt5124lv-p3ulv28440) Units=km Length=0.0222961 bus1=p3udt5124lv.1.2 bus2=p3ulv28440.1.2 switch=n enabled=y phases=2 Linecode=1P_OH_AL_2/0_Rucina_0_416_0_2_2_2_2

New Line.l(r:p3udt5124lv-p3ulv43915) Units=km Length=0.049209800000000005 bus1=p3udt5124lv.1.2 bus2=p3ulv43915.1.2 switch=n enabled=y phases=2 Linecode=1P_OH_AL_4/0_Zuzara_0_416_0_2_2_2_2

New Line.l(r:p3udt5124lv-p3ulv68511) Units=km Length=0.0486431 bus1=p3udt5124lv.1.2 bus2=p3ulv68511.1.2 switch=n enabled=y phases=2 Linecode=1P_OH_AL_4/0_Zuzara_0_416_0_2_2_2_2

New Line.l(r:p3udt5124lv-p3ulv70034) Units=km Length=0.0270195 bus1=p3udt5124lv.1.2 bus2=p3ulv70034.1.2 switch=n enabled=y phases=2 Linecode=1P_OH_AL_4/0_Zuzara_0_416_0_2_2_2_2

New Line.l(r:p3udt5124lv-p3ulv76930) Units=km Length=0.0151856 bus1=p3udt5124lv.1.2 bus2=p3ulv76930.1.2 switch=n enabled=y phases=2 Linecode=1P_OH_AL_2/0_Rucina_0_416_0_2_2_2_2

New Line.l(r:p3udt5125lv-p3ulv5749) Units=km Length=0.0123538 bus1=p3udt5125lv.1.2 bus2=p3ulv5749.1.2 switch=n enabled=y phases=2 Linecode=1P_OH_AL_2/0_Rucina_0_416_0_2_2_2_2

New Line.l(r:p3udt5125lv-p3ulv32353) Units=km Length=0.0272971 bus1=p3udt5125lv.1.2 bus2=p3ulv32353.1.2 switch=n enabled=y phases=2 Linecode=1P_OH_AL_4/0_Zuzara_0_416_0_2_2_2_2

New Line.l(r:p3udt5126lv-p3ulv55483) Units=km Length=0.0357712 bus1=p3udt5126lv.1.2 bus2=p3ulv55483.1.2 switch=n enabled=y phases=2 Linecode=1P_OH_AL_4/0_Zuzara_0_416_0_2_2_2_2

New Line.l(r:p3udm17711-p3ulv5750) Units=km Length=0.0364709 bus1=p3udm17711.1.2 bus2=p3ulv5750.1.2 switch=n enabled=y phases=2 Linecode=1P_OH_AL_4/0_Zuzara_0_416_0_2_2_2_2

New Line.l(r:p3udm17711-p3udt5126lv) Units=km Length=0.0195457 bus1=p3udt5126lv.1.2 bus2=p3udm17711.1.2 switch=n enabled=y phases=2 Linecode=1P_OH_AL_2/0_Rucina_0_416_0_2_2_2_2

New Line.l(r:p3udt5772lv-p3ulv6539) Units=km Length=0.115117 bus1=p3udt5772lv.1.2 bus2=p3ulv6539.1.2 switch=n enabled=y phases=2 Linecode=1P_OH_AL_4/0_Zuzara_0_416_0_2_2_2_2

New Line.l(r:p3udt5772lv-p3ulv24537) Units=km Length=0.080458 bus1=p3udt5772lv.1.2 bus2=p3ulv24537.1.2 switch=n enabled=y phases=2 Linecode=1P_OH_AL_4/0_Zuzara_0_416_0_2_2_2_2

New Line.l(r:p3udm21972-p3ulv36901) Units=km Length=0.0348505 bus1=p3udm21972.1.2 bus2=p3ulv36901.1.2 switch=n enabled=y phases=2 Linecode=1P_OH_AL_4/0_Zuzara_0_416_0_2_2_2_2

New Line.l(r:p3udm21971-p3ulv7353) Units=km Length=0.0232427 bus1=p3udm21971.1.2 bus2=p3ulv7353.1.2 switch=n enabled=y phases=2 Linecode=1P_OH_AL_2/0_Rucina_0_416_0_2_2_2_2

New Line.l(r:p3udm21971-p3udm21972) Units=km Length=0.0195794 bus1=p3udm21972.1.2 bus2=p3udm21971.1.2 switch=n enabled=y phases=2 Linecode=1P_OH_AL_2/0_Rucina_0_416_0_2_2_2_2

New Line.l(r:p3udm21972-p3udt6416lv) Units=km Length=0.019572 bus1=p3udt6416lv.1.2 bus2=p3udm21972.1.2 switch=n enabled=y phases=2 Linecode=1P_OH_AL_2/0_Rucina_0_416_0_2_2_2_2

New Line.l(r:p3udm21973-p3ulv54727) Units=km Length=0.0174305 bus1=p3udm21973.1.2 bus2=p3ulv54727.1.2 switch=n enabled=y phases=2 Linecode=1P_OH_AL_2/0_Rucina_0_416_0_2_2_2_2

New Line.l(r:p3udm21973-p3ulv71579) Units=km Length=0.03429700000000001 bus1=p3udm21973.1.2 bus2=p3ulv71579.1.2 switch=n enabled=y phases=2 Linecode=1P_OH_AL_4/0_Zuzara_0_416_0_2_2_2_2

New Line.l(r:p3udm21973-p3udt6416lv) Units=km Length=0.019572 bus1=p3udt6416lv.1.2 bus2=p3udm21973.1.2 switch=n enabled=y phases=2 Linecode=1P_OH_AL_2/0_Rucina_0_416_0_2_2_2_2

New Line.l(r:p3udt6417lv-p3ulv7354) Units=km Length=0.0393885 bus1=p3udt6417lv.1.2 bus2=p3ulv7354.1.2 switch=n enabled=y phases=2 Linecode=1P_UG_AL_1/0_Brenau_0_416_0_2_2_2_2

New Line.l(r:p3udt6417lv-p3ulv17499) Units=km Length=0.0311316 bus1=p3udt6417lv.1.2 bus2=p3ulv17499.1.2 switch=n enabled=y phases=2 Linecode=1P_UG_AL_1/0_Brenau_0_416_0_2_2_2_2

New Line.l(r:p3udt6417lv-p3ulv52399) Units=km Length=0.0426374 bus1=p3udt6417lv.1.2 bus2=p3ulv52399.1.2 switch=n enabled=y phases=2 Linecode=1P_UG_AL_1/0_Brenau_0_416_0_2_2_2_2

New Line.l(r:p3udt6417lv-p3ulv58544) Units=km Length=0.0315053 bus1=p3udt6417lv.1.2 bus2=p3ulv58544.1.2 switch=n enabled=y phases=2 Linecode=1P_UG_AL_1/0_Brenau_0_416_0_2_2_2_2

New Line.l(r:p3udt6417lv-p3ulv78449) Units=km Length=0.0454922 bus1=p3udt6417lv.1.2 bus2=p3ulv78449.1.2 switch=n enabled=y phases=2 Linecode=1P_UG_AL_1/0_Brenau_0_416_0_2_2_2_2

New Line.l(r:p3udm21978-p3ulv32354) Units=km Length=0.0281858 bus1=p3udm21978.1.2 bus2=p3ulv32354.1.2 switch=n enabled=y phases=2 Linecode=1P_UG_AL_1/0_Brenau_0_416_0_2_2_2_2

New Line.l(r:p3udm21976-p3ulv8152) Units=km Length=0.0275253 bus1=p3udm21976.1.2 bus2=p3ulv8152.1.2 switch=n enabled=y phases=2 Linecode=1P_UG_AL_1/0_Brenau_0_416_0_2_2_2_2

New Line.l(r:p3udm21976-p3udm21978) Units=km Length=0.0552407 bus1=p3udm21978.1.2 bus2=p3udm21976.1.2 switch=n enabled=y phases=2 Linecode=1P_UG_AL_1/0_Brenau_0_416_0_2_2_2_2

New Line.l(r:p3udm21978-p3udt6417lv) Units=km Length=0.0137064 bus1=p3udt6417lv.1.2 bus2=p3udm21978.1.2 switch=n enabled=y phases=2 Linecode=1P_UG_AL_4/0_Sweetbriar_0_416_0_2_2_2_2

New Line.l(r:p3udm21982-p3ulv7355) Units=km Length=0.0372514 bus1=p3udm21982.1.2 bus2=p3ulv7355.1.2 switch=n enabled=y phases=2 Linecode=1P_OH_AL_4/0_Zuzara_0_416_0_2_2_2_2

New Line.l(r:p3udm21982-p3udt6418lv) Units=km Length=0.0192047 bus1=p3udt6418lv.1.2 bus2=p3udm21982.1.2 switch=n enabled=y phases=2 Linecode=1P_OH_AL_2/0_Rucina_0_416_0_2_2_2_2

New Line.l(r:p3udm21983-p3ulv11275) Units=km Length=0.00613942 bus1=p3udm21983.1.2 bus2=p3ulv11275.1.2 switch=n enabled=y phases=2 Linecode=1P_OH_AL_2/0_Rucina_0_416_0_2_2_2_2

New Line.l(r:p3udm21983-p3udt6418lv) Units=km Length=0.0459642 bus1=p3udt6418lv.1.2 bus2=p3udm21983.1.2 switch=n enabled=y phases=2 Linecode=1P_OH_AL_4/0_Zuzara_0_416_0_2_2_2_2

New Line.l(r:p3udt6419lv-p3ulv53185) Units=km Length=0.0388069 bus1=p3udt6419lv.1.2 bus2=p3ulv53185.1.2 switch=n enabled=y phases=2 Linecode=1P_UG_AL_1/0_Brenau_0_416_0_2_2_2_2

New Line.l(r:p3udm21984-p3ulv7356) Units=km Length=0.06968520000000002 bus1=p3udm21984.1.2 bus2=p3ulv7356.1.2 switch=n enabled=y phases=2 Linecode=1P_UG_AL_1/0_Brenau_0_416_0_2_2_2_2

New Line.l(r:p3udm21984-p3udt6419lv) Units=km Length=0.009796540000000001 bus1=p3udt6419lv.1.2 bus2=p3udm21984.1.2 switch=n enabled=y phases=2 Linecode=1P_UG_AL_1/0_Brenau_0_416_0_2_2_2_2

New Line.l(r:p3udm21985-p3ulv9631) Units=km Length=0.0149525 bus1=p3udm21985.1.2 bus2=p3ulv9631.1.2 switch=n enabled=y phases=2 Linecode=1P_UG_AL_1/0_Brenau_0_416_0_2_2_2_2

New Line.l(r:p3udm21985-p3udt6419lv) Units=km Length=0.00978777 bus1=p3udt6419lv.1.2 bus2=p3udm21985.1.2 switch=n enabled=y phases=2 Linecode=1P_UG_AL_1/0_Brenau_0_416_0_2_2_2_2

New Line.l(r:p3udm21987-p3ulv7357) Units=km Length=0.017549 bus1=p3udm21987.1.2 bus2=p3ulv7357.1.2 switch=n enabled=y phases=2 Linecode=1P_UG_AL_1/0_Brenau_0_416_0_2_2_2_2

New Line.l(r:p3udm21987-p3ulv26918) Units=km Length=0.022583600000000002 bus1=p3udm21987.1.2 bus2=p3ulv26918.1.2 switch=n enabled=y phases=2 Linecode=1P_UG_AL_1/0_Brenau_0_416_0_2_2_2_2

New Line.l(r:p3udm21988-p3ulv18281) Units=km Length=0.0284556 bus1=p3udm21988.1.2 bus2=p3ulv18281.1.2 switch=n enabled=y phases=2 Linecode=1P_UG_AL_1/0_Brenau_0_416_0_2_2_2_2

New Line.l(r:p3udm21987-p3udm21988) Units=km Length=0.0706708 bus1=p3udm21987.1.2 bus2=p3udm21988.1.2 switch=n enabled=y phases=2 Linecode=1P_UG_AL_1/0_Brenau_0_416_0_2_2_2_2

New Line.l(r:p3udm21987-p3udt6420lv) Units=km Length=0.0190033 bus1=p3udt6420lv.1.2 bus2=p3udm21987.1.2 switch=n enabled=y phases=2 Linecode=1P_UG_AL_4/0_Sweetbriar_0_416_0_2_2_2_2

New Line.l(r:p3udm21990-p3ulv54728) Units=km Length=0.0288988 bus1=p3udm21990.1.2 bus2=p3ulv54728.1.2 switch=n enabled=y phases=2 Linecode=1P_UG_AL_1/0_Brenau_0_416_0_2_2_2_2

New Line.l(r:p3udm21990-p3udt6420lv) Units=km Length=0.0285162 bus1=p3udt6420lv.1.2 bus2=p3udm21990.1.2 switch=n enabled=y phases=2 Linecode=1P_UG_AL_1/0_Brenau_0_416_0_2_2_2_2

New Line.l(r:p3udm24125-p3ulv8150) Units=km Length=0.0242302 bus1=p3udm24125.1.2 bus2=p3ulv8150.1.2 switch=n enabled=y phases=2 Linecode=1P_OH_AL_2/0_Rucina_0_416_0_2_2_2_2

New Line.l(r:p3udm24125-p3udt7050lv) Units=km Length=0.0391061 bus1=p3udt7050lv.1.2 bus2=p3udm24125.1.2 switch=n enabled=y phases=2 Linecode=1P_OH_AL_4/0_Zuzara_0_416_0_2_2_2_2

New Line.l(r:p3udm24126-p3ulv75344) Units=km Length=0.023487 bus1=p3udm24126.1.2 bus2=p3ulv75344.1.2 switch=n enabled=y phases=2 Linecode=1P_OH_AL_2/0_Rucina_0_416_0_2_2_2_2

New Line.l(r:p3udm24126-p3udt7050lv) Units=km Length=0.0195507 bus1=p3udt7050lv.1.2 bus2=p3udm24126.1.2 switch=n enabled=y phases=2 Linecode=1P_OH_AL_2/0_Rucina_0_416_0_2_2_2_2

New Line.l(r:p3udt7633lv-p3ulv8908) Units=km Length=0.0255685 bus1=p3udt7633lv.1.2 bus2=p3ulv8908.1.2 switch=n enabled=y phases=2 Linecode=1P_OH_AL_2/0_Rucina_0_416_0_2_2_2_2

New Line.l(r:p3udt7634lv-p3ulv8909) Units=km Length=0.0868581 bus1=p3udt7634lv.1.2 bus2=p3ulv8909.1.2 switch=n enabled=y phases=2 Linecode=1P_OH_AL_4/0_Zuzara_0_416_0_2_2_2_2

New Line.l(r:p3udm27768-p3ulv9630) Units=km Length=0.0162631 bus1=p3udm27768.1.2 bus2=p3ulv9630.1.2 switch=n enabled=y phases=2 Linecode=1P_OH_AL_2/0_Rucina_0_416_0_2_2_2_2

New Line.l(r:p3udm27768-p3udt8192lv) Units=km Length=0.0195306 bus1=p3udt8192lv.1.2 bus2=p3udm27768.1.2 switch=n enabled=y phases=2 Linecode=1P_OH_AL_2/0_Rucina_0_416_0_2_2_2_2

New Line.l(r:p3udm27769-p3ulv53184) Units=km Length=0.0244374 bus1=p3udm27769.1.2 bus2=p3ulv53184.1.2 switch=n enabled=y phases=2 Linecode=1P_OH_AL_2/0_Rucina_0_416_0_2_2_2_2

New Line.l(r:p3udm27769-p3udt8192lv) Units=km Length=0.0195219 bus1=p3udt8192lv.1.2 bus2=p3udm27769.1.2 switch=n enabled=y phases=2 Linecode=1P_OH_AL_2/0_Rucina_0_416_0_2_2_2_2

New Line.l(r:p3udm27770-p3ulv9632) Units=km Length=0.0547995 bus1=p3udm27770.1.2 bus2=p3ulv9632.1.2 switch=n enabled=y phases=2 Linecode=1P_OH_AL_4/0_Zuzara_0_416_0_2_2_2_2

New Line.l(r:p3udm27770-p3udt8193lv) Units=km Length=0.0195554 bus1=p3udt8193lv.1.2 bus2=p3udm27770.1.2 switch=n enabled=y phases=2 Linecode=1P_OH_AL_2/0_Rucina_0_416_0_2_2_2_2

New Line.l(r:p3udm27771-p3ulv24536) Units=km Length=0.0390493 bus1=p3udm27771.1.2 bus2=p3ulv24536.1.2 switch=n enabled=y phases=2 Linecode=1P_OH_AL_4/0_Zuzara_0_416_0_2_2_2_2

New Line.l(r:p3udm27771-p3udt8193lv) Units=km Length=0.0195507 bus1=p3udt8193lv.1.2 bus2=p3udm27771.1.2 switch=n enabled=y phases=2 Linecode=1P_OH_AL_2/0_Rucina_0_416_0_2_2_2_2

New Line.l(r:p3udt8194lv-p3ulv79245) Units=km Length=0.0262206 bus1=p3udt8194lv.1.2 bus2=p3ulv79245.1.2 switch=n enabled=y phases=2 Linecode=1P_OH_AL_2/0_Rucina_0_416_0_2_2_2_2

New Line.l(r:p3udm27772-p3ulv9633) Units=km Length=0.0225346 bus1=p3udm27772.1.2 bus2=p3ulv9633.1.2 switch=n enabled=y phases=2 Linecode=1P_OH_AL_2/0_Rucina_0_416_0_2_2_2_2

New Line.l(r:p3udm27772-p3udt8194lv) Units=km Length=0.0390796 bus1=p3udt8194lv.1.2 bus2=p3udm27772.1.2 switch=n enabled=y phases=2 Linecode=1P_OH_AL_4/0_Zuzara_0_416_0_2_2_2_2

New Line.l(r:p3udm27773-p3ulv66154) Units=km Length=0.0277503 bus1=p3udm27773.1.2 bus2=p3ulv66154.1.2 switch=n enabled=y phases=2 Linecode=1P_OH_AL_4/0_Zuzara_0_416_0_2_2_2_2

New Line.l(r:p3udm27773-p3udt8194lv) Units=km Length=0.0195352 bus1=p3udt8194lv.1.2 bus2=p3udm27773.1.2 switch=n enabled=y phases=2 Linecode=1P_OH_AL_2/0_Rucina_0_416_0_2_2_2_2

New Line.l(r:p3udt8771lv-p3ulv59304) Units=km Length=0.0269934 bus1=p3udt8771lv.1.2 bus2=p3ulv59304.1.2 switch=n enabled=y phases=2 Linecode=1P_OH_AL_2/0_Rucina_0_416_0_2_2_2_2

New Line.l(r:p3udm29606-p3ulv10437) Units=km Length=0.0278098 bus1=p3udm29606.1.2 bus2=p3ulv10437.1.2 switch=n enabled=y phases=2 Linecode=1P_OH_AL_4/0_Zuzara_0_416_0_2_2_2_2

New Line.l(r:p3udm29606-p3udt8771lv) Units=km Length=0.0572274 bus1=p3udt8771lv.1.2 bus2=p3udm29606.1.2 switch=n enabled=y phases=2 Linecode=1P_OH_AL_4/0_Zuzara_0_416_0_2_2_2_2

New Line.l(r:p3udt9342lv-p3ulv11273) Units=km Length=0.0243895 bus1=p3udt9342lv.1.2 bus2=p3ulv11273.1.2 switch=n enabled=y phases=2 Linecode=1P_OH_AL_2/0_Rucina_0_416_0_2_2_2_2

New Line.l(r:p3udt9343lv-p3ulv11274) Units=km Length=0.030452900000000005 bus1=p3udt9343lv.1.2 bus2=p3ulv11274.1.2 switch=n enabled=y phases=2 Linecode=1P_OH_AL_4/0_Zuzara_0_416_0_2_2_2_2

New Line.l(r:p3udm31328-p3ulv43918) Units=km Length=0.0119555 bus1=p3udm31328.1.2 bus2=p3ulv43918.1.2 switch=n enabled=y phases=2 Linecode=1P_OH_AL_2/0_Rucina_0_416_0_2_2_2_2

New Line.l(r:p3udm31328-p3udt9343lv) Units=km Length=0.019528 bus1=p3udt9343lv.1.2 bus2=p3udm31328.1.2 switch=n enabled=y phases=2 Linecode=1P_OH_AL_2/0_Rucina_0_416_0_2_2_2_2

New Line.l(r:p3udt9883lv-p3ulv53940) Units=km Length=0.062212 bus1=p3udt9883lv.1.2 bus2=p3ulv53940.1.2 switch=n enabled=y phases=2 Linecode=1P_OH_AL_4/0_Zuzara_0_416_0_2_2_2_2

New Line.l(r:p3udt9883lv-p3ulv57785) Units=km Length=0.0286941 bus1=p3udt9883lv.1.2 bus2=p3ulv57785.1.2 switch=n enabled=y phases=2 Linecode=1P_OH_AL_4/0_Zuzara_0_416_0_2_2_2_2

New Line.l(r:p3udm33001-p3ulv12051) Units=km Length=0.0270529 bus1=p3udm33001.1.2 bus2=p3ulv12051.1.2 switch=n enabled=y phases=2 Linecode=1P_UG_AL_1/0_Brenau_0_416_0_2_2_2_2

New Line.l(r:p3udm33001-p3udt9883lv) Units=km Length=0.0192045 bus1=p3udt9883lv.1.2 bus2=p3udm33001.1.2 switch=n enabled=y phases=2 Linecode=1P_OH_AL_2/0_Rucina_0_416_0_2_2_2_2

New Line.l(r:p3udm33002-p3ulv35449) Units=km Length=0.0263046 bus1=p3udm33002.1.2 bus2=p3ulv35449.1.2 switch=n enabled=y phases=2 Linecode=1P_OH_AL_2/0_Rucina_0_416_0_2_2_2_2

New Line.l(r:p3udm33002-p3udt9883lv) Units=km Length=0.0384049 bus1=p3udt9883lv.1.2 bus2=p3udm33002.1.2 switch=n enabled=y phases=2 Linecode=1P_OH_AL_4/0_Zuzara_0_416_0_2_2_2_2

New Line.l(r:p3udm34565-p3ulv12799) Units=km Length=0.024412600000000003 bus1=p3udm34565.1.2 bus2=p3ulv12799.1.2 switch=n enabled=y phases=2 Linecode=1P_OH_AL_2/0_Rucina_0_416_0_2_2_2_2

New Line.l(r:p3udm34565-p3udt10391lv) Units=km Length=0.0187358 bus1=p3udt10391lv.1.2 bus2=p3udm34565.1.2 switch=n enabled=y phases=2 Linecode=1P_OH_AL_2/0_Rucina_0_416_0_2_2_2_2

New Line.l(r:p3udm34566-p3ulv66929) Units=km Length=0.0237408 bus1=p3udm34566.1.2 bus2=p3ulv66929.1.2 switch=n enabled=y phases=2 Linecode=1P_OH_AL_2/0_Rucina_0_416_0_2_2_2_2

New Line.l(r:p3udm34566-p3udt10391lv) Units=km Length=0.0382994 bus1=p3udt10391lv.1.2 bus2=p3udm34566.1.2 switch=n enabled=y phases=2 Linecode=1P_OH_AL_4/0_Zuzara_0_416_0_2_2_2_2

New Line.l(r:p3udt11899lv-p3ulv15144) Units=km Length=0.0830642 bus1=p3udt11899lv.1.2 bus2=p3ulv15144.1.2 switch=n enabled=y phases=2 Linecode=1P_OH_AL_4/0_Zuzara_0_416_0_2_2_2_2

New Line.l(r:p3udt11899lv-p3ulv43917) Units=km Length=0.0628123 bus1=p3udt11899lv.1.2 bus2=p3ulv43917.1.2 switch=n enabled=y phases=2 Linecode=1P_OH_AL_4/0_Zuzara_0_416_0_2_2_2_2

New Line.l(r:p3udt12418lv-p3ulv15965) Units=km Length=0.0434114 bus1=p3udt12418lv.1.2 bus2=p3ulv15965.1.2 switch=n enabled=y phases=2 Linecode=1P_OH_AL_4/0_Zuzara_0_416_0_2_2_2_2

New Line.l(r:p3udt12418lv-p3ulv26136) Units=km Length=0.0722392 bus1=p3udt12418lv.1.2 bus2=p3ulv26136.1.2 switch=n enabled=y phases=2 Linecode=1P_OH_AL_4/0_Zuzara_0_416_0_2_2_2_2

New Line.l(r:p3udt12418lv-p3ulv29178) Units=km Length=0.0250583 bus1=p3udt12418lv.1.2 bus2=p3ulv29178.1.2 switch=n enabled=y phases=2 Linecode=1P_OH_AL_2/0_Rucina_0_416_0_2_2_2_2

New Line.l(r:p3udt12418lv-p3ulv70843) Units=km Length=0.0785073 bus1=p3udt12418lv.1.2 bus2=p3ulv70843.1.2 switch=n enabled=y phases=2 Linecode=1P_OH_AL_4/0_Zuzara_0_416_0_2_2_2_2

New Line.l(r:p3udt12418lv-p3ulv77694) Units=km Length=0.0650615 bus1=p3udt12418lv.1.2 bus2=p3ulv77694.1.2 switch=n enabled=y phases=2 Linecode=1P_OH_AL_4/0_Zuzara_0_416_0_2_2_2_2

New Line.l(r:p3udt12889lv-p3ulv48586) Units=km Length=0.0180229 bus1=p3udt12889lv.1.2 bus2=p3ulv48586.1.2 switch=n enabled=y phases=2 Linecode=1P_OH_AL_2/0_Rucina_0_416_0_2_2_2_2

New Line.l(r:p3udt12889lv-p3ulv79242) Units=km Length=0.0541892 bus1=p3udt12889lv.1.2 bus2=p3ulv79242.1.2 switch=n enabled=y phases=2 Linecode=1P_OH_AL_4/0_Zuzara_0_416_0_2_2_2_2

New Line.l(r:p3udm41991-p3ulv16781) Units=km Length=0.017827700000000002 bus1=p3udm41991.1.2 bus2=p3ulv16781.1.2 switch=n enabled=y phases=2 Linecode=1P_OH_AL_2/0_Rucina_0_416_0_2_2_2_2

New Line.l(r:p3udm41991-p3udt12889lv) Units=km Length=0.0195256 bus1=p3udt12889lv.1.2 bus2=p3udm41991.1.2 switch=n enabled=y phases=2 Linecode=1P_OH_AL_2/0_Rucina_0_416_0_2_2_2_2

New Line.l(r:p3udm41994-p3ulv80759) Units=km Length=0.0488661 bus1=p3udm41994.1.2 bus2=p3ulv80759.1.2 switch=n enabled=y phases=2 Linecode=1P_OH_AL_4/0_Zuzara_0_416_0_2_2_2_2

New Line.l(r:p3udm41994-p3udt12889lv) Units=km Length=0.0390524 bus1=p3udt12889lv.1.2 bus2=p3udm41994.1.2 switch=n enabled=y phases=2 Linecode=1P_OH_AL_4/0_Zuzara_0_416_0_2_2_2_2

New Line.l(r:p3udm43136-p3ulv17496) Units=km Length=0.00935137 bus1=p3udm43136.1.2 bus2=p3ulv17496.1.2 switch=n enabled=y phases=2 Linecode=1P_OH_AL_2/0_Rucina_0_416_0_2_2_2_2

New Line.l(r:p3udm43139-p3ulv79999) Units=km Length=0.0107905 bus1=p3udm43139.1.2 bus2=p3ulv79999.1.2 switch=n enabled=y phases=2 Linecode=1P_OH_AL_2/0_Rucina_0_416_0_2_2_2_2

New Line.l(r:p3udm43136-p3udm43139) Units=km Length=0.0197512 bus1=p3udm43136.1.2 bus2=p3udm43139.1.2 switch=n enabled=y phases=2 Linecode=1P_OH_AL_2/0_Rucina_0_416_0_2_2_2_2

New Line.l(r:p3udm43136-p3udt13298lv) Units=km Length=0.039493 bus1=p3udt13298lv.1.2 bus2=p3udm43136.1.2 switch=n enabled=y phases=2 Linecode=1P_OH_AL_4/0_Zuzara_0_416_0_2_2_2_2

New Line.l(r:p3udm43137-p3ulv23677) Units=km Length=0.007790130000000001 bus1=p3udm43137.1.2 bus2=p3ulv23677.1.2 switch=n enabled=y phases=2 Linecode=1P_OH_AL_2/0_Rucina_0_416_0_2_2_2_2

New Line.l(r:p3udm43138-p3ulv41588) Units=km Length=0.0293103 bus1=p3udm43138.1.2 bus2=p3ulv41588.1.2 switch=n enabled=y phases=2 Linecode=1P_OH_AL_4/0_Zuzara_0_416_0_2_2_2_2

New Line.l(r:p3udm43137-p3udm43138) Units=km Length=0.0197512 bus1=p3udm43137.1.2 bus2=p3udm43138.1.2 switch=n enabled=y phases=2 Linecode=1P_OH_AL_2/0_Rucina_0_416_0_2_2_2_2

New Line.l(r:p3udm43137-p3udt13298lv) Units=km Length=0.0394888 bus1=p3udt13298lv.1.2 bus2=p3udm43137.1.2 switch=n enabled=y phases=2 Linecode=1P_OH_AL_4/0_Zuzara_0_416_0_2_2_2_2

New Line.l(r:p3udt13299lv-p3ulv17498) Units=km Length=0.0301827 bus1=p3udt13299lv.1.2 bus2=p3ulv17498.1.2 switch=n enabled=y phases=2 Linecode=1P_OH_AL_4/0_Zuzara_0_416_0_2_2_2_2

New Line.l(r:p3udt13721lv-p3ulv51610) Units=km Length=0.0196298 bus1=p3udt13721lv.1.2 bus2=p3ulv51610.1.2 switch=n enabled=y phases=2 Linecode=1P_OH_AL_2/0_Rucina_0_416_0_2_2_2_2

New Line.l(r:p3udm44356-p3ulv18280) Units=km Length=0.0268599 bus1=p3udm44356.1.2 bus2=p3ulv18280.1.2 switch=n enabled=y phases=2 Linecode=1P_OH_AL_2/0_Rucina_0_416_0_2_2_2_2

New Line.l(r:p3udm44356-p3udt13721lv) Units=km Length=0.0195369 bus1=p3udt13721lv.1.2 bus2=p3udm44356.1.2 switch=n enabled=y phases=2 Linecode=1P_OH_AL_2/0_Rucina_0_416_0_2_2_2_2

New Line.l(r:p3udt14127lv-p3ulv19031) Units=km Length=0.051733100000000004 bus1=p3udt14127lv.1.2 bus2=p3ulv19031.1.2 switch=n enabled=y phases=2 Linecode=1P_OH_AL_4/0_Zuzara_0_416_0_2_2_2_2

New Line.l(r:p3udt14127lv-p3ulv47101) Units=km Length=0.0339354 bus1=p3udt14127lv.1.2 bus2=p3ulv47101.1.2 switch=n enabled=y phases=2 Linecode=1P_OH_AL_4/0_Zuzara_0_416_0_2_2_2_2

New Line.l(r:p3udt14127lv-p3ulv47863) Units=km Length=0.02085 bus1=p3udt14127lv.1.2 bus2=p3ulv47863.1.2 switch=n enabled=y phases=2 Linecode=1P_OH_AL_2/0_Rucina_0_416_0_2_2_2_2

New Line.l(r:p3udt14127lv-p3ulv72344) Units=km Length=0.0248903 bus1=p3udt14127lv.1.2 bus2=p3ulv72344.1.2 switch=n enabled=y phases=2 Linecode=1P_OH_AL_2/0_Rucina_0_416_0_2_2_2_2

New Line.l(r:p3udm46597-p3ulv19792) Units=km Length=0.0264139 bus1=p3udm46597.1.2 bus2=p3ulv19792.1.2 switch=n enabled=y phases=2 Linecode=1P_OH_AL_2/0_Rucina_0_416_0_2_2_2_2

New Line.l(r:p3udm46597-p3udt14556lv) Units=km Length=0.0195352 bus1=p3udt14556lv.1.2 bus2=p3udm46597.1.2 switch=n enabled=y phases=2 Linecode=1P_OH_AL_2/0_Rucina_0_416_0_2_2_2_2

New Line.l(r:p3udm46598-p3ulv80002) Units=km Length=0.0289865 bus1=p3udm46598.1.2 bus2=p3ulv80002.1.2 switch=n enabled=y phases=2 Linecode=1P_OH_AL_4/0_Zuzara_0_416_0_2_2_2_2

New Line.l(r:p3udm46598-p3udt14556lv) Units=km Length=0.0195444 bus1=p3udt14556lv.1.2 bus2=p3udm46598.1.2 switch=n enabled=y phases=2 Linecode=1P_OH_AL_2/0_Rucina_0_416_0_2_2_2_2

New Line.l(r:p3udt14557lv-p3ulv19793) Units=km Length=0.0744962 bus1=p3udt14557lv.1.2 bus2=p3ulv19793.1.2 switch=n enabled=y phases=2 Linecode=1P_OH_AL_4/0_Zuzara_0_416_0_2_2_2_2

New Line.l(r:p3udm47705-p3ulv20558) Units=km Length=0.0173161 bus1=p3udm47705.1.2 bus2=p3ulv20558.1.2 switch=n enabled=y phases=2 Linecode=1P_OH_AL_2/0_Rucina_0_416_0_2_2_2_2

New Line.l(r:p3udm47705-p3udt14961lv) Units=km Length=0.0674247 bus1=p3udt14961lv.1.2 bus2=p3udm47705.1.2 switch=n enabled=y phases=2 Linecode=1P_OH_AL_4/0_Zuzara_0_416_0_2_2_2_2

New Line.l(r:p3udm47708-p3ulv56248) Units=km Length=0.0203304 bus1=p3udm47708.1.2 bus2=p3ulv56248.1.2 switch=n enabled=y phases=2 Linecode=1P_UG_AL_1/0_Brenau_0_416_0_2_2_2_2

New Line.l(r:p3udm47706-p3ulv37669) Units=km Length=0.026644 bus1=p3udm47706.1.2 bus2=p3ulv37669.1.2 switch=n enabled=y phases=2 Linecode=1P_UG_AL_1/0_Brenau_0_416_0_2_2_2_2

New Line.l(r:p3udm47707-p3ulv53186) Units=km Length=0.0286501 bus1=p3udm47707.1.2 bus2=p3ulv53186.1.2 switch=n enabled=y phases=2 Linecode=1P_UG_AL_1/0_Brenau_0_416_0_2_2_2_2

New Line.l(r:p3udm47706-p3udm47707) Units=km Length=0.0191693 bus1=p3udm47706.1.2 bus2=p3udm47707.1.2 switch=n enabled=y phases=2 Linecode=1P_UG_AL_1/0_Brenau_0_416_0_2_2_2_2

New Line.l(r:p3udm47706-p3udm47708) Units=km Length=0.009580260000000002 bus1=p3udm47708.1.2 bus2=p3udm47706.1.2 switch=n enabled=y phases=2 Linecode=1P_UG_AL_4/0_Sweetbriar_0_416_0_2_2_2_2

New Line.l(r:p3udm47708-p3udt14961lv) Units=km Length=0.009580260000000002 bus1=p3udt14961lv.1.2 bus2=p3udm47708.1.2 switch=n enabled=y phases=2 Linecode=1P_UG_AL_4/0_Sweetbriar_0_416_0_2_2_2_2

New Line.l(r:p3udt15359lv-p3ulv21330) Units=km Length=0.0125461 bus1=p3udt15359lv.1.2 bus2=p3ulv21330.1.2 switch=n enabled=y phases=2 Linecode=1P_OH_AL_2/0_Rucina_0_416_0_2_2_2_2

New Line.l(r:p3udt15359lv-p3ulv74622) Units=km Length=0.00705634 bus1=p3udt15359lv.1.2 bus2=p3ulv74622.1.2 switch=n enabled=y phases=2 Linecode=1P_OH_AL_2/0_Rucina_0_416_0_2_2_2_2

New Line.l(r:p3udm48706-p3ulv61579) Units=km Length=0.0110118 bus1=p3udm48706.1.2 bus2=p3ulv61579.1.2 switch=n enabled=y phases=2 Linecode=1P_OH_AL_2/0_Rucina_0_416_0_2_2_2_2

New Line.l(r:p3udm48706-p3udt15359lv) Units=km Length=0.0195306 bus1=p3udt15359lv.1.2 bus2=p3udm48706.1.2 switch=n enabled=y phases=2 Linecode=1P_OH_AL_2/0_Rucina_0_416_0_2_2_2_2

New Line.l(r:p3udt15770lv-p3ulv22103) Units=km Length=0.001 bus1=p3udt15770lv.1.2 bus2=p3ulv22103.1.2 switch=n enabled=y phases=2 Linecode=1P_UG_AL_1/0_Brenau_0_416_0_2_2_2_2

New Line.l(r:p3udt15771lv-p3ulv22104) Units=km Length=0.015617100000000002 bus1=p3udt15771lv.1.2 bus2=p3ulv22104.1.2 switch=n enabled=y phases=2 Linecode=1P_OH_AL_2/0_Rucina_0_416_0_2_2_2_2

New Line.l(r:p3udt15771lv-p3ulv39208) Units=km Length=0.0205851 bus1=p3udt15771lv.1.2 bus2=p3ulv39208.1.2 switch=n enabled=y phases=2 Linecode=1P_OH_AL_2/0_Rucina_0_416_0_2_2_2_2

New Line.l(r:p3udt15771lv-p3ulv59303) Units=km Length=0.027277 bus1=p3udt15771lv.1.2 bus2=p3ulv59303.1.2 switch=n enabled=y phases=2 Linecode=1P_OH_AL_4/0_Zuzara_0_416_0_2_2_2_2

New Line.l(r:p3udt15771lv-p3ulv63122) Units=km Length=0.027970200000000004 bus1=p3udt15771lv.1.2 bus2=p3ulv63122.1.2 switch=n enabled=y phases=2 Linecode=1P_OH_AL_4/0_Zuzara_0_416_0_2_2_2_2

New Line.l(r:p3udm49734-p3ulv40016) Units=km Length=0.0582067 bus1=p3udm49734.1.2 bus2=p3ulv40016.1.2 switch=n enabled=y phases=2 Linecode=1P_OH_AL_4/0_Zuzara_0_416_0_2_2_2_2

New Line.l(r:p3udm49734-p3udt15771lv) Units=km Length=0.019528 bus1=p3udt15771lv.1.2 bus2=p3udm49734.1.2 switch=n enabled=y phases=2 Linecode=1P_OH_AL_2/0_Rucina_0_416_0_2_2_2_2

New Line.l(r:p3udt15772lv-p3ulv22105) Units=km Length=0.0141895 bus1=p3udt15772lv.1.2 bus2=p3ulv22105.1.2 switch=n enabled=y phases=2 Linecode=1P_OH_AL_2/0_Rucina_0_416_0_2_2_2_2

New Line.l(r:p3udt16529lv-p3ulv23678) Units=km Length=0.028942000000000002 bus1=p3udt16529lv.1.2 bus2=p3ulv23678.1.2 switch=n enabled=y phases=2 Linecode=1P_OH_AL_4/0_Zuzara_0_416_0_2_2_2_2

New Line.l(r:p3udt16926lv-p3ulv24535) Units=km Length=0.0192879 bus1=p3udt16926lv.1.2 bus2=p3ulv24535.1.2 switch=n enabled=y phases=2 Linecode=1P_UG_AL_4/0_Sweetbriar_0_416_0_2_2_2_2

New Line.l(r:p3udt17297lv-p3ulv25325) Units=km Length=0.0489604 bus1=p3udt17297lv.1.2 bus2=p3ulv25325.1.2 switch=n enabled=y phases=2 Linecode=1P_OH_AL_4/0_Zuzara_0_416_0_2_2_2_2

New Line.l(r:p3udt17298lv-p3ulv25326) Units=km Length=0.0261445 bus1=p3udt17298lv.1.2 bus2=p3ulv25326.1.2 switch=n enabled=y phases=2 Linecode=1P_OH_AL_2/0_Rucina_0_416_0_2_2_2_2

New Line.l(r:p3udt18037lv-p3ulv26915) Units=km Length=0.0248304 bus1=p3udt18037lv.1.2 bus2=p3ulv26915.1.2 switch=n enabled=y phases=2 Linecode=1P_OH_AL_2/0_Rucina_0_416_0_2_2_2_2

New Line.l(r:p3udt18038lv-p3ulv26916) Units=km Length=0.029390100000000002 bus1=p3udt18038lv.1.2 bus2=p3ulv26916.1.2 switch=n enabled=y phases=2 Linecode=1P_OH_AL_4/0_Zuzara_0_416_0_2_2_2_2

New Line.l(r:p3udt18039lv-p3ulv49348) Units=km Length=0.03730920000000001 bus1=p3udt18039lv.1.2 bus2=p3ulv49348.1.2 switch=n enabled=y phases=2 Linecode=1P_OH_AL_4/0_Zuzara_0_416_0_2_2_2_2

New Line.l(r:p3udm55297-p3ulv26917) Units=km Length=0.0355882 bus1=p3udm55297.1.2 bus2=p3ulv26917.1.2 switch=n enabled=y phases=2 Linecode=1P_OH_AL_4/0_Zuzara_0_416_0_2_2_2_2

New Line.l(r:p3udm55297-p3udt18039lv) Units=km Length=0.0325848 bus1=p3udt18039lv.1.2 bus2=p3udm55297.1.2 switch=n enabled=y phases=2 Linecode=1P_OH_AL_4/0_Zuzara_0_416_0_2_2_2_2

New Line.l(r:p3udm55298-p3ulv43152) Units=km Length=0.0347902 bus1=p3udm55298.1.2 bus2=p3ulv43152.1.2 switch=n enabled=y phases=2 Linecode=1P_OH_AL_4/0_Zuzara_0_416_0_2_2_2_2

New Line.l(r:p3udm55298-p3udt18039lv) Units=km Length=0.0189765 bus1=p3udt18039lv.1.2 bus2=p3udm55298.1.2 switch=n enabled=y phases=2 Linecode=1P_OH_AL_2/0_Rucina_0_416_0_2_2_2_2

New Line.l(r:p3udt18718lv-p3ulv28441) Units=km Length=0.007269180000000001 bus1=p3udt18718lv.1.2 bus2=p3ulv28441.1.2 switch=n enabled=y phases=2 Linecode=1P_OH_AL_2/0_Rucina_0_416_0_2_2_2_2

New Line.l(r:p3udt18719lv-p3ulv28442) Units=km Length=0.0676858 bus1=p3udt18719lv.1.2 bus2=p3ulv28442.1.2 switch=n enabled=y phases=2 Linecode=1P_OH_AL_4/0_Zuzara_0_416_0_2_2_2_2

New Line.l(r:p3udt19362lv-p3ulv29950) Units=km Length=0.0359837 bus1=p3udt19362lv.1.2 bus2=p3ulv29950.1.2 switch=n enabled=y phases=2 Linecode=1P_OH_AL_4/0_Zuzara_0_416_0_2_2_2_2

New Line.l(r:p3udt19363lv-p3ulv29951) Units=km Length=0.0185726 bus1=p3udt19363lv.1.2 bus2=p3ulv29951.1.2 switch=n enabled=y phases=2 Linecode=1P_OH_AL_2/0_Rucina_0_416_0_2_2_2_2

New Line.l(r:p3udm58442-p3ulv53187) Units=km Length=0.0757003 bus1=p3udm58442.1.2 bus2=p3ulv53187.1.2 switch=n enabled=y phases=2 Linecode=1P_OH_AL_4/0_Zuzara_0_416_0_2_2_2_2

New Line.l(r:p3udm58442-p3udt19363lv) Units=km Length=0.0192953 bus1=p3udt19363lv.1.2 bus2=p3udm58442.1.2 switch=n enabled=y phases=2 Linecode=1P_OH_AL_2/0_Rucina_0_416_0_2_2_2_2

New Line.l(r:p3udt19683lv-p3ulv30714) Units=km Length=0.0281925 bus1=p3udt19683lv.1.2 bus2=p3ulv30714.1.2 switch=n enabled=y phases=2 Linecode=1P_OH_AL_4/0_Zuzara_0_416_0_2_2_2_2

New Line.l(r:p3udt19684lv-p3ulv30715) Units=km Length=0.0528797 bus1=p3udt19684lv.1.2 bus2=p3ulv30715.1.2 switch=n enabled=y phases=2 Linecode=1P_OH_AL_4/0_Zuzara_0_416_0_2_2_2_2

New Line.l(r:p3udt19684lv-p3ulv34656) Units=km Length=0.0528797 bus1=p3udt19684lv.1.2 bus2=p3ulv34656.1.2 switch=n enabled=y phases=2 Linecode=1P_OH_AL_4/0_Zuzara_0_416_0_2_2_2_2

New Line.l(r:p3udt20593lv-p3ulv33126) Units=km Length=0.001 bus1=p3udt20593lv.1.2 bus2=p3ulv33126.1.2 switch=n enabled=y phases=2 Linecode=1P_OH_AL_4_Periwinkle_0_416_0_2_2_2_2

New Line.l(r:p3udt21167lv-p3ulv41589) Units=km Length=0.0744905 bus1=p3udt21167lv.1.2 bus2=p3ulv41589.1.2 switch=n enabled=y phases=2 Linecode=1P_UG_AL_1/0_Brenau_0_416_0_2_2_2_2

New Line.l(r:p3udm62322-p3ulv34655) Units=km Length=0.052576200000000003 bus1=p3udm62322.1.2 bus2=p3ulv34655.1.2 switch=n enabled=y phases=2 Linecode=1P_UG_AL_1/0_Brenau_0_416_0_2_2_2_2

New Line.l(r:p3udm62322-p3udt21167lv) Units=km Length=0.0199652 bus1=p3udt21167lv.1.2 bus2=p3udm62322.1.2 switch=n enabled=y phases=2 Linecode=1P_UG_AL_1/0_Brenau_0_416_0_2_2_2_2

New Line.l(r:p3udm62324-p3ulv57786) Units=km Length=0.0336812 bus1=p3udm62324.1.2 bus2=p3ulv57786.1.2 switch=n enabled=y phases=2 Linecode=1P_UG_AL_4/0_Sweetbriar_0_416_0_2_2_2_2

New Line.l(r:p3udm62324-p3udt21167lv) Units=km Length=0.00998964 bus1=p3udt21167lv.1.2 bus2=p3udm62324.1.2 switch=n enabled=y phases=2 Linecode=1P_UG_AL_4/0_Sweetbriar_0_416_0_2_2_2_2

New Line.l(r:p3udt21672lv-p3ulv36187) Units=km Length=0.0393294 bus1=p3udt21672lv.1.2 bus2=p3ulv36187.1.2 switch=n enabled=y phases=2 Linecode=1P_OH_AL_4/0_Zuzara_0_416_0_2_2_2_2

New Line.l(r:p3udt22171lv-p3ulv37668) Units=km Length=0.0129826 bus1=p3udt22171lv.1.2 bus2=p3ulv37668.1.2 switch=n enabled=y phases=2 Linecode=1P_OH_AL_2/0_Rucina_0_416_0_2_2_2_2

New Line.l(r:p3udt22171lv-p3ulv67724) Units=km Length=0.0129826 bus1=p3udt22171lv.1.2 bus2=p3ulv67724.1.2 switch=n enabled=y phases=2 Linecode=1P_OH_AL_2/0_Rucina_0_416_0_2_2_2_2

New Line.l(r:p3udt22705lv-p3ulv39207) Units=km Length=0.018276600000000004 bus1=p3udt22705lv.1.2 bus2=p3ulv39207.1.2 switch=n enabled=y phases=2 Linecode=1P_OH_AL_2/0_Rucina_0_416_0_2_2_2_2

New Line.l(r:p3udt22706lv-p3ulv39209) Units=km Length=0.0194865 bus1=p3udt22706lv.1.2 bus2=p3ulv39209.1.2 switch=n enabled=y phases=2 Linecode=1P_OH_AL_2/0_Rucina_0_416_0_2_2_2_2

New Line.l(r:p3udt22707lv-p3ulv39210) Units=km Length=0.0542255 bus1=p3udt22707lv.1.2 bus2=p3ulv39210.1.2 switch=n enabled=y phases=2 Linecode=1P_OH_AL_4/0_Zuzara_0_416_0_2_2_2_2

New Line.l(r:p3udt23704lv-p3ulv42364) Units=km Length=0.028768700000000005 bus1=p3udt23704lv.1.2 bus2=p3ulv42364.1.2 switch=n enabled=y phases=2 Linecode=1P_OH_AL_4/0_Zuzara_0_416_0_2_2_2_2

New Line.l(r:p3udt23705lv-p3ulv42365) Units=km Length=0.001 bus1=p3udt23705lv.1.2 bus2=p3ulv42365.1.2 switch=n enabled=y phases=2 Linecode=1P_OH_AL_4_Periwinkle_0_416_0_2_2_2_2

New Line.l(r:p3udt24190lv-p3ulv43916) Units=km Length=0.0353302 bus1=p3udt24190lv.1.2 bus2=p3ulv43916.1.2 switch=n enabled=y phases=2 Linecode=1P_OH_AL_4/0_Zuzara_0_416_0_2_2_2_2

New Line.l(r:p3udm68020-p3ulv62338) Units=km Length=0.0352812 bus1=p3udm68020.1.2 bus2=p3ulv62338.1.2 switch=n enabled=y phases=2 Linecode=1P_OH_AL_4/0_Zuzara_0_416_0_2_2_2_2

New Line.l(r:p3udm68020-p3udt24190lv) Units=km Length=0.0195554 bus1=p3udt24190lv.1.2 bus2=p3udm68020.1.2 switch=n enabled=y phases=2 Linecode=1P_OH_AL_2/0_Rucina_0_416_0_2_2_2_2

New Line.l(r:p3udt24436lv-p3ulv44770) Units=km Length=0.00294245 bus1=p3udt24436lv.1.2 bus2=p3ulv44770.1.2 switch=n enabled=y phases=2 Linecode=1P_OH_AL_4_Periwinkle_0_416_0_2_2_2_2

New Line.l(r:p3udt24437lv-p3ulv44771) Units=km Length=0.012727700000000002 bus1=p3udt24437lv.1.2 bus2=p3ulv44771.1.2 switch=n enabled=y phases=2 Linecode=1P_UG_AL_4/0_Sweetbriar_0_416_0_2_2_2_2

New Line.l(r:p3udt24656lv-p3ulv48587) Units=km Length=0.0430498 bus1=p3udt24656lv.1.2 bus2=p3ulv48587.1.2 switch=n enabled=y phases=2 Linecode=1P_OH_AL_4/0_Zuzara_0_416_0_2_2_2_2

New Line.l(r:p3udm68843-p3ulv45549) Units=km Length=0.0182354 bus1=p3udm68843.1.2 bus2=p3ulv45549.1.2 switch=n enabled=y phases=2 Linecode=1P_OH_AL_2/0_Rucina_0_416_0_2_2_2_2

New Line.l(r:p3udm68843-p3ulv78447) Units=km Length=0.0476671 bus1=p3udm68843.1.2 bus2=p3ulv78447.1.2 switch=n enabled=y phases=2 Linecode=1P_OH_AL_4/0_Zuzara_0_416_0_2_2_2_2

New Line.l(r:p3udm68843-p3udt24656lv) Units=km Length=0.0197512 bus1=p3udt24656lv.1.2 bus2=p3udm68843.1.2 switch=n enabled=y phases=2 Linecode=1P_OH_AL_2/0_Rucina_0_416_0_2_2_2_2

New Line.l(r:p3udt24657lv-p3ulv45551) Units=km Length=0.0246542 bus1=p3udt24657lv.1.2 bus2=p3ulv45551.1.2 switch=n enabled=y phases=2 Linecode=1P_OH_AL_2/0_Rucina_0_416_0_2_2_2_2

New Line.l(r:p3udm69254-p3ulv46335) Units=km Length=0.0294624 bus1=p3udm69254.1.2 bus2=p3ulv46335.1.2 switch=n enabled=y phases=2 Linecode=1P_OH_AL_4/0_Zuzara_0_416_0_2_2_2_2

New Line.l(r:p3udm69254-p3udt24906lv) Units=km Length=0.0393752 bus1=p3udt24906lv.1.2 bus2=p3udm69254.1.2 switch=n enabled=y phases=2 Linecode=1P_OH_AL_4/0_Zuzara_0_416_0_2_2_2_2

New Line.l(r:p3udm69255-p3ulv57001) Units=km Length=0.021507500000000002 bus1=p3udm69255.1.2 bus2=p3ulv57001.1.2 switch=n enabled=y phases=2 Linecode=1P_OH_AL_2/0_Rucina_0_416_0_2_2_2_2

New Line.l(r:p3udm69255-p3udt24906lv) Units=km Length=0.0196924 bus1=p3udt24906lv.1.2 bus2=p3udm69255.1.2 switch=n enabled=y phases=2 Linecode=1P_OH_AL_2/0_Rucina_0_416_0_2_2_2_2

New Line.l(r:p3udt25352lv-p3ulv47864) Units=km Length=0.05575 bus1=p3udt25352lv.1.2 bus2=p3ulv47864.1.2 switch=n enabled=y phases=2 Linecode=1P_UG_AL_1/0_Brenau_0_416_0_2_2_2_2

New Line.l(r:p3udt25548lv-p3ulv48588) Units=km Length=0.0287634 bus1=p3udt25548lv.1.2 bus2=p3ulv48588.1.2 switch=n enabled=y phases=2 Linecode=1P_OH_AL_4/0_Zuzara_0_416_0_2_2_2_2

New Line.l(r:p3udt25746lv-p3ulv49347) Units=km Length=0.0286989 bus1=p3udt25746lv.1.2 bus2=p3ulv49347.1.2 switch=n enabled=y phases=2 Linecode=1P_OH_AL_4/0_Zuzara_0_416_0_2_2_2_2

New Line.l(r:p3udm73172-p3ulv56246) Units=km Length=0.00512268 bus1=p3udm73172.1.2 bus2=p3ulv56246.1.2 switch=n enabled=y phases=2 Linecode=1P_OH_AL_2/0_Rucina_0_416_0_2_2_2_2

New Line.l(r:p3udm73172-p3udt27467lv) Units=km Length=0.0154724 bus1=p3udt27467lv.1.2 bus2=p3udm73172.1.2 switch=n enabled=y phases=2 Linecode=1P_OH_AL_2/0_Rucina_0_416_0_2_2_2_2

New Line.l(r:p3udm73173-p3ulv76928) Units=km Length=0.03742 bus1=p3udm73173.1.2 bus2=p3ulv76928.1.2 switch=n enabled=y phases=2 Linecode=1P_OH_AL_4/0_Zuzara_0_416_0_2_2_2_2

New Line.l(r:p3udm73173-p3udt27467lv) Units=km Length=0.0154626 bus1=p3udt27467lv.1.2 bus2=p3udm73173.1.2 switch=n enabled=y phases=2 Linecode=1P_OH_AL_2/0_Rucina_0_416_0_2_2_2_2

New Line.l(r:p3udt27468lv-p3ulv56247) Units=km Length=0.0185737 bus1=p3udt27468lv.1.2 bus2=p3ulv56247.1.2 switch=n enabled=y phases=2 Linecode=1P_OH_AL_2/0_Rucina_0_416_0_2_2_2_2

New Line.l(r:p3udt27650lv-p3ulv56998) Units=km Length=0.0402727 bus1=p3udt27650lv.1.2 bus2=p3ulv56998.1.2 switch=n enabled=y phases=2 Linecode=1P_OH_AL_4/0_Zuzara_0_416_0_2_2_2_2

New Line.l(r:p3udt28006lv-p3ulv58543) Units=km Length=0.0285042 bus1=p3udt28006lv.1.2 bus2=p3ulv58543.1.2 switch=n enabled=y phases=2 Linecode=1P_UG_AL_1/0_Brenau_0_416_0_2_2_2_2

New Line.l(r:p3udt28168lv-p3ulv59302) Units=km Length=0.0113397 bus1=p3udt28168lv.1.2 bus2=p3ulv59302.1.2 switch=n enabled=y phases=2 Linecode=1P_OH_AL_2/0_Rucina_0_416_0_2_2_2_2

New Line.l(r:p3udm74542-p3ulv60804) Units=km Length=0.0147307 bus1=p3udm74542.1.2 bus2=p3ulv60804.1.2 switch=n enabled=y phases=2 Linecode=1P_OH_AL_2/0_Rucina_0_416_0_2_2_2_2

New Line.l(r:p3udm74542-p3udt28490lv) Units=km Length=0.0391027 bus1=p3udt28490lv.1.2 bus2=p3udm74542.1.2 switch=n enabled=y phases=2 Linecode=1P_OH_AL_4/0_Zuzara_0_416_0_2_2_2_2

New Line.l(r:p3udm74543-p3ulv74623) Units=km Length=0.0209854 bus1=p3udm74543.1.2 bus2=p3ulv74623.1.2 switch=n enabled=y phases=2 Linecode=1P_OH_AL_2/0_Rucina_0_416_0_2_2_2_2

New Line.l(r:p3udm74543-p3udt28490lv) Units=km Length=0.05864960000000001 bus1=p3udt28490lv.1.2 bus2=p3udm74543.1.2 switch=n enabled=y phases=2 Linecode=1P_OH_AL_4/0_Zuzara_0_416_0_2_2_2_2

New Line.l(r:p3udt28651lv-p3ulv61580) Units=km Length=0.0830716 bus1=p3udt28651lv.1.2 bus2=p3ulv61580.1.2 switch=n enabled=y phases=2 Linecode=1P_OH_AL_4/0_Zuzara_0_416_0_2_2_2_2

New Line.l(r:p3udt28652lv-p3ulv61581) Units=km Length=0.0187328 bus1=p3udt28652lv.1.2 bus2=p3ulv61581.1.2 switch=n enabled=y phases=2 Linecode=1P_OH_AL_2/0_Rucina_0_416_0_2_2_2_2

New Line.l(r:p3udt28654lv-p3ulv61583) Units=km Length=0.033326 bus1=p3udt28654lv.1.2 bus2=p3ulv61583.1.2 switch=n enabled=y phases=2 Linecode=1P_OH_AL_4/0_Zuzara_0_416_0_2_2_2_2

New Line.l(r:p3udt28969lv-p3ulv63121) Units=km Length=0.0372521 bus1=p3udt28969lv.1.2 bus2=p3ulv63121.1.2 switch=n enabled=y phases=2 Linecode=1P_OH_AL_4/0_Zuzara_0_416_0_2_2_2_2

New Line.l(r:p3udm75149-p3ulv71578) Units=km Length=0.0361975 bus1=p3udm75149.1.2 bus2=p3ulv71578.1.2 switch=n enabled=y phases=2 Linecode=1P_OH_AL_4/0_Zuzara_0_416_0_2_2_2_2

New Line.l(r:p3udm75149-p3udt28969lv) Units=km Length=0.0170032 bus1=p3udt28969lv.1.2 bus2=p3udm75149.1.2 switch=n enabled=y phases=2 Linecode=1P_OH_AL_2/0_Rucina_0_416_0_2_2_2_2

New Line.l(r:p3udt29271lv-p3ulv64599) Units=km Length=0.0253965 bus1=p3udt29271lv.1.2 bus2=p3ulv64599.1.2 switch=n enabled=y phases=2 Linecode=1P_OH_AL_2/0_Rucina_0_416_0_2_2_2_2

New Line.l(r:p3udt29271lv-p3ulv80762) Units=km Length=0.0460414 bus1=p3udt29271lv.1.2 bus2=p3ulv80762.1.2 switch=n enabled=y phases=2 Linecode=1P_OH_AL_4/0_Zuzara_0_416_0_2_2_2_2

New Line.l(r:p3udt29584lv-p3ulv66187) Units=km Length=0.001 bus1=p3udt29584lv.1.2 bus2=p3ulv66187.1.2 switch=n enabled=y phases=2 Linecode=1P_OH_AL_4_Periwinkle_0_416_0_2_2_2_2

New Line.l(r:p3udt29738lv-p3ulv66928) Units=km Length=0.0541564 bus1=p3udt29738lv.1.2 bus2=p3ulv66928.1.2 switch=n enabled=y phases=2 Linecode=1P_OH_AL_4/0_Zuzara_0_416_0_2_2_2_2

New Line.l(r:p3udt30655lv-p3ulv71580) Units=km Length=0.001 bus1=p3udt30655lv.1.2 bus2=p3ulv71580.1.2 switch=n enabled=y phases=2 Linecode=1P_OH_AL_4_Periwinkle_0_416_0_2_2_2_2

New Line.l(r:p3udt30941lv-p3ulv73089) Units=km Length=0.05165550000000001 bus1=p3udt30941lv.1.2 bus2=p3ulv73089.1.2 switch=n enabled=y phases=2 Linecode=1P_OH_AL_4/0_Zuzara_0_416_0_2_2_2_2

New Line.l(r:p3udt31088lv-p3ulv73865) Units=km Length=0.001 bus1=p3udt31088lv.1.2 bus2=p3ulv73865.1.2 switch=n enabled=y phases=2 Linecode=1P_OH_AL_4_Periwinkle_0_416_0_2_2_2_2

New Line.l(r:p3udt31885lv-p3ulv78448) Units=km Length=0.02894 bus1=p3udt31885lv.1.2 bus2=p3ulv78448.1.2 switch=n enabled=y phases=2 Linecode=1P_OH_AL_4/0_Zuzara_0_416_0_2_2_2_2

New Line.l(r:p3udt32036lv-p3ulv79244) Units=km Length=0.024885300000000003 bus1=p3udt32036lv.1.2 bus2=p3ulv79244.1.2 switch=n enabled=y phases=2 Linecode=1P_OH_AL_2/0_Rucina_0_416_0_2_2_2_2

New Line.l(r:p3udt32037lv-p3ulv79246) Units=km Length=0.001 bus1=p3udt32037lv.1.2 bus2=p3ulv79246.1.2 switch=n enabled=y phases=2 Linecode=1P_OH_AL_4_Periwinkle_0_416_0_2_2_2_2

New Line.l(r:p3udt32169lv-p3ulv80001) Units=km Length=0.029691300000000004 bus1=p3udt32169lv.1.2 bus2=p3ulv80001.1.2 switch=n enabled=y phases=2 Linecode=1P_OH_AL_4/0_Zuzara_0_416_0_2_2_2_2

New Line.l(r:p3udt32307lv-p3ulv80760) Units=km Length=0.0287102 bus1=p3udt32307lv.1.2 bus2=p3ulv80760.1.2 switch=n enabled=y phases=2 Linecode=1P_OH_AL_4/0_Zuzara_0_416_0_2_2_2_2

New Line.l(r:p3udt32308lv-p3ulv80761) Units=km Length=0.023295 bus1=p3udt32308lv.1.2 bus2=p3ulv80761.1.2 switch=n enabled=y phases=2 Linecode=1P_OH_AL_2/0_Rucina_0_416_0_2_2_2_2

New Line.l(r:p3udt3026-p3udt30655)_s0 Units=km Length=0.189842 bus1=p3udt3026-p3udt30655x.1 bus2=p3udt3026-p3udt30655xx.1 switch=n enabled=y phases=1 Linecode=1P_OH_AL_ACSR_#2_Sparrow_12_47_0_1_1_1_1

New Line.l(r:p3udt3026-p3udt30655)_s1 Units=km Length=0.0240813 bus1=p3udt3026-p3udt30655xx.1 bus2=p3udt30655.1 switch=n enabled=y phases=1 Linecode=1P_OH_AL_ACSR_#2_Sparrow_12_47_0_1_1_1_1

New Line.l(r:p3udt18719-p3udt22705) Units=km Length=0.136864 bus1=p3udt22705.3 bus2=p3udt18719.3 switch=n enabled=y phases=1 Linecode=1P_OH_AL_ACSR_#2_Sparrow_12_47_0_1_1_1_1

New Line.l(r:p3udt22705-p3udt8193) Units=km Length=0.195512 bus1=p3udt8193.3 bus2=p3udt22705.3 switch=n enabled=y phases=1 Linecode=1P_OH_AL_ACSR_#2_Sparrow_12_47_0_1_1_1_1

New Line.l(r:p3udt19683-p3udt8193) Units=km Length=0.156406 bus1=p3udt19683.3 bus2=p3udt8193.3 switch=n enabled=y phases=1 Linecode=1P_OH_AL_ACSR_#2_Sparrow_12_47_0_1_1_1_1

New Line.l(r:p3udt19683-p3udt7050) Units=km Length=0.0586568 bus1=p3udt7050.3 bus2=p3udt19683.3 switch=n enabled=y phases=1 Linecode=1P_OH_AL_ACSR_#2_Sparrow_12_47_0_1_1_1_1

New Line.l(r:p3udt28168-p3udt7050) Units=km Length=0.0766214 bus1=p3udt28168.3 bus2=p3udt7050.3 switch=n enabled=y phases=1 Linecode=1P_OH_AL_ACSR_#2_Sparrow_12_47_0_1_1_1_1

New Line.l(r:p3udt28168-p3udt9342) Units=km Length=0.0898185 bus1=p3udt28168.3 bus2=p3udt9342.3 switch=n enabled=y phases=1 Linecode=1P_OH_AL_ACSR_#2_Sparrow_12_47_0_1_1_1_1

New Line.l(r:p3udt13721-p3udt28168) Units=km Length=0.0765482 bus1=p3udt13721.3 bus2=p3udt28168.3 switch=n enabled=y phases=1 Linecode=1P_OH_AL_ACSR_#2_Sparrow_12_47_0_1_1_1_1

New Line.l(r:p3udt13721-p3udt15771) Units=km Length=0.0390468 bus1=p3udt15771.3 bus2=p3udt13721.3 switch=n enabled=y phases=1 Linecode=1P_OH_AL_ACSR_#2_Sparrow_12_47_0_1_1_1_1

New Line.l(r:p3udt15771-p3udt2313) Units=km Length=0.0585836 bus1=p3udt2313.3 bus2=p3udt15771.3 switch=n enabled=y phases=1 Linecode=1P_OH_AL_ACSR_#2_Sparrow_12_47_0_1_1_1_1

New Line.l(r:p3udt1583-p3udt2313) Units=km Length=0.0195234 bus1=p3udt1583.3 bus2=p3udt2313.3 switch=n enabled=y phases=1 Linecode=1P_OH_AL_ACSR_#2_Sparrow_12_47_0_1_1_1_1

New Line.l(r:p3udt13299-p3udt1583) Units=km Length=0.0390603 bus1=p3udt13299.3 bus2=p3udt1583.3 switch=n enabled=y phases=1 Linecode=1P_OH_AL_ACSR_#2_Sparrow_12_47_0_1_1_1_1

New Line.l(r:p3udt13299-p3udt28652) Units=km Length=0.001 bus1=p3udt13299.3 bus2=p3udt28652.3 switch=n enabled=y phases=1 Linecode=1P_OH_AL_ACSR_#2_Sparrow_12_47_0_1_1_1_1

New Line.l(r:p3udt13299-p3udt31885) Units=km Length=0.0390514 bus1=p3udt31885.3 bus2=p3udt13299.3 switch=n enabled=y phases=1 Linecode=1P_OH_AL_ACSR_#2_Sparrow_12_47_0_1_1_1_1

New Line.l(r:p3udt31885-p3udt9343) Units=km Length=0.0390556 bus1=p3udt9343.3 bus2=p3udt31885.3 switch=n enabled=y phases=1 Linecode=1P_OH_AL_ACSR_#2_Sparrow_12_47_0_1_1_1_1

New Line.l(r:p3udt6420-p3udt9343) Units=km Length=0.106085 bus1=p3udt6420.3 bus2=p3udt9343.3 switch=n enabled=y phases=1 Linecode=1P_OH_AL_ACSR_#2_Sparrow_12_47_0_1_1_1_1

New Line.l(r:p3udt28006-p3udt6417) Units=km Length=0.0881076 bus1=p3udt28006-p3udt6417x.3 bus2=p3udt28006-p3udt6417xx.3 switch=n enabled=y phases=1 Linecode=1P_UG_AL_#2_15_12_47_0_1_1_1_1

New Line.l(r:p3udt14961-p3udt28006) Units=km Length=0.0766508 bus1=p3udt14961-p3udt28006x.3 bus2=p3udt14961-p3udt28006xx.3 switch=n enabled=y phases=1 Linecode=1P_UG_AL_#2_15_12_47_0_1_1_1_1

New Line.l(r:p3udt14961-p3udt6420) Units=km Length=0.0896741 bus1=p3udt14961-p3udt6420xx.3 bus2=p3udt14961-p3udt6420x.3 switch=n enabled=y phases=1 Linecode=1P_UG_AL_#2_15_12_47_0_1_1_1_1

New Line.l(r:p3udt28653-p3udt6420) Units=km Length=0.0855307 bus1=p3udt28653-p3udt6420xx.3 bus2=p3udt28653-p3udt6420xxx.3 switch=n enabled=y phases=1 Linecode=1P_UG_AL_#2_15_12_47_0_1_1_1_1

New Line.l(r:p3udt28654-p3udt825) Units=km Length=0.001 bus1=p3udt28654-p3udt825x.2 bus2=p3udt28654.2 switch=n enabled=y phases=1 Linecode=1P_OH_AL_ACSR_#2_Sparrow_12_47_0_1_1_1_1

New Line.l(r:p3udt12418-p3udt18039) Units=km Length=0.0881392 bus1=p3udt12418-p3udt18039x.1 bus2=p3udt12418.1 switch=n enabled=y phases=1 Linecode=1P_OH_AL_ACSR_#2_Sparrow_12_47_0_1_1_1_1

New Line.l(r:p3udt2315-p3udt23705) Units=km Length=0.140736 bus1=p3udt2315-p3udt23705x.2 bus2=p3udt23705.2 switch=n enabled=y phases=1 Linecode=1P_OH_AL_ACSR_#2_Sparrow_12_47_0_1_1_1_1

New Line.l(r:p3udt2314-p3udt29271) Units=km Length=0.001 bus1=p3udt2314.1 bus2=p3udt29271.1 switch=n enabled=y phases=1 Linecode=1P_OH_AL_ACSR_#2_Sparrow_12_47_0_1_1_1_1

New Line.l(r:p3udt14127-p3udt32169) Units=km Length=0.0346714 bus1=p3udt32169.1 bus2=p3udt14127.1 switch=n enabled=y phases=1 Linecode=1P_OH_AL_ACSR_#2_Sparrow_12_47_0_1_1_1_1

New Line.l(r:p3udt2314-p3udt32169) Units=km Length=0.0346714 bus1=p3udt2314.1 bus2=p3udt32169.1 switch=n enabled=y phases=1 Linecode=1P_OH_AL_ACSR_#2_Sparrow_12_47_0_1_1_1_1

New Line.l(r:p3udt18037-p3udt2314) Units=km Length=0.0520024 bus1=p3udt18037.1 bus2=p3udt2314.1 switch=n enabled=y phases=1 Linecode=1P_OH_AL_ACSR_#2_Sparrow_12_47_0_1_1_1_1

New Line.l(r:p3udt16529-p3udt17298) Units=km Length=0.001 bus1=p3udt16529.1 bus2=p3udt17298.1 switch=n enabled=y phases=1 Linecode=1P_OH_AL_ACSR_#2_Sparrow_12_47_0_1_1_1_1

New Line.l(r:p3udt14556-p3udt18038) Units=km Length=0.001 bus1=p3udt14556.1 bus2=p3udt18038.1 switch=n enabled=y phases=1 Linecode=1P_OH_AL_ACSR_#2_Sparrow_12_47_0_1_1_1_1

New Line.l(r:p3udt23704-p3udt8194) Units=km Length=0.0195444 bus1=p3udt8194.1 bus2=p3udt23704.1 switch=n enabled=y phases=1 Linecode=1P_OH_AL_ACSR_#2_Sparrow_12_47_0_1_1_1_1

New Line.l(r:p3udt32036-p3udt8194) Units=km Length=0.0390796 bus1=p3udt32036.1 bus2=p3udt8194.1 switch=n enabled=y phases=1 Linecode=1P_OH_AL_ACSR_#2_Sparrow_12_47_0_1_1_1_1

New Line.l(r:p3udt14556-p3udt32036) Units=km Length=0.0390833 bus1=p3udt14556.1 bus2=p3udt32036.1 switch=n enabled=y phases=1 Linecode=1P_OH_AL_ACSR_#2_Sparrow_12_47_0_1_1_1_1

New Line.l(r:p3udt14556-p3udt24657) Units=km Length=0.0195444 bus1=p3udt24657.1 bus2=p3udt14556.1 switch=n enabled=y phases=1 Linecode=1P_OH_AL_ACSR_#2_Sparrow_12_47_0_1_1_1_1

New Line.l(r:p3udt16529-p3udt24657) Units=km Length=0.0390833 bus1=p3udt16529.1 bus2=p3udt24657.1 switch=n enabled=y phases=1 Linecode=1P_OH_AL_ACSR_#2_Sparrow_12_47_0_1_1_1_1

New Line.l(r:p3udt16529-p3udt8771) Units=km Length=0.0390796 bus1=p3udt8771.1 bus2=p3udt16529.1 switch=n enabled=y phases=1 Linecode=1P_OH_AL_ACSR_#2_Sparrow_12_47_0_1_1_1_1

New Line.l(r:p3udt18037-p3udt8771) Units=km Length=0.0195444 bus1=p3udt18037.1 bus2=p3udt8771.1 switch=n enabled=y phases=1 Linecode=1P_OH_AL_ACSR_#2_Sparrow_12_47_0_1_1_1_1

New Line.l(r:p3udt18037-p3udt25548) Units=km Length=0.0565282 bus1=p3udt25548.1 bus2=p3udt18037.1 switch=n enabled=y phases=1 Linecode=1P_OH_AL_ACSR_#2_Sparrow_12_47_0_1_1_1_1

New Line.l(r:p3udt25548-p3udt29738) Units=km Length=0.0188378 bus1=p3udt29738.1 bus2=p3udt25548.1 switch=n enabled=y phases=1 Linecode=1P_OH_AL_ACSR_#2_Sparrow_12_47_0_1_1_1_1

New Line.l(r:p3udt29738-p3udt5125) Units=km Length=0.0376806 bus1=p3udt5125.1 bus2=p3udt29738.1 switch=n enabled=y phases=1 Linecode=1P_OH_AL_ACSR_#2_Sparrow_12_47_0_1_1_1_1

New Line.l(r:p3udt5125-p3udt5126) Units=km Length=0.0963463 bus1=p3udt5125-p3udt5126x.1 bus2=p3udt5125.1 switch=n enabled=y phases=1 Linecode=1P_OH_AL_ACSR_#2_Sparrow_12_47_0_1_1_1_1

New Line.l(r:p3udt31088-p3udt5124) Units=km Length=0.0797537 bus1=p3udt31088.3 bus2=p3udt5124.3 switch=n enabled=y phases=1 Linecode=1P_OH_AL_ACSR_#2_Sparrow_12_47_0_1_1_1_1

New Line.l(r:p3udt1582-p3udt31088) Units=km Length=0.0996742 bus1=p3udt1582.3 bus2=p3udt31088.3 switch=n enabled=y phases=1 Linecode=1P_OH_AL_ACSR_#2_Sparrow_12_47_0_1_1_1_1

New Line.l(r:p3udt1582-p3udt6416) Units=km Length=0.218742 bus1=p3udt1582-p3udt6416x.3 bus2=p3udt1582.3 switch=n enabled=y phases=1 Linecode=1P_OH_AL_ACSR_#2_Sparrow_12_47_0_1_1_1_1

New Line.l(r:p3udt15772-p3udt32037) Units=km Length=0.421429 bus1=p3udt15772.2 bus2=p3udt32037.2 switch=n enabled=y phases=1 Linecode=1P_OH_AL_ACSR_#2_Sparrow_12_47_0_1_1_1_1

New Line.l(r:p3udt10391-p3udt15772) Units=km Length=0.13988600000000004 bus1=p3udt10391.2 bus2=p3udt15772.2 switch=n enabled=y phases=1 Linecode=1P_OH_AL_ACSR_#2_Sparrow_12_47_0_1_1_1_1

New Line.l(r:p3udt11899-p3udt20593) Units=km Length=0.10381000000000001 bus1=p3udt11899.2 bus2=p3udt11899_b1_1.2 switch=n enabled=y phases=1 Linecode=1P_OH_AL_ACSR_#2_Sparrow_12_47_0_1_1_1_1

New Line.l(r:p3udt11899-p3udt22706) Units=km Length=0.195339 bus1=p3udt11899.2 bus2=p3udt22706.2 switch=n enabled=y phases=1 Linecode=1P_OH_AL_ACSR_#2_Sparrow_12_47_0_1_1_1_1

New Line.l(r:p3udt11899-p3udt29584)_s0 Units=km Length=0.515079 bus1=p3udt11899.2 bus2=p3udt11899-p3udt29584x.2 switch=n enabled=y phases=1 Linecode=1P_OH_AL_ACSR_#2_Sparrow_12_47_0_1_1_1_1

New Line.l(r:p3udt11899-p3udt29584)_s1 Units=km Length=0.168701 bus1=p3udt11899-p3udt29584x.2 bus2=p3udt29584.2 switch=n enabled=y phases=1 Linecode=1P_OH_AL_ACSR_#2_Sparrow_12_47_0_1_1_1_1

New Line.l(r:p3udt11899-p3udt7634) Units=km Length=0.175967 bus1=p3udt7634.2 bus2=p3udt11899.2 switch=n enabled=y phases=1 Linecode=1P_OH_AL_ACSR_#2_Sparrow_12_47_0_1_1_1_1

New Line.l(r:p3udt28490-p3udt7634) Units=km Length=0.0195469 bus1=p3udt28490.2 bus2=p3udt7634.2 switch=n enabled=y phases=1 Linecode=1P_OH_AL_ACSR_#2_Sparrow_12_47_0_1_1_1_1

New Line.l(r:p3udt10391-p3udt28490) Units=km Length=0.116505 bus1=p3udt10391.2 bus2=p3udt28490.2 switch=n enabled=y phases=1 Linecode=1P_OH_AL_ACSR_#2_Sparrow_12_47_0_1_1_1_1

New Line.l(r:p3udt10391-p3udt22707) Units=km Length=0.34592400000000006 bus1=p3udt22707.2 bus2=p3udt10391.2 switch=n enabled=y phases=1 Linecode=1P_OH_AL_ACSR_#2_Sparrow_12_47_0_1_1_1_1

New Line.l(r:p3udt22707-p3udt5127) Units=km Length=0.10941100000000001 bus1=p3udt22707-p3udt5127x.2 bus2=p3udt22707.2 switch=n enabled=y phases=1 Linecode=1P_OH_AL_ACSR_#2_Sparrow_12_47_0_1_1_1_1

New Line.l(r:p3udt16926-p3udt5772) Units=km Length=0.145432 bus1=p3udt16926.1 bus2=p3udt5772.1 switch=n enabled=y phases=1 Linecode=1P_OH_AL_ACSR_#2_Sparrow_12_47_0_1_1_1_1

New Line.l(r:p3udt15770-p3udt16926) Units=km Length=0.120464 bus1=p3udt15770-p3udt16926xx.1 bus2=p3udt15770-p3udt16926x.1 switch=n enabled=y phases=1 Linecode=1P_UG_AL_#2_15_12_47_0_1_1_1_1

New Line.l(r:p3udt16926-p3udt24437) Units=km Length=0.0898571 bus1=p3udt16926-p3udt24437xx.1 bus2=p3udt16926-p3udt24437x.1 switch=n enabled=y phases=1 Linecode=1P_UG_AL_#2_15_12_47_0_1_1_1_1

New Line.l(r:p3udt21167-p3udt24437) Units=km Length=0.0598955 bus1=p3udt21167-p3udt24437x.1 bus2=p3udt21167-p3udt24437xx.1 switch=n enabled=y phases=1 Linecode=1P_UG_AL_#2_15_12_47_0_1_1_1_1

New Line.l(r:p3udt21167-p3udt25352) Units=km Length=0.0898571 bus1=p3udt21167-p3udt25352xx.1 bus2=p3udt21167-p3udt25352x.1 switch=n enabled=y phases=1 Linecode=1P_UG_AL_#2_15_12_47_0_1_1_1_1

New Line.l(r:p3udt25352-p3udt5127) Units=km Length=0.267395 bus1=p3udt25352-p3udt5127x.1 bus2=p3udt25352.1 switch=n enabled=y phases=1 Linecode=1P_OH_AL_ACSR_#2_Sparrow_12_47_0_1_1_1_1

New Line.l(r:p3udt19363-p3udt30806) Units=km Length=0.0192953 bus1=p3udt19363-p3udt30806x.3 bus2=p3udt19363.3 switch=n enabled=y phases=1 Linecode=1P_OH_AL_ACSR_#2_Sparrow_12_47_0_1_1_1_1

New Line.l(r:p3udt12890-p3udt19684) Units=km Length=0.138243 bus1=p3udt12890-p3udt19684x.2 bus2=p3udt19684.2 switch=n enabled=y phases=1 Linecode=1P_OH_AL_ACSR_#2_Sparrow_12_47_0_1_1_1_1

New Line.l(r:p3udt21672-p3udt25746) Units=km Length=0.111084 bus1=p3udt21672.2 bus2=p3udt25746.2 switch=n enabled=y phases=1 Linecode=1P_OH_AL_ACSR_#2_Sparrow_12_47_0_1_1_1_1

New Line.l(r:p3udt21672-p3udt28969) Units=km Length=0.0510021 bus1=p3udt28969.2 bus2=p3udt21672.2 switch=n enabled=y phases=1 Linecode=1P_OH_AL_ACSR_#2_Sparrow_12_47_0_1_1_1_1

New Line.l(r:p3udt27650-p3udt28969) Units=km Length=0.0270915 bus1=p3udt27650.2 bus2=p3udt28969.2 switch=n enabled=y phases=1 Linecode=1P_OH_AL_ACSR_#2_Sparrow_12_47_0_1_1_1_1

New Line.l(r:p3udt27650-p3udt3025) Units=km Length=0.0567295 bus1=p3udt3025.2 bus2=p3udt27650.2 switch=n enabled=y phases=1 Linecode=1P_OH_AL_ACSR_#2_Sparrow_12_47_0_1_1_1_1

New Line.l(r:p3udt28651-p3udt3025) Units=km Length=0.059750000000000004 bus1=p3udt3025.2 bus2=p3udt28651.2 switch=n enabled=y phases=1 Linecode=1P_OH_AL_ACSR_#2_Sparrow_12_47_0_1_1_1_1

New Line.l(r:p3udt3025-p3udt32308) Units=km Length=0.126618 bus1=p3udt32308.2 bus2=p3udt3025.2 switch=n enabled=y phases=1 Linecode=1P_OH_AL_ACSR_#2_Sparrow_12_47_0_1_1_1_1

New Line.l(r:p3udt27467-p3udt32308) Units=km Length=0.030933000000000002 bus1=p3udt27467.2 bus2=p3udt32308.2 switch=n enabled=y phases=1 Linecode=1P_OH_AL_ACSR_#2_Sparrow_12_47_0_1_1_1_1

New Line.l(r:p3udt26908-p3udt27467) Units=km Length=0.0154724 bus1=p3udt26908-p3udt27467x.2 bus2=p3udt27467.2 switch=n enabled=y phases=1 Linecode=1P_OH_AL_ACSR_#2_Sparrow_12_47_0_1_1_1_1

New Line.l(r:p3udt13298-p3udt30941) Units=km Length=0.07898650000000002 bus1=p3udt13298.1 bus2=p3udt30941.1 switch=n enabled=y phases=1 Linecode=1P_OH_AL_ACSR_#2_Sparrow_12_47_0_1_1_1_1

New Line.l(r:p3udt13298-p3udt5123) Units=km Length=0.0592441 bus1=p3udt5123.1 bus2=p3udt13298.1 switch=n enabled=y phases=1 Linecode=1P_OH_AL_ACSR_#2_Sparrow_12_47_0_1_1_1_1

New Line.l(r:p3udt27468-p3udt5123) Units=km Length=0.0789818 bus1=p3udt27468.1 bus2=p3udt5123.1 switch=n enabled=y phases=1 Linecode=1P_OH_AL_ACSR_#2_Sparrow_12_47_0_1_1_1_1

New Line.l(r:p3udt27468-p3udt3746) Units=km Length=0.0789953 bus1=p3udt3746.1 bus2=p3udt27468.1 switch=n enabled=y phases=1 Linecode=1P_OH_AL_ACSR_#2_Sparrow_12_47_0_1_1_1_1

New Line.l(r:p3udt24656-p3udt3746) Units=km Length=0.0592353 bus1=p3udt24656.1 bus2=p3udt3746.1 switch=n enabled=y phases=1 Linecode=1P_OH_AL_ACSR_#2_Sparrow_12_47_0_1_1_1_1

New Line.l(r:p3udt24656-p3udt9883) Units=km Length=0.196933 bus1=p3udt24656-p3udt9883x.1 bus2=p3udt24656.1 switch=n enabled=y phases=1 Linecode=1P_OH_AL_ACSR_#2_Sparrow_12_47_0_1_1_1_1

New Line.l(r:p3udt15359-p3udt1581) Units=km Length=0.18123800000000004 bus1=p3udt15359.2 bus2=p3udt15359_b1_1.2 switch=n enabled=y phases=1 Linecode=1P_OH_AL_ACSR_#2_Sparrow_12_47_0_1_1_1_1

New Line.l(r:p3udt12889-p3udt15359) Units=km Length=0.0781136 bus1=p3udt12889.2 bus2=p3udt15359.2 switch=n enabled=y phases=1 Linecode=1P_OH_AL_ACSR_#2_Sparrow_12_47_0_1_1_1_1

New Line.l(r:p3udt12889-p3udt8192) Units=km Length=0.0781173 bus1=p3udt12889-p3udt8192x.2 bus2=p3udt12889.2 switch=n enabled=y phases=1 Linecode=1P_OH_AL_ACSR_#2_Sparrow_12_47_0_1_1_1_1

New Line.l(r:p3udt14557-p3udt6418) Units=km Length=0.05760950000000001 bus1=p3udt14557.1.2.3 bus2=p3udt6418.1.2.3 switch=n enabled=y phases=3 Linecode=3P_OH_AL_ACSR_4/0_Penguin_12_47_0_3_3_3_3

New Line.l(r:p3udt14557-p3udt24436) Units=km Length=0.184581 bus1=p3udt24436.1.2.3 bus2=p3udt14557.1.2.3 switch=n enabled=y phases=3 Linecode=3P_OH_AL_ACSR_4/0_Penguin_12_47_0_3_3_3_3

New Line.l(r:p3udt4431-p3udt5126) Units=km Length=0.0782089 bus1=p3udt4431.1.2.3 bus2=p3udt5126.1.2.3 switch=n enabled=y phases=3 Linecode=3P_OH_AL_ACSR_4/0_Penguin_12_47_0_3_3_3_3

New Line.l(r:p3udt24190-p3udt4431) Units=km Length=0.0195479 bus1=p3udt24190.1.2.3 bus2=p3udt4431.1.2.3 switch=n enabled=y phases=3 Linecode=3P_OH_AL_ACSR_4/0_Penguin_12_47_0_3_3_3_3

New Line.l(r:p3udt19362-p3udt24190) Units=km Length=0.0782187 bus1=p3udt19362.1.2.3 bus2=p3udt24190.1.2.3 switch=n enabled=y phases=3 Linecode=3P_OH_AL_ACSR_4/0_Penguin_12_47_0_3_3_3_3

New Line.l(r:p3udt19362-p3udt31886) Units=km Length=0.0522851 bus1=p3udt31886.1.2.3 bus2=p3udt19362.1.2.3 switch=n enabled=y phases=3 Linecode=3P_OH_AL_ACSR_4/0_Penguin_12_47_0_3_3_3_3

New Line.l(r:p3udt2315-p3udt31886) Units=km Length=0.0524342 bus1=p3udt2315.1.2.3 bus2=p3udt31886.1.2.3 switch=n enabled=y phases=3 Linecode=3P_OH_AL_ACSR_4/0_Penguin_12_47_0_3_3_3_3

New Line.l(r:p3udt18718-p3udt2315) Units=km Length=0.141664 bus1=p3udt18718.1.2.3 bus2=p3udt2315.1.2.3 switch=n enabled=y phases=3 Linecode=3P_OH_AL_ACSR_4/0_Penguin_12_47_0_3_3_3_3

New Line.l(r:p3udt18718-p3udt24436) Units=km Length=0.0351744 bus1=p3udt24436.1.2.3 bus2=p3udt18718.1.2.3 switch=n enabled=y phases=3 Linecode=3P_OH_AL_ACSR_4/0_Penguin_12_47_0_3_3_3_3

New Line.l(r:p3udt24436-p3udt6419) Units=km Length=0.110306 bus1=p3udt6419.1.2.3 bus2=p3udt24436.1.2.3 switch=n enabled=y phases=3 Linecode=3P_OH_AL_ACSR_4/0_Penguin_12_47_0_3_3_3_3

New Line.l(r:p3udt6419-p3udt9883) Units=km Length=0.0681745 bus1=p3udt9883.1.2.3 bus2=p3udt6419.1.2.3 switch=n enabled=y phases=3 Linecode=3P_OH_AL_ACSR_4/0_Penguin_12_47_0_3_3_3_3

New Line.l(r:p3udt32307-p3udt9883) Units=km Length=0.0576141 bus1=p3udt32307.1.2.3 bus2=p3udt9883.1.2.3 switch=n enabled=y phases=3 Linecode=3P_OH_AL_ACSR_4/0_Penguin_12_47_0_3_3_3_3

New Line.l(r:p3udt32307-p3udt3745) Units=km Length=0.10974700000000001 bus1=p3udt3745.1.2.3 bus2=p3udt3745_b1_1.1.2.3 switch=n enabled=y phases=3 Linecode=3P_OH_AL_ACSR_4/0_Penguin_12_47_0_3_3_3_3

New Line.l(r:p3udt3745-p3udt7633) Units=km Length=0.077159 bus1=p3udt7633.1.2.3 bus2=p3udt3745.1.2.3 switch=n enabled=y phases=3 Linecode=3P_OH_AL_ACSR_4/0_Penguin_12_47_0_3_3_3_3

New Line.l(r:p3udt7633-p3udt8192) Units=km Length=0.0580989 bus1=p3udt8192.1.2.3 bus2=p3udt7633.1.2.3 switch=n enabled=y phases=3 Linecode=3P_OH_AL_ACSR_4/0_Penguin_12_47_0_3_3_3_3

New Line.l(r:p3udt22171-p3udt8192)_s0 Units=km Length=0.09222070000000002 bus1=p3udt22171.1.2.3 bus2=p3udt22171-p3udt8192x.1.2.3 switch=n enabled=y phases=3 Linecode=3P_OH_AL_ACSR_4/0_Penguin_12_47_0_3_3_3_3

New Line.l(r:p3udt22171-p3udt8192)_s1 Units=km Length=0.0377956 bus1=p3udt22171-p3udt8192x.1.2.3 bus2=p3udt8192.1.2.3 switch=n enabled=y phases=3 Linecode=3P_OH_AL_ACSR_4/0_Penguin_12_47_0_3_3_3_3

New Line.l(r:p3udt22171-p3uhs9_1247) Units=km Length=0.492923 bus1=p3udt22171-p3uhs9_1247x.1.2.3 bus2=p3udt22171.1.2.3 switch=n enabled=y phases=3 Linecode=3P_OH_AL_ACSR_4/0_Penguin_12_47_0_3_3_3_3

New Line.l(r:p3udt3026lv-p3ulv3341) Units=km Length=0.00508178 bus1=p3udt3026lv.1.2.3 bus2=p3ulv3341.1.2.3 switch=n enabled=y phases=3 Linecode=3P_UG_AL_750kcmil_25_0_416_0_3_3_3_3

New Line.l(r:p3udt3026-p3udt824)_s0 Units=km Length=0.305784 bus1=p3udt824.1.2.3 bus2=p3udt3026-p3udt824xx.1.2.3 switch=n enabled=y phases=3 Linecode=3P_OH_AL_ACSR_4/0_Penguin_12_47_0_3_3_3_3

New Line.l(r:p3udt3026-p3udt824)_s1 Units=km Length=0.10836 bus1=p3udt3026-p3udt824xx.1.2.3 bus2=p3udt3026-p3udt824x.1.2.3 switch=n enabled=y phases=3 Linecode=3P_OH_AL_ACSR_4/0_Penguin_12_47_0_3_3_3_3

New Line.l(r:p3udt3026-p3udt824)_s2 Units=km Length=0.251227 bus1=p3udt3026-p3udt824x.1.2.3 bus2=p3udt3026.1.2.3 switch=n enabled=y phases=3 Linecode=3P_OH_AL_ACSR_4/0_Penguin_12_47_0_3_3_3_3

New Line.l(r:p3udt28653lv-p3ulv61582) Units=km Length=0.0283761 bus1=p3udt28653lv.1.2.3 bus2=p3ulv61582.1.2.3 switch=n enabled=y phases=3 Linecode=3P_UG_AL_350kcmil_15_0_416_0_3_3_3_3

New Line.l(r:p3udt28653-p3udt824) Units=km Length=0.0569831 bus1=p3udt824.1.2.3 bus2=p3udt28653.1.2.3 switch=n enabled=y phases=3 Linecode=3P_OH_AL_ACSR_4/0_Penguin_12_47_0_3_3_3_3

New Line.l(r:p3udt824-p3udt825) Units=km Length=0.056943 bus1=p3udt825.1.2.3 bus2=p3udt824.1.2.3 switch=n enabled=y phases=3 Linecode=3P_OH_AL_ACSR_4/0_Penguin_12_47_0_3_3_3_3

New Line.l(r:p3udt18039-p3udt825) Units=km Length=0.09489600000000001 bus1=p3udt18039.1.2.3 bus2=p3udt825.1.2.3 switch=n enabled=y phases=3 Linecode=3P_OH_AL_ACSR_4/0_Penguin_12_47_0_3_3_3_3

New Line.l(r:p3udt18039-p3udt6418) Units=km Length=0.0451465 bus1=p3udt6418.1.2.3 bus2=p3udt18039.1.2.3 switch=n enabled=y phases=3 Linecode=3P_OH_AL_ACSR_4/0_Penguin_12_47_0_3_3_3_3

New Line.l(r:p3udt31886lv-p3ulv78450) Units=km Length=0.017773700000000003 bus1=p3udt31886lv.1.2.3 bus2=p3ulv78450.1.2.3 switch=n enabled=y phases=3 Linecode=3P_UG_AL_350kcmil_15_0_416_0_3_3_3_3

New Line.l(r:p3udt22435lv-p3ulv38441) Units=km Length=0.0307506 bus1=p3udt22435lv.1.2.3 bus2=p3ulv38441.1.2.3 switch=n enabled=y phases=3 Linecode=3P_UG_AL_350kcmil_15_0_416_0_3_3_3_3

New Line.l(r:p3udt30806lv-p3ulv72345) Units=km Length=0.0252552 bus1=p3udt30806lv.1.2.3 bus2=p3ulv72345.1.2.3 switch=n enabled=y phases=3 Linecode=3P_UG_AL_350kcmil_15_0_416_0_3_3_3_3

New Line.l(r:p3udt5127lv-p3ulv5751) Units=km Length=0.0261985 bus1=p3udt5127lv.1.2.3 bus2=p3ulv5751.1.2.3 switch=n enabled=y phases=3 Linecode=3P_UG_AL_350kcmil_15_0_416_0_3_3_3_3

New Line.l(r:p3udt30806-p3udt5127) Units=km Length=0.128914 bus1=p3udt30806.1.2.3 bus2=p3udt5127.1.2.3 switch=n enabled=y phases=3 Linecode=3P_OH_AL_ACSR_4/0_Penguin_12_47_0_3_3_3_3

New Line.l(r:p3udt17297-p3udt30806) Units=km Length=0.195397 bus1=p3udt17297.1.2.3 bus2=p3udt30806.1.2.3 switch=n enabled=y phases=3 Linecode=3P_OH_AL_ACSR_4/0_Penguin_12_47_0_3_3_3_3

New Line.l(r:p3udt17297-p3udt22435) Units=km Length=0.07509170000000001 bus1=p3udt22435.1.2.3 bus2=p3udt17297.1.2.3 switch=n enabled=y phases=3 Linecode=3P_OH_AL_ACSR_4/0_Penguin_12_47_0_3_3_3_3

New Line.l(r:p3udt22435-p3udt24906) Units=km Length=0.29262400000000005 bus1=p3udt24906.1.2.3 bus2=p3udt22435.1.2.3 switch=n enabled=y phases=3 Linecode=3P_OH_AL_ACSR_4/0_Penguin_12_47_0_3_3_3_3

New Line.l(r:p3udt24906-p3udt6416) Units=km Length=0.11767800000000002 bus1=p3udt6416.1.2.3 bus2=p3udt24906.1.2.3 switch=n enabled=y phases=3 Linecode=3P_OH_AL_ACSR_4/0_Penguin_12_47_0_3_3_3_3

New Line.l(r:p3udt5126-p3udt6416) Units=km Length=0.136956 bus1=p3udt5126.1.2.3 bus2=p3udt6416.1.2.3 switch=n enabled=y phases=3 Linecode=3P_OH_AL_ACSR_4/0_Penguin_12_47_0_3_3_3_3

New Line.l(r:p3udt12890lv-p3ulv16782) Units=km Length=0.001 bus1=p3udt12890lv.1.2.3 bus2=p3ulv16782.1.2.3 switch=n enabled=y phases=3 Linecode=3P_UG_AL_750kcmil_25_0_416_0_3_3_3_3

New Line.l(r:p3udt7051lv-p3ulv8151) Units=km Length=0.001 bus1=p3udt7051lv.1.2.3 bus2=p3ulv8151.1.2.3 switch=n enabled=y phases=3 Linecode=3P_UG_AL_350kcmil_15_0_416_0_3_3_3_3

New Line.l(r:p3udt12890-p3udt7051) Units=km Length=0.126971 bus1=p3udt12890.1.2.3 bus2=p3udt7051.1.2.3 switch=n enabled=y phases=3 Linecode=3P_OH_AL_ACSR_4/0_Penguin_12_47_0_3_3_3_3

New Line.l(r:p3udt12890-p3udt5126) Units=km Length=0.282321 bus1=p3udt5126.1.2.3 bus2=p3udt12890.1.2.3 switch=n enabled=y phases=3 Linecode=3P_OH_AL_ACSR_4/0_Penguin_12_47_0_3_3_3_3

New Line.l(r:p3udt26908lv-p3ulv53941) Units=km Length=0.0138872 bus1=p3udt26908lv.1.2.3 bus2=p3ulv53941.1.2.3 switch=n enabled=y phases=3 Linecode=3P_UG_AL_350kcmil_15_0_416_0_3_3_3_3

New Line.l(r:p3udt26908-p3udt6419) Units=km Length=0.106335 bus1=p3udt6419.1.2.3 bus2=p3udt26908.1.2.3 switch=n enabled=y phases=3 Linecode=3P_OH_AL_ACSR_4/0_Penguin_12_47_0_3_3_3_3

New Line.padswitch(r:p3udt28006-p3udt6417)p3u_180474 Units=km Length=0.001 bus1=p3udt28006.3 bus2=p3udt28006-p3udt6417x.3 switch=y enabled=y phases=1 Linecode=padswitch_1_1_1_1

New Line.padswitch(r:p3udt28006-p3udt6417)p3u_180475 Units=km Length=0.001 bus1=p3udt28006-p3udt6417xx.3 bus2=p3udt6417.3 switch=y enabled=y phases=1 Linecode=padswitch_1_1_1_1

New Line.padswitch(r:p3udt14961-p3udt28006)p3u_180476 Units=km Length=0.001 bus1=p3udt14961.3 bus2=p3udt14961-p3udt28006x.3 switch=y enabled=y phases=1 Linecode=padswitch_1_3_1_1_1

New Line.padswitch(r:p3udt14961-p3udt28006)p3u_180477 Units=km Length=0.001 bus1=p3udt14961-p3udt28006xx.3 bus2=p3udt28006.3 switch=y enabled=y phases=1 Linecode=padswitch_1_1_1_1

New Line.padswitch(r:p3udt14961-p3udt6420)p3u_180478 Units=km Length=0.001 bus1=p3udt6420.3 bus2=p3udt14961-p3udt6420xx.3 switch=y enabled=y phases=1 Linecode=padswitch_1_3_1_0_1_1

New Line.padswitch(r:p3udt14961-p3udt6420)p3u_180479 Units=km Length=0.001 bus1=p3udt14961-p3udt6420x.3 bus2=p3udt14961.3 switch=y enabled=y phases=1 Linecode=padswitch_1_3_1_1_1

New Line.padswitch(r:p3udt28653-p3udt6420)p3u_180480 Units=km Length=0.001 bus1=p3udt28653-p3udt6420x.3 bus2=p3udt28653-p3udt6420xx.3 switch=y enabled=y phases=1 Linecode=padswitch_1_3_1_0_1_0_1

New Line.padswitch(r:p3udt28653-p3udt6420)p3u_180481 Units=km Length=0.001 bus1=p3udt28653-p3udt6420xxx.3 bus2=p3udt6420.3 switch=y enabled=y phases=1 Linecode=padswitch_1_3_1_0_1_1

New Line.padswitch(r:p3udt15770-p3udt16926)p3u_180482 Units=km Length=0.001 bus1=p3udt16926.1 bus2=p3udt15770-p3udt16926xx.1 switch=y enabled=y phases=1 Linecode=padswitch_1_3_1_0_1_0_1

New Line.padswitch(r:p3udt15770-p3udt16926)p3u_180483 Units=km Length=0.001 bus1=p3udt15770-p3udt16926x.1 bus2=p3udt15770.1 switch=y enabled=y phases=1 Linecode=padswitch_1_3_1_1_1

New Line.padswitch(r:p3udt16926-p3udt24437)p3u_180484 Units=km Length=0.001 bus1=p3udt24437.1 bus2=p3udt16926-p3udt24437xx.1 switch=y enabled=y phases=1 Linecode=padswitch_1_1_1_1

New Line.padswitch(r:p3udt16926-p3udt24437)p3u_180485 Units=km Length=0.001 bus1=p3udt16926-p3udt24437x.1 bus2=p3udt16926.1 switch=y enabled=y phases=1 Linecode=padswitch_1_3_1_0_1_0_1

New Line.padswitch(r:p3udt21167-p3udt24437)p3u_180486 Units=km Length=0.001 bus1=p3udt21167.1 bus2=p3udt21167-p3udt24437x.1 switch=y enabled=y phases=1 Linecode=padswitch_1_1_1_1

New Line.padswitch(r:p3udt21167-p3udt24437)p3u_180487 Units=km Length=0.001 bus1=p3udt21167-p3udt24437xx.1 bus2=p3udt24437.1 switch=y enabled=y phases=1 Linecode=padswitch_1_1_1_1

New Line.padswitch(r:p3udt21167-p3udt25352)p3u_180488 Units=km Length=0.001 bus1=p3udt25352.1 bus2=p3udt21167-p3udt25352xx.1 switch=y enabled=y phases=1 Linecode=padswitch_1_1_1_1

New Line.padswitch(r:p3udt21167-p3udt25352)p3u_180489 Units=km Length=0.001 bus1=p3udt21167-p3udt25352x.1 bus2=p3udt21167.1 switch=y enabled=y phases=1 Linecode=padswitch_1_1_1_1

New Line.fuse(r:p3udt28654-p3udt825)p3u_206904 Units=km Length=0.001 bus1=p3udt825.2 bus2=p3udt28654-p3udt825x.2 switch=n enabled=y phases=1 Linecode=fuse_1_1_1_1

New Fuse.Fuse_fuse(r:p3udt28654-p3udt825)p3u_206904 monitoredobj=Line.fuse(r:p3udt28654-p3udt825)p3u_206904 enabled=y ratedcurrent=100.0

New Line.fuse(r:p3udt2315-p3udt23705)p3u_207043 Units=km Length=0.001 bus1=p3udt2315.2 bus2=p3udt2315-p3udt23705x.2 switch=n enabled=y phases=1 Linecode=fuse_1_1_1_1

New Fuse.Fuse_fuse(r:p3udt2315-p3udt23705)p3u_207043 monitoredobj=Line.fuse(r:p3udt2315-p3udt23705)p3u_207043 enabled=y ratedcurrent=100.0

New Line.fuse(r:p3udt3026-p3udt30655)p3u_207120 Units=km Length=0.001 bus1=p3udt3026.1 bus2=p3udt3026-p3udt30655x.1 switch=n enabled=y phases=1 Linecode=fuse_1_1_1_1

New Fuse.Fuse_fuse(r:p3udt3026-p3udt30655)p3u_207120 monitoredobj=Line.fuse(r:p3udt3026-p3udt30655)p3u_207120 enabled=y ratedcurrent=100.0

New Line.fuse(r:p3udt5125-p3udt5126)p3u_207348 Units=km Length=0.001 bus1=p3udt5126.1 bus2=p3udt5125-p3udt5126x.1 switch=n enabled=y phases=1 Linecode=fuse_1_7_1_1_1

New Fuse.Fuse_fuse(r:p3udt5125-p3udt5126)p3u_207348 monitoredobj=Line.fuse(r:p3udt5125-p3udt5126)p3u_207348 enabled=y ratedcurrent=100.0

New Line.fuse(r:p3udt22707-p3udt5127)p3u_207349 Units=km Length=0.001 bus1=p3udt5127.2 bus2=p3udt22707-p3udt5127x.2 switch=n enabled=y phases=1 Linecode=fuse_1_7_1_1_1

New Fuse.Fuse_fuse(r:p3udt22707-p3udt5127)p3u_207349 monitoredobj=Line.fuse(r:p3udt22707-p3udt5127)p3u_207349 enabled=y ratedcurrent=100.0

New Line.fuse(r:p3udt25352-p3udt5127)p3u_207350 Units=km Length=0.001 bus1=p3udt5127.1 bus2=p3udt25352-p3udt5127x.1 switch=n enabled=y phases=1 Linecode=fuse_1_7_1_4_1_1

New Fuse.Fuse_fuse(r:p3udt25352-p3udt5127)p3u_207350 monitoredobj=Line.fuse(r:p3udt25352-p3udt5127)p3u_207350 enabled=y ratedcurrent=100.0

New Line.fuse(r:p3udt1582-p3udt6416)p3u_207494 Units=km Length=0.001 bus1=p3udt6416.3 bus2=p3udt1582-p3udt6416x.3 switch=n enabled=y phases=1 Linecode=fuse_1_1_1_1

New Fuse.Fuse_fuse(r:p3udt1582-p3udt6416)p3u_207494 monitoredobj=Line.fuse(r:p3udt1582-p3udt6416)p3u_207494 enabled=y ratedcurrent=100.0

New Line.fuse(r:p3udt12889-p3udt8192)p3u_207623 Units=km Length=0.001 bus1=p3udt8192.2 bus2=p3udt12889-p3udt8192x.2 switch=n enabled=y phases=1 Linecode=fuse_1_1_1_1

New Fuse.Fuse_fuse(r:p3udt12889-p3udt8192)p3u_207623 monitoredobj=Line.fuse(r:p3udt12889-p3udt8192)p3u_207623 enabled=y ratedcurrent=100.0

New Line.fuse(r:p3udt24656-p3udt9883)p3u_207779 Units=km Length=0.001 bus1=p3udt9883.1 bus2=p3udt24656-p3udt9883x.1 switch=n enabled=y phases=1 Linecode=fuse_1_1_1_1

New Fuse.Fuse_fuse(r:p3udt24656-p3udt9883)p3u_207779 monitoredobj=Line.fuse(r:p3udt24656-p3udt9883)p3u_207779 enabled=y ratedcurrent=100.0

New Line.fuse(r:p3udt12890-p3udt19684)p3u_208053 Units=km Length=0.001 bus1=p3udt12890.2 bus2=p3udt12890-p3udt19684x.2 switch=n enabled=y phases=1 Linecode=fuse_1_1_1_1

New Fuse.Fuse_fuse(r:p3udt12890-p3udt19684)p3u_208053 monitoredobj=Line.fuse(r:p3udt12890-p3udt19684)p3u_208053 enabled=y ratedcurrent=100.0

New Line.fuse(r:p3udt12418-p3udt18039)p3u_208587 Units=km Length=0.001 bus1=p3udt18039.1 bus2=p3udt12418-p3udt18039x.1 switch=n enabled=y phases=1 Linecode=fuse_1_1_1_1

New Fuse.Fuse_fuse(r:p3udt12418-p3udt18039)p3u_208587 monitoredobj=Line.fuse(r:p3udt12418-p3udt18039)p3u_208587 enabled=y ratedcurrent=100.0

New Line.fuse(r:p3udt26908-p3udt27467)p3u_209465 Units=km Length=0.001 bus1=p3udt26908.2 bus2=p3udt26908-p3udt27467x.2 switch=n enabled=y phases=1 Linecode=fuse_1_1_1_1

New Fuse.Fuse_fuse(r:p3udt26908-p3udt27467)p3u_209465 monitoredobj=Line.fuse(r:p3udt26908-p3udt27467)p3u_209465 enabled=y ratedcurrent=100.0

New Line.fuse(r:p3udt28653-p3udt6420)p3u_209663 Units=km Length=0.001 bus1=p3udt28653.3 bus2=p3udt28653-p3udt6420x.3 switch=n enabled=y phases=1 Linecode=fuse_1_1_1_1

New Fuse.Fuse_fuse(r:p3udt28653-p3udt6420)p3u_209663 monitoredobj=Line.fuse(r:p3udt28653-p3udt6420)p3u_209663 enabled=y ratedcurrent=100.0

New Line.fuse(r:p3udt19363-p3udt30806)p3u_209890 Units=km Length=0.001 bus1=p3udt30806.3 bus2=p3udt19363-p3udt30806x.3 switch=n enabled=y phases=1 Linecode=fuse_1_1_1_1

New Fuse.Fuse_fuse(r:p3udt19363-p3udt30806)p3u_209890 monitoredobj=Line.fuse(r:p3udt19363-p3udt30806)p3u_209890 enabled=y ratedcurrent=100.0

New Line.l(r:p3udt11899-p3udt20593)_disconnect Units=km Length=0.001 bus1=p3udt11899_b1_1.2 bus2=p3udt11899_b2_1.2 switch=y enabled=y phases=1 Linecode=1P_OH_AL_ACSR_#2_Sparrow_12_47_0_1_1_1_1

New Line.l(r:p3udt11899-p3udt20593)_cont Units=km Length=0.9432900000000002 bus1=p3udt11899_b2_1.2 bus2=p3udt20593.2 switch=n enabled=y phases=1 Linecode=1P_OH_AL_ACSR_#2_Sparrow_12_47_0_1_1_1_1

New Line.l(r:p3udt15359-p3udt1581)_disconnect Units=km Length=0.001 bus1=p3udt15359_b1_1.2 bus2=p3udt15359_b2_1.2 switch=y enabled=y phases=1 Linecode=1P_OH_AL_ACSR_#2_Sparrow_12_47_0_1_1_1_1

New Line.l(r:p3udt15359-p3udt1581)_cont Units=km Length=1.640142 bus1=p3udt15359_b2_1.2 bus2=p3udt1581.2 switch=n enabled=y phases=1 Linecode=1P_OH_AL_ACSR_#2_Sparrow_12_47_0_1_1_1_1

New Line.l(r:p3udt32307-p3udt3745)_disconnect Units=km Length=0.001 bus1=p3udt3745_b1_1.1.2.3 bus2=p3udt3745_b2_1.1.2.3 switch=y enabled=y phases=3 Linecode=3P_OH_AL_ACSR_4/0_Penguin_12_47_0_3_3_3_3

New Line.l(r:p3udt32307-p3udt3745)_cont Units=km Length=0.9967230000000001 bus1=p3udt3745_b2_1.1.2.3 bus2=p3udt32307.1.2.3 switch=n enabled=y phases=3 Linecode=3P_OH_AL_ACSR_4/0_Penguin_12_47_0_3_3_3_3
