New Capacitor.p4uc2 Bus1=p4udt12036 phases=3 Kv=12.47 conn=Wye Kvar=450.0

New CapControl.p4uc2 Capacitor=p4uc2 Element=Line.l(r:p4udt1049-p4udt12036) Terminal=1 delay=100.0 Type=voltage Vmin=120.5 Vmax=125.0 Ptratio=59.99631547328862 Ctratio=100.0

New Capacitor.p4uc6 Bus1=p4udt3728 phases=3 Kv=12.47 conn=Wye Kvar=300.0

New CapControl.p4uc6 Capacitor=p4uc6 Element=Line.padswitch(r:p4udt12554-p4udt3728)p4u_64114 Terminal=1 delay=100.0 Type=voltage Vmin=120.5 Vmax=125.0 Ptratio=59.99631547328862 Ctratio=100.0
