New Capacitor.p4uc5 Bus1=p4udt1859 phases=3 Kv=12.47 conn=Wye Kvar=300.0

New CapControl.p4uc5 Capacitor=p4uc5 Element=Line.padswitch(r:p4udt1859-p4udt23558)p4u_64619 Terminal=1 delay=100.0 Type=voltage Vmin=120.5 Vmax=125.0 Ptratio=59.99631547328862 Ctratio=100.0
