New Capacitor.p4uc65 Bus1=p4udt23507 phases=3 Kv=12.47 conn=Wye Kvar=300.0

New CapControl.p4uc65 Capacitor=p4uc65 Element=Line.l(r:p4udt23507-p4udt23650) Terminal=1 delay=100.0 Type=voltage Vmin=120.5 Vmax=125.0 Ptratio=59.99631547328862 Ctratio=100.0
