New Line.l(r:p4udt21162-p4uhs10_1247) Units=km Length=0.589074 bus1=p4udt21162-p4uhs10_1247x.1.2.3 bus2=p4udt21162.1.2.3 switch=n enabled=y phases=3 Linecode=3P_OH_AL_ACSR_4/0_Penguin_12_47_0_3_3_3_3

New Line.l(r:p4udt21162lv-p4ulv36610) Units=km Length=0.001 bus1=p4udt21162lv.1.2.3 bus2=p4ulv36610.1.2.3 switch=n enabled=y phases=3 Linecode=3P_UG_AL_4/0_15_0_416_0_3_3_3_3

New Line.l(r:p4udt20286lv-p4ulv34123) Units=km Length=0.001 bus1=p4udt20286lv.1.2.3 bus2=p4ulv34123.1.2.3 switch=n enabled=y phases=3 Linecode=3P_UG_AL_4/0_15_0_416_0_3_3_3_3

New Line.l(r:p4udt7566lv-p4ulv8947) Units=km Length=0.0101077 bus1=p4udt7566lv.1.2.3 bus2=p4ulv8947.1.2.3 switch=n enabled=y phases=3 Linecode=3P_UG_AL_4/0_15_0_416_0_3_3_3_3

New Line.l(r:p4udt7566lv-p4ulv17623) Units=km Length=0.0101077 bus1=p4udt7566lv.1.2.3 bus2=p4ulv17623.1.2.3 switch=n enabled=y phases=3 Linecode=3P_UG_AL_4/0_15_0_416_0_3_3_3_3

New Line.l(r:p4udt15551lv-p4ulv22731) Units=km Length=0.001 bus1=p4udt15551lv.1.2.3 bus2=p4ulv22731.1.2.3 switch=n enabled=y phases=3 Linecode=3P_UG_AL_4/0_15_0_416_0_3_3_3_3

New Line.l(r:p4udt11962lv-p4ulv15851) Units=km Length=0.026501100000000003 bus1=p4udt11962lv.1.2.3 bus2=p4ulv15851.1.2.3 switch=n enabled=y phases=3 Linecode=3P_UG_AL_4/0_15_0_416_0_3_3_3_3

New Line.l(r:p4udt11962lv-p4ulv42030) Units=km Length=0.026501100000000003 bus1=p4udt11962lv.1.2.3 bus2=p4ulv42030.1.2.3 switch=n enabled=y phases=3 Linecode=3P_UG_AL_4/0_15_0_416_0_3_3_3_3

New Line.l(r:p4udt19005lv-p4ulv30751) Units=km Length=0.001 bus1=p4udt19005lv.1.2.3 bus2=p4ulv30751.1.2.3 switch=n enabled=y phases=3 Linecode=3P_UG_AL_4/0_15_0_416_0_3_3_3_3

New Line.l(r:p4udt12949lv-p4ulv17622) Units=km Length=0.001 bus1=p4udt12949lv.1.2.3 bus2=p4ulv17622.1.2.3 switch=n enabled=y phases=3 Linecode=3P_UG_AL_4/0_15_0_416_0_3_3_3_3

New Line.l(r:p4udt12949-p4udt19005) Units=km Length=0.340421 bus1=p4udt19005.1.2.3 bus2=p4udt12949.1.2.3 switch=n enabled=y phases=3 Linecode=3P_OH_AL_ACSR_4/0_Penguin_12_47_0_3_3_3_3

New Line.l(r:p4udt11962-p4udt19005) Units=km Length=0.158621 bus1=p4udt11962.1.2.3 bus2=p4udt19005.1.2.3 switch=n enabled=y phases=3 Linecode=3P_OH_AL_ACSR_4/0_Penguin_12_47_0_3_3_3_3

New Line.l(r:p4udt11962-p4udt15551) Units=km Length=0.114853 bus1=p4udt15551.1.2.3 bus2=p4udt11962.1.2.3 switch=n enabled=y phases=3 Linecode=3P_OH_AL_ACSR_4/0_Penguin_12_47_0_3_3_3_3

New Line.l(r:p4udt21782lv-p4ulv38327) Units=km Length=0.0791395 bus1=p4udt21782lv.1.2.3 bus2=p4ulv38327.1.2.3 switch=n enabled=y phases=3 Linecode=3P_UG_AL_4/0_15_0_416_0_3_3_3_3

New Line.l(r:p4udt14281lv-p4ulv20162) Units=km Length=0.001 bus1=p4udt14281lv.1.2.3 bus2=p4ulv20162.1.2.3 switch=n enabled=y phases=3 Linecode=3P_UG_AL_4/0_15_0_416_0_3_3_3_3

New Line.l(r:p4udt13183lv-p4ulv18055) Units=km Length=0.001 bus1=p4udt13183lv.1.2.3 bus2=p4ulv18055.1.2.3 switch=n enabled=y phases=3 Linecode=3P_UG_AL_4/0_15_0_416_0_3_3_3_3

New Line.l(r:p4udt14920lv-p4ulv21464) Units=km Length=0.001 bus1=p4udt14920lv.1.2.3 bus2=p4ulv21464.1.2.3 switch=n enabled=y phases=3 Linecode=3P_UG_AL_4/0_15_0_416_0_3_3_3_3

New Line.l(r:p4udt13183-p4udt14920) Units=km Length=0.184009 bus1=p4udt13183.1.2.3 bus2=p4udt14920.1.2.3 switch=n enabled=y phases=3 Linecode=3P_OH_AL_ACSR_4/0_Penguin_12_47_0_3_3_3_3

New Line.l(r:p4udt13183-p4udt14281) Units=km Length=0.215251 bus1=p4udt14281.1.2.3 bus2=p4udt13183.1.2.3 switch=n enabled=y phases=3 Linecode=3P_OH_AL_ACSR_4/0_Penguin_12_47_0_3_3_3_3

New Line.l(r:p4udt14281-p4udt21782)_s0 Units=km Length=0.111632 bus1=p4udt21782.1.2.3 bus2=p4udt14281-p4udt21782x.1.2.3 switch=n enabled=y phases=3 Linecode=3P_OH_AL_ACSR_4/0_Penguin_12_47_0_3_3_3_3

New Line.l(r:p4udt14281-p4udt21782)_s1 Units=km Length=0.074951 bus1=p4udt14281-p4udt21782x.1.2.3 bus2=p4udt14281.1.2.3 switch=n enabled=y phases=3 Linecode=3P_OH_AL_ACSR_4/0_Penguin_12_47_0_3_3_3_3

New Line.l(r:p4udt18660lv-p4ulv29890) Units=km Length=0.031167900000000002 bus1=p4udt18660lv.1.2.3 bus2=p4ulv29890.1.2.3 switch=n enabled=y phases=3 Linecode=3P_UG_AL_4/0_15_0_416_0_3_3_3_3

New Line.l(r:p4udt11214lv-p4ulv14562) Units=km Length=0.0300539 bus1=p4udt11214lv.1.2.3 bus2=p4ulv14562.1.2.3 switch=n enabled=y phases=3 Linecode=3P_UG_AL_4/0_15_0_416_0_3_3_3_3

New Line.l(r:p4udt15146lv-p4ulv21905) Units=km Length=0.03512110000000001 bus1=p4udt15146lv.1.2.3 bus2=p4ulv21905.1.2.3 switch=n enabled=y phases=3 Linecode=3P_UG_AL_4/0_15_0_416_0_3_3_3_3

New Line.l(r:p4udt1355lv-p4ulv1406) Units=km Length=0.017895900000000003 bus1=p4udt1355lv.1.2.3 bus2=p4ulv1406.1.2.3 switch=n enabled=y phases=3 Linecode=3P_UG_AL_4/0_15_0_416_0_3_3_3_3

New Line.l(r:p4udt12726lv-p4ulv17193) Units=km Length=0.0450408 bus1=p4udt12726lv.1.2.3 bus2=p4ulv17193.1.2.3 switch=n enabled=y phases=3 Linecode=3P_UG_AL_4/0_15_0_416_0_3_3_3_3

New Line.l(r:p4udt20450lv-p4ulv34538) Units=km Length=0.0384418 bus1=p4udt20450lv.1.2.3 bus2=p4ulv34538.1.2.3 switch=n enabled=y phases=3 Linecode=3P_UG_AL_4/0_15_0_416_0_3_3_3_3

New Line.l(r:p4udt12229lv-p4ulv16291) Units=km Length=0.001 bus1=p4udt12229lv.1.2.3 bus2=p4ulv16291.1.2.3 switch=n enabled=y phases=3 Linecode=3P_UG_AL_4/0_15_0_416_0_3_3_3_3

New Line.l(r:p4udt12229-p4udt20450)_s0 Units=km Length=0.0840286 bus1=p4udt20450.1.2.3 bus2=p4udt12229-p4udt20450x.1.2.3 switch=n enabled=y phases=3 Linecode=3P_OH_AL_ACSR_4/0_Penguin_12_47_0_3_3_3_3

New Line.l(r:p4udt12229-p4udt20450)_s1 Units=km Length=0.0447816 bus1=p4udt12229-p4udt20450x.1.2.3 bus2=p4udt12229.1.2.3 switch=n enabled=y phases=3 Linecode=3P_OH_AL_ACSR_4/0_Penguin_12_47_0_3_3_3_3

New Line.l(r:p4udt12726-p4udt20450) Units=km Length=0.04075870000000001 bus1=p4udt12726.1.2.3 bus2=p4udt20450.1.2.3 switch=n enabled=y phases=3 Linecode=3P_OH_AL_ACSR_4/0_Penguin_12_47_0_3_3_3_3

New Line.l(r:p4udt12726-p4udt1355) Units=km Length=0.0153881 bus1=p4udt1355.1.2.3 bus2=p4udt12726.1.2.3 switch=n enabled=y phases=3 Linecode=3P_OH_AL_ACSR_4/0_Penguin_12_47_0_3_3_3_3

New Line.l(r:p4udt1355-p4udt15146) Units=km Length=0.0910294 bus1=p4udt15146.1.2.3 bus2=p4udt1355.1.2.3 switch=n enabled=y phases=3 Linecode=3P_OH_AL_ACSR_4/0_Penguin_12_47_0_3_3_3_3

New Line.l(r:p4udt11736lv-p4ulv15433) Units=km Length=0.033262 bus1=p4udt11736lv.1.2.3 bus2=p4ulv15433.1.2.3 switch=n enabled=y phases=3 Linecode=3P_UG_AL_4/0_15_0_416_0_3_3_3_3

New Line.l(r:p4udt2500lv-p4ulv2637) Units=km Length=0.001 bus1=p4udt2500lv.1.2.3 bus2=p4ulv2637.1.2.3 switch=n enabled=y phases=3 Linecode=3P_UG_AL_4/0_15_0_416_0_3_3_3_3

New Line.l(r:p4udt11736-p4udt2500)_s0 Units=km Length=0.137459 bus1=p4udt11736.1.2.3 bus2=p4udt11736-p4udt2500x.1.2.3 switch=n enabled=y phases=3 Linecode=3P_OH_AL_ACSR_4/0_Penguin_12_47_0_3_3_3_3

New Line.l(r:p4udt11736-p4udt2500)_s1 Units=km Length=0.0912833 bus1=p4udt11736-p4udt2500x.1.2.3 bus2=p4udt2500.1.2.3 switch=n enabled=y phases=3 Linecode=3P_OH_AL_ACSR_4/0_Penguin_12_47_0_3_3_3_3

New Line.l(r:p4udt11215lv-p4ulv14563) Units=km Length=0.001 bus1=p4udt11215lv.1.2.3 bus2=p4ulv14563.1.2.3 switch=n enabled=y phases=3 Linecode=3P_UG_AL_4/0_15_0_416_0_3_3_3_3

New Line.l(r:p4udt11215-p4udt11736)_s0 Units=km Length=0.101224 bus1=p4udt11736.1.2.3 bus2=p4udt11215-p4udt11736x.1.2.3 switch=n enabled=y phases=3 Linecode=3P_OH_AL_ACSR_4/0_Penguin_12_47_0_3_3_3_3

New Line.l(r:p4udt11215-p4udt11736)_s1 Units=km Length=0.0327908 bus1=p4udt11215-p4udt11736x.1.2.3 bus2=p4udt11215.1.2.3 switch=n enabled=y phases=3 Linecode=3P_OH_AL_ACSR_4/0_Penguin_12_47_0_3_3_3_3

New Line.l(r:p4udt11736-p4udt15146) Units=km Length=0.10012800000000001 bus1=p4udt15146.1.2.3 bus2=p4udt11736.1.2.3 switch=n enabled=y phases=3 Linecode=3P_OH_AL_ACSR_4/0_Penguin_12_47_0_3_3_3_3

New Line.l(r:p4udt11214-p4udt15146) Units=km Length=0.0506993 bus1=p4udt11214.1.2.3 bus2=p4udt15146.1.2.3 switch=n enabled=y phases=3 Linecode=3P_OH_AL_ACSR_4/0_Penguin_12_47_0_3_3_3_3

New Line.l(r:p4udt15337lv-p4ulv22319) Units=km Length=0.0307611 bus1=p4udt15337lv.1.2.3 bus2=p4ulv22319.1.2.3 switch=n enabled=y phases=3 Linecode=3P_UG_AL_4/0_15_0_416_0_3_3_3_3

New Line.l(r:p4udt11214-p4udt15337) Units=km Length=0.001 bus1=p4udt11214.1.2.3 bus2=p4udt15337.1.2.3 switch=n enabled=y phases=3 Linecode=3P_OH_AL_ACSR_4/0_Penguin_12_47_0_3_3_3_3

New Line.l(r:p4udt11214-p4udt18660) Units=km Length=0.0421822 bus1=p4udt18660.1.2.3 bus2=p4udt11214.1.2.3 switch=n enabled=y phases=3 Linecode=3P_OH_AL_ACSR_4/0_Penguin_12_47_0_3_3_3_3

New Line.l(r:p4udt17418lv-p4ulv26893) Units=km Length=0.0158333 bus1=p4udt17418lv.1.2.3 bus2=p4ulv26893.1.2.3 switch=n enabled=y phases=3 Linecode=3P_UG_AL_4/0_15_0_416_0_3_3_3_3

New Line.l(r:p4udt17418lv-p4ulv31570) Units=km Length=0.0158333 bus1=p4udt17418lv.1.2.3 bus2=p4ulv31570.1.2.3 switch=n enabled=y phases=3 Linecode=3P_UG_AL_4/0_15_0_416_0_3_3_3_3

New Line.l(r:p4udt17418-p4udt18660) Units=km Length=0.18489600000000003 bus1=p4udt18660.1.2.3 bus2=p4udt17418.1.2.3 switch=n enabled=y phases=3 Linecode=3P_OH_AL_ACSR_4/0_Penguin_12_47_0_3_3_3_3

New Line.l(r:p4udt18660-p4udt21782) Units=km Length=0.255904 bus1=p4udt21782.1.2.3 bus2=p4udt18660.1.2.3 switch=n enabled=y phases=3 Linecode=3P_OH_AL_ACSR_4/0_Penguin_12_47_0_3_3_3_3

New Line.l(r:p4udt15551-p4udt21782)_s0 Units=km Length=0.162377 bus1=p4udt15551.1.2.3 bus2=p4udt15551-p4udt21782x.1.2.3 switch=n enabled=y phases=3 Linecode=3P_OH_AL_ACSR_4/0_Penguin_12_47_0_3_3_3_3

New Line.l(r:p4udt15551-p4udt21782)_s1 Units=km Length=0.00159325 bus1=p4udt15551-p4udt21782x.1.2.3 bus2=p4udt21782.1.2.3 switch=n enabled=y phases=3 Linecode=3P_OH_AL_ACSR_4/0_Penguin_12_47_0_3_3_3_3

New Line.l(r:p4udt15551-p4udt7566) Units=km Length=0.179307 bus1=p4udt7566.1.2.3 bus2=p4udt15551.1.2.3 switch=n enabled=y phases=3 Linecode=3P_OH_AL_ACSR_4/0_Penguin_12_47_0_3_3_3_3

New Line.l(r:p4udt18662lv-p4ulv29893) Units=km Length=0.001 bus1=p4udt18662lv.1.2.3 bus2=p4ulv29893.1.2.3 switch=n enabled=y phases=3 Linecode=3P_UG_AL_4/0_15_0_416_0_3_3_3_3

New Line.l(r:p4udt18662-p4udt7566) Units=km Length=0.270624 bus1=p4udt7566.1.2.3 bus2=p4udt18662.1.2.3 switch=n enabled=y phases=3 Linecode=3P_OH_AL_ACSR_4/0_Penguin_12_47_0_3_3_3_3

New Line.l(r:p4udt20286-p4udt7566) Units=km Length=0.468239 bus1=p4udt20286.1.2.3 bus2=p4udt7566.1.2.3 switch=n enabled=y phases=3 Linecode=3P_OH_AL_ACSR_4/0_Penguin_12_47_0_3_3_3_3

New Line.l(r:p4udt20286-p4udt21162) Units=km Length=0.0490514 bus1=p4udt21162.1.2.3 bus2=p4udt20286.1.2.3 switch=n enabled=y phases=3 Linecode=3P_OH_AL_ACSR_4/0_Penguin_12_47_0_3_3_3_3

New Line.l(r:p4udt10144-p4udt11215) Units=km Length=0.672952 bus1=p4udt10144-p4udt11215x.1.2.3 bus2=p4udt10144.1.2.3 switch=n enabled=y phases=3 Linecode=3P_OH_AL_ACSR_1033kcmil_Curlew_12.47_1_3_3_3_3

New Line.elbswitch(r:p4udt118-p4udt14920)p4u_79535 Units=km Length=0.001 bus1=p4udt14920.1.2.3 bus2=p4udt118-p4udt14920x.1.2.3 switch=y enabled=n phases=3 Linecode=elbswitch_3_3_3_3

New Line.elbswitch(r:p4udt10144-p4udt11215)p4u_79558 Units=km Length=0.001 bus1=p4udt11215.1.2.3 bus2=p4udt10144-p4udt11215x.1.2.3 switch=y enabled=n phases=3 Linecode=elbswitch_3_3_3_3
