Clear

New Circuit.substation_p4uhs11_69 bus1=p4uhs11_69 pu=1.0 basekV=69.0 R1=1e-05 X1=1e-05 R0=1e-05 X0=1e-05

Redirect p4uhs11_1247--p4udt11208/Transformers.dss
Redirect Transformers.dss
Redirect p4uhs11_1247--p4udt10412/Transformers.dss
Redirect p4uhs11_1247--p4udt9291/Transformers.dss
Redirect p4uhs11_1247--p4udt20593/Transformers.dss
Redirect Regulators.dss
Redirect p4uhs11_1247--p4udt11208/Loads.dss
Redirect p4uhs11_1247--p4udt10412/Loads.dss
Redirect p4uhs11_1247--p4udt20593/Loads.dss
Redirect p4uhs11_1247--p4udt9291/Loads.dss
Redirect p4uhs11_1247--p4udt11208/LineCodes.dss
Redirect LineCodes.dss
Redirect p4uhs11_1247--p4udt10412/LineCodes.dss
Redirect p4uhs11_1247--p4udt9291/LineCodes.dss
Redirect p4uhs11_1247--p4udt20593/LineCodes.dss
Redirect p4uhs11_1247--p4udt11208/Lines.dss
Redirect Lines.dss
Redirect p4uhs11_1247--p4udt10412/Lines.dss
Redirect p4uhs11_1247--p4udt9291/Lines.dss
Redirect p4uhs11_1247--p4udt20593/Lines.dss
Redirect p4uhs11_1247--p4udt20593/Capacitors.dss
Redirect p4uhs11_1247--p4udt10412/Capacitors.dss
Redirect p4uhs11_1247--p4udt9291/Capacitors.dss

Set Voltagebases=[0.2080002494301389, 0.48, 7.199560000000001, 12.47, 69.0]

Calcvoltagebases

Buscoords Buscoords.dss

Solve
