New Line.l(r:p4udt953lv-p4ulv973) Units=km Length=0.0207878 bus1=p4udt953lv.1.2 bus2=p4ulv973.1.2 switch=n enabled=y phases=2 Linecode=1P_OH_AL_2/0_Rucina_0_416_0_2_2_2_2

New Line.l(r:p4udt953lv-p4ulv7667) Units=km Length=0.00703133 bus1=p4udt953lv.1.2 bus2=p4ulv7667.1.2 switch=n enabled=y phases=2 Linecode=1P_OH_AL_2/0_Rucina_0_416_0_2_2_2_2

New Line.l(r:p4udt953lv-p4ulv18046) Units=km Length=0.0264496 bus1=p4udt953lv.1.2 bus2=p4ulv18046.1.2 switch=n enabled=y phases=2 Linecode=1P_OH_AL_2/0_Rucina_0_416_0_2_2_2_2

New Line.l(r:p4udt953lv-p4ulv18858) Units=km Length=0.0362152 bus1=p4udt953lv.1.2 bus2=p4ulv18858.1.2 switch=n enabled=y phases=2 Linecode=1P_OH_AL_4/0_Zuzara_0_416_0_2_2_2_2

New Line.l(r:p4udt6957lv-p4ulv8099) Units=km Length=0.028945900000000004 bus1=p4udt6957lv.1.2 bus2=p4ulv8099.1.2 switch=n enabled=y phases=2 Linecode=1P_OH_AL_4/0_Zuzara_0_416_0_2_2_2_2

New Line.l(r:p4udt6957lv-p4ulv14555) Units=km Length=0.0247826 bus1=p4udt6957lv.1.2 bus2=p4ulv14555.1.2 switch=n enabled=y phases=2 Linecode=1P_OH_AL_2/0_Rucina_0_416_0_2_2_2_2

New Line.l(r:p4udt6957lv-p4ulv22308) Units=km Length=0.0663688 bus1=p4udt6957lv.1.2 bus2=p4ulv22308.1.2 switch=n enabled=y phases=2 Linecode=1P_OH_AL_4/0_Zuzara_0_416_0_2_2_2_2

New Line.l(r:p4udt6957lv-p4ulv40804) Units=km Length=0.0310017 bus1=p4udt6957lv.1.2 bus2=p4ulv40804.1.2 switch=n enabled=y phases=2 Linecode=1P_OH_AL_4/0_Zuzara_0_416_0_2_2_2_2

New Line.l(r:p4udt10135lv-p4ulv12817) Units=km Length=0.0394686 bus1=p4udt10135lv.1.2 bus2=p4ulv12817.1.2 switch=n enabled=y phases=2 Linecode=1P_OH_AL_4/0_Zuzara_0_416_0_2_2_2_2

New Line.l(r:p4udt10135lv-p4ulv14998) Units=km Length=0.0394686 bus1=p4udt10135lv.1.2 bus2=p4ulv14998.1.2 switch=n enabled=y phases=2 Linecode=1P_OH_AL_4/0_Zuzara_0_416_0_2_2_2_2

New Line.l(r:p4udm26315-p4ulv14556) Units=km Length=0.103609 bus1=p4udm26315.1.2 bus2=p4ulv14556.1.2 switch=n enabled=y phases=2 Linecode=1P_OH_AL_4/0_Zuzara_0_416_0_2_2_2_2

New Line.l(r:p4udm26315-p4udt11208lv) Units=km Length=0.0290214 bus1=p4udt11208lv.1.2 bus2=p4udm26315.1.2 switch=n enabled=y phases=2 Linecode=1P_OH_AL_4/0_Zuzara_0_416_0_2_2_2_2

New Line.l(r:p4udm26316-p4ulv27304) Units=km Length=0.0846004 bus1=p4udm26316.1.2 bus2=p4ulv27304.1.2 switch=n enabled=y phases=2 Linecode=1P_OH_AL_4/0_Zuzara_0_416_0_2_2_2_2

New Line.l(r:p4udm26316-p4ulv28152) Units=km Length=0.102449 bus1=p4udm26316.1.2 bus2=p4ulv28152.1.2 switch=n enabled=y phases=2 Linecode=1P_OH_AL_4/0_Zuzara_0_416_0_2_2_2_2

New Line.l(r:p4udm26316-p4udt11208lv) Units=km Length=0.012093600000000001 bus1=p4udt11208lv.1.2 bus2=p4udm26316.1.2 switch=n enabled=y phases=2 Linecode=1P_OH_AL_2/0_Rucina_0_416_0_2_2_2_2

New Line.l(r:p4udt14701lv-p4ulv21037) Units=km Length=0.0760403 bus1=p4udt14701lv.1.2 bus2=p4ulv21037.1.2 switch=n enabled=y phases=2 Linecode=1P_OH_AL_4/0_Zuzara_0_416_0_2_2_2_2

New Line.l(r:p4udt14701lv-p4ulv34109) Units=km Length=0.051431700000000004 bus1=p4udt14701lv.1.2 bus2=p4ulv34109.1.2 switch=n enabled=y phases=2 Linecode=1P_OH_AL_4/0_Zuzara_0_416_0_2_2_2_2

New Line.l(r:p4udt20592lv-p4ulv34937) Units=km Length=0.0166542 bus1=p4udt20592lv.1.2 bus2=p4ulv34937.1.2 switch=n enabled=y phases=2 Linecode=1P_OH_AL_2/0_Rucina_0_416_0_2_2_2_2

New Line.l(r:p4udt20592lv-p4ulv42878) Units=km Length=0.0166542 bus1=p4udt20592lv.1.2 bus2=p4ulv42878.1.2 switch=n enabled=y phases=2 Linecode=1P_OH_AL_2/0_Rucina_0_416_0_2_2_2_2

New Line.l(r:p4udt23064lv-p4ulv42021) Units=km Length=0.001 bus1=p4udt23064lv.1.2 bus2=p4ulv42021.1.2 switch=n enabled=y phases=2 Linecode=1P_OH_AL_4_Periwinkle_0_416_0_2_2_2_2

New Line.l(r:p4udt6957-p4udt953) Units=km Length=0.08304 bus1=p4udt953.3 bus2=p4udt6957.3 switch=n enabled=y phases=1 Linecode=1P_OH_AL_ACSR_#2_Sparrow_12_47_0_1_1_1_1

New Line.l(r:p4udt23064-p4udt953) Units=km Length=0.0653718 bus1=p4udt953.3 bus2=p4udt23064.3 switch=n enabled=y phases=1 Linecode=1P_OH_AL_ACSR_#2_Sparrow_12_47_0_1_1_1_1

New Line.l(r:p4udt11208-p4udt953) Units=km Length=0.407206 bus1=p4udt11208-p4udt953x.3 bus2=p4udt953.3 switch=n enabled=y phases=1 Linecode=1P_OH_AL_ACSR_#2_Sparrow_12_47_0_1_1_1_1

New Line.l(r:p4udt10135-p4udt20592) Units=km Length=0.0693803 bus1=p4udt10135.1 bus2=p4udt20592.1 switch=n enabled=y phases=1 Linecode=1P_OH_AL_ACSR_#2_Sparrow_12_47_0_1_1_1_1

New Line.l(r:p4udt10135-p4udt14701) Units=km Length=0.24209 bus1=p4udt14701.1 bus2=p4udt10135.1 switch=n enabled=y phases=1 Linecode=1P_OH_AL_ACSR_#2_Sparrow_12_47_0_1_1_1_1

New Line.l(r:p4udt11208-p4udt14701) Units=km Length=0.012093600000000001 bus1=p4udt11208-p4udt14701x.1 bus2=p4udt14701.1 switch=n enabled=y phases=1 Linecode=1P_OH_AL_ACSR_#2_Sparrow_12_47_0_1_1_1_1

New Line.l(r:p4udt11208-p4uhs11_1247) Units=km Length=0.129856 bus1=p4udt11208-p4uhs11_1247x.1.2.3 bus2=p4udt11208.1.2.3 switch=n enabled=y phases=3 Linecode=3P_OH_AL_ACSR_4/0_Penguin_12_47_0_3_3_3_3

New Line.fuse(r:p4udt11208-p4udt953)p4u_80701 Units=km Length=0.001 bus1=p4udt11208.3 bus2=p4udt11208-p4udt953x.3 switch=n enabled=y phases=1 Linecode=fuse_1_1_1_1

New Fuse.Fuse_fuse(r:p4udt11208-p4udt953)p4u_80701 monitoredobj=Line.fuse(r:p4udt11208-p4udt953)p4u_80701 enabled=y ratedcurrent=100.0

New Line.fuse(r:p4udt11208-p4udt14701)p4u_80702 Units=km Length=0.001 bus1=p4udt11208.1 bus2=p4udt11208-p4udt14701x.1 switch=n enabled=y phases=1 Linecode=fuse_1_6_1_1_1

New Fuse.Fuse_fuse(r:p4udt11208-p4udt14701)p4u_80702 monitoredobj=Line.fuse(r:p4udt11208-p4udt14701)p4u_80702 enabled=y ratedcurrent=100.0
