New Load.load_p4ulv19710 conn=wye bus1=p4ulv19710.1.2 kV=0.2080002494301389 Vminpu=0.8 Vmaxpu=1.2 model=1 kW=4.07004 kvar=0.8307064585474014 Phases=2

New Load.load_p4ulv20612 conn=wye bus1=p4ulv20612.1.2 kV=0.2080002494301389 Vminpu=0.8 Vmaxpu=1.2 model=1 kW=4.40004 kvar=0.8911613351670004 Phases=2

New Load.load_p4ulv34938 conn=wye bus1=p4ulv34938.1.2.3 kV=0.48 Vminpu=0.8 Vmaxpu=1.2 model=1 kW=36.3804 kvar=7.387355297329331 Phases=3
