New Line.l(r:p4udt114lv-p4ulv120)_s0 Units=km Length=0.001 bus1=p4udt114lv.1.2 bus2=p4udt114lv-p4ulv120x.1.2 switch=n enabled=y phases=2 Linecode=1P_OH_AL_4_Periwinkle_0_416_0_2_2_2_2

New Line.l(r:p4udt114lv-p4ulv120)_s1 Units=km Length=0.001 bus1=p4udt114lv-p4ulv120x.1.2 bus2=p4udt114lv-p4ulv120xx.1.2 switch=n enabled=y phases=2 Linecode=1P_OH_AL_4_Periwinkle_0_416_0_2_2_2_2

New Line.l(r:p4udt114lv-p4ulv120)_s2 Units=km Length=0.11132400000000002 bus1=p4udt114lv-p4ulv120xx.1.2 bus2=p4ulv120.1.2 switch=n enabled=y phases=2 Linecode=1P_OH_AL_4/0_Zuzara_0_416_0_2_2_2_2

New Line.l(r:p4udt114lv-p4ulv1401)_s0 Units=km Length=0.001 bus1=p4udt114lv.1.2 bus2=p4udt114lv-p4ulv1401x.1.2 switch=n enabled=y phases=2 Linecode=1P_OH_AL_4_Periwinkle_0_416_0_2_2_2_2

New Line.l(r:p4udt114lv-p4ulv1401)_s1 Units=km Length=0.001 bus1=p4udt114lv-p4ulv1401x.1.2 bus2=p4udt114lv-p4ulv1401xx.1.2 switch=n enabled=y phases=2 Linecode=1P_OH_AL_4_Periwinkle_0_416_0_2_2_2_2

New Line.l(r:p4udt114lv-p4ulv1401)_s2 Units=km Length=0.134496 bus1=p4udt114lv-p4ulv1401xx.1.2 bus2=p4ulv1401.1.2 switch=n enabled=y phases=2 Linecode=1P_OH_AL_4/0_Zuzara_0_416_0_2_2_2_2

New Line.l(r:p4udm285-p4ulv30746) Units=km Length=0.0926297 bus1=p4udm285.1.2 bus2=p4ulv30746.1.2 switch=n enabled=y phases=2 Linecode=1P_OH_AL_4/0_Zuzara_0_416_0_2_2_2_2

New Line.l(r:p4udm285-p4udt114lv)_s0 Units=km Length=0.183461 bus1=p4udt114lv.1.2 bus2=p4udm285-p4udt114lvxx.1.2 switch=n enabled=y phases=2 Linecode=1P_OH_AL_4/0_Zuzara_0_416_0_2_2_2_2

New Line.l(r:p4udm285-p4udt114lv)_s1 Units=km Length=0.102533 bus1=p4udm285-p4udt114lvxx.1.2 bus2=p4udm285-p4udt114lvx.1.2 switch=n enabled=y phases=2 Linecode=1P_OH_AL_4/0_Zuzara_0_416_0_2_2_2_2

New Line.l(r:p4udm285-p4udt114lv)_s2 Units=km Length=0.15851200000000001 bus1=p4udm285-p4udt114lvx.1.2 bus2=p4udm285.1.2 switch=n enabled=y phases=2 Linecode=1P_OH_AL_4/0_Zuzara_0_416_0_2_2_2_2

New Line.l(r:p4udt542lv-p4ulv552) Units=km Length=0.0414498 bus1=p4udt542lv.1.2 bus2=p4ulv552.1.2 switch=n enabled=y phases=2 Linecode=1P_OH_AL_4/0_Zuzara_0_416_0_2_2_2_2

New Line.l(r:p4udm2502-p4ulv945) Units=km Length=0.0466683 bus1=p4udm2502.1.2 bus2=p4ulv945.1.2 switch=n enabled=y phases=2 Linecode=1P_OH_AL_4/0_Zuzara_0_416_0_2_2_2_2

New Line.l(r:p4udm2502-p4udt925lv) Units=km Length=0.0308266 bus1=p4udt925lv.1.2 bus2=p4udm2502.1.2 switch=n enabled=y phases=2 Linecode=1P_OH_AL_4/0_Zuzara_0_416_0_2_2_2_2

New Line.l(r:p4udm2504-p4ulv39078) Units=km Length=0.0286501 bus1=p4udm2504.1.2 bus2=p4ulv39078.1.2 switch=n enabled=y phases=2 Linecode=1P_OH_AL_4/0_Zuzara_0_416_0_2_2_2_2

New Line.l(r:p4udm2503-p4ulv15404) Units=km Length=0.009555940000000002 bus1=p4udm2503.1.2 bus2=p4ulv15404.1.2 switch=n enabled=y phases=2 Linecode=1P_OH_AL_2/0_Rucina_0_416_0_2_2_2_2

New Line.l(r:p4udm2503-p4udm2504) Units=km Length=0.011772000000000001 bus1=p4udm2504.1.2 bus2=p4udm2503.1.2 switch=n enabled=y phases=2 Linecode=1P_OH_AL_2/0_Rucina_0_416_0_2_2_2_2

New Line.l(r:p4udm2504-p4udt925lv) Units=km Length=0.0151841 bus1=p4udt925lv.1.2 bus2=p4udm2504.1.2 switch=n enabled=y phases=2 Linecode=1P_OH_AL_2/0_Rucina_0_416_0_2_2_2_2

New Line.l(r:p4udt952lv-p4ulv972) Units=km Length=0.0683954 bus1=p4udt952lv.1.2 bus2=p4ulv972.1.2 switch=n enabled=y phases=2 Linecode=1P_OH_AL_4/0_Zuzara_0_416_0_2_2_2_2

New Line.l(r:p4udt952lv-p4ulv7226) Units=km Length=0.0683954 bus1=p4udt952lv.1.2 bus2=p4ulv7226.1.2 switch=n enabled=y phases=2 Linecode=1P_OH_AL_4/0_Zuzara_0_416_0_2_2_2_2

New Line.l(r:p4udt963lv-p4ulv38320) Units=km Length=0.0843662 bus1=p4udt963lv.1.2 bus2=p4ulv38320.1.2 switch=n enabled=y phases=2 Linecode=1P_OH_AL_4/0_Zuzara_0_416_0_2_2_2_2

New Line.l(r:p4udm2592-p4ulv984) Units=km Length=0.0456834 bus1=p4udm2592.1.2 bus2=p4ulv984.1.2 switch=n enabled=y phases=2 Linecode=1P_OH_AL_4/0_Zuzara_0_416_0_2_2_2_2

New Line.l(r:p4udm2592-p4udt963lv) Units=km Length=0.0093224 bus1=p4udt963lv.1.2 bus2=p4udm2592.1.2 switch=n enabled=y phases=2 Linecode=1P_OH_AL_2/0_Rucina_0_416_0_2_2_2_2

New Line.l(r:p4udt1325lv-p4ulv1372) Units=km Length=0.0175866 bus1=p4udt1325lv.1.2 bus2=p4ulv1372.1.2 switch=n enabled=y phases=2 Linecode=1P_OH_AL_2/0_Rucina_0_416_0_2_2_2_2

New Line.l(r:p4udt1325lv-p4ulv23489) Units=km Length=0.0175866 bus1=p4udt1325lv.1.2 bus2=p4ulv23489.1.2 switch=n enabled=y phases=2 Linecode=1P_OH_AL_2/0_Rucina_0_416_0_2_2_2_2

New Line.l(r:p4udt1350lv-p4ulv1400) Units=km Length=0.05375230000000001 bus1=p4udt1350lv.1.2 bus2=p4ulv1400.1.2 switch=n enabled=y phases=2 Linecode=1P_OH_AL_4/0_Zuzara_0_416_0_2_2_2_2

New Line.l(r:p4udt1350lv-p4ulv7673) Units=km Length=0.05375230000000001 bus1=p4udt1350lv.1.2 bus2=p4ulv7673.1.2 switch=n enabled=y phases=2 Linecode=1P_OH_AL_4/0_Zuzara_0_416_0_2_2_2_2

New Line.l(r:p4udt1351lv-p4ulv1402) Units=km Length=0.011328 bus1=p4udt1351lv.1.2 bus2=p4ulv1402.1.2 switch=n enabled=y phases=2 Linecode=1P_OH_AL_2/0_Rucina_0_416_0_2_2_2_2

New Line.l(r:p4udt1351lv-p4ulv6830) Units=km Length=0.0247353 bus1=p4udt1351lv.1.2 bus2=p4ulv6830.1.2 switch=n enabled=y phases=2 Linecode=1P_OH_AL_2/0_Rucina_0_416_0_2_2_2_2

New Line.l(r:p4udt1351lv-p4ulv38321) Units=km Length=0.0200552 bus1=p4udt1351lv.1.2 bus2=p4ulv38321.1.2 switch=n enabled=y phases=2 Linecode=1P_OH_AL_2/0_Rucina_0_416_0_2_2_2_2

New Line.l(r:p4udm3622-p4ulv1403) Units=km Length=0.0300387 bus1=p4udm3622.1.2 bus2=p4ulv1403.1.2 switch=n enabled=y phases=2 Linecode=1P_OH_AL_4/0_Zuzara_0_416_0_2_2_2_2

New Line.l(r:p4udm3622-p4udt1352lv) Units=km Length=0.012211500000000002 bus1=p4udt1352lv.1.2 bus2=p4udm3622.1.2 switch=n enabled=y phases=2 Linecode=1P_OH_AL_2/0_Rucina_0_416_0_2_2_2_2

New Line.l(r:p4udm3623-p4ulv23530) Units=km Length=0.0146771 bus1=p4udm3623.1.2 bus2=p4ulv23530.1.2 switch=n enabled=y phases=2 Linecode=1P_OH_AL_2/0_Rucina_0_416_0_2_2_2_2

New Line.l(r:p4udm3623-p4udt1352lv) Units=km Length=0.0122215 bus1=p4udt1352lv.1.2 bus2=p4udm3623.1.2 switch=n enabled=y phases=2 Linecode=1P_OH_AL_2/0_Rucina_0_416_0_2_2_2_2

New Line.l(r:p4udt1353lv-p4ulv1404) Units=km Length=0.0144091 bus1=p4udt1353lv.1.2 bus2=p4ulv1404.1.2 switch=n enabled=y phases=2 Linecode=1P_OH_AL_2/0_Rucina_0_416_0_2_2_2_2

New Line.l(r:p4udt1353lv-p4ulv6412) Units=km Length=0.0144091 bus1=p4udt1353lv.1.2 bus2=p4ulv6412.1.2 switch=n enabled=y phases=2 Linecode=1P_OH_AL_2/0_Rucina_0_416_0_2_2_2_2

New Line.l(r:p4udt1732lv-p4ulv1802) Units=km Length=0.001 bus1=p4udt1732lv.1.2 bus2=p4ulv1802.1.2 switch=n enabled=y phases=2 Linecode=1P_OH_AL_4_Periwinkle_0_416_0_2_2_2_2

New Line.l(r:p4udt1757lv-p4ulv1828) Units=km Length=0.0333708 bus1=p4udt1757lv.1.2 bus2=p4ulv1828.1.2 switch=n enabled=y phases=2 Linecode=1P_OH_AL_4/0_Zuzara_0_416_0_2_2_2_2

New Line.l(r:p4udt1757lv-p4ulv9812) Units=km Length=0.039013 bus1=p4udt1757lv.1.2 bus2=p4ulv9812.1.2 switch=n enabled=y phases=2 Linecode=1P_OH_AL_4/0_Zuzara_0_416_0_2_2_2_2

New Line.l(r:p4udt1757lv-p4ulv39956) Units=km Length=0.0371844 bus1=p4udt1757lv.1.2 bus2=p4ulv39956.1.2 switch=n enabled=y phases=2 Linecode=1P_OH_AL_4/0_Zuzara_0_416_0_2_2_2_2

New Line.l(r:p4udt1757lv-p4ulv43320) Units=km Length=0.0384347 bus1=p4udt1757lv.1.2 bus2=p4ulv43320.1.2 switch=n enabled=y phases=2 Linecode=1P_OH_AL_4/0_Zuzara_0_416_0_2_2_2_2

New Line.l(r:p4udt1758lv-p4ulv1829) Units=km Length=0.0451969 bus1=p4udt1758lv.1.2 bus2=p4ulv1829.1.2 switch=n enabled=y phases=2 Linecode=1P_OH_AL_4/0_Zuzara_0_416_0_2_2_2_2

New Line.l(r:p4udm4745-p4ulv3934) Units=km Length=0.0638139 bus1=p4udm4745.1.2 bus2=p4ulv3934.1.2 switch=n enabled=y phases=2 Linecode=1P_OH_AL_4/0_Zuzara_0_416_0_2_2_2_2

New Line.l(r:p4udm4745-p4udt1758lv) Units=km Length=0.0180345 bus1=p4udt1758lv.1.2 bus2=p4udm4745.1.2 switch=n enabled=y phases=2 Linecode=1P_OH_AL_2/0_Rucina_0_416_0_2_2_2_2

New Line.l(r:p4udt1759lv-p4ulv1830) Units=km Length=0.001 bus1=p4udt1759lv.1.2 bus2=p4ulv1830.1.2 switch=n enabled=y phases=2 Linecode=1P_OH_AL_4_Periwinkle_0_416_0_2_2_2_2

New Line.l(r:p4udt2093lv-p4ulv2191) Units=km Length=0.0375776 bus1=p4udt2093lv.1.2 bus2=p4ulv2191.1.2 switch=n enabled=y phases=2 Linecode=1P_OH_AL_4/0_Zuzara_0_416_0_2_2_2_2

New Line.l(r:p4udm5613-p4ulv36153) Units=km Length=0.0827818 bus1=p4udm5613.1.2 bus2=p4ulv36153.1.2 switch=n enabled=y phases=2 Linecode=1P_OH_AL_4/0_Zuzara_0_416_0_2_2_2_2

New Line.l(r:p4udm5613-p4udt2093lv) Units=km Length=0.017608900000000004 bus1=p4udt2093lv.1.2 bus2=p4udm5613.1.2 switch=n enabled=y phases=2 Linecode=1P_OH_AL_2/0_Rucina_0_416_0_2_2_2_2

New Line.l(r:p4udt2094lv-p4ulv2192) Units=km Length=0.0736721 bus1=p4udt2094lv.1.2 bus2=p4ulv2192.1.2 switch=n enabled=y phases=2 Linecode=1P_OH_AL_4/0_Zuzara_0_416_0_2_2_2_2

New Line.l(r:p4udt2127lv-p4ulv2227) Units=km Length=0.0174476 bus1=p4udt2127lv.1.2 bus2=p4ulv2227.1.2 switch=n enabled=y phases=2 Linecode=1P_OH_AL_2/0_Rucina_0_416_0_2_2_2_2

New Line.l(r:p4udt2127lv-p4ulv40360) Units=km Length=0.0174476 bus1=p4udt2127lv.1.2 bus2=p4ulv40360.1.2 switch=n enabled=y phases=2 Linecode=1P_OH_AL_2/0_Rucina_0_416_0_2_2_2_2

New Line.l(r:p4udt2496lv-p4ulv21901) Units=km Length=0.0942148 bus1=p4udt2496lv.1.2 bus2=p4ulv21901.1.2 switch=n enabled=y phases=2 Linecode=1P_OH_AL_4/0_Zuzara_0_416_0_2_2_2_2

New Line.l(r:p4udm6626-p4ulv2633) Units=km Length=0.0807139 bus1=p4udm6626.1.2 bus2=p4ulv2633.1.2 switch=n enabled=y phases=2 Linecode=1P_OH_AL_4/0_Zuzara_0_416_0_2_2_2_2

New Line.l(r:p4udm6626-p4udt2496lv) Units=km Length=0.0368339 bus1=p4udt2496lv.1.2 bus2=p4udm6626.1.2 switch=n enabled=y phases=2 Linecode=1P_OH_AL_4/0_Zuzara_0_416_0_2_2_2_2

New Line.l(r:p4udm6628-p4ulv29453) Units=km Length=0.0945267 bus1=p4udm6628.1.2 bus2=p4ulv29453.1.2 switch=n enabled=y phases=2 Linecode=1P_OH_AL_4/0_Zuzara_0_416_0_2_2_2_2

New Line.l(r:p4udm6629-p4ulv31155) Units=km Length=0.0988215 bus1=p4udm6629.1.2 bus2=p4ulv31155.1.2 switch=n enabled=y phases=2 Linecode=1P_OH_AL_4/0_Zuzara_0_416_0_2_2_2_2

New Line.l(r:p4udm6628-p4udm6629) Units=km Length=0.0193601 bus1=p4udm6628.1.2 bus2=p4udm6629.1.2 switch=n enabled=y phases=2 Linecode=1P_OH_AL_2/0_Rucina_0_416_0_2_2_2_2

New Line.l(r:p4udm6628-p4udt2496lv) Units=km Length=0.019353600000000002 bus1=p4udt2496lv.1.2 bus2=p4udm6628.1.2 switch=n enabled=y phases=2 Linecode=1P_OH_AL_2/0_Rucina_0_416_0_2_2_2_2

New Line.l(r:p4udt2886lv-p4ulv3078) Units=km Length=0.0244516 bus1=p4udt2886lv.1.2 bus2=p4ulv3078.1.2 switch=n enabled=y phases=2 Linecode=1P_OH_AL_2/0_Rucina_0_416_0_2_2_2_2

New Line.l(r:p4udt2886lv-p4ulv11927) Units=km Length=0.00418505 bus1=p4udt2886lv.1.2 bus2=p4ulv11927.1.2 switch=n enabled=y phases=2 Linecode=1P_OH_AL_2/0_Rucina_0_416_0_2_2_2_2

New Line.l(r:p4udt2886lv-p4ulv19287) Units=km Length=0.0174941 bus1=p4udt2886lv.1.2 bus2=p4ulv19287.1.2 switch=n enabled=y phases=2 Linecode=1P_OH_AL_2/0_Rucina_0_416_0_2_2_2_2

New Line.l(r:p4udt2886lv-p4ulv23528) Units=km Length=0.0336856 bus1=p4udt2886lv.1.2 bus2=p4ulv23528.1.2 switch=n enabled=y phases=2 Linecode=1P_OH_AL_4/0_Zuzara_0_416_0_2_2_2_2

New Line.l(r:p4udt2886lv-p4ulv25586) Units=km Length=0.07290570000000002 bus1=p4udt2886lv.1.2 bus2=p4ulv25586.1.2 switch=n enabled=y phases=2 Linecode=1P_OH_AL_4/0_Zuzara_0_416_0_2_2_2_2

New Line.l(r:p4udt2886lv-p4ulv33658) Units=km Length=0.106674 bus1=p4udt2886lv.1.2 bus2=p4ulv33658.1.2 switch=n enabled=y phases=2 Linecode=1P_OH_AL_4/0_Zuzara_0_416_0_2_2_2_2

New Line.l(r:p4udm7662-p4ulv3079) Units=km Length=0.0823449 bus1=p4udm7662.1.2 bus2=p4ulv3079.1.2 switch=n enabled=y phases=2 Linecode=1P_OH_AL_4/0_Zuzara_0_416_0_2_2_2_2

New Line.l(r:p4udm7662-p4ulv28613) Units=km Length=0.0727584 bus1=p4udm7662.1.2 bus2=p4ulv28613.1.2 switch=n enabled=y phases=2 Linecode=1P_OH_AL_4/0_Zuzara_0_416_0_2_2_2_2

New Line.l(r:p4udm7662-p4udt2887lv) Units=km Length=0.0197835 bus1=p4udt2887lv.1.2 bus2=p4udm7662.1.2 switch=n enabled=y phases=2 Linecode=1P_OH_AL_2/0_Rucina_0_416_0_2_2_2_2

New Line.l(r:p4udm7663-p4ulv25142) Units=km Length=0.0803946 bus1=p4udm7663.1.2 bus2=p4ulv25142.1.2 switch=n enabled=y phases=2 Linecode=1P_OH_AL_4/0_Zuzara_0_416_0_2_2_2_2

New Line.l(r:p4udm7663-p4udt2887lv) Units=km Length=0.01978 bus1=p4udt2887lv.1.2 bus2=p4udm7663.1.2 switch=n enabled=y phases=2 Linecode=1P_OH_AL_2/0_Rucina_0_416_0_2_2_2_2

New Line.l(r:p4udt3253lv-p4ulv3474) Units=km Length=0.009094920000000001 bus1=p4udt3253lv.1.2 bus2=p4ulv3474.1.2 switch=n enabled=y phases=2 Linecode=1P_OH_AL_2/0_Rucina_0_416_0_2_2_2_2

New Line.l(r:p4udt3253lv-p4ulv39112) Units=km Length=0.009094920000000001 bus1=p4udt3253lv.1.2 bus2=p4ulv39112.1.2 switch=n enabled=y phases=2 Linecode=1P_OH_AL_2/0_Rucina_0_416_0_2_2_2_2

New Line.l(r:p4udt3254lv-p4ulv3475) Units=km Length=0.10120800000000002 bus1=p4udt3254lv.1.2 bus2=p4ulv3475.1.2 switch=n enabled=y phases=2 Linecode=1P_OH_AL_4/0_Zuzara_0_416_0_2_2_2_2

New Line.l(r:p4udt3254lv-p4ulv3477) Units=km Length=0.0629067 bus1=p4udt3254lv.1.2 bus2=p4ulv3477.1.2 switch=n enabled=y phases=2 Linecode=1P_OH_AL_4/0_Zuzara_0_416_0_2_2_2_2

New Line.l(r:p4udt3254lv-p4ulv6829) Units=km Length=0.0219909 bus1=p4udt3254lv.1.2 bus2=p4ulv6829.1.2 switch=n enabled=y phases=2 Linecode=1P_OH_AL_2/0_Rucina_0_416_0_2_2_2_2

New Line.l(r:p4udt3254lv-p4ulv35772) Units=km Length=0.0590449 bus1=p4udt3254lv.1.2 bus2=p4ulv35772.1.2 switch=n enabled=y phases=2 Linecode=1P_OH_AL_4/0_Zuzara_0_416_0_2_2_2_2

New Line.l(r:p4udt3639lv-p4ulv3928) Units=km Length=0.0963453 bus1=p4udt3639lv.1.2 bus2=p4ulv3928.1.2 switch=n enabled=y phases=2 Linecode=1P_OH_AL_4/0_Zuzara_0_416_0_2_2_2_2

New Line.l(r:p4udt3643lv-p4ulv3932) Units=km Length=0.0163473 bus1=p4udt3643lv.1.2 bus2=p4ulv3932.1.2 switch=n enabled=y phases=2 Linecode=1P_OH_AL_2/0_Rucina_0_416_0_2_2_2_2

New Line.l(r:p4udt3643lv-p4ulv18473) Units=km Length=0.0163473 bus1=p4udt3643lv.1.2 bus2=p4ulv18473.1.2 switch=n enabled=y phases=2 Linecode=1P_OH_AL_2/0_Rucina_0_416_0_2_2_2_2

New Line.l(r:p4udt3644lv-p4ulv3933) Units=km Length=0.036613900000000005 bus1=p4udt3644lv.1.2 bus2=p4ulv3933.1.2 switch=n enabled=y phases=2 Linecode=1P_OH_AL_4/0_Zuzara_0_416_0_2_2_2_2

New Line.l(r:p4udt3644lv-p4ulv9811) Units=km Length=0.036613900000000005 bus1=p4udt3644lv.1.2 bus2=p4ulv9811.1.2 switch=n enabled=y phases=2 Linecode=1P_OH_AL_4/0_Zuzara_0_416_0_2_2_2_2

New Line.l(r:p4udt3977lv-p4ulv4311) Units=km Length=0.0797572 bus1=p4udt3977lv.1.2 bus2=p4ulv4311.1.2 switch=n enabled=y phases=2 Linecode=1P_OH_AL_4/0_Zuzara_0_416_0_2_2_2_2

New Line.l(r:p4udt3977lv-p4ulv32385) Units=km Length=0.012205300000000002 bus1=p4udt3977lv.1.2 bus2=p4ulv32385.1.2 switch=n enabled=y phases=2 Linecode=1P_OH_AL_2/0_Rucina_0_416_0_2_2_2_2

New Line.l(r:p4udt4285lv-p4ulv4683) Units=km Length=0.001 bus1=p4udt4285lv.1.2 bus2=p4ulv4683.1.2 switch=n enabled=y phases=2 Linecode=1P_OH_AL_4_Periwinkle_0_416_0_2_2_2_2

New Line.l(r:p4udt4286lv-p4ulv4684) Units=km Length=0.001 bus1=p4udt4286lv.1.2 bus2=p4ulv4684.1.2 switch=n enabled=y phases=2 Linecode=1P_OH_AL_4_Periwinkle_0_416_0_2_2_2_2

New Line.l(r:p4udt4637lv-p4ulv5113) Units=km Length=0.0206184 bus1=p4udt4637lv.1.2 bus2=p4ulv5113.1.2 switch=n enabled=y phases=2 Linecode=1P_OH_AL_2/0_Rucina_0_416_0_2_2_2_2

New Line.l(r:p4udt4637lv-p4ulv22291) Units=km Length=0.0206184 bus1=p4udt4637lv.1.2 bus2=p4ulv22291.1.2 switch=n enabled=y phases=2 Linecode=1P_OH_AL_2/0_Rucina_0_416_0_2_2_2_2

New Line.l(r:p4udt4663lv-p4ulv5141) Units=km Length=0.0293243 bus1=p4udt4663lv.1.2 bus2=p4ulv5141.1.2 switch=n enabled=y phases=2 Linecode=1P_OH_AL_4/0_Zuzara_0_416_0_2_2_2_2

New Line.l(r:p4udt4663lv-p4ulv21043) Units=km Length=0.0293243 bus1=p4udt4663lv.1.2 bus2=p4ulv21043.1.2 switch=n enabled=y phases=2 Linecode=1P_OH_AL_4/0_Zuzara_0_416_0_2_2_2_2

New Line.l(r:p4udt4999lv-p4ulv5561) Units=km Length=0.0488189 bus1=p4udt4999lv.1.2 bus2=p4ulv5561.1.2 switch=n enabled=y phases=2 Linecode=1P_OH_AL_4/0_Zuzara_0_416_0_2_2_2_2

New Line.l(r:p4udm12988-p4ulv15818) Units=km Length=0.0680273 bus1=p4udm12988.1.2 bus2=p4ulv15818.1.2 switch=n enabled=y phases=2 Linecode=1P_OH_AL_4/0_Zuzara_0_416_0_2_2_2_2

New Line.l(r:p4udm12988-p4udt4999lv) Units=km Length=0.0254206 bus1=p4udt4999lv.1.2 bus2=p4udm12988.1.2 switch=n enabled=y phases=2 Linecode=1P_OH_AL_2/0_Rucina_0_416_0_2_2_2_2

New Line.l(r:p4udm12989-p4ulv19664) Units=km Length=0.0567857 bus1=p4udm12989.1.2 bus2=p4ulv19664.1.2 switch=n enabled=y phases=2 Linecode=1P_OH_AL_4/0_Zuzara_0_416_0_2_2_2_2

New Line.l(r:p4udm12989-p4ulv27273) Units=km Length=0.0242128 bus1=p4udm12989.1.2 bus2=p4ulv27273.1.2 switch=n enabled=y phases=2 Linecode=1P_OH_AL_2/0_Rucina_0_416_0_2_2_2_2

New Line.l(r:p4udm12989-p4udt4999lv) Units=km Length=0.030594000000000003 bus1=p4udt4999lv.1.2 bus2=p4udm12989.1.2 switch=n enabled=y phases=2 Linecode=1P_OH_AL_4/0_Zuzara_0_416_0_2_2_2_2

New Line.l(r:p4udt5022lv-p4ulv5588) Units=km Length=0.001 bus1=p4udt5022lv.1.2 bus2=p4ulv5588.1.2 switch=n enabled=y phases=2 Linecode=1P_OH_AL_4_Periwinkle_0_416_0_2_2_2_2

New Line.l(r:p4udt5323lv-p4ulv5968) Units=km Length=0.0134587 bus1=p4udt5323lv.1.2 bus2=p4ulv5968.1.2 switch=n enabled=y phases=2 Linecode=1P_OH_AL_2/0_Rucina_0_416_0_2_2_2_2

New Line.l(r:p4udm13756-p4ulv25122) Units=km Length=0.0634464 bus1=p4udm13756.1.2 bus2=p4ulv25122.1.2 switch=n enabled=y phases=2 Linecode=1P_OH_AL_4/0_Zuzara_0_416_0_2_2_2_2

New Line.l(r:p4udm13756-p4udt5323lv) Units=km Length=0.0158996 bus1=p4udt5323lv.1.2 bus2=p4udm13756.1.2 switch=n enabled=y phases=2 Linecode=1P_OH_AL_2/0_Rucina_0_416_0_2_2_2_2

New Line.l(r:p4udt5324lv-p4ulv5969) Units=km Length=0.04408340000000001 bus1=p4udt5324lv.1.2 bus2=p4ulv5969.1.2 switch=n enabled=y phases=2 Linecode=1P_OH_AL_4/0_Zuzara_0_416_0_2_2_2_2

New Line.l(r:p4udt5324lv-p4ulv9335) Units=km Length=0.0183795 bus1=p4udt5324lv.1.2 bus2=p4ulv9335.1.2 switch=n enabled=y phases=2 Linecode=1P_OH_AL_2/0_Rucina_0_416_0_2_2_2_2

New Line.l(r:p4udt5680lv-p4ulv6410) Units=km Length=0.0280619 bus1=p4udt5680lv.1.2 bus2=p4ulv6410.1.2 switch=n enabled=y phases=2 Linecode=1P_OH_AL_4/0_Zuzara_0_416_0_2_2_2_2

New Line.l(r:p4udt5680lv-p4ulv9808) Units=km Length=0.0295703 bus1=p4udt5680lv.1.2 bus2=p4ulv9808.1.2 switch=n enabled=y phases=2 Linecode=1P_OH_AL_4/0_Zuzara_0_416_0_2_2_2_2

New Line.l(r:p4udt5680lv-p4ulv23140) Units=km Length=0.0101302 bus1=p4udt5680lv.1.2 bus2=p4ulv23140.1.2 switch=n enabled=y phases=2 Linecode=1P_OH_AL_2/0_Rucina_0_416_0_2_2_2_2

New Line.l(r:p4udt5681lv-p4ulv6411) Units=km Length=0.0121479 bus1=p4udt5681lv.1.2 bus2=p4ulv6411.1.2 switch=n enabled=y phases=2 Linecode=1P_OH_AL_2/0_Rucina_0_416_0_2_2_2_2

New Line.l(r:p4udt5681lv-p4ulv30318) Units=km Length=0.037219 bus1=p4udt5681lv.1.2 bus2=p4ulv30318.1.2 switch=n enabled=y phases=2 Linecode=1P_OH_AL_4/0_Zuzara_0_416_0_2_2_2_2

New Line.l(r:p4udt5681lv-p4ulv37878) Units=km Length=0.0313026 bus1=p4udt5681lv.1.2 bus2=p4ulv37878.1.2 switch=n enabled=y phases=2 Linecode=1P_OH_AL_4/0_Zuzara_0_416_0_2_2_2_2

New Line.l(r:p4udt6614lv-p4ulv7644) Units=km Length=0.0416445 bus1=p4udt6614lv.1.2 bus2=p4ulv7644.1.2 switch=n enabled=y phases=2 Linecode=1P_OH_AL_4/0_Zuzara_0_416_0_2_2_2_2

New Line.l(r:p4udt6614lv-p4ulv19665) Units=km Length=0.0416445 bus1=p4udt6614lv.1.2 bus2=p4ulv19665.1.2 switch=n enabled=y phases=2 Linecode=1P_OH_AL_4/0_Zuzara_0_416_0_2_2_2_2

New Line.l(r:p4udt6615lv-p4ulv7645) Units=km Length=0.0384254 bus1=p4udt6615lv.1.2 bus2=p4ulv7645.1.2 switch=n enabled=y phases=2 Linecode=1P_OH_AL_4/0_Zuzara_0_416_0_2_2_2_2

New Line.l(r:p4udt6639lv-p4ulv7672) Units=km Length=0.00334733 bus1=p4udt6639lv.1.2 bus2=p4ulv7672.1.2 switch=n enabled=y phases=2 Linecode=1P_OH_AL_4_Periwinkle_0_416_0_2_2_2_2

New Line.l(r:p4udt6639lv-p4ulv8107) Units=km Length=0.0542524 bus1=p4udt6639lv.1.2 bus2=p4ulv8107.1.2 switch=n enabled=y phases=2 Linecode=1P_OH_AL_4/0_Zuzara_0_416_0_2_2_2_2

New Line.l(r:p4udt6639lv-p4ulv11500) Units=km Length=0.0563016 bus1=p4udt6639lv.1.2 bus2=p4ulv11500.1.2 switch=n enabled=y phases=2 Linecode=1P_OH_AL_4/0_Zuzara_0_416_0_2_2_2_2

New Line.l(r:p4udt6936lv-p4ulv8070) Units=km Length=0.0099882 bus1=p4udt6936lv.1.2 bus2=p4ulv8070.1.2 switch=n enabled=y phases=2 Linecode=1P_OH_AL_2/0_Rucina_0_416_0_2_2_2_2

New Line.l(r:p4udt6936lv-p4ulv18027) Units=km Length=0.0099882 bus1=p4udt6936lv.1.2 bus2=p4ulv18027.1.2 switch=n enabled=y phases=2 Linecode=1P_OH_AL_2/0_Rucina_0_416_0_2_2_2_2

New Line.l(r:p4udt6937lv-p4ulv11471) Units=km Length=0.0225038 bus1=p4udt6937lv.1.2 bus2=p4ulv11471.1.2 switch=n enabled=y phases=2 Linecode=1P_OH_AL_2/0_Rucina_0_416_0_2_2_2_2

New Line.l(r:p4udm17511-p4ulv8071) Units=km Length=0.0088062 bus1=p4udm17511.1.2 bus2=p4ulv8071.1.2 switch=n enabled=y phases=2 Linecode=1P_OH_AL_2/0_Rucina_0_416_0_2_2_2_2

New Line.l(r:p4udm17511-p4udt6937lv) Units=km Length=0.04392820000000001 bus1=p4udt6937lv.1.2 bus2=p4udm17511.1.2 switch=n enabled=y phases=2 Linecode=1P_OH_AL_4/0_Zuzara_0_416_0_2_2_2_2

New Line.l(r:p4udt6964lv-p4ulv8106) Units=km Length=0.0259258 bus1=p4udt6964lv.1.2 bus2=p4ulv8106.1.2 switch=n enabled=y phases=2 Linecode=1P_OH_AL_2/0_Rucina_0_416_0_2_2_2_2

New Line.l(r:p4udt6964lv-p4ulv28160) Units=km Length=0.0219031 bus1=p4udt6964lv.1.2 bus2=p4ulv28160.1.2 switch=n enabled=y phases=2 Linecode=1P_OH_AL_2/0_Rucina_0_416_0_2_2_2_2

New Line.l(r:p4udt6964lv-p4ulv31996) Units=km Length=0.0118436 bus1=p4udt6964lv.1.2 bus2=p4ulv31996.1.2 switch=n enabled=y phases=2 Linecode=1P_OH_AL_2/0_Rucina_0_416_0_2_2_2_2

New Line.l(r:p4udm18915-p4ulv8940) Units=km Length=0.028766900000000005 bus1=p4udm18915.1.2 bus2=p4ulv8940.1.2 switch=n enabled=y phases=2 Linecode=1P_OH_AL_4/0_Zuzara_0_416_0_2_2_2_2

New Line.l(r:p4udm18915-p4udt7560lv) Units=km Length=0.014082200000000001 bus1=p4udt7560lv.1.2 bus2=p4udm18915.1.2 switch=n enabled=y phases=2 Linecode=1P_OH_AL_2/0_Rucina_0_416_0_2_2_2_2

New Line.l(r:p4udm18916-p4ulv43321) Units=km Length=0.047413 bus1=p4udm18916.1.2 bus2=p4ulv43321.1.2 switch=n enabled=y phases=2 Linecode=1P_OH_AL_4/0_Zuzara_0_416_0_2_2_2_2

New Line.l(r:p4udm18916-p4udt7560lv) Units=km Length=0.0189374 bus1=p4udt7560lv.1.2 bus2=p4udm18916.1.2 switch=n enabled=y phases=2 Linecode=1P_OH_AL_2/0_Rucina_0_416_0_2_2_2_2

New Line.l(r:p4udt7561lv-p4ulv8941) Units=km Length=0.0414175 bus1=p4udt7561lv.1.2 bus2=p4ulv8941.1.2 switch=n enabled=y phases=2 Linecode=1P_OH_AL_4/0_Zuzara_0_416_0_2_2_2_2

New Line.l(r:p4udm18918-p4ulv11501) Units=km Length=0.0521644 bus1=p4udm18918.1.2 bus2=p4ulv11501.1.2 switch=n enabled=y phases=2 Linecode=1P_OH_AL_4/0_Zuzara_0_416_0_2_2_2_2

New Line.l(r:p4udm18918-p4udt7561lv) Units=km Length=0.0130966 bus1=p4udt7561lv.1.2 bus2=p4udm18918.1.2 switch=n enabled=y phases=2 Linecode=1P_OH_AL_2/0_Rucina_0_416_0_2_2_2_2

New Line.l(r:p4udt7562lv-p4ulv8942) Units=km Length=0.0811685 bus1=p4udt7562lv.1.2 bus2=p4ulv8942.1.2 switch=n enabled=y phases=2 Linecode=1P_OH_AL_4/0_Zuzara_0_416_0_2_2_2_2

New Line.l(r:p4udt7841lv-p4ulv9334) Units=km Length=0.0716114 bus1=p4udt7841lv.1.2 bus2=p4ulv9334.1.2 switch=n enabled=y phases=2 Linecode=1P_OH_AL_4/0_Zuzara_0_416_0_2_2_2_2

New Line.l(r:p4udm19500-p4ulv22289) Units=km Length=0.0944477 bus1=p4udm19500.1.2 bus2=p4ulv22289.1.2 switch=n enabled=y phases=2 Linecode=1P_OH_AL_4/0_Zuzara_0_416_0_2_2_2_2

New Line.l(r:p4udm19500-p4udt7841lv) Units=km Length=0.005170150000000001 bus1=p4udt7841lv.1.2 bus2=p4udm19500.1.2 switch=n enabled=y phases=2 Linecode=1P_OH_AL_2/0_Rucina_0_416_0_2_2_2_2

New Line.l(r:p4udm19501-p4ulv37843) Units=km Length=0.0792107 bus1=p4udm19501.1.2 bus2=p4ulv37843.1.2 switch=n enabled=y phases=2 Linecode=1P_OH_AL_4/0_Zuzara_0_416_0_2_2_2_2

New Line.l(r:p4udm19501-p4udt7841lv) Units=km Length=0.00657634 bus1=p4udt7841lv.1.2 bus2=p4udm19501.1.2 switch=n enabled=y phases=2 Linecode=1P_OH_AL_2/0_Rucina_0_416_0_2_2_2_2

New Line.l(r:p4udt7842lv-p4ulv9336) Units=km Length=0.0521299 bus1=p4udt7842lv.1.2 bus2=p4ulv9336.1.2 switch=n enabled=y phases=2 Linecode=1P_OH_AL_4/0_Zuzara_0_416_0_2_2_2_2

New Line.l(r:p4udt7865lv-p4ulv9366) Units=km Length=0.0628915 bus1=p4udt7865lv.1.2 bus2=p4ulv9366.1.2 switch=n enabled=y phases=2 Linecode=1P_OH_AL_4/0_Zuzara_0_416_0_2_2_2_2

New Line.l(r:p4udt7866lv-p4ulv21458) Units=km Length=0.0404811 bus1=p4udt7866lv.1.2 bus2=p4ulv21458.1.2 switch=n enabled=y phases=2 Linecode=1P_OH_AL_4/0_Zuzara_0_416_0_2_2_2_2

New Line.l(r:p4udm19546-p4ulv9367) Units=km Length=0.0700741 bus1=p4udm19546.1.2 bus2=p4ulv9367.1.2 switch=n enabled=y phases=2 Linecode=1P_OH_AL_4/0_Zuzara_0_416_0_2_2_2_2

New Line.l(r:p4udm19546-p4udt7866lv) Units=km Length=0.0175239 bus1=p4udt7866lv.1.2 bus2=p4udm19546.1.2 switch=n enabled=y phases=2 Linecode=1P_OH_AL_2/0_Rucina_0_416_0_2_2_2_2

New Line.l(r:p4udt8153lv-p4ulv9781) Units=km Length=0.0730014 bus1=p4udt8153lv.1.2 bus2=p4ulv9781.1.2 switch=n enabled=y phases=2 Linecode=1P_OH_AL_4/0_Zuzara_0_416_0_2_2_2_2

New Line.l(r:p4udt8153lv-p4ulv14115) Units=km Length=0.0350464 bus1=p4udt8153lv.1.2 bus2=p4ulv14115.1.2 switch=n enabled=y phases=2 Linecode=1P_OH_AL_4/0_Zuzara_0_416_0_2_2_2_2

New Line.l(r:p4udt8174lv-p4ulv9807) Units=km Length=0.001 bus1=p4udt8174lv.1.2 bus2=p4ulv9807.1.2 switch=n enabled=y phases=2 Linecode=1P_OH_AL_4_Periwinkle_0_416_0_2_2_2_2

New Line.l(r:p4udt8175lv-p4ulv9809) Units=km Length=0.05233360000000001 bus1=p4udt8175lv.1.2 bus2=p4ulv9809.1.2 switch=n enabled=y phases=2 Linecode=1P_OH_AL_4/0_Zuzara_0_416_0_2_2_2_2

New Line.l(r:p4udt8175lv-p4ulv27311) Units=km Length=0.0505773 bus1=p4udt8175lv.1.2 bus2=p4ulv27311.1.2 switch=n enabled=y phases=2 Linecode=1P_OH_AL_4/0_Zuzara_0_416_0_2_2_2_2

New Line.l(r:p4udt8175lv-p4ulv28614) Units=km Length=0.0528379 bus1=p4udt8175lv.1.2 bus2=p4ulv28614.1.2 switch=n enabled=y phases=2 Linecode=1P_OH_AL_4/0_Zuzara_0_416_0_2_2_2_2

New Line.l(r:p4udt8175lv-p4ulv32405) Units=km Length=0.0476302 bus1=p4udt8175lv.1.2 bus2=p4ulv32405.1.2 switch=n enabled=y phases=2 Linecode=1P_OH_AL_4/0_Zuzara_0_416_0_2_2_2_2

New Line.l(r:p4udt8176lv-p4ulv9810) Units=km Length=0.001 bus1=p4udt8176lv.1.2 bus2=p4ulv9810.1.2 switch=n enabled=y phases=2 Linecode=1P_OH_AL_4_Periwinkle_0_416_0_2_2_2_2

New Line.l(r:p4udt8439lv-p4ulv10205) Units=km Length=0.0706934 bus1=p4udt8439lv.1.2 bus2=p4ulv10205.1.2 switch=n enabled=y phases=2 Linecode=1P_OH_AL_4/0_Zuzara_0_416_0_2_2_2_2

New Line.l(r:p4udt8439lv-p4ulv18439) Units=km Length=0.0795375 bus1=p4udt8439lv.1.2 bus2=p4ulv18439.1.2 switch=n enabled=y phases=2 Linecode=1P_OH_AL_4/0_Zuzara_0_416_0_2_2_2_2

New Line.l(r:p4udt8439lv-p4ulv39503) Units=km Length=0.0365554 bus1=p4udt8439lv.1.2 bus2=p4ulv39503.1.2 switch=n enabled=y phases=2 Linecode=1P_OH_AL_4/0_Zuzara_0_416_0_2_2_2_2

New Line.l(r:p4udm20799-p4ulv18028) Units=km Length=0.0600109 bus1=p4udm20799.1.2 bus2=p4ulv18028.1.2 switch=n enabled=y phases=2 Linecode=1P_OH_AL_4/0_Zuzara_0_416_0_2_2_2_2

New Line.l(r:p4udm20799-p4udt8439lv) Units=km Length=0.0204447 bus1=p4udt8439lv.1.2 bus2=p4udm20799.1.2 switch=n enabled=y phases=2 Linecode=1P_OH_AL_2/0_Rucina_0_416_0_2_2_2_2

New Line.l(r:p4udm20801-p4ulv32384) Units=km Length=0.06855230000000001 bus1=p4udm20801.1.2 bus2=p4ulv32384.1.2 switch=n enabled=y phases=2 Linecode=1P_OH_AL_4/0_Zuzara_0_416_0_2_2_2_2

New Line.l(r:p4udm20801-p4ulv33639) Units=km Length=0.07319000000000002 bus1=p4udm20801.1.2 bus2=p4ulv33639.1.2 switch=n enabled=y phases=2 Linecode=1P_OH_AL_4/0_Zuzara_0_416_0_2_2_2_2

New Line.l(r:p4udm20801-p4udt8439lv) Units=km Length=0.019954 bus1=p4udt8439lv.1.2 bus2=p4udm20801.1.2 switch=n enabled=y phases=2 Linecode=1P_OH_AL_2/0_Rucina_0_416_0_2_2_2_2

New Line.l(r:p4udt8726lv-p4ulv10617) Units=km Length=0.038616300000000006 bus1=p4udt8726lv.1.2 bus2=p4ulv10617.1.2 switch=n enabled=y phases=2 Linecode=1P_OH_AL_4/0_Zuzara_0_416_0_2_2_2_2

New Line.l(r:p4udt8745lv-p4ulv10648) Units=km Length=0.001 bus1=p4udt8745lv.1.2 bus2=p4ulv10648.1.2 switch=n enabled=y phases=2 Linecode=1P_OH_AL_4_Periwinkle_0_416_0_2_2_2_2

New Line.l(r:p4udt8746lv-p4ulv10649) Units=km Length=0.001 bus1=p4udt8746lv.1.2 bus2=p4ulv10649.1.2 switch=n enabled=y phases=2 Linecode=1P_OH_AL_4_Periwinkle_0_416_0_2_2_2_2

New Line.l(r:p4udm22011-p4ulv11066) Units=km Length=0.1227 bus1=p4udm22011.1.2 bus2=p4ulv11066.1.2 switch=n enabled=y phases=2 Linecode=1P_OH_AL_4/0_Zuzara_0_416_0_2_2_2_2

New Line.l(r:p4udm22011-p4udt9021lv) Units=km Length=0.0186506 bus1=p4udt9021lv.1.2 bus2=p4udm22011.1.2 switch=n enabled=y phases=2 Linecode=1P_OH_AL_2/0_Rucina_0_416_0_2_2_2_2

New Line.l(r:p4udm22012-p4ulv15005) Units=km Length=0.0542048 bus1=p4udm22012.1.2 bus2=p4ulv15005.1.2 switch=n enabled=y phases=2 Linecode=1P_OH_AL_4/0_Zuzara_0_416_0_2_2_2_2

New Line.l(r:p4udm22012-p4udt9021lv) Units=km Length=0.0186405 bus1=p4udt9021lv.1.2 bus2=p4udm22012.1.2 switch=n enabled=y phases=2 Linecode=1P_OH_AL_2/0_Rucina_0_416_0_2_2_2_2

New Line.l(r:p4udt9291lv-p4ulv43310) Units=km Length=0.0755013 bus1=p4udt9291lv.1.2 bus2=p4ulv43310.1.2 switch=n enabled=y phases=2 Linecode=1P_OH_AL_4/0_Zuzara_0_416_0_2_2_2_2

New Line.l(r:p4udm22573-p4ulv11495) Units=km Length=0.11049 bus1=p4udm22573.1.2 bus2=p4ulv11495.1.2 switch=n enabled=y phases=2 Linecode=1P_OH_AL_4/0_Zuzara_0_416_0_2_2_2_2

New Line.l(r:p4udm22573-p4udt9291lv) Units=km Length=0.0192771 bus1=p4udt9291lv.1.2 bus2=p4udm22573.1.2 switch=n enabled=y phases=2 Linecode=1P_OH_AL_2/0_Rucina_0_416_0_2_2_2_2

New Line.l(r:p4udt9558lv-p4ulv11894) Units=km Length=0.060435 bus1=p4udt9558lv.1.2 bus2=p4ulv11894.1.2 switch=n enabled=y phases=2 Linecode=1P_OH_AL_4/0_Zuzara_0_416_0_2_2_2_2

New Line.l(r:p4udt9558lv-p4ulv26396) Units=km Length=0.060435 bus1=p4udt9558lv.1.2 bus2=p4ulv26396.1.2 switch=n enabled=y phases=2 Linecode=1P_OH_AL_4/0_Zuzara_0_416_0_2_2_2_2

New Line.l(r:p4udt9559lv-p4ulv11895) Units=km Length=0.0626983 bus1=p4udt9559lv.1.2 bus2=p4ulv11895.1.2 switch=n enabled=y phases=2 Linecode=1P_OH_AL_4/0_Zuzara_0_416_0_2_2_2_2

New Line.l(r:p4udt9560lv-p4ulv11896) Units=km Length=0.0866433 bus1=p4udt9560lv.1.2 bus2=p4ulv11896.1.2 switch=n enabled=y phases=2 Linecode=1P_OH_AL_4/0_Zuzara_0_416_0_2_2_2_2

New Line.l(r:p4udt9560lv-p4ulv17143) Units=km Length=0.0268092 bus1=p4udt9560lv.1.2 bus2=p4ulv17143.1.2 switch=n enabled=y phases=2 Linecode=1P_OH_AL_2/0_Rucina_0_416_0_2_2_2_2

New Line.l(r:p4udt9560lv-p4ulv17585) Units=km Length=0.0614219 bus1=p4udt9560lv.1.2 bus2=p4ulv17585.1.2 switch=n enabled=y phases=2 Linecode=1P_OH_AL_4/0_Zuzara_0_416_0_2_2_2_2

New Line.l(r:p4udt9584lv-p4ulv11928) Units=km Length=0.0169555 bus1=p4udt9584lv.1.2 bus2=p4ulv11928.1.2 switch=n enabled=y phases=2 Linecode=1P_OH_AL_2/0_Rucina_0_416_0_2_2_2_2

New Line.l(r:p4udt9584lv-p4ulv36607) Units=km Length=0.0169555 bus1=p4udt9584lv.1.2 bus2=p4ulv36607.1.2 switch=n enabled=y phases=2 Linecode=1P_OH_AL_2/0_Rucina_0_416_0_2_2_2_2

New Line.l(r:p4udm23166-p4ulv11929) Units=km Length=0.0464244 bus1=p4udm23166.1.2 bus2=p4ulv11929.1.2 switch=n enabled=y phases=2 Linecode=1P_OH_AL_4/0_Zuzara_0_416_0_2_2_2_2

New Line.l(r:p4udm23166-p4udt9585lv) Units=km Length=0.0168778 bus1=p4udt9585lv.1.2 bus2=p4udm23166.1.2 switch=n enabled=y phases=2 Linecode=1P_OH_AL_2/0_Rucina_0_416_0_2_2_2_2

New Line.l(r:p4udm23167-p4ulv30747) Units=km Length=0.0360505 bus1=p4udm23167.1.2 bus2=p4ulv30747.1.2 switch=n enabled=y phases=2 Linecode=1P_OH_AL_4/0_Zuzara_0_416_0_2_2_2_2

New Line.l(r:p4udm23167-p4udt9585lv) Units=km Length=0.0168778 bus1=p4udt9585lv.1.2 bus2=p4udm23167.1.2 switch=n enabled=y phases=2 Linecode=1P_OH_AL_2/0_Rucina_0_416_0_2_2_2_2

New Line.l(r:p4udt9853lv-p4ulv12359) Units=km Length=0.0555531 bus1=p4udt9853lv.1.2 bus2=p4ulv12359.1.2 switch=n enabled=y phases=2 Linecode=1P_OH_AL_4/0_Zuzara_0_416_0_2_2_2_2

New Line.l(r:p4udt9853lv-p4ulv21006) Units=km Length=0.0555531 bus1=p4udt9853lv.1.2 bus2=p4ulv21006.1.2 switch=n enabled=y phases=2 Linecode=1P_OH_AL_4/0_Zuzara_0_416_0_2_2_2_2

New Line.l(r:p4udt9854lv-p4ulv12360) Units=km Length=0.08961810000000002 bus1=p4udt9854lv.1.2 bus2=p4ulv12360.1.2 switch=n enabled=y phases=2 Linecode=1P_OH_AL_4/0_Zuzara_0_416_0_2_2_2_2

New Line.l(r:p4udt10118lv-p4ulv12794) Units=km Length=0.09873740000000002 bus1=p4udt10118lv.1.2 bus2=p4ulv12794.1.2 switch=n enabled=y phases=2 Linecode=1P_OH_AL_4/0_Zuzara_0_416_0_2_2_2_2

New Line.l(r:p4udt10390lv-p4ulv13232) Units=km Length=0.0769365 bus1=p4udt10390lv.1.2 bus2=p4ulv13232.1.2 switch=n enabled=y phases=2 Linecode=1P_OH_AL_4/0_Zuzara_0_416_0_2_2_2_2

New Line.l(r:p4udm24766-p4ulv13233) Units=km Length=0.0297439 bus1=p4udm24766.1.2 bus2=p4ulv13233.1.2 switch=n enabled=y phases=2 Linecode=1P_OH_AL_4/0_Zuzara_0_416_0_2_2_2_2

New Line.l(r:p4udm24767-p4ulv35743) Units=km Length=0.0035618 bus1=p4udm24767.1.2 bus2=p4ulv35743.1.2 switch=n enabled=y phases=2 Linecode=1P_OH_AL_4_Periwinkle_0_416_0_2_2_2_2

New Line.l(r:p4udm24766-p4udm24767) Units=km Length=0.05620000000000001 bus1=p4udm24766.1.2 bus2=p4udm24767.1.2 switch=n enabled=y phases=2 Linecode=1P_OH_AL_4/0_Zuzara_0_416_0_2_2_2_2

New Line.l(r:p4udm24766-p4udt10391lv) Units=km Length=0.0142941 bus1=p4udt10391lv.1.2 bus2=p4udm24766.1.2 switch=n enabled=y phases=2 Linecode=1P_OH_AL_2/0_Rucina_0_416_0_2_2_2_2

New Line.l(r:p4udt10417lv-p4ulv13271) Units=km Length=0.00807001 bus1=p4udt10417lv.1.2 bus2=p4ulv13271.1.2 switch=n enabled=y phases=2 Linecode=1P_OH_AL_2/0_Rucina_0_416_0_2_2_2_2

New Line.l(r:p4udt10417lv-p4ulv38319) Units=km Length=0.00807001 bus1=p4udt10417lv.1.2 bus2=p4ulv38319.1.2 switch=n enabled=y phases=2 Linecode=1P_OH_AL_2/0_Rucina_0_416_0_2_2_2_2

New Line.l(r:p4udt10418lv-p4ulv13272) Units=km Length=0.014178800000000002 bus1=p4udt10418lv.1.2 bus2=p4ulv13272.1.2 switch=n enabled=y phases=2 Linecode=1P_OH_AL_2/0_Rucina_0_416_0_2_2_2_2

New Line.l(r:p4udt10418lv-p4ulv33659) Units=km Length=0.014178800000000002 bus1=p4udt10418lv.1.2 bus2=p4ulv33659.1.2 switch=n enabled=y phases=2 Linecode=1P_OH_AL_2/0_Rucina_0_416_0_2_2_2_2

New Line.l(r:p4udt10658lv-p4ulv13657) Units=km Length=0.0205072 bus1=p4udt10658lv.1.2 bus2=p4ulv13657.1.2 switch=n enabled=y phases=2 Linecode=1P_OH_AL_2/0_Rucina_0_416_0_2_2_2_2

New Line.l(r:p4udt10659lv-p4ulv13658) Units=km Length=0.0381923 bus1=p4udt10659lv.1.2 bus2=p4ulv13658.1.2 switch=n enabled=y phases=2 Linecode=1P_OH_AL_4/0_Zuzara_0_416_0_2_2_2_2

New Line.l(r:p4udt10682lv-p4ulv13685) Units=km Length=0.0359416 bus1=p4udt10682lv.1.2 bus2=p4ulv13685.1.2 switch=n enabled=y phases=2 Linecode=1P_OH_AL_4/0_Zuzara_0_416_0_2_2_2_2

New Line.l(r:p4udt10682lv-p4ulv29452) Units=km Length=0.0359416 bus1=p4udt10682lv.1.2 bus2=p4ulv29452.1.2 switch=n enabled=y phases=2 Linecode=1P_OH_AL_4/0_Zuzara_0_416_0_2_2_2_2

New Line.l(r:p4udt10683lv-p4ulv13686) Units=km Length=0.0917372 bus1=p4udt10683lv.1.2 bus2=p4ulv13686.1.2 switch=n enabled=y phases=2 Linecode=1P_OH_AL_4/0_Zuzara_0_416_0_2_2_2_2

New Line.l(r:p4udt10963lv-p4ulv14140) Units=km Length=0.0283494 bus1=p4udt10963lv.1.2 bus2=p4ulv14140.1.2 switch=n enabled=y phases=2 Linecode=1P_OH_AL_4/0_Zuzara_0_416_0_2_2_2_2

New Line.l(r:p4udt11187lv-p4ulv22699) Units=km Length=0.0314408 bus1=p4udt11187lv.1.2 bus2=p4ulv22699.1.2 switch=n enabled=y phases=2 Linecode=1P_OH_AL_4/0_Zuzara_0_416_0_2_2_2_2

New Line.l(r:p4udm26282-p4ulv14527) Units=km Length=0.0331791 bus1=p4udm26282.1.2 bus2=p4ulv14527.1.2 switch=n enabled=y phases=2 Linecode=1P_OH_AL_4/0_Zuzara_0_416_0_2_2_2_2

New Line.l(r:p4udm26282-p4udt11187lv) Units=km Length=0.0128694 bus1=p4udt11187lv.1.2 bus2=p4udm26282.1.2 switch=n enabled=y phases=2 Linecode=1P_OH_AL_2/0_Rucina_0_416_0_2_2_2_2

New Line.l(r:p4udt11188lv-p4ulv14528) Units=km Length=0.0324355 bus1=p4udt11188lv.1.2 bus2=p4ulv14528.1.2 switch=n enabled=y phases=2 Linecode=1P_OH_AL_4/0_Zuzara_0_416_0_2_2_2_2

New Line.l(r:p4udt11488lv-p4ulv15006) Units=km Length=0.053521200000000005 bus1=p4udt11488lv.1.2 bus2=p4ulv15006.1.2 switch=n enabled=y phases=2 Linecode=1P_OH_AL_4/0_Zuzara_0_416_0_2_2_2_2

New Line.l(r:p4udt11729lv-p4ulv15425) Units=km Length=0.0394273 bus1=p4udt11729lv.1.2 bus2=p4ulv15425.1.2 switch=n enabled=y phases=2 Linecode=1P_OH_AL_4/0_Zuzara_0_416_0_2_2_2_2

New Line.l(r:p4udt11729lv-p4ulv23529) Units=km Length=0.0394273 bus1=p4udt11729lv.1.2 bus2=p4ulv23529.1.2 switch=n enabled=y phases=2 Linecode=1P_OH_AL_4/0_Zuzara_0_416_0_2_2_2_2

New Line.l(r:p4udt11733lv-p4ulv15430) Units=km Length=0.001 bus1=p4udt11733lv.1.2 bus2=p4ulv15430.1.2 switch=n enabled=y phases=2 Linecode=1P_OH_AL_4_Periwinkle_0_416_0_2_2_2_2

New Line.l(r:p4udt12204lv-p4ulv16251) Units=km Length=0.0325178 bus1=p4udt12204lv.1.2 bus2=p4ulv16251.1.2 switch=n enabled=y phases=2 Linecode=1P_OH_AL_4/0_Zuzara_0_416_0_2_2_2_2

New Line.l(r:p4udt12205lv-p4ulv16252) Units=km Length=0.0779111 bus1=p4udt12205lv.1.2 bus2=p4ulv16252.1.2 switch=n enabled=y phases=2 Linecode=1P_OH_AL_4/0_Zuzara_0_416_0_2_2_2_2

New Line.l(r:p4udt12226lv-p4ulv16288) Units=km Length=0.0222114 bus1=p4udt12226lv.1.2 bus2=p4ulv16288.1.2 switch=n enabled=y phases=2 Linecode=1P_OH_AL_2/0_Rucina_0_416_0_2_2_2_2

New Line.l(r:p4udt12696lv-p4ulv17142) Units=km Length=0.0452066 bus1=p4udt12696lv.1.2 bus2=p4ulv17142.1.2 switch=n enabled=y phases=2 Linecode=1P_OH_AL_4/0_Zuzara_0_416_0_2_2_2_2

New Line.l(r:p4udm28998-p4ulv34500) Units=km Length=0.0380567 bus1=p4udm28998.1.2 bus2=p4ulv34500.1.2 switch=n enabled=y phases=2 Linecode=1P_OH_AL_4/0_Zuzara_0_416_0_2_2_2_2

New Line.l(r:p4udm28998-p4udt12696lv) Units=km Length=0.0109515 bus1=p4udt12696lv.1.2 bus2=p4udm28998.1.2 switch=n enabled=y phases=2 Linecode=1P_OH_AL_2/0_Rucina_0_416_0_2_2_2_2

New Line.l(r:p4udm28999-p4ulv39502) Units=km Length=0.0300585 bus1=p4udm28999.1.2 bus2=p4ulv39502.1.2 switch=n enabled=y phases=2 Linecode=1P_OH_AL_4/0_Zuzara_0_416_0_2_2_2_2

New Line.l(r:p4udm28999-p4udt12696lv) Units=km Length=0.0126867 bus1=p4udt12696lv.1.2 bus2=p4udm28999.1.2 switch=n enabled=y phases=2 Linecode=1P_OH_AL_2/0_Rucina_0_416_0_2_2_2_2

New Line.l(r:p4udt12924lv-p4ulv17583) Units=km Length=0.0545895 bus1=p4udt12924lv.1.2 bus2=p4ulv17583.1.2 switch=n enabled=y phases=2 Linecode=1P_OH_AL_4/0_Zuzara_0_416_0_2_2_2_2

New Line.l(r:p4udt12925lv-p4ulv17584) Units=km Length=0.0512484 bus1=p4udt12925lv.1.2 bus2=p4ulv17584.1.2 switch=n enabled=y phases=2 Linecode=1P_OH_AL_4/0_Zuzara_0_416_0_2_2_2_2

New Line.l(r:p4udt12946lv-p4ulv17618) Units=km Length=0.001 bus1=p4udt12946lv.1.2 bus2=p4ulv17618.1.2 switch=n enabled=y phases=2 Linecode=1P_OH_AL_4_Periwinkle_0_416_0_2_2_2_2

New Line.l(r:p4udt13180lv-p4ulv18049) Units=km Length=0.001 bus1=p4udt13180lv.1.2 bus2=p4ulv18049.1.2 switch=n enabled=y phases=2 Linecode=1P_OH_AL_4_Periwinkle_0_416_0_2_2_2_2

New Line.l(r:p4udt13181lv-p4ulv18050) Units=km Length=0.058092500000000005 bus1=p4udt13181lv.1.2 bus2=p4ulv18050.1.2 switch=n enabled=y phases=2 Linecode=1P_OH_AL_4/0_Zuzara_0_416_0_2_2_2_2

New Line.l(r:p4udt13818lv-p4ulv19258) Units=km Length=0.001 bus1=p4udt13818lv.1.2 bus2=p4ulv19258.1.2 switch=n enabled=y phases=2 Linecode=1P_OH_AL_4_Periwinkle_0_416_0_2_2_2_2

New Line.l(r:p4udt14026lv-p4ulv19666) Units=km Length=0.0152773 bus1=p4udt14026lv.1.2 bus2=p4ulv19666.1.2 switch=n enabled=y phases=2 Linecode=1P_OH_AL_2/0_Rucina_0_416_0_2_2_2_2

New Line.l(r:p4udt14026lv-p4ulv28570) Units=km Length=0.0152773 bus1=p4udt14026lv.1.2 bus2=p4ulv28570.1.2 switch=n enabled=y phases=2 Linecode=1P_OH_AL_2/0_Rucina_0_416_0_2_2_2_2

New Line.l(r:p4udt14027lv-p4ulv19667) Units=km Length=0.0339171 bus1=p4udt14027lv.1.2 bus2=p4ulv19667.1.2 switch=n enabled=y phases=2 Linecode=1P_OH_AL_4/0_Zuzara_0_416_0_2_2_2_2

New Line.l(r:p4udt14058lv-p4ulv19709) Units=km Length=0.034285600000000006 bus1=p4udt14058lv.1.2 bus2=p4ulv19709.1.2 switch=n enabled=y phases=2 Linecode=1P_OH_AL_4/0_Zuzara_0_416_0_2_2_2_2

New Line.l(r:p4udm31292-p4ulv41231) Units=km Length=0.0167253 bus1=p4udm31292.1.2 bus2=p4ulv41231.1.2 switch=n enabled=y phases=2 Linecode=1P_OH_AL_2/0_Rucina_0_416_0_2_2_2_2

New Line.l(r:p4udm31292-p4udt14058lv) Units=km Length=0.0274201 bus1=p4udt14058lv.1.2 bus2=p4udm31292.1.2 switch=n enabled=y phases=2 Linecode=1P_OH_AL_4/0_Zuzara_0_416_0_2_2_2_2

New Line.l(r:p4udm31647-p4ulv20158) Units=km Length=0.0112048 bus1=p4udm31647.1.2 bus2=p4ulv20158.1.2 switch=n enabled=y phases=2 Linecode=1P_OH_AL_2/0_Rucina_0_416_0_2_2_2_2

New Line.l(r:p4udm31647-p4udt14277lv) Units=km Length=0.0198347 bus1=p4udt14277lv.1.2 bus2=p4udm31647.1.2 switch=n enabled=y phases=2 Linecode=1P_OH_AL_2/0_Rucina_0_416_0_2_2_2_2

New Line.l(r:p4udm31648-p4ulv32404) Units=km Length=0.00857982 bus1=p4udm31648.1.2 bus2=p4ulv32404.1.2 switch=n enabled=y phases=2 Linecode=1P_OH_AL_2/0_Rucina_0_416_0_2_2_2_2

New Line.l(r:p4udm31649-p4ulv38696) Units=km Length=0.020350000000000004 bus1=p4udm31649.1.2 bus2=p4ulv38696.1.2 switch=n enabled=y phases=2 Linecode=1P_OH_AL_2/0_Rucina_0_416_0_2_2_2_2

New Line.l(r:p4udm31648-p4udm31649) Units=km Length=0.0913527 bus1=p4udm31648.1.2 bus2=p4udm31649.1.2 switch=n enabled=y phases=2 Linecode=1P_OH_AL_4/0_Zuzara_0_416_0_2_2_2_2

New Line.l(r:p4udm31648-p4udt14277lv) Units=km Length=0.0396784 bus1=p4udt14277lv.1.2 bus2=p4udm31648.1.2 switch=n enabled=y phases=2 Linecode=1P_OH_AL_4/0_Zuzara_0_416_0_2_2_2_2

New Line.l(r:p4udt14278lv-p4ulv20159) Units=km Length=0.0712037 bus1=p4udt14278lv.1.2 bus2=p4ulv20159.1.2 switch=n enabled=y phases=2 Linecode=1P_OH_AL_4/0_Zuzara_0_416_0_2_2_2_2

New Line.l(r:p4udt14278lv-p4ulv27748) Units=km Length=0.122707 bus1=p4udt14278lv.1.2 bus2=p4ulv27748.1.2 switch=n enabled=y phases=2 Linecode=1P_OH_AL_4/0_Zuzara_0_416_0_2_2_2_2

New Line.l(r:p4udt14515lv-p4ulv20611) Units=km Length=0.001 bus1=p4udt14515lv.1.2 bus2=p4ulv20611.1.2 switch=n enabled=y phases=2 Linecode=1P_OH_AL_4_Periwinkle_0_416_0_2_2_2_2

New Line.l(r:p4udt14691lv-p4ulv21007) Units=km Length=0.0897498 bus1=p4udt14691lv.1.2 bus2=p4ulv21007.1.2 switch=n enabled=y phases=2 Linecode=1P_OH_AL_4/0_Zuzara_0_416_0_2_2_2_2

New Line.l(r:p4udt14706lv-p4ulv21042) Units=km Length=0.0318637 bus1=p4udt14706lv.1.2 bus2=p4ulv21042.1.2 switch=n enabled=y phases=2 Linecode=1P_OH_AL_4/0_Zuzara_0_416_0_2_2_2_2

New Line.l(r:p4udt15116lv-p4ulv21864) Units=km Length=0.001 bus1=p4udt15116lv.1.2 bus2=p4ulv21864.1.2 switch=n enabled=y phases=2 Linecode=1P_OH_AL_4_Periwinkle_0_416_0_2_2_2_2

New Line.l(r:p4udt15319lv-p4ulv22290) Units=km Length=0.001 bus1=p4udt15319lv.1.2 bus2=p4ulv22290.1.2 switch=n enabled=y phases=2 Linecode=1P_OH_AL_4_Periwinkle_0_416_0_2_2_2_2

New Line.l(r:p4udt15332lv-p4ulv22314) Units=km Length=0.016316900000000002 bus1=p4udt15332lv.1.2 bus2=p4ulv22314.1.2 switch=n enabled=y phases=2 Linecode=1P_OH_AL_2/0_Rucina_0_416_0_2_2_2_2

New Line.l(r:p4udt15332lv-p4ulv39533) Units=km Length=0.0204179 bus1=p4udt15332lv.1.2 bus2=p4ulv39533.1.2 switch=n enabled=y phases=2 Linecode=1P_OH_AL_2/0_Rucina_0_416_0_2_2_2_2

New Line.l(r:p4udt15332lv-p4ulv40358) Units=km Length=0.0139625 bus1=p4udt15332lv.1.2 bus2=p4ulv40358.1.2 switch=n enabled=y phases=2 Linecode=1P_OH_AL_2/0_Rucina_0_416_0_2_2_2_2

New Line.l(r:p4udt15333lv-p4ulv22315) Units=km Length=0.001 bus1=p4udt15333lv.1.2 bus2=p4ulv22315.1.2 switch=n enabled=y phases=2 Linecode=1P_OH_AL_4_Periwinkle_0_416_0_2_2_2_2

New Line.l(r:p4udt15334lv-p4ulv22316) Units=km Length=0.097065 bus1=p4udt15334lv.1.2 bus2=p4ulv22316.1.2 switch=n enabled=y phases=2 Linecode=1P_OH_AL_4/0_Zuzara_0_416_0_2_2_2_2

New Line.l(r:p4udt15532lv-p4ulv22700) Units=km Length=0.001 bus1=p4udt15532lv.1.2 bus2=p4ulv22700.1.2 switch=n enabled=y phases=2 Linecode=1P_OH_AL_4_Periwinkle_0_416_0_2_2_2_2

New Line.l(r:p4udt15728lv-p4ulv23110) Units=km Length=0.001 bus1=p4udt15728lv.1.2 bus2=p4ulv23110.1.2 switch=n enabled=y phases=2 Linecode=1P_OH_AL_4_Periwinkle_0_416_0_2_2_2_2

New Line.l(r:p4udt15729lv-p4ulv23111) Units=km Length=0.001 bus1=p4udt15729lv.1.2 bus2=p4ulv23111.1.2 switch=n enabled=y phases=2 Linecode=1P_OH_AL_4_Periwinkle_0_416_0_2_2_2_2

New Line.l(r:p4udt15744lv-p4ulv23139) Units=km Length=0.0526225 bus1=p4udt15744lv.1.2 bus2=p4ulv23139.1.2 switch=n enabled=y phases=2 Linecode=1P_OH_AL_4/0_Zuzara_0_416_0_2_2_2_2

New Line.l(r:p4udt15744lv-p4ulv25587) Units=km Length=0.018559800000000005 bus1=p4udt15744lv.1.2 bus2=p4ulv25587.1.2 switch=n enabled=y phases=2 Linecode=1P_OH_AL_2/0_Rucina_0_416_0_2_2_2_2

New Line.l(r:p4udt15744lv-p4ulv26888) Units=km Length=0.0579141 bus1=p4udt15744lv.1.2 bus2=p4ulv26888.1.2 switch=n enabled=y phases=2 Linecode=1P_OH_AL_4/0_Zuzara_0_416_0_2_2_2_2

New Line.l(r:p4udt15908lv-p4ulv23490) Units=km Length=0.0436301 bus1=p4udt15908lv.1.2 bus2=p4ulv23490.1.2 switch=n enabled=y phases=2 Linecode=1P_OH_AL_4/0_Zuzara_0_416_0_2_2_2_2

New Line.l(r:p4udt15924lv-p4ulv23531) Units=km Length=0.001 bus1=p4udt15924lv.1.2 bus2=p4ulv23531.1.2 switch=n enabled=y phases=2 Linecode=1P_OH_AL_4_Periwinkle_0_416_0_2_2_2_2

New Line.l(r:p4udt16269lv-p4ulv24299) Units=km Length=0.0641178 bus1=p4udt16269lv.1.2 bus2=p4ulv24299.1.2 switch=n enabled=y phases=2 Linecode=1P_OH_AL_4/0_Zuzara_0_416_0_2_2_2_2

New Line.l(r:p4udt16283lv-p4ulv34534) Units=km Length=0.0820315 bus1=p4udt16283lv.1.2 bus2=p4ulv34534.1.2 switch=n enabled=y phases=2 Linecode=1P_OH_AL_4/0_Zuzara_0_416_0_2_2_2_2

New Line.l(r:p4udm34731-p4ulv24324) Units=km Length=0.0669707 bus1=p4udm34731.1.2 bus2=p4ulv24324.1.2 switch=n enabled=y phases=2 Linecode=1P_OH_AL_4/0_Zuzara_0_416_0_2_2_2_2

New Line.l(r:p4udm34731-p4udt16283lv) Units=km Length=0.0175239 bus1=p4udt16283lv.1.2 bus2=p4udm34731.1.2 switch=n enabled=y phases=2 Linecode=1P_OH_AL_2/0_Rucina_0_416_0_2_2_2_2

New Line.l(r:p4udm34733-p4ulv39957) Units=km Length=0.0856795 bus1=p4udm34733.1.2 bus2=p4ulv39957.1.2 switch=n enabled=y phases=2 Linecode=1P_OH_AL_4/0_Zuzara_0_416_0_2_2_2_2

New Line.l(r:p4udm34733-p4udt16283lv) Units=km Length=0.0175183 bus1=p4udt16283lv.1.2 bus2=p4udm34733.1.2 switch=n enabled=y phases=2 Linecode=1P_OH_AL_2/0_Rucina_0_416_0_2_2_2_2

New Line.l(r:p4udt16471lv-p4ulv24732) Units=km Length=0.0702067 bus1=p4udt16471lv.1.2 bus2=p4ulv24732.1.2 switch=n enabled=y phases=2 Linecode=1P_OH_AL_4/0_Zuzara_0_416_0_2_2_2_2

New Line.l(r:p4udt16651lv-p4ulv25121) Units=km Length=0.0176936 bus1=p4udt16651lv.1.2 bus2=p4ulv25121.1.2 switch=n enabled=y phases=2 Linecode=1P_OH_AL_2/0_Rucina_0_416_0_2_2_2_2

New Line.l(r:p4udt16849lv-p4ulv25589) Units=km Length=0.001 bus1=p4udt16849lv.1.2 bus2=p4ulv25589.1.2 switch=n enabled=y phases=2 Linecode=1P_OH_AL_4_Periwinkle_0_416_0_2_2_2_2

New Line.l(r:p4udt17416lv-p4ulv26890) Units=km Length=0.0589401 bus1=p4udt17416lv.1.2 bus2=p4ulv26890.1.2 switch=n enabled=y phases=2 Linecode=1P_OH_AL_4/0_Zuzara_0_416_0_2_2_2_2

New Line.l(r:p4udt17575lv-p4ulv27272) Units=km Length=0.0757843 bus1=p4udt17575lv.1.2 bus2=p4ulv27272.1.2 switch=n enabled=y phases=2 Linecode=1P_OH_AL_4/0_Zuzara_0_416_0_2_2_2_2

New Line.l(r:p4udt17595lv-p4ulv27310) Units=km Length=0.00798076 bus1=p4udt17595lv.1.2 bus2=p4ulv27310.1.2 switch=n enabled=y phases=2 Linecode=1P_OH_AL_2/0_Rucina_0_416_0_2_2_2_2

New Line.l(r:p4udt17595lv-p4ulv28611) Units=km Length=0.00798076 bus1=p4udt17595lv.1.2 bus2=p4ulv28611.1.2 switch=n enabled=y phases=2 Linecode=1P_OH_AL_2/0_Rucina_0_416_0_2_2_2_2

New Line.l(r:p4udt17596lv-p4ulv27312) Units=km Length=0.0480361 bus1=p4udt17596lv.1.2 bus2=p4ulv27312.1.2 switch=n enabled=y phases=2 Linecode=1P_OH_AL_4/0_Zuzara_0_416_0_2_2_2_2

New Line.l(r:p4udt17596lv-p4ulv37879) Units=km Length=0.0480361 bus1=p4udt17596lv.1.2 bus2=p4ulv37879.1.2 switch=n enabled=y phases=2 Linecode=1P_OH_AL_4/0_Zuzara_0_416_0_2_2_2_2

New Line.l(r:p4udt18137lv-p4ulv28569) Units=km Length=0.0262158 bus1=p4udt18137lv.1.2 bus2=p4ulv28569.1.2 switch=n enabled=y phases=2 Linecode=1P_OH_AL_2/0_Rucina_0_416_0_2_2_2_2

New Line.l(r:p4udt18138lv-p4ulv28571) Units=km Length=0.0686763 bus1=p4udt18138lv.1.2 bus2=p4ulv28571.1.2 switch=n enabled=y phases=2 Linecode=1P_OH_AL_4/0_Zuzara_0_416_0_2_2_2_2

New Line.l(r:p4udm37316-p4ulv39931) Units=km Length=0.0456854 bus1=p4udm37316.1.2 bus2=p4ulv39931.1.2 switch=n enabled=y phases=2 Linecode=1P_OH_AL_4/0_Zuzara_0_416_0_2_2_2_2

New Line.l(r:p4udm37316-p4udt18138lv) Units=km Length=0.0139846 bus1=p4udt18138lv.1.2 bus2=p4udm37316.1.2 switch=n enabled=y phases=2 Linecode=1P_OH_AL_2/0_Rucina_0_416_0_2_2_2_2

New Line.l(r:p4udt18152lv-p4ulv28610) Units=km Length=0.0617873 bus1=p4udt18152lv.1.2 bus2=p4ulv28610.1.2 switch=n enabled=y phases=2 Linecode=1P_OH_AL_4/0_Zuzara_0_416_0_2_2_2_2

New Line.l(r:p4udt18153lv-p4ulv28612) Units=km Length=0.0608097 bus1=p4udt18153lv.1.2 bus2=p4ulv28612.1.2 switch=n enabled=y phases=2 Linecode=1P_OH_AL_4/0_Zuzara_0_416_0_2_2_2_2

New Line.l(r:p4udm37334-p4ulv40357) Units=km Length=0.0494803 bus1=p4udm37334.1.2 bus2=p4ulv40357.1.2 switch=n enabled=y phases=2 Linecode=1P_OH_AL_4/0_Zuzara_0_416_0_2_2_2_2

New Line.l(r:p4udm37334-p4udt18153lv) Units=km Length=0.109455 bus1=p4udt18153lv.1.2 bus2=p4udm37334.1.2 switch=n enabled=y phases=2 Linecode=1P_OH_AL_4/0_Zuzara_0_416_0_2_2_2_2

New Line.l(r:p4udt18294lv-p4ulv28981) Units=km Length=0.001 bus1=p4udt18294lv.1.2 bus2=p4ulv28981.1.2 switch=n enabled=y phases=2 Linecode=1P_OH_AL_4_Periwinkle_0_416_0_2_2_2_2

New Line.l(r:p4udt18310lv-p4ulv29009) Units=km Length=0.001 bus1=p4udt18310lv.1.2 bus2=p4ulv29009.1.2 switch=n enabled=y phases=2 Linecode=1P_OH_AL_4_Periwinkle_0_416_0_2_2_2_2

New Line.l(r:p4udt18475lv-p4ulv29451) Units=km Length=0.0198488 bus1=p4udt18475lv.1.2 bus2=p4ulv29451.1.2 switch=n enabled=y phases=2 Linecode=1P_OH_AL_2/0_Rucina_0_416_0_2_2_2_2

New Line.l(r:p4udt18475lv-p4ulv42885) Units=km Length=0.0198488 bus1=p4udt18475lv.1.2 bus2=p4ulv42885.1.2 switch=n enabled=y phases=2 Linecode=1P_OH_AL_2/0_Rucina_0_416_0_2_2_2_2

New Line.l(r:p4udt18988lv-p4ulv30713) Units=km Length=0.0868951 bus1=p4udt18988lv.1.2 bus2=p4ulv30713.1.2 switch=n enabled=y phases=2 Linecode=1P_OH_AL_4/0_Zuzara_0_416_0_2_2_2_2

New Line.l(r:p4udt18989lv-p4ulv30714) Units=km Length=0.07849400000000001 bus1=p4udt18989lv.1.2 bus2=p4ulv30714.1.2 switch=n enabled=y phases=2 Linecode=1P_OH_AL_4/0_Zuzara_0_416_0_2_2_2_2

New Line.l(r:p4udt18989lv-p4ulv39930) Units=km Length=0.0583989 bus1=p4udt18989lv.1.2 bus2=p4ulv39930.1.2 switch=n enabled=y phases=2 Linecode=1P_OH_AL_4/0_Zuzara_0_416_0_2_2_2_2

New Line.l(r:p4udt19154lv-p4ulv31119) Units=km Length=0.0313181 bus1=p4udt19154lv.1.2 bus2=p4ulv31119.1.2 switch=n enabled=y phases=2 Linecode=1P_OH_AL_4/0_Zuzara_0_416_0_2_2_2_2

New Line.l(r:p4udt19155lv-p4ulv31120) Units=km Length=0.0669362 bus1=p4udt19155lv.1.2 bus2=p4ulv31120.1.2 switch=n enabled=y phases=2 Linecode=1P_OH_AL_4/0_Zuzara_0_416_0_2_2_2_2

New Line.l(r:p4udt19155lv-p4ulv38667) Units=km Length=0.0820581 bus1=p4udt19155lv.1.2 bus2=p4ulv38667.1.2 switch=n enabled=y phases=2 Linecode=1P_OH_AL_4/0_Zuzara_0_416_0_2_2_2_2

New Line.l(r:p4udt19482lv-p4ulv39077) Units=km Length=0.05630600000000001 bus1=p4udt19482lv.1.2 bus2=p4ulv39077.1.2 switch=n enabled=y phases=2 Linecode=1P_OH_AL_4/0_Zuzara_0_416_0_2_2_2_2

New Line.l(r:p4udm38983-p4ulv31971) Units=km Length=0.05212700000000001 bus1=p4udm38983.1.2 bus2=p4ulv31971.1.2 switch=n enabled=y phases=2 Linecode=1P_OH_AL_4/0_Zuzara_0_416_0_2_2_2_2

New Line.l(r:p4udm38983-p4udt19482lv) Units=km Length=0.0187734 bus1=p4udt19482lv.1.2 bus2=p4udm38983.1.2 switch=n enabled=y phases=2 Linecode=1P_OH_AL_2/0_Rucina_0_416_0_2_2_2_2

New Line.l(r:p4udt19643lv-p4ulv32383) Units=km Length=0.001 bus1=p4udt19643lv.1.2 bus2=p4ulv32383.1.2 switch=n enabled=y phases=2 Linecode=1P_OH_AL_4_Periwinkle_0_416_0_2_2_2_2

New Line.l(r:p4udt19944lv-p4ulv33200) Units=km Length=0.0494433 bus1=p4udt19944lv.1.2 bus2=p4ulv33200.1.2 switch=n enabled=y phases=2 Linecode=1P_OH_AL_4/0_Zuzara_0_416_0_2_2_2_2

New Line.l(r:p4udt20283lv-p4ulv34117) Units=km Length=0.001 bus1=p4udt20283lv.1.2 bus2=p4ulv34117.1.2 switch=n enabled=y phases=2 Linecode=1P_OH_AL_4_Periwinkle_0_416_0_2_2_2_2

New Line.l(r:p4udt20284lv-p4ulv34118) Units=km Length=0.001 bus1=p4udt20284lv.1.2 bus2=p4ulv34118.1.2 switch=n enabled=y phases=2 Linecode=1P_OH_AL_4_Periwinkle_0_416_0_2_2_2_2

New Line.l(r:p4udt20426lv-p4ulv34499) Units=km Length=0.077328 bus1=p4udt20426lv.1.2 bus2=p4ulv34499.1.2 switch=n enabled=y phases=2 Linecode=1P_OH_AL_4/0_Zuzara_0_416_0_2_2_2_2

New Line.l(r:p4udt20447lv-p4ulv34533) Units=km Length=0.001 bus1=p4udt20447lv.1.2 bus2=p4ulv34533.1.2 switch=n enabled=y phases=2 Linecode=1P_OH_AL_4_Periwinkle_0_416_0_2_2_2_2

New Line.l(r:p4udt20722lv-p4ulv35333) Units=km Length=0.001 bus1=p4udt20722lv.1.2 bus2=p4ulv35333.1.2 switch=n enabled=y phases=2 Linecode=1P_OH_AL_4_Periwinkle_0_416_0_2_2_2_2

New Line.l(r:p4udt20723lv-p4ulv35334) Units=km Length=0.0577954 bus1=p4udt20723lv.1.2 bus2=p4ulv35334.1.2 switch=n enabled=y phases=2 Linecode=1P_OH_AL_4/0_Zuzara_0_416_0_2_2_2_2

New Line.l(r:p4udt21145lv-p4ulv36584) Units=km Length=0.001 bus1=p4udt21145lv.1.2 bus2=p4ulv36584.1.2 switch=n enabled=y phases=2 Linecode=1P_OH_AL_4_Periwinkle_0_416_0_2_2_2_2

New Line.l(r:p4udt21605lv-p4ulv37844) Units=km Length=0.0656234 bus1=p4udt21605lv.1.2 bus2=p4ulv37844.1.2 switch=n enabled=y phases=2 Linecode=1P_OH_AL_4/0_Zuzara_0_416_0_2_2_2_2

New Line.l(r:p4udt21615lv-p4ulv37880) Units=km Length=0.0511144 bus1=p4udt21615lv.1.2 bus2=p4ulv37880.1.2 switch=n enabled=y phases=2 Linecode=1P_OH_AL_4/0_Zuzara_0_416_0_2_2_2_2

New Line.l(r:p4udt21910lv-p4ulv38665) Units=km Length=0.00891641 bus1=p4udt21910lv.1.2 bus2=p4ulv38665.1.2 switch=n enabled=y phases=2 Linecode=1P_OH_AL_2/0_Rucina_0_416_0_2_2_2_2

New Line.l(r:p4udt21911lv-p4ulv38666) Units=km Length=0.0942199 bus1=p4udt21911lv.1.2 bus2=p4ulv38666.1.2 switch=n enabled=y phases=2 Linecode=1P_OH_AL_4/0_Zuzara_0_416_0_2_2_2_2

New Line.l(r:p4udt21929lv-p4ulv38697) Units=km Length=0.07794090000000001 bus1=p4udt21929lv.1.2 bus2=p4ulv38697.1.2 switch=n enabled=y phases=2 Linecode=1P_OH_AL_4/0_Zuzara_0_416_0_2_2_2_2

New Line.l(r:p4udt22212lv-p4ulv39534) Units=km Length=0.0425104 bus1=p4udt22212lv.1.2 bus2=p4ulv39534.1.2 switch=n enabled=y phases=2 Linecode=1P_OH_AL_4/0_Zuzara_0_416_0_2_2_2_2

New Line.l(r:p4udt22350lv-p4ulv39932) Units=km Length=0.021188 bus1=p4udt22350lv.1.2 bus2=p4ulv39932.1.2 switch=n enabled=y phases=2 Linecode=1P_OH_AL_2/0_Rucina_0_416_0_2_2_2_2

New Line.l(r:p4udt22350lv-p4ulv42000) Units=km Length=0.021188 bus1=p4udt22350lv.1.2 bus2=p4ulv42000.1.2 switch=n enabled=y phases=2 Linecode=1P_OH_AL_2/0_Rucina_0_416_0_2_2_2_2

New Line.l(r:p4udt22478lv-p4ulv40335) Units=km Length=0.001 bus1=p4udt22478lv.1.2 bus2=p4ulv40335.1.2 switch=n enabled=y phases=2 Linecode=1P_OH_AL_4_Periwinkle_0_416_0_2_2_2_2

New Line.l(r:p4udt22479lv-p4ulv40336) Units=km Length=0.0261077 bus1=p4udt22479lv.1.2 bus2=p4ulv40336.1.2 switch=n enabled=y phases=2 Linecode=1P_OH_AL_2/0_Rucina_0_416_0_2_2_2_2

New Line.l(r:p4udt22633lv-p4ulv40774) Units=km Length=0.001 bus1=p4udt22633lv.1.2 bus2=p4ulv40774.1.2 switch=n enabled=y phases=2 Linecode=1P_OH_AL_4_Periwinkle_0_416_0_2_2_2_2

New Line.l(r:p4udt22932lv-p4ulv41623) Units=km Length=0.001 bus1=p4udt22932lv.1.2 bus2=p4ulv41623.1.2 switch=n enabled=y phases=2 Linecode=1P_OH_AL_4_Periwinkle_0_416_0_2_2_2_2

New Line.l(r:p4udt22944lv-p4ulv41643) Units=km Length=0.001 bus1=p4udt22944lv.1.2 bus2=p4ulv41643.1.2 switch=n enabled=y phases=2 Linecode=1P_OH_AL_4_Periwinkle_0_416_0_2_2_2_2

New Line.l(r:p4udt22945lv-p4ulv41646) Units=km Length=0.001 bus1=p4udt22945lv.1.2 bus2=p4ulv41646.1.2 switch=n enabled=y phases=2 Linecode=1P_OH_AL_4_Periwinkle_0_416_0_2_2_2_2

New Line.l(r:p4udt22946lv-p4ulv41647) Units=km Length=0.001 bus1=p4udt22946lv.1.2 bus2=p4ulv41647.1.2 switch=n enabled=y phases=2 Linecode=1P_OH_AL_4_Periwinkle_0_416_0_2_2_2_2

New Line.l(r:p4udt23208lv-p4ulv42442) Units=km Length=0.001 bus1=p4udt23208lv.1.2 bus2=p4ulv42442.1.2 switch=n enabled=y phases=2 Linecode=1P_OH_AL_4_Periwinkle_0_416_0_2_2_2_2

New Line.l(r:p4udt23350lv-p4ulv42854) Units=km Length=0.0453748 bus1=p4udt23350lv.1.2 bus2=p4ulv42854.1.2 switch=n enabled=y phases=2 Linecode=1P_OH_AL_4/0_Zuzara_0_416_0_2_2_2_2

New Line.l(r:p4udt23362lv-p4ulv42883) Units=km Length=0.049831200000000006 bus1=p4udt23362lv.1.2 bus2=p4ulv42883.1.2 switch=n enabled=y phases=2 Linecode=1P_OH_AL_4/0_Zuzara_0_416_0_2_2_2_2

New Line.l(r:p4udt23364lv-p4ulv42886)_s0 Units=km Length=0.001 bus1=p4udt23364lv.1.2 bus2=p4udt23364lv-p4ulv42886x.1.2 switch=n enabled=y phases=2 Linecode=1P_OH_AL_4_Periwinkle_0_416_0_2_2_2_2

New Line.l(r:p4udt23364lv-p4ulv42886)_s1 Units=km Length=0.001 bus1=p4udt23364lv-p4ulv42886x.1.2 bus2=p4udt23364lv-p4ulv42886xx.1.2 switch=n enabled=y phases=2 Linecode=1P_OH_AL_4_Periwinkle_0_416_0_2_2_2_2

New Line.l(r:p4udt23364lv-p4ulv42886)_s2 Units=km Length=0.0956023 bus1=p4udt23364lv-p4ulv42886xx.1.2 bus2=p4ulv42886.1.2 switch=n enabled=y phases=2 Linecode=1P_OH_AL_4/0_Zuzara_0_416_0_2_2_2_2

New Line.l(r:p4udt23492lv-p4ulv43290) Units=km Length=0.06049070000000001 bus1=p4udt23492lv.1.2 bus2=p4ulv43290.1.2 switch=n enabled=y phases=2 Linecode=1P_OH_AL_4/0_Zuzara_0_416_0_2_2_2_2

New Line.l(r:p4udt23511lv-p4ulv43322) Units=km Length=0.0503897 bus1=p4udt23511lv.1.2 bus2=p4ulv43322.1.2 switch=n enabled=y phases=2 Linecode=1P_OH_AL_4/0_Zuzara_0_416_0_2_2_2_2

New Line.l(r:p4udt23642lv-p4ulv43722) Units=km Length=0.001 bus1=p4udt23642lv.1.2 bus2=p4ulv43722.1.2 switch=n enabled=y phases=2 Linecode=1P_OH_AL_4_Periwinkle_0_416_0_2_2_2_2

New Line.l(r:p4udt9291-p4udt952) Units=km Length=0.23029400000000003 bus1=p4udt9291-p4udt952x.1 bus2=p4udt952.1 switch=n enabled=y phases=1 Linecode=1P_OH_AL_ACSR_#2_Sparrow_12_47_0_1_1_1_1

New Line.l(r:p4udt2127-p4udt3643) Units=km Length=0.228017 bus1=p4udt2127.2 bus2=p4udt3643.2 switch=n enabled=y phases=1 Linecode=1P_OH_AL_ACSR_#2_Sparrow_12_47_0_1_1_1_1

New Line.l(r:p4udt12946-p4udt18475) Units=km Length=0.121352 bus1=p4udt18475.2 bus2=p4udt12946.2 switch=n enabled=y phases=1 Linecode=1P_OH_AL_ACSR_#2_Sparrow_12_47_0_1_1_1_1

New Line.l(r:p4udt1759-p4udt20284) Units=km Length=0.148981 bus1=p4udt1759.2 bus2=p4udt20284.2 switch=n enabled=y phases=1 Linecode=1P_OH_AL_ACSR_#2_Sparrow_12_47_0_1_1_1_1

New Line.l(r:p4udt15924-p4udt1759) Units=km Length=0.225261 bus1=p4udt15924.2 bus2=p4udt1759.2 switch=n enabled=y phases=1 Linecode=1P_OH_AL_ACSR_#2_Sparrow_12_47_0_1_1_1_1

New Line.l(r:p4udt15924-p4udt22946) Units=km Length=0.16515 bus1=p4udt15924.2 bus2=p4udt22946.2 switch=n enabled=y phases=1 Linecode=1P_OH_AL_ACSR_#2_Sparrow_12_47_0_1_1_1_1

New Line.l(r:p4udt15924-p4udt18475) Units=km Length=0.0638778 bus1=p4udt18475.2 bus2=p4udt15924.2 switch=n enabled=y phases=1 Linecode=1P_OH_AL_ACSR_#2_Sparrow_12_47_0_1_1_1_1

New Line.l(r:p4udt18475-p4udt8176) Units=km Length=0.126426 bus1=p4udt8176.2 bus2=p4udt18475.2 switch=n enabled=y phases=1 Linecode=1P_OH_AL_ACSR_#2_Sparrow_12_47_0_1_1_1_1

New Line.l(r:p4udt20447-p4udt8176)_s0 Units=km Length=0.263925 bus1=p4udt8176.2 bus2=p4udt20447-p4udt8176x.2 switch=n enabled=y phases=1 Linecode=1P_OH_AL_ACSR_#2_Sparrow_12_47_0_1_1_1_1

New Line.l(r:p4udt20447-p4udt8176)_s1 Units=km Length=0.0129455 bus1=p4udt20447-p4udt8176x.2 bus2=p4udt20447.2 switch=n enabled=y phases=1 Linecode=1P_OH_AL_ACSR_#2_Sparrow_12_47_0_1_1_1_1

New Line.l(r:p4udt8176-p4udt8745) Units=km Length=0.257076 bus1=p4udt8745.2 bus2=p4udt8176.2 switch=n enabled=y phases=1 Linecode=1P_OH_AL_ACSR_#2_Sparrow_12_47_0_1_1_1_1

New Line.l(r:p4udt18310-p4udt8745) Units=km Length=0.137589 bus1=p4udt18310.2 bus2=p4udt8745.2 switch=n enabled=y phases=1 Linecode=1P_OH_AL_ACSR_#2_Sparrow_12_47_0_1_1_1_1

New Line.l(r:p4udt18310-p4udt3644) Units=km Length=0.0798713 bus1=p4udt3644.2 bus2=p4udt18310.2 switch=n enabled=y phases=1 Linecode=1P_OH_AL_ACSR_#2_Sparrow_12_47_0_1_1_1_1

New Line.l(r:p4udt1353-p4udt5681) Units=km Length=0.0867643 bus1=p4udt5681.2 bus2=p4udt1353.2 switch=n enabled=y phases=1 Linecode=1P_OH_AL_ACSR_#2_Sparrow_12_47_0_1_1_1_1

New Line.l(r:p4udt14515-p4udt5681) Units=km Length=0.21577 bus1=p4udt14515.2 bus2=p4udt5681.2 switch=n enabled=y phases=1 Linecode=1P_OH_AL_ACSR_#2_Sparrow_12_47_0_1_1_1_1

New Line.l(r:p4udt14515-p4udt20283) Units=km Length=0.0507597 bus1=p4udt20283.2 bus2=p4udt14515.2 switch=n enabled=y phases=1 Linecode=1P_OH_AL_ACSR_#2_Sparrow_12_47_0_1_1_1_1

New Line.l(r:p4udt20283-p4udt3644) Units=km Length=0.496988 bus1=p4udt3644.2 bus2=p4udt20283.2 switch=n enabled=y phases=1 Linecode=1P_OH_AL_ACSR_#2_Sparrow_12_47_0_1_1_1_1

New Line.l(r:p4udt2127-p4udt3644) Units=km Length=0.160356 bus1=p4udt2127.2 bus2=p4udt3644.2 switch=n enabled=y phases=1 Linecode=1P_OH_AL_ACSR_#2_Sparrow_12_47_0_1_1_1_1

New Line.l(r:p4udt17416-p4udt21615) Units=km Length=0.001 bus1=p4udt17416.2 bus2=p4udt21615.2 switch=n enabled=y phases=1 Linecode=1P_OH_AL_ACSR_#2_Sparrow_12_47_0_1_1_1_1

New Line.l(r:p4udt17416-p4udt542) Units=km Length=0.17454 bus1=p4udt542.2 bus2=p4udt17416.2 switch=n enabled=y phases=1 Linecode=1P_OH_AL_ACSR_#2_Sparrow_12_47_0_1_1_1_1

New Line.l(r:p4udt17596-p4udt23511)_s0 Units=km Length=0.164537 bus1=p4udt23511.2 bus2=p4udt17596-p4udt23511x.2 switch=n enabled=y phases=1 Linecode=1P_OH_AL_ACSR_#2_Sparrow_12_47_0_1_1_1_1

New Line.l(r:p4udt17596-p4udt23511)_s1 Units=km Length=0.06677 bus1=p4udt17596-p4udt23511x.2 bus2=p4udt17596.2 switch=n enabled=y phases=1 Linecode=1P_OH_AL_ACSR_#2_Sparrow_12_47_0_1_1_1_1

New Line.l(r:p4udt10683-p4udt1758) Units=km Length=0.079003 bus1=p4udt1758.2 bus2=p4udt10683.2 switch=n enabled=y phases=1 Linecode=1P_OH_AL_ACSR_#2_Sparrow_12_47_0_1_1_1_1

New Line.l(r:p4udt13181-p4udt1758) Units=km Length=0.17875100000000002 bus1=p4udt1758.2 bus2=p4udt13181.2 switch=n enabled=y phases=1 Linecode=1P_OH_AL_ACSR_#2_Sparrow_12_47_0_1_1_1_1

New Line.l(r:p4udt1758-p4udt7560) Units=km Length=0.07573590000000001 bus1=p4udt7560.2 bus2=p4udt1758.2 switch=n enabled=y phases=1 Linecode=1P_OH_AL_ACSR_#2_Sparrow_12_47_0_1_1_1_1

New Line.l(r:p4udt22212-p4udt7560) Units=km Length=0.347729 bus1=p4udt22212.2 bus2=p4udt7560.2 switch=n enabled=y phases=1 Linecode=1P_OH_AL_ACSR_#2_Sparrow_12_47_0_1_1_1_1

New Line.l(r:p4udt15334-p4udt22212) Units=km Length=0.269044 bus1=p4udt15334.2 bus2=p4udt22212.2 switch=n enabled=y phases=1 Linecode=1P_OH_AL_ACSR_#2_Sparrow_12_47_0_1_1_1_1

New Line.l(r:p4udt1351-p4udt15334) Units=km Length=0.456817 bus1=p4udt1351.2 bus2=p4udt15334.2 switch=n enabled=y phases=1 Linecode=1P_OH_AL_ACSR_#2_Sparrow_12_47_0_1_1_1_1

New Line.l(r:p4udt1351-p4udt7562) Units=km Length=0.2528 bus1=p4udt7562.2 bus2=p4udt1351.2 switch=n enabled=y phases=1 Linecode=1P_OH_AL_ACSR_#2_Sparrow_12_47_0_1_1_1_1

New Line.l(r:p4udt114-p4udt23364) Units=km Length=0.048908 bus1=p4udt114.2 bus2=p4udt23364.2 switch=n enabled=y phases=1 Linecode=1P_OH_AL_ACSR_#2_Sparrow_12_47_0_1_1_1_1

New Line.l(r:p4udt114-p4udt9585) Units=km Length=0.173601 bus1=p4udt9585.2 bus2=p4udt114.2 switch=n enabled=y phases=1 Linecode=1P_OH_AL_ACSR_#2_Sparrow_12_47_0_1_1_1_1

New Line.l(r:p4udt16849-p4udt9585)_s0 Units=km Length=0.136874 bus1=p4udt16849.2 bus2=p4udt16849-p4udt9585x.2 switch=n enabled=y phases=1 Linecode=1P_OH_AL_ACSR_#2_Sparrow_12_47_0_1_1_1_1

New Line.l(r:p4udt16849-p4udt9585)_s1 Units=km Length=0.101789 bus1=p4udt16849-p4udt9585x.2 bus2=p4udt9585.2 switch=n enabled=y phases=1 Linecode=1P_OH_AL_ACSR_#2_Sparrow_12_47_0_1_1_1_1

New Line.l(r:p4udt16849-p4udt7562)_s0 Units=km Length=0.227085 bus1=p4udt7562.2 bus2=p4udt16849-p4udt7562x.2 switch=n enabled=y phases=1 Linecode=1P_OH_AL_ACSR_#2_Sparrow_12_47_0_1_1_1_1

New Line.l(r:p4udt16849-p4udt7562)_s1 Units=km Length=0.0052989 bus1=p4udt16849-p4udt7562x.2 bus2=p4udt16849.2 switch=n enabled=y phases=1 Linecode=1P_OH_AL_ACSR_#2_Sparrow_12_47_0_1_1_1_1

New Line.l(r:p4udt21929-p4udt7562) Units=km Length=0.0193939 bus1=p4udt21929.2 bus2=p4udt7562.2 switch=n enabled=y phases=1 Linecode=1P_OH_AL_ACSR_#2_Sparrow_12_47_0_1_1_1_1

New Line.l(r:p4udt21929-p4udt23511) Units=km Length=0.0387788 bus1=p4udt23511.2 bus2=p4udt21929.2 switch=n enabled=y phases=1 Linecode=1P_OH_AL_ACSR_#2_Sparrow_12_47_0_1_1_1_1

New Line.l(r:p4udt23511-p4udt542) Units=km Length=0.10803900000000001 bus1=p4udt542.2 bus2=p4udt23511.2 switch=n enabled=y phases=1 Linecode=1P_OH_AL_ACSR_#2_Sparrow_12_47_0_1_1_1_1

New Line.l(r:p4udt542-p4udt7561) Units=km Length=0.0293971 bus1=p4udt7561.2 bus2=p4udt542.2 switch=n enabled=y phases=1 Linecode=1P_OH_AL_ACSR_#2_Sparrow_12_47_0_1_1_1_1

New Line.l(r:p4udt7561-p4udt963) Units=km Length=0.0695023 bus1=p4udt963.2 bus2=p4udt7561.2 switch=n enabled=y phases=1 Linecode=1P_OH_AL_ACSR_#2_Sparrow_12_47_0_1_1_1_1

New Line.l(r:p4udt15333-p4udt963) Units=km Length=0.153119 bus1=p4udt963.2 bus2=p4udt15333.2 switch=n enabled=y phases=1 Linecode=1P_OH_AL_ACSR_#2_Sparrow_12_47_0_1_1_1_1

New Line.l(r:p4udt14058-p4udt963) Units=km Length=0.119171 bus1=p4udt14058.2 bus2=p4udt963.2 switch=n enabled=y phases=1 Linecode=1P_OH_AL_ACSR_#2_Sparrow_12_47_0_1_1_1_1

New Line.l(r:p4udt1352-p4udt6964)_s0 Units=km Length=0.124246 bus1=p4udt6964.2 bus2=p4udt1352-p4udt6964x.2 switch=n enabled=y phases=1 Linecode=1P_OH_AL_ACSR_#2_Sparrow_12_47_0_1_1_1_1

New Line.l(r:p4udt1352-p4udt6964)_s1 Units=km Length=0.19389100000000004 bus1=p4udt1352-p4udt6964x.2 bus2=p4udt1352.2 switch=n enabled=y phases=1 Linecode=1P_OH_AL_ACSR_#2_Sparrow_12_47_0_1_1_1_1

New Line.l(r:p4udt14058-p4udt6964)_s0 Units=km Length=0.0779944 bus1=p4udt14058.2 bus2=p4udt14058-p4udt6964x.2 switch=n enabled=y phases=1 Linecode=1P_OH_AL_ACSR_#2_Sparrow_12_47_0_1_1_1_1

New Line.l(r:p4udt14058-p4udt6964)_s1 Units=km Length=0.135348 bus1=p4udt14058-p4udt6964x.2 bus2=p4udt6964.2 switch=n enabled=y phases=1 Linecode=1P_OH_AL_ACSR_#2_Sparrow_12_47_0_1_1_1_1

New Line.l(r:p4udt10682-p4udt14058)_s0 Units=km Length=0.128176 bus1=p4udt10682.2 bus2=p4udt10682-p4udt14058x.2 switch=n enabled=y phases=1 Linecode=1P_OH_AL_ACSR_#2_Sparrow_12_47_0_1_1_1_1

New Line.l(r:p4udt10682-p4udt14058)_s1 Units=km Length=0.24539600000000003 bus1=p4udt10682-p4udt14058x.2 bus2=p4udt14058.2 switch=n enabled=y phases=1 Linecode=1P_OH_AL_ACSR_#2_Sparrow_12_47_0_1_1_1_1

New Line.l(r:p4udt10682-p4udt2127) Units=km Length=0.213701 bus1=p4udt2127.2 bus2=p4udt10682.2 switch=n enabled=y phases=1 Linecode=1P_OH_AL_ACSR_#2_Sparrow_12_47_0_1_1_1_1

New Line.l(r:p4udt2127-p4udt2496)_s0 Units=km Length=0.245884 bus1=p4udt2127-p4udt2496xx.2 bus2=p4udt2127-p4udt2496x.2 switch=n enabled=y phases=1 Linecode=1P_OH_AL_ACSR_#2_Sparrow_12_47_0_1_1_1_1

New Line.l(r:p4udt2127-p4udt2496)_s1 Units=km Length=0.0767443 bus1=p4udt2127-p4udt2496x.2 bus2=p4udt2127.2 switch=n enabled=y phases=1 Linecode=1P_OH_AL_ACSR_#2_Sparrow_12_47_0_1_1_1_1

New Line.l(r:p4udt11729-p4udt7866) Units=km Length=0.255305 bus1=p4udt11729-p4udt7866x.2 bus2=p4udt11729.2 switch=n enabled=y phases=1 Linecode=1P_OH_AL_ACSR_#2_Sparrow_12_47_0_1_1_1_1

New Line.l(r:p4udt16283-p4udt1757) Units=km Length=0.204244 bus1=p4udt16283-p4udt1757x.2 bus2=p4udt1757.2 switch=n enabled=y phases=1 Linecode=1P_OH_AL_ACSR_#2_Sparrow_12_47_0_1_1_1_1

New Line.l(r:p4udt1350-p4udt9584) Units=km Length=0.126363 bus1=p4udt1350.2 bus2=p4udt9584.2 switch=n enabled=y phases=1 Linecode=1P_OH_AL_ACSR_#2_Sparrow_12_47_0_1_1_1_1

New Line.l(r:p4udt1350-p4udt3253) Units=km Length=0.131031 bus1=p4udt3253.2 bus2=p4udt1350.2 switch=n enabled=y phases=1 Linecode=1P_OH_AL_ACSR_#2_Sparrow_12_47_0_1_1_1_1

New Line.l(r:p4udt3253-p4udt3254) Units=km Length=0.0664956 bus1=p4udt3253.2 bus2=p4udt3254.2 switch=n enabled=y phases=1 Linecode=1P_OH_AL_ACSR_#2_Sparrow_12_47_0_1_1_1_1

New Line.l(r:p4udt2887-p4udt3253) Units=km Length=0.164947 bus1=p4udt2887-p4udt3253x.2 bus2=p4udt3253.2 switch=n enabled=y phases=1 Linecode=1P_OH_AL_ACSR_#2_Sparrow_12_47_0_1_1_1_1

New Line.l(r:p4udt10418-p4udt8175) Units=km Length=0.123032 bus1=p4udt8175.2 bus2=p4udt10418.2 switch=n enabled=y phases=1 Linecode=1P_OH_AL_ACSR_#2_Sparrow_12_47_0_1_1_1_1

New Line.l(r:p4udt14278-p4udt8175) Units=km Length=0.18315400000000004 bus1=p4udt14278-p4udt8175x.2 bus2=p4udt8175.2 switch=n enabled=y phases=1 Linecode=1P_OH_AL_ACSR_#2_Sparrow_12_47_0_1_1_1_1

New Line.l(r:p4udt10963-p4udt15332) Units=km Length=0.17693 bus1=p4udt10963-p4udt15332x.2 bus2=p4udt15332.2 switch=n enabled=y phases=1 Linecode=1P_OH_AL_ACSR_#2_Sparrow_12_47_0_1_1_1_1

New Line.l(r:p4udt12226-p4udt22945) Units=km Length=0.434583 bus1=p4udt12226.3 bus2=p4udt22945.3 switch=n enabled=y phases=1 Linecode=1P_OH_AL_ACSR_#2_Sparrow_12_47_0_1_1_1_1

New Line.l(r:p4udt11733-p4udt12226)_s0 Units=km Length=0.242362 bus1=p4udt11733.3 bus2=p4udt11733-p4udt12226x.3 switch=n enabled=y phases=1 Linecode=1P_OH_AL_ACSR_#2_Sparrow_12_47_0_1_1_1_1

New Line.l(r:p4udt11733-p4udt12226)_s1 Units=km Length=0.0394634 bus1=p4udt11733-p4udt12226x.3 bus2=p4udt12226.3 switch=n enabled=y phases=1 Linecode=1P_OH_AL_ACSR_#2_Sparrow_12_47_0_1_1_1_1

New Line.l(r:p4udt11733-p4udt8174) Units=km Length=0.316001 bus1=p4udt8174.3 bus2=p4udt11733.3 switch=n enabled=y phases=1 Linecode=1P_OH_AL_ACSR_#2_Sparrow_12_47_0_1_1_1_1

New Line.l(r:p4udt18152-p4udt8174)_s0 Units=km Length=0.116262 bus1=p4udt18152-p4udt8174x.3 bus2=p4udt18152-p4udt8174xx.3 switch=n enabled=y phases=1 Linecode=1P_OH_AL_ACSR_#2_Sparrow_12_47_0_1_1_1_1

New Line.l(r:p4udt18152-p4udt8174)_s1 Units=km Length=0.06945420000000001 bus1=p4udt18152-p4udt8174xx.3 bus2=p4udt8174.3 switch=n enabled=y phases=1 Linecode=1P_OH_AL_ACSR_#2_Sparrow_12_47_0_1_1_1_1

New Line.l(r:p4udt15744-p4udt5680) Units=km Length=0.127495 bus1=p4udt15744.1 bus2=p4udt5680.1 switch=n enabled=y phases=1 Linecode=1P_OH_AL_ACSR_#2_Sparrow_12_47_0_1_1_1_1

New Line.l(r:p4udt15744-p4udt18152) Units=km Length=0.1582 bus1=p4udt15744-p4udt18152x.1 bus2=p4udt15744.1 switch=n enabled=y phases=1 Linecode=1P_OH_AL_ACSR_#2_Sparrow_12_47_0_1_1_1_1

New Line.l(r:p4udt17595-p4udt2886) Units=km Length=0.0548016 bus1=p4udt2886.2 bus2=p4udt17595.2 switch=n enabled=y phases=1 Linecode=1P_OH_AL_ACSR_#2_Sparrow_12_47_0_1_1_1_1

New Line.l(r:p4udt10417-p4udt2886) Units=km Length=0.0464785 bus1=p4udt10417.2 bus2=p4udt2886.2 switch=n enabled=y phases=1 Linecode=1P_OH_AL_ACSR_#2_Sparrow_12_47_0_1_1_1_1

New Line.l(r:p4udt10417-p4udt18153) Units=km Length=0.092734 bus1=p4udt18153.2 bus2=p4udt10417.2 switch=n enabled=y phases=1 Linecode=1P_OH_AL_ACSR_#2_Sparrow_12_47_0_1_1_1_1

New Line.l(r:p4udt18152-p4udt18153) Units=km Length=0.21503300000000003 bus1=p4udt18152-p4udt18153x.2 bus2=p4udt18153.2 switch=n enabled=y phases=1 Linecode=1P_OH_AL_ACSR_#2_Sparrow_12_47_0_1_1_1_1

New Line.l(r:p4udt4663-p4udt5022) Units=km Length=0.0611248 bus1=p4udt4663.2 bus2=p4udt5022.2 switch=n enabled=y phases=1 Linecode=1P_OH_AL_ACSR_#2_Sparrow_12_47_0_1_1_1_1

New Line.l(r:p4udt2495-p4udt4663) Units=km Length=0.117134 bus1=p4udt2495-p4udt4663x.2 bus2=p4udt4663.2 switch=n enabled=y phases=1 Linecode=1P_OH_AL_ACSR_#2_Sparrow_12_47_0_1_1_1_1

New Line.l(r:p4udt22944-p4udt6639) Units=km Length=0.6493690000000001 bus1=p4udt6639.2 bus2=p4udt22944.2 switch=n enabled=y phases=1 Linecode=1P_OH_AL_ACSR_#2_Sparrow_12_47_0_1_1_1_1

New Line.l(r:p4udt6639-p4udt9021) Units=km Length=0.294983 bus1=p4udt9021.2 bus2=p4udt6639.2 switch=n enabled=y phases=1 Linecode=1P_OH_AL_ACSR_#2_Sparrow_12_47_0_1_1_1_1

New Line.l(r:p4udt10659-p4udt9021) Units=km Length=0.145929 bus1=p4udt10659-p4udt9021x.2 bus2=p4udt9021.2 switch=n enabled=y phases=1 Linecode=1P_OH_AL_ACSR_#2_Sparrow_12_47_0_1_1_1_1

New Line.l(r:p4udt22633-p4udt925)_s0 Units=km Length=0.110128 bus1=p4udt925.3 bus2=p4udt22633-p4udt925x.3 switch=n enabled=y phases=1 Linecode=1P_OH_AL_ACSR_#2_Sparrow_12_47_0_1_1_1_1

New Line.l(r:p4udt22633-p4udt925)_s1 Units=km Length=0.0775373 bus1=p4udt22633-p4udt925x.3 bus2=p4udt22633.3 switch=n enabled=y phases=1 Linecode=1P_OH_AL_ACSR_#2_Sparrow_12_47_0_1_1_1_1

New Line.l(r:p4udt3977-p4udt925) Units=km Length=0.0877327 bus1=p4udt3977.3 bus2=p4udt925.3 switch=n enabled=y phases=1 Linecode=1P_OH_AL_ACSR_#2_Sparrow_12_47_0_1_1_1_1

New Line.l(r:p4udt14027-p4udt3977) Units=km Length=0.0742345 bus1=p4udt14027.3 bus2=p4udt3977.3 switch=n enabled=y phases=1 Linecode=1P_OH_AL_ACSR_#2_Sparrow_12_47_0_1_1_1_1

New Line.l(r:p4udt14027-p4udt22350) Units=km Length=0.140223 bus1=p4udt14027.3 bus2=p4udt22350.3 switch=n enabled=y phases=1 Linecode=1P_OH_AL_ACSR_#2_Sparrow_12_47_0_1_1_1_1

New Line.l(r:p4udt14027-p4udt6615) Units=km Length=0.128037 bus1=p4udt6615.3 bus2=p4udt14027.3 switch=n enabled=y phases=1 Linecode=1P_OH_AL_ACSR_#2_Sparrow_12_47_0_1_1_1_1

New Line.l(r:p4udt6614-p4udt6615)_s0 Units=km Length=0.0922196 bus1=p4udt6614.3 bus2=p4udt6614-p4udt6615x.3 switch=n enabled=y phases=1 Linecode=1P_OH_AL_ACSR_#2_Sparrow_12_47_0_1_1_1_1

New Line.l(r:p4udt6614-p4udt6615)_s1 Units=km Length=0.0994072 bus1=p4udt6614-p4udt6615x.3 bus2=p4udt6615.3 switch=n enabled=y phases=1 Linecode=1P_OH_AL_ACSR_#2_Sparrow_12_47_0_1_1_1_1

New Line.l(r:p4udt19155-p4udt8746) Units=km Length=0.21306200000000003 bus1=p4udt19155.3 bus2=p4udt8746.3 switch=n enabled=y phases=1 Linecode=1P_OH_AL_ACSR_#2_Sparrow_12_47_0_1_1_1_1

New Line.l(r:p4udt15532-p4udt21911)_s0 Units=km Length=0.200615 bus1=p4udt21911.3 bus2=p4udt15532-p4udt21911x.3 switch=n enabled=y phases=1 Linecode=1P_OH_AL_ACSR_#2_Sparrow_12_47_0_1_1_1_1

New Line.l(r:p4udt15532-p4udt21911)_s1 Units=km Length=0.102866 bus1=p4udt15532-p4udt21911x.3 bus2=p4udt15532.3 switch=n enabled=y phases=1 Linecode=1P_OH_AL_ACSR_#2_Sparrow_12_47_0_1_1_1_1

New Line.l(r:p4udt19154-p4udt20723) Units=km Length=0.163848 bus1=p4udt20723.3 bus2=p4udt19154.3 switch=n enabled=y phases=1 Linecode=1P_OH_AL_ACSR_#2_Sparrow_12_47_0_1_1_1_1

New Line.l(r:p4udt20723-p4udt21911) Units=km Length=0.16341400000000003 bus1=p4udt21911.3 bus2=p4udt20723.3 switch=n enabled=y phases=1 Linecode=1P_OH_AL_ACSR_#2_Sparrow_12_47_0_1_1_1_1

New Line.l(r:p4udt21911-p4udt8153) Units=km Length=0.0761396 bus1=p4udt8153.3 bus2=p4udt21911.3 switch=n enabled=y phases=1 Linecode=1P_OH_AL_ACSR_#2_Sparrow_12_47_0_1_1_1_1

New Line.l(r:p4udt23642-p4udt8153) Units=km Length=0.165789 bus1=p4udt8153.3 bus2=p4udt23642.3 switch=n enabled=y phases=1 Linecode=1P_OH_AL_ACSR_#2_Sparrow_12_47_0_1_1_1_1

New Line.l(r:p4udt18138-p4udt8153) Units=km Length=0.064267 bus1=p4udt18138.3 bus2=p4udt8153.3 switch=n enabled=y phases=1 Linecode=1P_OH_AL_ACSR_#2_Sparrow_12_47_0_1_1_1_1

New Line.l(r:p4udt18138-p4udt19155) Units=km Length=0.038495100000000004 bus1=p4udt19155.3 bus2=p4udt18138.3 switch=n enabled=y phases=1 Linecode=1P_OH_AL_ACSR_#2_Sparrow_12_47_0_1_1_1_1

New Line.l(r:p4udt19155-p4udt6614)_s0 Units=km Length=0.150484 bus1=p4udt6614.3 bus2=p4udt19155-p4udt6614x.3 switch=n enabled=y phases=1 Linecode=1P_OH_AL_ACSR_#2_Sparrow_12_47_0_1_1_1_1

New Line.l(r:p4udt19155-p4udt6614)_s1 Units=km Length=0.0942628 bus1=p4udt19155-p4udt6614x.3 bus2=p4udt19155.3 switch=n enabled=y phases=1 Linecode=1P_OH_AL_ACSR_#2_Sparrow_12_47_0_1_1_1_1

New Line.l(r:p4udt18294-p4udt6614) Units=km Length=0.301689 bus1=p4udt18294.3 bus2=p4udt6614.3 switch=n enabled=y phases=1 Linecode=1P_OH_AL_ACSR_#2_Sparrow_12_47_0_1_1_1_1

New Line.l(r:p4udt11187-p4udt4637) Units=km Length=0.161647 bus1=p4udt11187.3 bus2=p4udt4637.3 switch=n enabled=y phases=1 Linecode=1P_OH_AL_ACSR_#2_Sparrow_12_47_0_1_1_1_1

New Line.l(r:p4udt10658-p4udt21910) Units=km Length=0.234594 bus1=p4udt21910.3 bus2=p4udt10658.3 switch=n enabled=y phases=1 Linecode=1P_OH_AL_ACSR_#2_Sparrow_12_47_0_1_1_1_1

New Line.l(r:p4udt21910-p4udt22479) Units=km Length=0.08390060000000002 bus1=p4udt21910.3 bus2=p4udt22479.3 switch=n enabled=y phases=1 Linecode=1P_OH_AL_ACSR_#2_Sparrow_12_47_0_1_1_1_1

New Line.l(r:p4udt11187-p4udt21910) Units=km Length=0.169786 bus1=p4udt11187.3 bus2=p4udt21910.3 switch=n enabled=y phases=1 Linecode=1P_OH_AL_ACSR_#2_Sparrow_12_47_0_1_1_1_1

New Line.l(r:p4udt11187-p4udt23492) Units=km Length=0.0866549 bus1=p4udt23492.3 bus2=p4udt11187.3 switch=n enabled=y phases=1 Linecode=1P_OH_AL_ACSR_#2_Sparrow_12_47_0_1_1_1_1

New Line.l(r:p4udt23492-p4udt5323) Units=km Length=0.125874 bus1=p4udt5323.3 bus2=p4udt23492.3 switch=n enabled=y phases=1 Linecode=1P_OH_AL_ACSR_#2_Sparrow_12_47_0_1_1_1_1

New Line.l(r:p4udt18137-p4udt5323) Units=km Length=0.0763585 bus1=p4udt18137.3 bus2=p4udt5323.3 switch=n enabled=y phases=1 Linecode=1P_OH_AL_ACSR_#2_Sparrow_12_47_0_1_1_1_1

New Line.l(r:p4udt18137-p4udt18294)_s0 Units=km Length=0.143136 bus1=p4udt18294.3 bus2=p4udt18137-p4udt18294x.3 switch=n enabled=y phases=1 Linecode=1P_OH_AL_ACSR_#2_Sparrow_12_47_0_1_1_1_1

New Line.l(r:p4udt18137-p4udt18294)_s1 Units=km Length=0.00895353 bus1=p4udt18137-p4udt18294x.3 bus2=p4udt18137.3 switch=n enabled=y phases=1 Linecode=1P_OH_AL_ACSR_#2_Sparrow_12_47_0_1_1_1_1

New Line.l(r:p4udt10659-p4udt18294)_s0 Units=km Length=0.169324 bus1=p4udt10659-p4udt18294x.3 bus2=p4udt10659-p4udt18294xx.3 switch=n enabled=y phases=1 Linecode=1P_OH_AL_ACSR_#2_Sparrow_12_47_0_1_1_1_1

New Line.l(r:p4udt10659-p4udt18294)_s1 Units=km Length=0.105154 bus1=p4udt10659-p4udt18294xx.3 bus2=p4udt18294.3 switch=n enabled=y phases=1 Linecode=1P_OH_AL_ACSR_#2_Sparrow_12_47_0_1_1_1_1

New Line.l(r:p4udt18648-p4udt19944) Units=km Length=0.001 bus1=p4udt18648-p4udt19944x.1 bus2=p4udt19944.1 switch=n enabled=y phases=1 Linecode=1P_OH_AL_ACSR_#2_Sparrow_12_47_0_1_1_1_1

New Line.l(r:p4udt15728-p4udt4999) Units=km Length=0.147924 bus1=p4udt4999.1 bus2=p4udt15728.1 switch=n enabled=y phases=1 Linecode=1P_OH_AL_ACSR_#2_Sparrow_12_47_0_1_1_1_1

New Line.l(r:p4udt16651-p4udt4999) Units=km Length=0.0773811 bus1=p4udt4999.1 bus2=p4udt16651.1 switch=n enabled=y phases=1 Linecode=1P_OH_AL_ACSR_#2_Sparrow_12_47_0_1_1_1_1

New Line.l(r:p4udt17575-p4udt4999) Units=km Length=0.0854837 bus1=p4udt17575.1 bus2=p4udt4999.1 switch=n enabled=y phases=1 Linecode=1P_OH_AL_ACSR_#2_Sparrow_12_47_0_1_1_1_1

New Line.l(r:p4udt12924-p4udt17575) Units=km Length=0.05602370000000001 bus1=p4udt17575.1 bus2=p4udt12924.1 switch=n enabled=y phases=1 Linecode=1P_OH_AL_ACSR_#2_Sparrow_12_47_0_1_1_1_1

New Line.l(r:p4udt17575-p4udt4286)_s0 Units=km Length=0.129231 bus1=p4udt4286.1 bus2=p4udt17575-p4udt4286x.1 switch=n enabled=y phases=1 Linecode=1P_OH_AL_ACSR_#2_Sparrow_12_47_0_1_1_1_1

New Line.l(r:p4udt17575-p4udt4286)_s1 Units=km Length=0.310231 bus1=p4udt17575-p4udt4286x.1 bus2=p4udt17575.1 switch=n enabled=y phases=1 Linecode=1P_OH_AL_ACSR_#2_Sparrow_12_47_0_1_1_1_1

New Line.l(r:p4udt10118-p4udt4286)_s0 Units=km Length=0.113609 bus1=p4udt10118.1 bus2=p4udt10118-p4udt4286x.1 switch=n enabled=y phases=1 Linecode=1P_OH_AL_ACSR_#2_Sparrow_12_47_0_1_1_1_1

New Line.l(r:p4udt10118-p4udt4286)_s1 Units=km Length=0.122487 bus1=p4udt10118-p4udt4286x.1 bus2=p4udt4286.1 switch=n enabled=y phases=1 Linecode=1P_OH_AL_ACSR_#2_Sparrow_12_47_0_1_1_1_1

New Line.l(r:p4udt10118-p4udt6936)_s0 Units=km Length=0.1823 bus1=p4udt10118.1 bus2=p4udt10118-p4udt6936x.1 switch=n enabled=y phases=1 Linecode=1P_OH_AL_ACSR_#2_Sparrow_12_47_0_1_1_1_1

New Line.l(r:p4udt10118-p4udt6936)_s1 Units=km Length=0.0124458 bus1=p4udt10118-p4udt6936x.1 bus2=p4udt6936.1 switch=n enabled=y phases=1 Linecode=1P_OH_AL_ACSR_#2_Sparrow_12_47_0_1_1_1_1

New Line.l(r:p4udt20426-p4udt21605) Units=km Length=0.0897076 bus1=p4udt20426.1 bus2=p4udt21605.1 switch=n enabled=y phases=1 Linecode=1P_OH_AL_ACSR_#2_Sparrow_12_47_0_1_1_1_1

New Line.l(r:p4udt20426-p4udt7841) Units=km Length=0.0692961 bus1=p4udt7841.1 bus2=p4udt20426.1 switch=n enabled=y phases=1 Linecode=1P_OH_AL_ACSR_#2_Sparrow_12_47_0_1_1_1_1

New Line.l(r:p4udt22932-p4udt7841) Units=km Length=0.131453 bus1=p4udt7841.1 bus2=p4udt22932.1 switch=n enabled=y phases=1 Linecode=1P_OH_AL_ACSR_#2_Sparrow_12_47_0_1_1_1_1

New Line.l(r:p4udt16269-p4udt7841) Units=km Length=0.132974 bus1=p4udt16269.1 bus2=p4udt7841.1 switch=n enabled=y phases=1 Linecode=1P_OH_AL_ACSR_#2_Sparrow_12_47_0_1_1_1_1

New Line.l(r:p4udt10390-p4udt19482) Units=km Length=0.051145 bus1=p4udt19482.1 bus2=p4udt10390.1 switch=n enabled=y phases=1 Linecode=1P_OH_AL_ACSR_#2_Sparrow_12_47_0_1_1_1_1

New Line.l(r:p4udt18988-p4udt19482) Units=km Length=0.08374160000000001 bus1=p4udt18988.1 bus2=p4udt19482.1 switch=n enabled=y phases=1 Linecode=1P_OH_AL_ACSR_#2_Sparrow_12_47_0_1_1_1_1

New Line.l(r:p4udt16471-p4udt18988) Units=km Length=0.0192317 bus1=p4udt16471.1 bus2=p4udt18988.1 switch=n enabled=y phases=1 Linecode=1P_OH_AL_ACSR_#2_Sparrow_12_47_0_1_1_1_1

New Line.l(r:p4udt16269-p4udt16471) Units=km Length=0.15676100000000004 bus1=p4udt16269.1 bus2=p4udt16471.1 switch=n enabled=y phases=1 Linecode=1P_OH_AL_ACSR_#2_Sparrow_12_47_0_1_1_1_1

New Line.l(r:p4udt10118-p4udt16269) Units=km Length=0.225971 bus1=p4udt10118.1 bus2=p4udt16269.1 switch=n enabled=y phases=1 Linecode=1P_OH_AL_ACSR_#2_Sparrow_12_47_0_1_1_1_1

New Line.l(r:p4udt10118-p4udt10391) Units=km Length=0.169971 bus1=p4udt10391.1 bus2=p4udt10118.1 switch=n enabled=y phases=1 Linecode=1P_OH_AL_ACSR_#2_Sparrow_12_47_0_1_1_1_1

New Line.l(r:p4udt10391-p4udt12204) Units=km Length=0.0773529 bus1=p4udt12204.1 bus2=p4udt10391.1 switch=n enabled=y phases=1 Linecode=1P_OH_AL_ACSR_#2_Sparrow_12_47_0_1_1_1_1

New Line.l(r:p4udt12204-p4udt6937) Units=km Length=0.150317 bus1=p4udt6937.1 bus2=p4udt12204.1 switch=n enabled=y phases=1 Linecode=1P_OH_AL_ACSR_#2_Sparrow_12_47_0_1_1_1_1

New Line.l(r:p4udt15908-p4udt8726) Units=km Length=0.120904 bus1=p4udt15908.1 bus2=p4udt8726.1 switch=n enabled=y phases=1 Linecode=1P_OH_AL_ACSR_#2_Sparrow_12_47_0_1_1_1_1

New Line.l(r:p4udt15908-p4udt6937) Units=km Length=0.0747376 bus1=p4udt6937.1 bus2=p4udt15908.1 switch=n enabled=y phases=1 Linecode=1P_OH_AL_ACSR_#2_Sparrow_12_47_0_1_1_1_1

New Line.l(r:p4udt12205-p4udt6937) Units=km Length=0.281765 bus1=p4udt12205.1 bus2=p4udt6937.1 switch=n enabled=y phases=1 Linecode=1P_OH_AL_ACSR_#2_Sparrow_12_47_0_1_1_1_1

New Line.l(r:p4udt12205-p4udt8439) Units=km Length=0.071827 bus1=p4udt8439.1 bus2=p4udt12205.1 switch=n enabled=y phases=1 Linecode=1P_OH_AL_ACSR_#2_Sparrow_12_47_0_1_1_1_1

New Line.l(r:p4udt1325-p4udt4285) Units=km Length=0.0814667 bus1=p4udt1325.1 bus2=p4udt4285.1 switch=n enabled=y phases=1 Linecode=1P_OH_AL_ACSR_#2_Sparrow_12_47_0_1_1_1_1

New Line.l(r:p4udt1325-p4udt9558)_s0 Units=km Length=0.260974 bus1=p4udt9558.1 bus2=p4udt1325-p4udt9558x.1 switch=n enabled=y phases=1 Linecode=1P_OH_AL_ACSR_#2_Sparrow_12_47_0_1_1_1_1

New Line.l(r:p4udt1325-p4udt9558)_s1 Units=km Length=0.1155 bus1=p4udt1325-p4udt9558x.1 bus2=p4udt1325.1 switch=n enabled=y phases=1 Linecode=1P_OH_AL_ACSR_#2_Sparrow_12_47_0_1_1_1_1

New Line.l(r:p4udt9558-p4udt9560) Units=km Length=0.390078 bus1=p4udt9560.1 bus2=p4udt9558.1 switch=n enabled=y phases=1 Linecode=1P_OH_AL_ACSR_#2_Sparrow_12_47_0_1_1_1_1

New Line.l(r:p4udt13818-p4udt15116) Units=km Length=0.199682 bus1=p4udt13818.1 bus2=p4udt15116.1 switch=n enabled=y phases=1 Linecode=1P_OH_AL_ACSR_#2_Sparrow_12_47_0_1_1_1_1

New Line.l(r:p4udt13818-p4udt1732) Units=km Length=0.0673427 bus1=p4udt1732.1 bus2=p4udt13818.1 switch=n enabled=y phases=1 Linecode=1P_OH_AL_ACSR_#2_Sparrow_12_47_0_1_1_1_1

New Line.l(r:p4udt1732-p4udt20722) Units=km Length=0.18995800000000002 bus1=p4udt20722.1 bus2=p4udt1732.1 switch=n enabled=y phases=1 Linecode=1P_OH_AL_ACSR_#2_Sparrow_12_47_0_1_1_1_1

New Line.l(r:p4udt9853-p4udt9854)_s0 Units=km Length=0.447107 bus1=p4udt9853.1 bus2=p4udt9853-p4udt9854x.1 switch=n enabled=y phases=1 Linecode=1P_OH_AL_ACSR_#2_Sparrow_12_47_0_1_1_1_1

New Line.l(r:p4udt9853-p4udt9854)_s1 Units=km Length=0.0714422 bus1=p4udt9853-p4udt9854x.1 bus2=p4udt9854.1 switch=n enabled=y phases=1 Linecode=1P_OH_AL_ACSR_#2_Sparrow_12_47_0_1_1_1_1

New Line.l(r:p4udt23208-p4udt9853) Units=km Length=0.10806 bus1=p4udt9853.1 bus2=p4udt23208.1 switch=n enabled=y phases=1 Linecode=1P_OH_AL_ACSR_#2_Sparrow_12_47_0_1_1_1_1

New Line.l(r:p4udt22478-p4udt9853) Units=km Length=0.104365 bus1=p4udt22478.1 bus2=p4udt9853.1 switch=n enabled=y phases=1 Linecode=1P_OH_AL_ACSR_#2_Sparrow_12_47_0_1_1_1_1

New Line.l(r:p4udt20722-p4udt22478) Units=km Length=0.22764100000000004 bus1=p4udt20722.1 bus2=p4udt22478.1 switch=n enabled=y phases=1 Linecode=1P_OH_AL_ACSR_#2_Sparrow_12_47_0_1_1_1_1

New Line.l(r:p4udt20722-p4udt9560) Units=km Length=0.36421 bus1=p4udt9560.1 bus2=p4udt20722.1 switch=n enabled=y phases=1 Linecode=1P_OH_AL_ACSR_#2_Sparrow_12_47_0_1_1_1_1

New Line.l(r:p4udt14026-p4udt9560) Units=km Length=0.141855 bus1=p4udt14026.1 bus2=p4udt9560.1 switch=n enabled=y phases=1 Linecode=1P_OH_AL_ACSR_#2_Sparrow_12_47_0_1_1_1_1

New Line.l(r:p4udt14026-p4udt8439)_s0 Units=km Length=0.0892666 bus1=p4udt8439.1 bus2=p4udt14026-p4udt8439x.1 switch=n enabled=y phases=1 Linecode=1P_OH_AL_ACSR_#2_Sparrow_12_47_0_1_1_1_1

New Line.l(r:p4udt14026-p4udt8439)_s1 Units=km Length=0.0199529 bus1=p4udt14026-p4udt8439x.1 bus2=p4udt14026.1 switch=n enabled=y phases=1 Linecode=1P_OH_AL_ACSR_#2_Sparrow_12_47_0_1_1_1_1

New Line.l(r:p4udt12696-p4udt8439) Units=km Length=0.0671687 bus1=p4udt12696.1 bus2=p4udt8439.1 switch=n enabled=y phases=1 Linecode=1P_OH_AL_ACSR_#2_Sparrow_12_47_0_1_1_1_1

New Line.l(r:p4udt11188-p4udt12696) Units=km Length=0.0817355 bus1=p4udt11188.1 bus2=p4udt12696.1 switch=n enabled=y phases=1 Linecode=1P_OH_AL_ACSR_#2_Sparrow_12_47_0_1_1_1_1

New Line.l(r:p4udt12925-p4udt2093) Units=km Length=0.192493 bus1=p4udt12925.1 bus2=p4udt2093.1 switch=n enabled=y phases=1 Linecode=1P_OH_AL_ACSR_#2_Sparrow_12_47_0_1_1_1_1

New Line.l(r:p4udt12925-p4udt9559) Units=km Length=0.140271 bus1=p4udt9559.1 bus2=p4udt12925.1 switch=n enabled=y phases=1 Linecode=1P_OH_AL_ACSR_#2_Sparrow_12_47_0_1_1_1_1

New Line.l(r:p4udt7842-p4udt9559) Units=km Length=0.0391317 bus1=p4udt7842.1 bus2=p4udt9559.1 switch=n enabled=y phases=1 Linecode=1P_OH_AL_ACSR_#2_Sparrow_12_47_0_1_1_1_1

New Line.l(r:p4udt21145-p4udt7842)_s0 Units=km Length=0.161299 bus1=p4udt7842.1 bus2=p4udt21145-p4udt7842x.1 switch=n enabled=y phases=1 Linecode=1P_OH_AL_ACSR_#2_Sparrow_12_47_0_1_1_1_1

New Line.l(r:p4udt21145-p4udt7842)_s1 Units=km Length=0.0241585 bus1=p4udt21145-p4udt7842x.1 bus2=p4udt21145.1 switch=n enabled=y phases=1 Linecode=1P_OH_AL_ACSR_#2_Sparrow_12_47_0_1_1_1_1

New Line.l(r:p4udt18989-p4udt7842) Units=km Length=0.370266 bus1=p4udt18989.1 bus2=p4udt7842.1 switch=n enabled=y phases=1 Linecode=1P_OH_AL_ACSR_#2_Sparrow_12_47_0_1_1_1_1

New Line.l(r:p4udt14691-p4udt5324) Units=km Length=0.001 bus1=p4udt5324.1 bus2=p4udt14691.1 switch=n enabled=y phases=1 Linecode=1P_OH_AL_ACSR_#2_Sparrow_12_47_0_1_1_1_1

New Line.l(r:p4udt15729-p4udt5324) Units=km Length=0.115562 bus1=p4udt15729.1 bus2=p4udt5324.1 switch=n enabled=y phases=1 Linecode=1P_OH_AL_ACSR_#2_Sparrow_12_47_0_1_1_1_1

New Line.l(r:p4udt15319-p4udt15729) Units=km Length=0.206886 bus1=p4udt15729.1 bus2=p4udt15319.1 switch=n enabled=y phases=1 Linecode=1P_OH_AL_ACSR_#2_Sparrow_12_47_0_1_1_1_1

New Line.l(r:p4udt15729-p4udt18989)_s0 Units=km Length=0.220461 bus1=p4udt18989.1 bus2=p4udt15729-p4udt18989xx.1 switch=n enabled=y phases=1 Linecode=1P_OH_AL_ACSR_#2_Sparrow_12_47_0_1_1_1_1

New Line.l(r:p4udt15729-p4udt18989)_s1 Units=km Length=0.001 bus1=p4udt15729-p4udt18989xx.1 bus2=p4udt15729-p4udt18989x.1 switch=n enabled=y phases=1 Linecode=1P_OH_AL_ACSR_#2_Sparrow_12_47_0_1_1_1_1

New Line.l(r:p4udt15729-p4udt18989)_s2 Units=km Length=0.245163 bus1=p4udt15729-p4udt18989x.1 bus2=p4udt15729.1 switch=n enabled=y phases=1 Linecode=1P_OH_AL_ACSR_#2_Sparrow_12_47_0_1_1_1_1

New Line.l(r:p4udt18989-p4udt2094) Units=km Length=0.0593547 bus1=p4udt2094.1 bus2=p4udt18989.1 switch=n enabled=y phases=1 Linecode=1P_OH_AL_ACSR_#2_Sparrow_12_47_0_1_1_1_1

New Line.l(r:p4udt2094-p4udt23350) Units=km Length=0.325074 bus1=p4udt23350.1 bus2=p4udt2094.1 switch=n enabled=y phases=1 Linecode=1P_OH_AL_ACSR_#2_Sparrow_12_47_0_1_1_1_1

New Line.l(r:p4udt11188-p4udt23350) Units=km Length=0.0854519 bus1=p4udt11188.1 bus2=p4udt23350.1 switch=n enabled=y phases=1 Linecode=1P_OH_AL_ACSR_#2_Sparrow_12_47_0_1_1_1_1

New Line.l(r:p4udt11188-p4udt19643)_s0 Units=km Length=0.119984 bus1=p4udt19643.1 bus2=p4udt11188-p4udt19643x.1 switch=n enabled=y phases=1 Linecode=1P_OH_AL_ACSR_#2_Sparrow_12_47_0_1_1_1_1

New Line.l(r:p4udt11188-p4udt19643)_s1 Units=km Length=0.0575572 bus1=p4udt11188-p4udt19643x.1 bus2=p4udt11188.1 switch=n enabled=y phases=1 Linecode=1P_OH_AL_ACSR_#2_Sparrow_12_47_0_1_1_1_1

New Line.l(r:p4udt10659-p4udt19643)_s0 Units=km Length=0.140493 bus1=p4udt10659-p4udt19643x.1 bus2=p4udt10659-p4udt19643xx.1 switch=n enabled=y phases=1 Linecode=1P_OH_AL_ACSR_#2_Sparrow_12_47_0_1_1_1_1

New Line.l(r:p4udt10659-p4udt19643)_s1 Units=km Length=0.15704 bus1=p4udt10659-p4udt19643xx.1 bus2=p4udt19643.1 switch=n enabled=y phases=1 Linecode=1P_OH_AL_ACSR_#2_Sparrow_12_47_0_1_1_1_1

New Line.l(r:p4udt13180-p4udt16283) Units=km Length=0.212314 bus1=p4udt13180-p4udt16283x.2 bus2=p4udt13180.2 switch=n enabled=y phases=1 Linecode=1P_OH_AL_ACSR_#2_Sparrow_12_47_0_1_1_1_1

New Line.l(r:p4udt10659-p4udt14706) Units=km Length=0.0799083 bus1=p4udt14706.1.2.3 bus2=p4udt10659.1.2.3 switch=n enabled=y phases=3 Linecode=3P_OH_AL_ACSR_4/0_Penguin_12_47_0_3_3_3_3

New Line.l(r:p4udt14706-p4udt2495) Units=km Length=0.0145232 bus1=p4udt2495.1.2.3 bus2=p4udt14706.1.2.3 switch=n enabled=y phases=3 Linecode=3P_OH_AL_ACSR_4/0_Penguin_12_47_0_3_3_3_3

New Line.l(r:p4udt2495-p4udt7865) Units=km Length=0.229143 bus1=p4udt7865.1.2.3 bus2=p4udt2495.1.2.3 switch=n enabled=y phases=3 Linecode=3P_OH_AL_ACSR_4/0_Penguin_12_47_0_3_3_3_3

New Line.l(r:p4udt23362-p4udt7865) Units=km Length=0.156431 bus1=p4udt23362.1.2.3 bus2=p4udt7865.1.2.3 switch=n enabled=y phases=3 Linecode=3P_OH_AL_ACSR_4/0_Penguin_12_47_0_3_3_3_3

New Line.l(r:p4udt18152-p4udt23362) Units=km Length=0.181379 bus1=p4udt18152.1.2.3 bus2=p4udt23362.1.2.3 switch=n enabled=y phases=3 Linecode=3P_OH_AL_ACSR_4/0_Penguin_12_47_0_3_3_3_3

New Line.l(r:p4udt10963-p4udt18152) Units=km Length=0.302707 bus1=p4udt10963.1.2.3 bus2=p4udt18152.1.2.3 switch=n enabled=y phases=3 Linecode=3P_OH_AL_ACSR_4/0_Penguin_12_47_0_3_3_3_3

New Line.l(r:p4udt10963-p4udt14278) Units=km Length=0.0956437 bus1=p4udt14278.1.2.3 bus2=p4udt10963.1.2.3 switch=n enabled=y phases=3 Linecode=3P_OH_AL_ACSR_4/0_Penguin_12_47_0_3_3_3_3

New Line.l(r:p4udt14278-p4udt2887) Units=km Length=0.0982467 bus1=p4udt2887.1.2.3 bus2=p4udt14278.1.2.3 switch=n enabled=y phases=3 Linecode=3P_OH_AL_ACSR_4/0_Penguin_12_47_0_3_3_3_3

New Line.l(r:p4udt16283-p4udt2887) Units=km Length=0.269039 bus1=p4udt16283.1.2.3 bus2=p4udt2887.1.2.3 switch=n enabled=y phases=3 Linecode=3P_OH_AL_ACSR_4/0_Penguin_12_47_0_3_3_3_3

New Line.l(r:p4udt16283-p4udt7866) Units=km Length=0.0350366 bus1=p4udt7866.1.2.3 bus2=p4udt16283.1.2.3 switch=n enabled=y phases=3 Linecode=3P_OH_AL_ACSR_4/0_Penguin_12_47_0_3_3_3_3

New Line.l(r:p4udt2496-p4udt7866) Units=km Length=0.0718761 bus1=p4udt2496.1.2.3 bus2=p4udt7866.1.2.3 switch=n enabled=y phases=3 Linecode=3P_OH_AL_ACSR_4/0_Penguin_12_47_0_3_3_3_3

New Line.l(r:p4udt11488-p4udt2496) Units=km Length=0.0387138 bus1=p4udt11488.1.2.3 bus2=p4udt2496.1.2.3 switch=n enabled=y phases=3 Linecode=3P_OH_AL_ACSR_4/0_Penguin_12_47_0_3_3_3_3

New Line.l(r:p4udt11488-p4udt3639) Units=km Length=0.0966702 bus1=p4udt3639.1.2.3 bus2=p4udt11488.1.2.3 switch=n enabled=y phases=3 Linecode=3P_OH_AL_ACSR_4/0_Penguin_12_47_0_3_3_3_3

New Line.l(r:p4udt3639-p4udt9291) Units=km Length=0.115683 bus1=p4udt9291.1.2.3 bus2=p4udt3639.1.2.3 switch=n enabled=y phases=3 Linecode=3P_OH_AL_ACSR_4/0_Penguin_12_47_0_3_3_3_3

New Line.l(r:p4udt9291-p4uhs11_1247) Units=km Length=0.306721 bus1=p4udt9291-p4uhs11_1247x.1.2.3 bus2=p4udt9291.1.2.3 switch=n enabled=y phases=3 Linecode=3P_OH_AL_ACSR_4/0_Penguin_12_47_0_3_3_3_3

New Line.l(r:p4udt2495lv-p4ulv2632) Units=km Length=0.0020662 bus1=p4udt2495lv.1.2.3 bus2=p4ulv2632.1.2.3 switch=n enabled=y phases=3 Linecode=3P_UG_AL_350kcmil_15_0_416_0_3_3_3_3

New Line.l(r:p4udt18648lv-p4ulv29859) Units=km Length=0.0826722 bus1=p4udt18648lv.1.2.3 bus2=p4ulv29859.1.2.3 switch=n enabled=y phases=3 Linecode=3P_UG_AL_350kcmil_15_0_416_0_3_3_3_3

New Line.l(r:p4udt10659-p4udt18648) Units=km Length=0.0483997 bus1=p4udt10659.1.2.3 bus2=p4udt18648.1.2.3 switch=n enabled=y phases=3 Linecode=3P_OH_AL_ACSR_4/0_Penguin_12_47_0_3_3_3_3

New Line.l(r:p4udm18913-p4ulv8939) Units=km Length=0.00880553 bus1=p4udm18913.1.2.3 bus2=p4ulv8939.1.2.3 switch=n enabled=y phases=3 Linecode=3P_UG_AL_750kcmil_25_0_416_0_3_3_3_3

New Line.l(r:p4udm18913-p4udt7559lv) Units=km Length=0.0469938 bus1=p4udt7559lv.1.2.3 bus2=p4udm18913.1.2.3 switch=n enabled=y phases=3 Linecode=3P_UG_AL_750kcmil_25_0_416_0_3_3_3_3

New Line.l(r:p4udm18914-p4ulv28609) Units=km Length=0.00881722 bus1=p4udm18914.1.2.3 bus2=p4ulv28609.1.2.3 switch=n enabled=y phases=3 Linecode=3P_UG_AL_350kcmil_15_0_416_0_3_3_3_3

New Line.l(r:p4udm18914-p4udt7559lv) Units=km Length=0.0278966 bus1=p4udt7559lv.1.2.3 bus2=p4udm18914.1.2.3 switch=n enabled=y phases=3 Linecode=3P_UG_AL_350kcmil_15_0_416_0_3_3_3_3

New Line.l(r:p4udt14277-p4udt7559) Units=km Length=0.104918 bus1=p4udt14277.1.2.3 bus2=p4udt7559.1.2.3 switch=n enabled=y phases=3 Linecode=3P_OH_AL_ACSR_4/0_Penguin_12_47_0_3_3_3_3

New Line.l(r:p4udt14277-p4udt7865) Units=km Length=0.24388800000000002 bus1=p4udt7865.1.2.3 bus2=p4udt14277.1.2.3 switch=n enabled=y phases=3 Linecode=3P_OH_AL_ACSR_4/0_Penguin_12_47_0_3_3_3_3

New Line.fuse(r:p4udt2495-p4udt4663)p4u_79852 Units=km Length=0.001 bus1=p4udt2495.2 bus2=p4udt2495-p4udt4663x.2 switch=n enabled=y phases=1 Linecode=fuse_1_1_1_1

New Fuse.Fuse_fuse(r:p4udt2495-p4udt4663)p4u_79852 monitoredobj=Line.fuse(r:p4udt2495-p4udt4663)p4u_79852 enabled=y ratedcurrent=100.0

New Line.fuse(r:p4udt2127-p4udt2496)p4u_79853 Units=km Length=0.001 bus1=p4udt2496.2 bus2=p4udt2127-p4udt2496xx.2 switch=n enabled=y phases=1 Linecode=fuse_1_6_1_1_1

New Fuse.Fuse_fuse(r:p4udt2127-p4udt2496)p4u_79853 monitoredobj=Line.fuse(r:p4udt2127-p4udt2496)p4u_79853 enabled=y ratedcurrent=100.0

New Line.fuse(r:p4udt2887-p4udt3253)p4u_79896 Units=km Length=0.001 bus1=p4udt2887.2 bus2=p4udt2887-p4udt3253x.2 switch=n enabled=y phases=1 Linecode=fuse_1_6_1_1_1

New Fuse.Fuse_fuse(r:p4udt2887-p4udt3253)p4u_79896 monitoredobj=Line.fuse(r:p4udt2887-p4udt3253)p4u_79896 enabled=y ratedcurrent=100.0

New Line.fuse(r:p4udt11729-p4udt7866)p4u_80381 Units=km Length=0.001 bus1=p4udt7866.2 bus2=p4udt11729-p4udt7866x.2 switch=n enabled=y phases=1 Linecode=fuse_1_6_1_1_1

New Fuse.Fuse_fuse(r:p4udt11729-p4udt7866)p4u_80381 monitoredobj=Line.fuse(r:p4udt11729-p4udt7866)p4u_80381 enabled=y ratedcurrent=100.0

New Line.fuse(r:p4udt9291-p4udt952)p4u_80526 Units=km Length=0.001 bus1=p4udt9291.1 bus2=p4udt9291-p4udt952x.1 switch=n enabled=y phases=1 Linecode=fuse_1_6_1_1_1

New Fuse.Fuse_fuse(r:p4udt9291-p4udt952)p4u_80526 monitoredobj=Line.fuse(r:p4udt9291-p4udt952)p4u_80526 enabled=y ratedcurrent=100.0

New Line.fuse(r:p4udt10659-p4udt9021)p4u_80643 Units=km Length=0.001 bus1=p4udt10659.2 bus2=p4udt10659-p4udt9021x.2 switch=n enabled=y phases=1 Linecode=fuse_1_6_1_3_1_1

New Fuse.Fuse_fuse(r:p4udt10659-p4udt9021)p4u_80643 monitoredobj=Line.fuse(r:p4udt10659-p4udt9021)p4u_80643 enabled=y ratedcurrent=100.0

New Line.fuse(r:p4udt10659-p4udt18294)p4u_80644 Units=km Length=0.001 bus1=p4udt10659.3 bus2=p4udt10659-p4udt18294x.3 switch=n enabled=y phases=1 Linecode=fuse_1_6_1_3_1_3_1

New Fuse.Fuse_fuse(r:p4udt10659-p4udt18294)p4u_80644 monitoredobj=Line.fuse(r:p4udt10659-p4udt18294)p4u_80644 enabled=y ratedcurrent=100.0

New Line.fuse(r:p4udt10659-p4udt19643)p4u_80645 Units=km Length=0.001 bus1=p4udt10659.1 bus2=p4udt10659-p4udt19643x.1 switch=n enabled=y phases=1 Linecode=fuse_1_6_1_3_1_3_1

New Fuse.Fuse_fuse(r:p4udt10659-p4udt19643)p4u_80645 monitoredobj=Line.fuse(r:p4udt10659-p4udt19643)p4u_80645 enabled=y ratedcurrent=100.0

New Line.fuse(r:p4udt10963-p4udt15332)p4u_80675 Units=km Length=0.001 bus1=p4udt10963.2 bus2=p4udt10963-p4udt15332x.2 switch=n enabled=y phases=1 Linecode=fuse_1_6_1_1_1

New Fuse.Fuse_fuse(r:p4udt10963-p4udt15332)p4u_80675 monitoredobj=Line.fuse(r:p4udt10963-p4udt15332)p4u_80675 enabled=y ratedcurrent=100.0

New Line.fuse(r:p4udt14278-p4udt8175)p4u_80984 Units=km Length=0.001 bus1=p4udt14278.2 bus2=p4udt14278-p4udt8175x.2 switch=n enabled=y phases=1 Linecode=fuse_1_6_1_1_1

New Fuse.Fuse_fuse(r:p4udt14278-p4udt8175)p4u_80984 monitoredobj=Line.fuse(r:p4udt14278-p4udt8175)p4u_80984 enabled=y ratedcurrent=100.0

New Line.fuse(r:p4udt16283-p4udt1757)p4u_81178 Units=km Length=0.001 bus1=p4udt16283.2 bus2=p4udt16283-p4udt1757x.2 switch=n enabled=y phases=1 Linecode=fuse_1_6_1_1_1

New Fuse.Fuse_fuse(r:p4udt16283-p4udt1757)p4u_81178 monitoredobj=Line.fuse(r:p4udt16283-p4udt1757)p4u_81178 enabled=y ratedcurrent=100.0

New Line.fuse(r:p4udt13180-p4udt16283)p4u_81179 Units=km Length=0.001 bus1=p4udt16283.2 bus2=p4udt13180-p4udt16283x.2 switch=n enabled=y phases=1 Linecode=fuse_1_6_1_1_1

New Fuse.Fuse_fuse(r:p4udt13180-p4udt16283)p4u_81179 monitoredobj=Line.fuse(r:p4udt13180-p4udt16283)p4u_81179 enabled=y ratedcurrent=100.0

New Line.fuse(r:p4udt18152-p4udt8174)p4u_81353 Units=km Length=0.001 bus1=p4udt18152.3 bus2=p4udt18152-p4udt8174x.3 switch=n enabled=y phases=1 Linecode=fuse_1_6_1_1_1

New Fuse.Fuse_fuse(r:p4udt18152-p4udt8174)p4u_81353 monitoredobj=Line.fuse(r:p4udt18152-p4udt8174)p4u_81353 enabled=y ratedcurrent=100.0

New Line.fuse(r:p4udt15744-p4udt18152)p4u_81354 Units=km Length=0.001 bus1=p4udt18152.1 bus2=p4udt15744-p4udt18152x.1 switch=n enabled=y phases=1 Linecode=fuse_1_6_1_1_1

New Fuse.Fuse_fuse(r:p4udt15744-p4udt18152)p4u_81354 monitoredobj=Line.fuse(r:p4udt15744-p4udt18152)p4u_81354 enabled=y ratedcurrent=100.0

New Line.fuse(r:p4udt18152-p4udt18153)p4u_81355 Units=km Length=0.001 bus1=p4udt18152.2 bus2=p4udt18152-p4udt18153x.2 switch=n enabled=y phases=1 Linecode=fuse_1_6_1_1_1

New Fuse.Fuse_fuse(r:p4udt18152-p4udt18153)p4u_81355 monitoredobj=Line.fuse(r:p4udt18152-p4udt18153)p4u_81355 enabled=y ratedcurrent=100.0

New Line.fuse(r:p4udt18648-p4udt19944)p4u_81400 Units=km Length=0.001 bus1=p4udt18648.1 bus2=p4udt18648-p4udt19944x.1 switch=n enabled=y phases=1 Linecode=fuse_1_6_1_1_1

New Fuse.Fuse_fuse(r:p4udt18648-p4udt19944)p4u_81400 monitoredobj=Line.fuse(r:p4udt18648-p4udt19944)p4u_81400 enabled=y ratedcurrent=100.0
