New Capacitor.p4uc76 Bus1=p4udt12021 phases=3 Kv=12.47 conn=Wye Kvar=300.0

New CapControl.p4uc76 Capacitor=p4uc76 Element=Line.l(r:p4udt12021-p4udt9084) Terminal=1 delay=100.0 Type=voltage Vmin=120.5 Vmax=125.0 Ptratio=59.99631547328862 Ctratio=100.0
