New Capacitor.p4uc74 Bus1=p4udt7933 phases=3 Kv=12.47 conn=Wye Kvar=300.0

New CapControl.p4uc74 Capacitor=p4uc74 Element=Line.l(r:p4udt20621-p4udt7933) Terminal=1 delay=100.0 Type=voltage Vmin=120.5 Vmax=125.0 Ptratio=59.99631547328862 Ctratio=100.0

New Capacitor.p4uc77 Bus1=p4udt15177 phases=3 Kv=12.47 conn=Wye Kvar=300.0

New CapControl.p4uc77 Capacitor=p4uc77 Element=Line.l(r:p4udt12014-p4udt15177) Terminal=1 delay=100.0 Type=voltage Vmin=120.5 Vmax=125.0 Ptratio=59.99631547328862 Ctratio=100.0
