New Capacitor.p4uc75 Bus1=p4udt2571 phases=3 Kv=12.47 conn=Wye Kvar=300.0

New CapControl.p4uc75 Capacitor=p4uc75 Element=Line.padswitch(r:p4udt22096-p4udt2571)p4u_72044 Terminal=1 delay=100.0 Type=voltage Vmin=120.5 Vmax=125.0 Ptratio=59.99631547328862 Ctratio=100.0

New Capacitor.p4uc78 Bus1=p4udt983 phases=3 Kv=12.47 conn=Wye Kvar=300.0

New CapControl.p4uc78 Capacitor=p4uc78 Element=Line.l(r:p4udt12494-p4udt983) Terminal=1 delay=100.0 Type=voltage Vmin=120.5 Vmax=125.0 Ptratio=59.99631547328862 Ctratio=100.0
