New Capacitor.p4uc79 Bus1=p4udt4751 phases=3 Kv=12.47 conn=Wye Kvar=450.0

New CapControl.p4uc79 Capacitor=p4uc79 Element=Line.padswitch(r:p4udt20158-p4udt4751)p4u_73341 Terminal=1 delay=100.0 Type=voltage Vmin=120.5 Vmax=125.0 Ptratio=59.99631547328862 Ctratio=100.0
