New Capacitor.p4uc80 Bus1=p4udt9935 phases=3 Kv=12.47 conn=Wye Kvar=450.0

New CapControl.p4uc80 Capacitor=p4uc80 Element=Line.l(r:p4udt17255-p4udt9935) Terminal=1 delay=100.0 Type=voltage Vmin=120.5 Vmax=125.0 Ptratio=59.99631547328862 Ctratio=100.0

New Capacitor.p4uc81 Bus1=p4udt15164 phases=3 Kv=12.47 conn=Wye Kvar=300.0

New CapControl.p4uc81 Capacitor=p4uc81 Element=Line.padswitch(r:p4udt15164-p4udt2917)p4u_74246 Terminal=1 delay=100.0 Type=voltage Vmin=120.5 Vmax=125.0 Ptratio=59.99631547328862 Ctratio=100.0
