Clear

New Circuit.substation_p4uhs14_69 bus1=p4uhs14_69 pu=1.0 basekV=69.0 R1=1e-05 X1=1e-05 R0=1e-05 X0=1e-05

Redirect Transformers.dss
Redirect p4uhs14_1247--p4udt9634/Transformers.dss
Redirect p4uhs14_1247--p4udt19383/Transformers.dss
Redirect Regulators.dss
Redirect p4uhs14_1247--p4udt9634/Loads.dss
Redirect p4uhs14_1247--p4udt19383/Loads.dss
Redirect LineCodes.dss
Redirect p4uhs14_1247--p4udt9634/LineCodes.dss
Redirect p4uhs14_1247--p4udt19383/LineCodes.dss
Redirect Lines.dss
Redirect p4uhs14_1247--p4udt9634/Lines.dss
Redirect p4uhs14_1247--p4udt19383/Lines.dss
Redirect p4uhs14_1247--p4udt9634/Capacitors.dss

Set Voltagebases=[0.2080002494301389, 0.48, 7.199560000000001, 12.47, 69.0]

Calcvoltagebases

Buscoords Buscoords.dss

Solve
