New Capacitor.p4uc88 Bus1=p4udt7389 phases=3 Kv=12.47 conn=Wye Kvar=300.0

New CapControl.p4uc88 Capacitor=p4uc88 Element=Line.l(r:p4udt1883-p4udt7389) Terminal=1 delay=100.0 Type=voltage Vmin=120.5 Vmax=125.0 Ptratio=59.99631547328862 Ctratio=100.0
