New Line.l(r:p4udt20507-p4uhs15_1247) Units=km Length=0.198266 bus1=p4udt20507-p4uhs15_1247x.1.2.3 bus2=p4udt20507.1.2.3 switch=n enabled=y phases=3 Linecode=3P_OH_AL_ACSR_4/0_Penguin_12_47_0_3_3_3_3

New Line.l(r:p4udt20507lv-p4ulv34681) Units=km Length=0.0574373 bus1=p4udt20507lv.1.2.3 bus2=p4ulv34681.1.2.3 switch=n enabled=y phases=3 Linecode=3P_UG_AL_4/0_15_0_416_0_3_3_3_3

New Line.l(r:p4udt14999lv-p4ulv21596) Units=km Length=0.001 bus1=p4udt14999lv.1.2.3 bus2=p4ulv21596.1.2.3 switch=n enabled=y phases=3 Linecode=3P_UG_AL_4/0_15_0_416_0_3_3_3_3

New Line.l(r:p4udt8260lv-p4ulv9932) Units=km Length=0.001 bus1=p4udt8260lv.1.2.3 bus2=p4ulv9932.1.2.3 switch=n enabled=y phases=3 Linecode=3P_UG_AL_4/0_15_0_416_0_3_3_3_3

New Line.l(r:p4udt5467lv-p4ulv6142) Units=km Length=0.0182667 bus1=p4udt5467lv.1.2.3 bus2=p4ulv6142.1.2.3 switch=n enabled=y phases=3 Linecode=3P_UG_AL_4/0_15_0_416_0_3_3_3_3

New Line.l(r:p4udt16551lv-p4ulv24887) Units=km Length=0.0183204 bus1=p4udt16551lv.1.2.3 bus2=p4ulv24887.1.2.3 switch=n enabled=y phases=3 Linecode=3P_UG_AL_4/0_15_0_416_0_3_3_3_3

New Line.l(r:p4udt689lv-p4ulv702) Units=km Length=0.050558 bus1=p4udt689lv.1.2.3 bus2=p4ulv702.1.2.3 switch=n enabled=y phases=3 Linecode=3P_UG_AL_4/0_15_0_416_0_3_3_3_3

New Line.l(r:p4udt15000lv-p4ulv21597) Units=km Length=0.001 bus1=p4udt15000lv.1.2.3 bus2=p4ulv21597.1.2.3 switch=n enabled=y phases=3 Linecode=3P_UG_AL_4/0_15_0_416_0_3_3_3_3

New Line.l(r:p4udt1087lv-p4ulv1117) Units=km Length=0.0829806 bus1=p4udt1087lv.1.2.3 bus2=p4ulv1117.1.2.3 switch=n enabled=y phases=3 Linecode=3P_UG_AL_4/0_15_0_416_0_3_3_3_3

New Line.l(r:p4udt18720lv-p4ulv30017) Units=km Length=0.0783536 bus1=p4udt18720lv.1.2.3 bus2=p4ulv30017.1.2.3 switch=n enabled=y phases=3 Linecode=3P_UG_AL_4/0_15_0_416_0_3_3_3_3

New Line.l(r:p4udt22272lv-p4ulv39680) Units=km Length=0.0242039 bus1=p4udt22272lv.1.2.3 bus2=p4ulv39680.1.2.3 switch=n enabled=y phases=3 Linecode=3P_UG_AL_4/0_15_0_416_0_3_3_3_3

New Line.l(r:p4udt1086lv-p4ulv1116) Units=km Length=0.001 bus1=p4udt1086lv.1.2.3 bus2=p4ulv1116.1.2.3 switch=n enabled=y phases=3 Linecode=3P_UG_AL_4/0_15_0_416_0_3_3_3_3

New Line.l(r:p4udt1086-p4udt22272) Units=km Length=0.210306 bus1=p4udt22272.1.2.3 bus2=p4udt1086.1.2.3 switch=n enabled=y phases=3 Linecode=3P_OH_AL_ACSR_4/0_Penguin_12_47_0_3_3_3_3

New Line.l(r:p4udt21356lv-p4ulv37158) Units=km Length=0.0258 bus1=p4udt21356lv.1.2.3 bus2=p4ulv37158.1.2.3 switch=n enabled=y phases=3 Linecode=3P_UG_AL_4/0_15_0_416_0_3_3_3_3

New Line.l(r:p4udt13263lv-p4ulv18183) Units=km Length=0.0159472 bus1=p4udt13263lv.1.2.3 bus2=p4ulv18183.1.2.3 switch=n enabled=y phases=3 Linecode=3P_UG_AL_4/0_15_0_416_0_3_3_3_3

New Line.l(r:p4udt10498lv-p4ulv13399) Units=km Length=0.0162478 bus1=p4udt10498lv.1.2.3 bus2=p4ulv13399.1.2.3 switch=n enabled=y phases=3 Linecode=3P_UG_AL_4/0_15_0_416_0_3_3_3_3

New Line.l(r:p4udt22400lv-p4ulv40088) Units=km Length=0.0138644 bus1=p4udt22400lv.1.2.3 bus2=p4ulv40088.1.2.3 switch=n enabled=y phases=3 Linecode=3P_UG_AL_4/0_15_0_416_0_3_3_3_3

New Line.l(r:p4udt18549lv-p4ulv29597) Units=km Length=0.0632484 bus1=p4udt18549lv.1.2.3 bus2=p4ulv29597.1.2.3 switch=n enabled=y phases=3 Linecode=3P_UG_AL_4/0_15_0_416_0_3_3_3_3

New Line.l(r:p4udt18549lv-p4ulv30016) Units=km Length=0.0632484 bus1=p4udt18549lv.1.2.3 bus2=p4ulv30016.1.2.3 switch=n enabled=y phases=3 Linecode=3P_UG_AL_4/0_15_0_416_0_3_3_3_3

New Line.l(r:p4udt6132lv-p4ulv6980) Units=km Length=0.001 bus1=p4udt6132lv.1.2.3 bus2=p4ulv6980.1.2.3 switch=n enabled=y phases=3 Linecode=3P_UG_AL_4/0_15_0_416_0_3_3_3_3

New Line.l(r:p4udt18549-p4udt6132) Units=km Length=0.208338 bus1=p4udt18549.1.2.3 bus2=p4udt6132.1.2.3 switch=n enabled=y phases=3 Linecode=3P_OH_AL_ACSR_4/0_Penguin_12_47_0_3_3_3_3

New Line.l(r:p4udt20341lv-p4ulv34244) Units=km Length=0.001 bus1=p4udt20341lv.1.2.3 bus2=p4ulv34244.1.2.3 switch=n enabled=y phases=3 Linecode=3P_UG_AL_4/0_15_0_416_0_3_3_3_3

New Line.l(r:p4udt18549-p4udt20341) Units=km Length=0.121619 bus1=p4udt18549.1.2.3 bus2=p4udt20341.1.2.3 switch=n enabled=y phases=3 Linecode=3P_OH_AL_ACSR_4/0_Penguin_12_47_0_3_3_3_3

New Line.l(r:p4udt18549-p4udt22400) Units=km Length=0.156688 bus1=p4udt22400.1.2.3 bus2=p4udt18549.1.2.3 switch=n enabled=y phases=3 Linecode=3P_OH_AL_ACSR_4/0_Penguin_12_47_0_3_3_3_3

New Line.l(r:p4udt20786lv-p4ulv35490) Units=km Length=0.001 bus1=p4udt20786lv.1.2.3 bus2=p4ulv35490.1.2.3 switch=n enabled=y phases=3 Linecode=3P_UG_AL_4/0_15_0_416_0_3_3_3_3

New Line.l(r:p4udt20786-p4udt22400) Units=km Length=0.158614 bus1=p4udt22400.1.2.3 bus2=p4udt20786.1.2.3 switch=n enabled=y phases=3 Linecode=3P_OH_AL_ACSR_4/0_Penguin_12_47_0_3_3_3_3

New Line.l(r:p4udt21355lv-p4ulv37157) Units=km Length=0.001 bus1=p4udt21355lv.1.2.3 bus2=p4ulv37157.1.2.3 switch=n enabled=y phases=3 Linecode=3P_UG_AL_4/0_15_0_416_0_3_3_3_3

New Line.l(r:p4udt21355-p4udt22400) Units=km Length=0.26643 bus1=p4udt22400.1.2.3 bus2=p4udt21355.1.2.3 switch=n enabled=y phases=3 Linecode=3P_OH_AL_ACSR_4/0_Penguin_12_47_0_3_3_3_3

New Line.l(r:p4udt10498-p4udt22400) Units=km Length=0.0550643 bus1=p4udt10498.1.2.3 bus2=p4udt22400.1.2.3 switch=n enabled=y phases=3 Linecode=3P_OH_AL_ACSR_4/0_Penguin_12_47_0_3_3_3_3

New Line.l(r:p4udt10498-p4udt13263) Units=km Length=0.199119 bus1=p4udt13263.1.2.3 bus2=p4udt10498.1.2.3 switch=n enabled=y phases=3 Linecode=3P_OH_AL_ACSR_4/0_Penguin_12_47_0_3_3_3_3

New Line.l(r:p4udt21531lv-p4ulv42183) Units=km Length=0.0302058 bus1=p4udt21531lv.1.2.3 bus2=p4ulv42183.1.2.3 switch=n enabled=y phases=3 Linecode=3P_UG_AL_4/0_15_0_416_0_3_3_3_3

New Line.l(r:p4udm41336-p4ulv37594) Units=km Length=0.00791884 bus1=p4udm41336.1.2.3 bus2=p4ulv37594.1.2.3 switch=n enabled=y phases=3 Linecode=3P_UG_AL_4/0_15_0_416_0_3_3_3_3

New Line.l(r:p4udm41336-p4udt21531lv) Units=km Length=0.00856403 bus1=p4udt21531lv.1.2.3 bus2=p4udm41336.1.2.3 switch=n enabled=y phases=3 Linecode=3P_UG_AL_4/0_15_0_416_0_3_3_3_3

New Line.l(r:p4udt16719lv-p4ulv25277) Units=km Length=0.0355355 bus1=p4udt16719lv.1.2.3 bus2=p4ulv25277.1.2.3 switch=n enabled=y phases=3 Linecode=3P_UG_AL_4/0_15_0_416_0_3_3_3_3

New Line.l(r:p4udt16719-p4udt21531) Units=km Length=0.014436000000000001 bus1=p4udt21531.1.2.3 bus2=p4udt16719.1.2.3 switch=n enabled=y phases=3 Linecode=3P_OH_AL_ACSR_4/0_Penguin_12_47_0_3_3_3_3

New Line.l(r:p4udt13263-p4udt21531) Units=km Length=0.268047 bus1=p4udt13263.1.2.3 bus2=p4udt21531.1.2.3 switch=n enabled=y phases=3 Linecode=3P_OH_AL_ACSR_4/0_Penguin_12_47_0_3_3_3_3

New Line.l(r:p4udt13263-p4udt21356) Units=km Length=0.12111 bus1=p4udt21356.1.2.3 bus2=p4udt13263.1.2.3 switch=n enabled=y phases=3 Linecode=3P_OH_AL_ACSR_4/0_Penguin_12_47_0_3_3_3_3

New Line.l(r:p4udt21356-p4udt22272) Units=km Length=0.13751400000000003 bus1=p4udt22272.1.2.3 bus2=p4udt21356.1.2.3 switch=n enabled=y phases=3 Linecode=3P_OH_AL_ACSR_4/0_Penguin_12_47_0_3_3_3_3

New Line.l(r:p4udt18720-p4udt22272) Units=km Length=0.0196365 bus1=p4udt18720.1.2.3 bus2=p4udt22272.1.2.3 switch=n enabled=y phases=3 Linecode=3P_OH_AL_ACSR_4/0_Penguin_12_47_0_3_3_3_3

New Line.l(r:p4udt1087-p4udt18720) Units=km Length=0.0392896 bus1=p4udt1087.1.2.3 bus2=p4udt18720.1.2.3 switch=n enabled=y phases=3 Linecode=3P_OH_AL_ACSR_4/0_Penguin_12_47_0_3_3_3_3

New Line.l(r:p4udt1087-p4udt15000) Units=km Length=0.279567 bus1=p4udt15000.1.2.3 bus2=p4udt1087.1.2.3 switch=n enabled=y phases=3 Linecode=3P_OH_AL_ACSR_4/0_Penguin_12_47_0_3_3_3_3

New Line.l(r:p4udt15000-p4udt689) Units=km Length=0.408175 bus1=p4udt689.1.2.3 bus2=p4udt15000.1.2.3 switch=n enabled=y phases=3 Linecode=3P_OH_AL_ACSR_4/0_Penguin_12_47_0_3_3_3_3

New Line.l(r:p4udt15822lv-p4ulv23282) Units=km Length=0.001 bus1=p4udt15822lv.1.2.3 bus2=p4ulv23282.1.2.3 switch=n enabled=y phases=3 Linecode=3P_UG_AL_4/0_15_0_416_0_3_3_3_3

New Line.l(r:p4udt15822-p4udt689) Units=km Length=0.384713 bus1=p4udt689.1.2.3 bus2=p4udt15822.1.2.3 switch=n enabled=y phases=3 Linecode=3P_OH_AL_ACSR_4/0_Penguin_12_47_0_3_3_3_3

New Line.l(r:p4udt16551-p4udt689) Units=km Length=0.0381037 bus1=p4udt16551.1.2.3 bus2=p4udt689.1.2.3 switch=n enabled=y phases=3 Linecode=3P_OH_AL_ACSR_4/0_Penguin_12_47_0_3_3_3_3

New Line.l(r:p4udt16551-p4udt5467) Units=km Length=0.0190563 bus1=p4udt5467.1.2.3 bus2=p4udt16551.1.2.3 switch=n enabled=y phases=3 Linecode=3P_OH_AL_ACSR_4/0_Penguin_12_47_0_3_3_3_3

New Line.l(r:p4udt5467-p4udt8260) Units=km Length=0.11044400000000001 bus1=p4udt8260.1.2.3 bus2=p4udt8260_b1_1.1.2.3 switch=n enabled=y phases=3 Linecode=3P_OH_AL_ACSR_4/0_Penguin_12_47_0_3_3_3_3

New Line.l(r:p4udt14999-p4udt8260) Units=km Length=0.194674 bus1=p4udt14999.1.2.3 bus2=p4udt8260.1.2.3 switch=n enabled=y phases=3 Linecode=3P_OH_AL_ACSR_4/0_Penguin_12_47_0_3_3_3_3

New Line.l(r:p4udt20340lv-p4ulv34243) Units=km Length=0.001 bus1=p4udt20340lv.1.2.3 bus2=p4ulv34243.1.2.3 switch=n enabled=y phases=3 Linecode=3P_UG_AL_4/0_15_0_416_0_3_3_3_3

New Line.l(r:p4udt14999-p4udt20340) Units=km Length=0.10924000000000002 bus1=p4udt14999.1.2.3 bus2=p4udt20340.1.2.3 switch=n enabled=y phases=3 Linecode=3P_OH_AL_ACSR_4/0_Penguin_12_47_0_3_3_3_3

New Line.l(r:p4udt14999-p4udt20507) Units=km Length=0.49532200000000004 bus1=p4udt20507.1.2.3 bus2=p4udt14999.1.2.3 switch=n enabled=y phases=3 Linecode=3P_OH_AL_ACSR_4/0_Penguin_12_47_0_3_3_3_3

New Line.l(r:p4udt21674lv-p4ulv38021) Units=km Length=0.001 bus1=p4udt21674lv.1.2.3 bus2=p4ulv38021.1.2.3 switch=n enabled=y phases=3 Linecode=3P_UG_AL_4/0_15_0_416_0_3_3_3_3

New Line.l(r:p4udt20507-p4udt21674) Units=km Length=0.374675 bus1=p4udt20507.1.2.3 bus2=p4udt21674.1.2.3 switch=n enabled=y phases=3 Linecode=3P_OH_AL_ACSR_4/0_Penguin_12_47_0_3_3_3_3

New Line.l(r:p4udt1087-p4udt20179) Units=km Length=0.639968 bus1=p4udt1087-p4udt20179x.1.2.3 bus2=p4udt1087.1.2.3 switch=n enabled=y phases=3 Linecode=3P_OH_AL_ACSR_1033kcmil_Curlew_12.47_1_3_3_3_3

New Line.l(r:p4udt5467-p4udt8260)_disconnect Units=km Length=0.001 bus1=p4udt8260_b1_1.1.2.3 bus2=p4udt8260_b2_1.1.2.3 switch=y enabled=y phases=3 Linecode=3P_OH_AL_ACSR_4/0_Penguin_12_47_0_3_3_3_3

New Line.l(r:p4udt5467-p4udt8260)_cont Units=km Length=1.0029960000000002 bus1=p4udt8260_b2_1.1.2.3 bus2=p4udt5467.1.2.3 switch=n enabled=y phases=3 Linecode=3P_OH_AL_ACSR_4/0_Penguin_12_47_0_3_3_3_3
