New Capacitor.p4uc97 Bus1=p4udt6223 phases=3 Kv=12.47 conn=Wye Kvar=600.0

New CapControl.p4uc97 Capacitor=p4uc97 Element=Line.l(r:p4udt6223-p4uhs16_1247)_cont Terminal=1 delay=100.0 Type=voltage Vmin=120.5 Vmax=125.0 Ptratio=59.99631547328862 Ctratio=100.0
