New Line.l(r:p4udt6223-p4uhs16_1247) Units=km Length=0.45886800000000005 bus1=p4udt6223-p4uhs16_1247x.1.2.3 bus2=p4udt6223-p4uhs16_1247x_b1_1.1.2.3 switch=n enabled=y phases=3 Linecode=3P_OH_AL_ACSR_4/0_Penguin_12_47_0_3_3_3_3

New Line.l(r:p4udt6223lv-p4ulv7108) Units=km Length=0.001 bus1=p4udt6223lv.1.2.3 bus2=p4ulv7108.1.2.3 switch=n enabled=y phases=3 Linecode=3P_UG_AL_4/0_15_0_416_0_3_3_3_3

New Line.l(r:p4udt1237lv-p4ulv1276) Units=km Length=0.0226618 bus1=p4udt1237lv.1.2.3 bus2=p4ulv1276.1.2.3 switch=n enabled=y phases=3 Linecode=3P_UG_AL_4/0_15_0_416_0_3_3_3_3

New Line.l(r:p4udt1237lv-p4ulv9242) Units=km Length=0.0369312 bus1=p4udt1237lv.1.2.3 bus2=p4ulv9242.1.2.3 switch=n enabled=y phases=3 Linecode=3P_UG_AL_4/0_15_0_416_0_3_3_3_3

New Line.l(r:p4udt1237lv-p4ulv16618) Units=km Length=0.0246761 bus1=p4udt1237lv.1.2.3 bus2=p4ulv16618.1.2.3 switch=n enabled=y phases=3 Linecode=3P_UG_AL_4/0_15_0_416_0_3_3_3_3

New Line.l(r:p4udt1238lv-p4ulv1277) Units=km Length=0.0430723 bus1=p4udt1238lv.1.2.3 bus2=p4ulv1277.1.2.3 switch=n enabled=y phases=3 Linecode=3P_UG_AL_4/0_15_0_416_0_3_3_3_3

New Line.l(r:p4udt11894lv-p4ulv15734) Units=km Length=0.0249567 bus1=p4udt11894lv.1.2.3 bus2=p4ulv15734.1.2.3 switch=n enabled=y phases=3 Linecode=3P_UG_AL_4/0_15_0_416_0_3_3_3_3

New Line.l(r:p4udt10594lv-p4ulv13565) Units=km Length=0.035078 bus1=p4udt10594lv.1.2.3 bus2=p4ulv13565.1.2.3 switch=n enabled=y phases=3 Linecode=3P_UG_AL_4/0_15_0_416_0_3_3_3_3

New Line.l(r:p4udt9780lv-p4ulv12251) Units=km Length=0.0252374 bus1=p4udt9780lv.1.2.3 bus2=p4ulv12251.1.2.3 switch=n enabled=y phases=3 Linecode=3P_UG_AL_4/0_15_0_416_0_3_3_3_3

New Line.l(r:p4udt10594-p4udt9780) Units=km Length=0.111836 bus1=p4udt10594.1.2.3 bus2=p4udt9780.1.2.3 switch=n enabled=y phases=3 Linecode=3P_OH_AL_ACSR_4/0_Penguin_12_47_0_3_3_3_3

New Line.l(r:p4udt10594-p4udt11894) Units=km Length=0.0625084 bus1=p4udt11894.1.2.3 bus2=p4udt10594.1.2.3 switch=n enabled=y phases=3 Linecode=3P_OH_AL_ACSR_4/0_Penguin_12_47_0_3_3_3_3

New Line.l(r:p4udt14218lv-p4ulv33108) Units=km Length=0.09025060000000001 bus1=p4udt14218lv.1.2.3 bus2=p4ulv33108.1.2.3 switch=n enabled=y phases=3 Linecode=3P_UG_AL_4/0_15_0_416_0_3_3_3_3

New Line.l(r:p4udm31559-p4ulv20029) Units=km Length=0.0598631 bus1=p4udm31559.1.2.3 bus2=p4ulv20029.1.2.3 switch=n enabled=y phases=3 Linecode=3P_UG_AL_4/0_15_0_416_0_3_3_3_3

New Line.l(r:p4udm31559-p4udt14218lv) Units=km Length=0.0180091 bus1=p4udt14218lv.1.2.3 bus2=p4udm31559.1.2.3 switch=n enabled=y phases=3 Linecode=3P_UG_AL_4/0_15_0_416_0_3_3_3_3

New Line.l(r:p4udm31561-p4ulv43619) Units=km Length=0.0526505 bus1=p4udm31561.1.2.3 bus2=p4ulv43619.1.2.3 switch=n enabled=y phases=3 Linecode=3P_UG_AL_4/0_15_0_416_0_3_3_3_3

New Line.l(r:p4udm31561-p4udt14218lv) Units=km Length=0.0360046 bus1=p4udt14218lv.1.2.3 bus2=p4udm31561.1.2.3 switch=n enabled=y phases=3 Linecode=3P_UG_AL_4/0_15_0_416_0_3_3_3_3

New Line.l(r:p4udt12658lv-p4ulv29757) Units=km Length=0.0504835 bus1=p4udt12658lv.1.2.3 bus2=p4ulv29757.1.2.3 switch=n enabled=y phases=3 Linecode=3P_UG_AL_4/0_15_0_416_0_3_3_3_3

New Line.l(r:p4udm28929-p4ulv17070) Units=km Length=0.043528500000000005 bus1=p4udm28929.1.2.3 bus2=p4ulv17070.1.2.3 switch=n enabled=y phases=3 Linecode=3P_UG_AL_4/0_15_0_416_0_3_3_3_3

New Line.l(r:p4udm28929-p4udt12658lv) Units=km Length=0.0179954 bus1=p4udt12658lv.1.2.3 bus2=p4udm28929.1.2.3 switch=n enabled=y phases=3 Linecode=3P_UG_AL_4/0_15_0_416_0_3_3_3_3

New Line.l(r:p4udt10058lv-p4ulv12687) Units=km Length=0.0254088 bus1=p4udt10058lv.1.2.3 bus2=p4ulv12687.1.2.3 switch=n enabled=y phases=3 Linecode=3P_UG_AL_4/0_15_0_416_0_3_3_3_3

New Line.l(r:p4udt10058-p4udt12658) Units=km Length=0.0193596 bus1=p4udt12658.1.2.3 bus2=p4udt10058.1.2.3 switch=n enabled=y phases=3 Linecode=3P_OH_AL_ACSR_4/0_Penguin_12_47_0_3_3_3_3

New Line.l(r:p4udt12658-p4udt14218) Units=km Length=0.10800500000000002 bus1=p4udt14218.1.2.3 bus2=p4udt12658.1.2.3 switch=n enabled=y phases=3 Linecode=3P_OH_AL_ACSR_4/0_Penguin_12_47_0_3_3_3_3

New Line.l(r:p4udt11894-p4udt14218) Units=km Length=0.0914343 bus1=p4udt11894.1.2.3 bus2=p4udt14218.1.2.3 switch=n enabled=y phases=3 Linecode=3P_OH_AL_ACSR_4/0_Penguin_12_47_0_3_3_3_3

New Line.l(r:p4udt11894-p4udt1238)_s0 Units=km Length=0.142019 bus1=p4udt1238.1.2.3 bus2=p4udt11894-p4udt1238xx.1.2.3 switch=n enabled=y phases=3 Linecode=3P_OH_AL_ACSR_4/0_Penguin_12_47_0_3_3_3_3

New Line.l(r:p4udt11894-p4udt1238)_s1 Units=km Length=0.001 bus1=p4udt11894-p4udt1238xx.1.2.3 bus2=p4udt11894-p4udt1238x.1.2.3 switch=n enabled=y phases=3 Linecode=3P_OH_AL_ACSR_4/0_Penguin_12_47_0_3_3_3_3

New Line.l(r:p4udt11894-p4udt1238)_s2 Units=km Length=0.137733 bus1=p4udt11894-p4udt1238x.1.2.3 bus2=p4udt11894.1.2.3 switch=n enabled=y phases=3 Linecode=3P_OH_AL_ACSR_4/0_Penguin_12_47_0_3_3_3_3

New Line.l(r:p4udt1237-p4udt1238) Units=km Length=0.086652 bus1=p4udt1237.1.2.3 bus2=p4udt1238.1.2.3 switch=n enabled=y phases=3 Linecode=3P_OH_AL_ACSR_4/0_Penguin_12_47_0_3_3_3_3

New Line.l(r:p4udt22319lv-p4ulv39826) Units=km Length=0.0574505 bus1=p4udt22319lv.1.2.3 bus2=p4ulv39826.1.2.3 switch=n enabled=y phases=3 Linecode=3P_UG_AL_4/0_15_0_416_0_3_3_3_3

New Line.l(r:p4udt4220lv-p4ulv8826) Units=km Length=0.0562276 bus1=p4udt4220lv.1.2.3 bus2=p4ulv8826.1.2.3 switch=n enabled=y phases=3 Linecode=3P_UG_AL_4/0_15_0_416_0_3_3_3_3

New Line.l(r:p4udm11007-p4ulv4606) Units=km Length=0.0473162 bus1=p4udm11007.1.2.3 bus2=p4ulv4606.1.2.3 switch=n enabled=y phases=3 Linecode=3P_UG_AL_4/0_15_0_416_0_3_3_3_3

New Line.l(r:p4udm11007-p4udt4220lv) Units=km Length=0.0199231 bus1=p4udt4220lv.1.2.3 bus2=p4udm11007.1.2.3 switch=n enabled=y phases=3 Linecode=3P_UG_AL_4/0_15_0_416_0_3_3_3_3

New Line.l(r:p4udt14848lv-p4ulv21323) Units=km Length=0.0711587 bus1=p4udt14848lv.1.2.3 bus2=p4ulv21323.1.2.3 switch=n enabled=y phases=3 Linecode=3P_UG_AL_4/0_15_0_416_0_3_3_3_3

New Line.l(r:p4udt21405lv-p4ulv37327) Units=km Length=0.0880378 bus1=p4udt21405lv.1.2.3 bus2=p4ulv37327.1.2.3 switch=n enabled=y phases=3 Linecode=3P_UG_AL_4/0_15_0_416_0_3_3_3_3

New Line.l(r:p4udt14430lv-p4ulv20456) Units=km Length=0.001 bus1=p4udt14430lv.1.2.3 bus2=p4ulv20456.1.2.3 switch=n enabled=y phases=3 Linecode=3P_UG_AL_4/0_15_0_416_0_3_3_3_3

New Line.l(r:p4udt17737lv-p4ulv27640) Units=km Length=0.001 bus1=p4udt17737lv.1.2.3 bus2=p4ulv27640.1.2.3 switch=n enabled=y phases=3 Linecode=3P_UG_AL_4/0_15_0_416_0_3_3_3_3

New Line.l(r:p4udt14430-p4udt17737) Units=km Length=0.08754930000000001 bus1=p4udt14430.1.2.3 bus2=p4udt17737.1.2.3 switch=n enabled=y phases=3 Linecode=3P_OH_AL_ACSR_4/0_Penguin_12_47_0_3_3_3_3

New Line.l(r:p4udt14430-p4udt21405)_s0 Units=km Length=0.211866 bus1=p4udt21405.1.2.3 bus2=p4udt14430-p4udt21405x.1.2.3 switch=n enabled=y phases=3 Linecode=3P_OH_AL_ACSR_4/0_Penguin_12_47_0_3_3_3_3

New Line.l(r:p4udt14430-p4udt21405)_s1 Units=km Length=0.0418157 bus1=p4udt14430-p4udt21405x.1.2.3 bus2=p4udt14430.1.2.3 switch=n enabled=y phases=3 Linecode=3P_OH_AL_ACSR_4/0_Penguin_12_47_0_3_3_3_3

New Line.l(r:p4udt19762lv-p4ulv32682) Units=km Length=0.0221976 bus1=p4udt19762lv.1.2.3 bus2=p4ulv32682.1.2.3 switch=n enabled=y phases=3 Linecode=3P_UG_AL_4/0_15_0_416_0_3_3_3_3

New Line.l(r:p4udt21727lv-p4ulv38190) Units=km Length=0.0558219 bus1=p4udt21727lv.1.2.3 bus2=p4ulv38190.1.2.3 switch=n enabled=y phases=3 Linecode=3P_UG_AL_4/0_15_0_416_0_3_3_3_3

New Line.l(r:p4udt11384lv-p4ulv14847) Units=km Length=0.0196536 bus1=p4udt11384lv.1.2.3 bus2=p4ulv14847.1.2.3 switch=n enabled=y phases=3 Linecode=3P_UG_AL_4/0_15_0_416_0_3_3_3_3

New Line.l(r:p4udt15688lv-p4ulv23025) Units=km Length=0.0483261 bus1=p4udt15688lv.1.2.3 bus2=p4ulv23025.1.2.3 switch=n enabled=y phases=3 Linecode=3P_UG_AL_4/0_15_0_416_0_3_3_3_3

New Line.l(r:p4udt2770lv-p4ulv2947) Units=km Length=0.0551773 bus1=p4udt2770lv.1.2.3 bus2=p4ulv2947.1.2.3 switch=n enabled=y phases=3 Linecode=3P_UG_AL_4/0_15_0_416_0_3_3_3_3

New Line.l(r:p4udt5255lv-p4ulv5883) Units=km Length=0.0443777 bus1=p4udt5255lv.1.2.3 bus2=p4ulv5883.1.2.3 switch=n enabled=y phases=3 Linecode=3P_UG_AL_4/0_15_0_416_0_3_3_3_3

New Line.l(r:p4udt11139lv-p4ulv14439)_s0 Units=km Length=0.001 bus1=p4udt11139lv.1.2.3 bus2=p4udt11139lv-p4ulv14439x.1.2.3 switch=n enabled=y phases=3 Linecode=3P_UG_AL_4/0_15_0_416_0_3_3_3_3

New Line.l(r:p4udt11139lv-p4ulv14439)_s1 Units=km Length=0.001 bus1=p4udt11139lv-p4ulv14439x.1.2.3 bus2=p4udt11139lv-p4ulv14439xx.1.2.3 switch=n enabled=y phases=3 Linecode=3P_UG_AL_4/0_15_0_416_0_3_3_3_3

New Line.l(r:p4udt11139lv-p4ulv14439)_s2 Units=km Length=0.0826661 bus1=p4udt11139lv-p4ulv14439xx.1.2.3 bus2=p4ulv14439.1.2.3 switch=n enabled=y phases=3 Linecode=3P_UG_AL_4/0_15_0_416_0_3_3_3_3

New Line.l(r:p4udt11383lv-p4ulv34832) Units=km Length=0.05759220000000001 bus1=p4udt11383lv.1.2.3 bus2=p4ulv34832.1.2.3 switch=n enabled=y phases=3 Linecode=3P_UG_AL_4/0_15_0_416_0_3_3_3_3

New Line.l(r:p4udm26636-p4ulv14846) Units=km Length=0.0433448 bus1=p4udm26636.1.2.3 bus2=p4ulv14846.1.2.3 switch=n enabled=y phases=3 Linecode=3P_UG_AL_4/0_15_0_416_0_3_3_3_3

New Line.l(r:p4udm26636-p4udt11383lv)_s0 Units=km Length=0.001 bus1=p4udt11383lv.1.2.3 bus2=p4udm26636-p4udt11383lvxx.1.2.3 switch=n enabled=y phases=3 Linecode=3P_UG_AL_4/0_15_0_416_0_3_3_3_3

New Line.l(r:p4udm26636-p4udt11383lv)_s1 Units=km Length=0.001 bus1=p4udm26636-p4udt11383lvxx.1.2.3 bus2=p4udm26636-p4udt11383lvx.1.2.3 switch=n enabled=y phases=3 Linecode=3P_UG_AL_4/0_15_0_416_0_3_3_3_3

New Line.l(r:p4udm26636-p4udt11383lv)_s2 Units=km Length=0.001 bus1=p4udm26636-p4udt11383lvx.1.2.3 bus2=p4udm26636.1.2.3 switch=n enabled=y phases=3 Linecode=3P_UG_AL_4/0_15_0_416_0_3_3_3_3

New Line.l(r:p4udt10320lv-p4ulv13126) Units=km Length=0.044445200000000004 bus1=p4udt10320lv.1.2.3 bus2=p4ulv13126.1.2.3 switch=n enabled=y phases=3 Linecode=3P_UG_AL_4/0_15_0_416_0_3_3_3_3

New Line.l(r:p4udt18258lv-p4ulv28892) Units=km Length=0.001 bus1=p4udt18258lv.1.2.3 bus2=p4ulv28892.1.2.3 switch=n enabled=y phases=3 Linecode=3P_UG_AL_4/0_15_0_416_0_3_3_3_3

New Line.l(r:p4udt3533lv-p4ulv3808) Units=km Length=0.001 bus1=p4udt3533lv.1.2.3 bus2=p4ulv3808.1.2.3 switch=n enabled=y phases=3 Linecode=3P_UG_AL_4/0_15_0_416_0_3_3_3_3

New Line.l(r:p4udt3148lv-p4ulv28479) Units=km Length=0.0522781 bus1=p4udt3148lv.1.2.3 bus2=p4ulv28479.1.2.3 switch=n enabled=y phases=3 Linecode=3P_UG_AL_4/0_15_0_416_0_3_3_3_3

New Line.l(r:p4udm8363-p4ulv3358) Units=km Length=0.043302900000000005 bus1=p4udm8363.1.2.3 bus2=p4ulv3358.1.2.3 switch=n enabled=y phases=3 Linecode=3P_UG_AL_4/0_15_0_416_0_3_3_3_3

New Line.l(r:p4udm8363-p4udt3148lv) Units=km Length=0.0160652 bus1=p4udt3148lv.1.2.3 bus2=p4udm8363.1.2.3 switch=n enabled=y phases=3 Linecode=3P_UG_AL_4/0_15_0_416_0_3_3_3_3

New Line.l(r:p4udm8364-p4ulv4217) Units=km Length=0.0449798 bus1=p4udm8364.1.2.3 bus2=p4ulv4217.1.2.3 switch=n enabled=y phases=3 Linecode=3P_UG_AL_4/0_15_0_416_0_3_3_3_3

New Line.l(r:p4udm8364-p4ulv11795) Units=km Length=0.059873100000000005 bus1=p4udm8364.1.2.3 bus2=p4ulv11795.1.2.3 switch=n enabled=y phases=3 Linecode=3P_UG_AL_4/0_15_0_416_0_3_3_3_3

New Line.l(r:p4udm8365-p4ulv7540) Units=km Length=0.0244719 bus1=p4udm8365.1.2.3 bus2=p4ulv7540.1.2.3 switch=n enabled=y phases=3 Linecode=3P_UG_AL_4/0_15_0_416_0_3_3_3_3

New Line.l(r:p4udm8365-p4ulv14438) Units=km Length=0.0180996 bus1=p4udm8365.1.2.3 bus2=p4ulv14438.1.2.3 switch=n enabled=y phases=3 Linecode=3P_UG_AL_4/0_15_0_416_0_3_3_3_3

New Line.l(r:p4udm8364-p4udm8365) Units=km Length=0.0179466 bus1=p4udm8364.1.2.3 bus2=p4udm8365.1.2.3 switch=n enabled=y phases=3 Linecode=3P_UG_AL_4/0_15_0_416_0_3_3_3_3

New Line.l(r:p4udm8364-p4udt3148lv) Units=km Length=0.017464900000000002 bus1=p4udt3148lv.1.2.3 bus2=p4udm8364.1.2.3 switch=n enabled=y phases=3 Linecode=3P_UG_AL_350kcmil_15_0_416_0_3_3_3_3

New Line.l(r:p4udt12876lv-p4ulv17487) Units=km Length=0.037776 bus1=p4udt12876lv.1.2.3 bus2=p4ulv17487.1.2.3 switch=n enabled=y phases=3 Linecode=3P_UG_AL_4/0_15_0_416_0_3_3_3_3

New Line.l(r:p4udt2371lv-p4ulv15730) Units=km Length=0.0414001 bus1=p4udt2371lv.1.2.3 bus2=p4ulv15730.1.2.3 switch=n enabled=y phases=3 Linecode=3P_UG_AL_4/0_15_0_416_0_3_3_3_3

New Line.l(r:p4udm6335-p4ulv2490) Units=km Length=0.0370286 bus1=p4udm6335.1.2.3 bus2=p4ulv2490.1.2.3 switch=n enabled=y phases=3 Linecode=3P_UG_AL_4/0_15_0_416_0_3_3_3_3

New Line.l(r:p4udm6335-p4udt2371lv) Units=km Length=0.0115141 bus1=p4udt2371lv.1.2.3 bus2=p4udm6335.1.2.3 switch=n enabled=y phases=3 Linecode=3P_UG_AL_4/0_15_0_416_0_3_3_3_3

New Line.l(r:p4udm6337-p4ulv18752) Units=km Length=0.0513177 bus1=p4udm6337.1.2.3 bus2=p4ulv18752.1.2.3 switch=n enabled=y phases=3 Linecode=3P_UG_AL_4/0_15_0_416_0_3_3_3_3

New Line.l(r:p4udm6337-p4udt2371lv) Units=km Length=0.0115141 bus1=p4udt2371lv.1.2.3 bus2=p4udm6337.1.2.3 switch=n enabled=y phases=3 Linecode=3P_UG_AL_4/0_15_0_416_0_3_3_3_3

New Line.l(r:p4udt19905lv-p4ulv33102) Units=km Length=0.0562997 bus1=p4udt19905lv.1.2.3 bus2=p4ulv33102.1.2.3 switch=n enabled=y phases=3 Linecode=3P_UG_AL_4/0_15_0_416_0_3_3_3_3

New Line.l(r:p4udm39501-p4ulv38990) Units=km Length=0.0318014 bus1=p4udm39501.1.2.3 bus2=p4ulv38990.1.2.3 switch=n enabled=y phases=3 Linecode=3P_UG_AL_4/0_15_0_416_0_3_3_3_3

New Line.l(r:p4udm39501-p4udt19905lv) Units=km Length=0.0172422 bus1=p4udt19905lv.1.2.3 bus2=p4udm39501.1.2.3 switch=n enabled=y phases=3 Linecode=3P_UG_AL_4/0_15_0_416_0_3_3_3_3

New Line.l(r:p4udt21726lv-p4ulv38189) Units=km Length=0.0406048 bus1=p4udt21726lv.1.2.3 bus2=p4ulv38189.1.2.3 switch=n enabled=y phases=3 Linecode=3P_UG_AL_4/0_15_0_416_0_3_3_3_3

New Line.l(r:p4udt19905-p4udt21726) Units=km Length=0.06656710000000002 bus1=p4udt19905.1.2.3 bus2=p4udt21726.1.2.3 switch=n enabled=y phases=3 Linecode=3P_OH_AL_ACSR_4/0_Penguin_12_47_0_3_3_3_3

New Line.l(r:p4udt19905-p4udt2371) Units=km Length=0.0304552 bus1=p4udt2371.1.2.3 bus2=p4udt19905.1.2.3 switch=n enabled=y phases=3 Linecode=3P_OH_AL_ACSR_4/0_Penguin_12_47_0_3_3_3_3

New Line.l(r:p4udt12876-p4udt2371) Units=km Length=0.065354 bus1=p4udt12876.1.2.3 bus2=p4udt2371.1.2.3 switch=n enabled=y phases=3 Linecode=3P_OH_AL_ACSR_4/0_Penguin_12_47_0_3_3_3_3

New Line.l(r:p4udt18601lv-p4ulv29750) Units=km Length=0.001 bus1=p4udt18601lv.1.2.3 bus2=p4ulv29750.1.2.3 switch=n enabled=y phases=3 Linecode=3P_UG_AL_4/0_15_0_416_0_3_3_3_3

New Line.l(r:p4udt12876-p4udt18601) Units=km Length=0.149763 bus1=p4udt12876.1.2.3 bus2=p4udt18601.1.2.3 switch=n enabled=y phases=3 Linecode=3P_OH_AL_ACSR_4/0_Penguin_12_47_0_3_3_3_3

New Line.l(r:p4udt12876-p4udt3148) Units=km Length=0.0533592 bus1=p4udt3148.1.2.3 bus2=p4udt12876.1.2.3 switch=n enabled=y phases=3 Linecode=3P_OH_AL_ACSR_4/0_Penguin_12_47_0_3_3_3_3

New Line.l(r:p4udt20230lv-p4ulv33978) Units=km Length=0.0845626 bus1=p4udt20230lv.1.2.3 bus2=p4ulv33978.1.2.3 switch=n enabled=y phases=3 Linecode=3P_UG_AL_4/0_15_0_416_0_3_3_3_3

New Line.l(r:p4udt12877lv-p4ulv22608) Units=km Length=0.0451522 bus1=p4udt12877lv.1.2.3 bus2=p4ulv22608.1.2.3 switch=n enabled=y phases=3 Linecode=3P_UG_AL_4/0_15_0_416_0_3_3_3_3

New Line.l(r:p4udt12877lv-p4ulv36496) Units=km Length=0.056740000000000006 bus1=p4udt12877lv.1.2.3 bus2=p4ulv36496.1.2.3 switch=n enabled=y phases=3 Linecode=3P_UG_AL_4/0_15_0_416_0_3_3_3_3

New Line.l(r:p4udm29300-p4ulv17488) Units=km Length=0.0662637 bus1=p4udm29300.1.2.3 bus2=p4ulv17488.1.2.3 switch=n enabled=y phases=3 Linecode=3P_UG_AL_4/0_15_0_416_0_3_3_3_3

New Line.l(r:p4udm29300-p4udt12877lv) Units=km Length=0.0172321 bus1=p4udt12877lv.1.2.3 bus2=p4udm29300.1.2.3 switch=n enabled=y phases=3 Linecode=3P_UG_AL_4/0_15_0_416_0_3_3_3_3

New Line.l(r:p4udt15876lv-p4ulv23416) Units=km Length=0.001 bus1=p4udt15876lv.1.2.3 bus2=p4ulv23416.1.2.3 switch=n enabled=y phases=3 Linecode=3P_UG_AL_4/0_15_0_416_0_3_3_3_3

New Line.l(r:p4udt10887lv-p4ulv14018) Units=km Length=0.0218233 bus1=p4udt10887lv.1.2.3 bus2=p4ulv14018.1.2.3 switch=n enabled=y phases=3 Linecode=3P_UG_AL_4/0_15_0_416_0_3_3_3_3

New Line.l(r:p4udt10887lv-p4ulv39396) Units=km Length=0.0218233 bus1=p4udt10887lv.1.2.3 bus2=p4ulv39396.1.2.3 switch=n enabled=y phases=3 Linecode=3P_UG_AL_4/0_15_0_416_0_3_3_3_3

New Line.l(r:p4udt10887-p4udt15876) Units=km Length=0.07033290000000002 bus1=p4udt15876.1.2.3 bus2=p4udt10887.1.2.3 switch=n enabled=y phases=3 Linecode=3P_OH_AL_ACSR_4/0_Penguin_12_47_0_3_3_3_3

New Line.l(r:p4udt12877-p4udt15876)_s0 Units=km Length=0.0966168 bus1=p4udt12877.1.2.3 bus2=p4udt12877-p4udt15876x.1.2.3 switch=n enabled=y phases=3 Linecode=3P_OH_AL_ACSR_4/0_Penguin_12_47_0_3_3_3_3

New Line.l(r:p4udt12877-p4udt15876)_s1 Units=km Length=0.127603 bus1=p4udt12877-p4udt15876x.1.2.3 bus2=p4udt15876.1.2.3 switch=n enabled=y phases=3 Linecode=3P_OH_AL_ACSR_4/0_Penguin_12_47_0_3_3_3_3

New Line.l(r:p4udt12877-p4udt20230) Units=km Length=0.068963 bus1=p4udt20230.1.2.3 bus2=p4udt12877.1.2.3 switch=n enabled=y phases=3 Linecode=3P_OH_AL_ACSR_4/0_Penguin_12_47_0_3_3_3_3

New Line.l(r:p4udt20230-p4udt3148) Units=km Length=0.213332 bus1=p4udt3148.1.2.3 bus2=p4udt20230.1.2.3 switch=n enabled=y phases=3 Linecode=3P_OH_AL_ACSR_4/0_Penguin_12_47_0_3_3_3_3

New Line.l(r:p4udt3148-p4udt3533)_s0 Units=km Length=0.172632 bus1=p4udt3533.1.2.3 bus2=p4udt3148-p4udt3533x.1.2.3 switch=n enabled=y phases=3 Linecode=3P_OH_AL_ACSR_4/0_Penguin_12_47_0_3_3_3_3

New Line.l(r:p4udt3148-p4udt3533)_s1 Units=km Length=0.155414 bus1=p4udt3148-p4udt3533x.1.2.3 bus2=p4udt3148.1.2.3 switch=n enabled=y phases=3 Linecode=3P_OH_AL_ACSR_4/0_Penguin_12_47_0_3_3_3_3

New Line.l(r:p4udt18258-p4udt3533) Units=km Length=0.1563 bus1=p4udt18258.1.2.3 bus2=p4udt3533.1.2.3 switch=n enabled=y phases=3 Linecode=3P_OH_AL_ACSR_4/0_Penguin_12_47_0_3_3_3_3

New Line.l(r:p4udt10320-p4udt18258)_s0 Units=km Length=0.279208 bus1=p4udt10320.1.2.3 bus2=p4udt10320-p4udt18258x.1.2.3 switch=n enabled=y phases=3 Linecode=3P_OH_AL_ACSR_4/0_Penguin_12_47_0_3_3_3_3

New Line.l(r:p4udt10320-p4udt18258)_s1 Units=km Length=0.12392 bus1=p4udt10320-p4udt18258x.1.2.3 bus2=p4udt18258.1.2.3 switch=n enabled=y phases=3 Linecode=3P_OH_AL_ACSR_4/0_Penguin_12_47_0_3_3_3_3

New Line.l(r:p4udt10320-p4udt11383) Units=km Length=0.17027900000000004 bus1=p4udt11383.1.2.3 bus2=p4udt10320.1.2.3 switch=n enabled=y phases=3 Linecode=3P_OH_AL_ACSR_4/0_Penguin_12_47_0_3_3_3_3

New Line.l(r:p4udt11139-p4udt11383)_s0 Units=km Length=0.001 bus1=p4udt11139.1.2.3 bus2=p4udt11139-p4udt11383x.1.2.3 switch=n enabled=y phases=3 Linecode=3P_OH_AL_ACSR_4/0_Penguin_12_47_0_3_3_3_3

New Line.l(r:p4udt11139-p4udt11383)_s1 Units=km Length=0.001 bus1=p4udt11139-p4udt11383x.1.2.3 bus2=p4udt11139-p4udt11383xx.1.2.3 switch=n enabled=y phases=3 Linecode=3P_OH_AL_ACSR_4/0_Penguin_12_47_0_3_3_3_3

New Line.l(r:p4udt11139-p4udt11383)_s2 Units=km Length=0.001 bus1=p4udt11139-p4udt11383xx.1.2.3 bus2=p4udt11383.1.2.3 switch=n enabled=y phases=3 Linecode=3P_OH_AL_ACSR_4/0_Penguin_12_47_0_3_3_3_3

New Line.l(r:p4udt11139-p4udt5255) Units=km Length=0.0959065 bus1=p4udt5255.1.2.3 bus2=p4udt11139.1.2.3 switch=n enabled=y phases=3 Linecode=3P_OH_AL_ACSR_4/0_Penguin_12_47_0_3_3_3_3

New Line.l(r:p4udt2770-p4udt5255) Units=km Length=0.0575523 bus1=p4udt2770.1.2.3 bus2=p4udt5255.1.2.3 switch=n enabled=y phases=3 Linecode=3P_OH_AL_ACSR_4/0_Penguin_12_47_0_3_3_3_3

New Line.l(r:p4udt12149lv-p4ulv16159) Units=km Length=0.001 bus1=p4udt12149lv.1.2.3 bus2=p4ulv16159.1.2.3 switch=n enabled=y phases=3 Linecode=3P_UG_AL_4/0_15_0_416_0_3_3_3_3

New Line.l(r:p4udt12149-p4udt2770) Units=km Length=0.12391400000000001 bus1=p4udt2770.1.2.3 bus2=p4udt12149.1.2.3 switch=n enabled=y phases=3 Linecode=3P_OH_AL_ACSR_4/0_Penguin_12_47_0_3_3_3_3

New Line.l(r:p4udt15688-p4udt2770) Units=km Length=0.0575443 bus1=p4udt15688.1.2.3 bus2=p4udt2770.1.2.3 switch=n enabled=y phases=3 Linecode=3P_OH_AL_ACSR_4/0_Penguin_12_47_0_3_3_3_3

New Line.l(r:p4udt11384-p4udt15688) Units=km Length=0.019184100000000003 bus1=p4udt11384.1.2.3 bus2=p4udt15688.1.2.3 switch=n enabled=y phases=3 Linecode=3P_OH_AL_ACSR_4/0_Penguin_12_47_0_3_3_3_3

New Line.l(r:p4udt11384-p4udt21727) Units=km Length=0.0575523 bus1=p4udt21727.1.2.3 bus2=p4udt11384.1.2.3 switch=n enabled=y phases=3 Linecode=3P_OH_AL_ACSR_4/0_Penguin_12_47_0_3_3_3_3

New Line.l(r:p4udt19762-p4udt21727) Units=km Length=0.0767224 bus1=p4udt19762.1.2.3 bus2=p4udt21727.1.2.3 switch=n enabled=y phases=3 Linecode=3P_OH_AL_ACSR_4/0_Penguin_12_47_0_3_3_3_3

New Line.l(r:p4udt19762-p4udt21405) Units=km Length=0.0797147 bus1=p4udt21405.1.2.3 bus2=p4udt19762.1.2.3 switch=n enabled=y phases=3 Linecode=3P_OH_AL_ACSR_4/0_Penguin_12_47_0_3_3_3_3

New Line.l(r:p4udt14848-p4udt21405) Units=km Length=0.0797054 bus1=p4udt14848.1.2.3 bus2=p4udt21405.1.2.3 switch=n enabled=y phases=3 Linecode=3P_OH_AL_ACSR_4/0_Penguin_12_47_0_3_3_3_3

New Line.l(r:p4udt14848-p4udt4220) Units=km Length=0.0199231 bus1=p4udt4220.1.2.3 bus2=p4udt14848.1.2.3 switch=n enabled=y phases=3 Linecode=3P_OH_AL_ACSR_4/0_Penguin_12_47_0_3_3_3_3

New Line.l(r:p4udt22319-p4udt4220) Units=km Length=0.050153100000000006 bus1=p4udt22319.1.2.3 bus2=p4udt4220.1.2.3 switch=n enabled=y phases=3 Linecode=3P_OH_AL_ACSR_4/0_Penguin_12_47_0_3_3_3_3

New Line.l(r:p4udt1237-p4udt22319) Units=km Length=0.134076 bus1=p4udt1237.1.2.3 bus2=p4udt22319.1.2.3 switch=n enabled=y phases=3 Linecode=3P_OH_AL_ACSR_4/0_Penguin_12_47_0_3_3_3_3

New Line.l(r:p4udt1237-p4udt6223)_s0 Units=km Length=0.161873 bus1=p4udt6223.1.2.3 bus2=p4udt1237-p4udt6223x.1.2.3 switch=n enabled=y phases=3 Linecode=3P_OH_AL_ACSR_4/0_Penguin_12_47_0_3_3_3_3

New Line.l(r:p4udt1237-p4udt6223)_s1 Units=km Length=0.133299 bus1=p4udt1237-p4udt6223x.1.2.3 bus2=p4udt1237.1.2.3 switch=n enabled=y phases=3 Linecode=3P_OH_AL_ACSR_4/0_Penguin_12_47_0_3_3_3_3

New Line.l(r:p4udt12879lv-p4ulv17490) Units=km Length=0.0102784 bus1=p4udt12879lv.1.2.3 bus2=p4ulv17490.1.2.3 switch=n enabled=y phases=3 Linecode=3P_UG_AL_4/0_15_0_416_0_3_3_3_3

New Line.l(r:p4udt12879lv-p4ulv25034) Units=km Length=0.0345025 bus1=p4udt12879lv.1.2.3 bus2=p4ulv25034.1.2.3 switch=n enabled=y phases=3 Linecode=3P_UG_AL_4/0_15_0_416_0_3_3_3_3

New Line.l(r:p4udt12879lv-p4ulv30181) Units=km Length=0.0499167 bus1=p4udt12879lv.1.2.3 bus2=p4ulv30181.1.2.3 switch=n enabled=y phases=3 Linecode=3P_UG_AL_4/0_15_0_416_0_3_3_3_3

New Line.l(r:p4udt12879lv-p4ulv38201) Units=km Length=0.0873135 bus1=p4udt12879lv.1.2.3 bus2=p4ulv38201.1.2.3 switch=n enabled=y phases=3 Linecode=3P_UG_AL_4/0_15_0_416_0_3_3_3_3

New Line.l(r:p4udt12879-p4udt6223) Units=km Length=0.45047800000000005 bus1=p4udt6223.1.2.3 bus2=p4udt12879.1.2.3 switch=n enabled=y phases=3 Linecode=3P_OH_AL_ACSR_4/0_Penguin_12_47_0_3_3_3_3

New Line.l(r:p4udt6223-p4uhs16_1247)_disconnect Units=km Length=0.001 bus1=p4udt6223-p4uhs16_1247x_b1_1.1.2.3 bus2=p4udt6223-p4uhs16_1247x_b2_1.1.2.3 switch=y enabled=y phases=3 Linecode=3P_OH_AL_ACSR_4/0_Penguin_12_47_0_3_3_3_3

New Line.l(r:p4udt6223-p4uhs16_1247)_cont Units=km Length=4.138812000000001 bus1=p4udt6223-p4uhs16_1247x_b2_1.1.2.3 bus2=p4udt6223.1.2.3 switch=n enabled=y phases=3 Linecode=3P_OH_AL_ACSR_4/0_Penguin_12_47_0_3_3_3_3
