Clear

New Circuit.substation_p4uhs17_69 bus1=p4uhs17_69 pu=1.0 basekV=69.0 R1=1e-05 X1=1e-05 R0=1e-05 X0=1e-05

Redirect Transformers.dss
Redirect p4uhs17_1247--p4udt3392/Transformers.dss
Redirect p4uhs17_1247--p4udt7683/Transformers.dss
Redirect p4uhs17_1247--p4udt13269/Transformers.dss
Redirect p4uhs17_1247--p4udt4433/Transformers.dss
Redirect p4uhs17_1247--p4udt17331/Transformers.dss
Redirect p4uhs17_1247--p4udt13480/Transformers.dss
Redirect Regulators.dss
Redirect p4uhs17_1247--p4udt3392/Loads.dss
Redirect p4uhs17_1247--p4udt7683/Loads.dss
Redirect p4uhs17_1247--p4udt13269/Loads.dss
Redirect p4uhs17_1247--p4udt4433/Loads.dss
Redirect p4uhs17_1247--p4udt17331/Loads.dss
Redirect p4uhs17_1247--p4udt13480/Loads.dss
Redirect LineCodes.dss
Redirect p4uhs17_1247--p4udt3392/LineCodes.dss
Redirect p4uhs17_1247--p4udt7683/LineCodes.dss
Redirect p4uhs17_1247--p4udt13269/LineCodes.dss
Redirect p4uhs17_1247--p4udt4433/LineCodes.dss
Redirect p4uhs17_1247--p4udt17331/LineCodes.dss
Redirect p4uhs17_1247--p4udt13480/LineCodes.dss
Redirect Lines.dss
Redirect p4uhs17_1247--p4udt3392/Lines.dss
Redirect p4uhs17_1247--p4udt7683/Lines.dss
Redirect p4uhs17_1247--p4udt13269/Lines.dss
Redirect p4uhs17_1247--p4udt4433/Lines.dss
Redirect p4uhs17_1247--p4udt17331/Lines.dss
Redirect p4uhs17_1247--p4udt13480/Lines.dss
Redirect p4uhs17_1247--p4udt3392/Capacitors.dss
Redirect p4uhs17_1247--p4udt7683/Capacitors.dss
Redirect p4uhs17_1247--p4udt13269/Capacitors.dss
Redirect p4uhs17_1247--p4udt4433/Capacitors.dss
Redirect p4uhs17_1247--p4udt17331/Capacitors.dss
Redirect p4uhs17_1247--p4udt13480/Capacitors.dss

Set Voltagebases=[0.2080002494301389, 0.48, 7.199560000000001, 12.47, 69.0]

Calcvoltagebases

Buscoords Buscoords.dss

Solve
