New Capacitor.p4uc100 Bus1=p4udt16917 phases=3 Kv=12.47 conn=Wye Kvar=300.0

New CapControl.p4uc100 Capacitor=p4uc100 Element=Line.l(r:p4udt13678-p4udt16917) Terminal=1 delay=100.0 Type=voltage Vmin=120.5 Vmax=125.0 Ptratio=59.99631547328862 Ctratio=100.0
