New Capacitor.p4uc98 Bus1=p4udt21559 phases=3 Kv=12.47 conn=Wye Kvar=300.0

New CapControl.p4uc98 Capacitor=p4uc98 Element=Line.l(r:p4udt21559-p4udt3129) Terminal=1 delay=100.0 Type=voltage Vmin=120.5 Vmax=125.0 Ptratio=59.99631547328862 Ctratio=100.0

New Capacitor.p4uc103 Bus1=p4udt23312 phases=3 Kv=12.47 conn=Wye Kvar=300.0

New CapControl.p4uc103 Capacitor=p4uc103 Element=Line.padswitch(r:p4udt18249-p4udt23312)p4u_76690 Terminal=1 delay=100.0 Type=voltage Vmin=120.5 Vmax=125.0 Ptratio=59.99631547328862 Ctratio=100.0
