New Line.l(r:p4udt268lv-p4ulv274) Units=km Length=0.0346794 bus1=p4udt268lv.1.2 bus2=p4ulv274.1.2 switch=n enabled=y phases=2 Linecode=1P_UG_AL_2/0_Converse_0_416_0_2_2_2_2

New Line.l(r:p4udm665-p4ulv43019) Units=km Length=0.0271488 bus1=p4udm665.1.2 bus2=p4ulv43019.1.2 switch=n enabled=y phases=2 Linecode=1P_UG_AL_1/0_Brenau_0_416_0_2_2_2_2

New Line.l(r:p4udm665-p4udt268lv) Units=km Length=0.0140864 bus1=p4udt268lv.1.2 bus2=p4udm665.1.2 switch=n enabled=y phases=2 Linecode=1P_UG_AL_1/0_Brenau_0_416_0_2_2_2_2

New Line.l(r:p4udt681lv-p4ulv694) Units=km Length=0.0146541 bus1=p4udt681lv.1.2 bus2=p4ulv694.1.2 switch=n enabled=y phases=2 Linecode=1P_OH_AL_2/0_Rucina_0_416_0_2_2_2_2

New Line.l(r:p4udt681lv-p4ulv1110) Units=km Length=0.018711400000000003 bus1=p4udt681lv.1.2 bus2=p4ulv1110.1.2 switch=n enabled=y phases=2 Linecode=1P_OH_AL_2/0_Rucina_0_416_0_2_2_2_2

New Line.l(r:p4udt682lv-p4ulv695) Units=km Length=0.014387 bus1=p4udt682lv.1.2 bus2=p4ulv695.1.2 switch=n enabled=y phases=2 Linecode=1P_OH_AL_2/0_Rucina_0_416_0_2_2_2_2

New Line.l(r:p4udm1838-p4ulv700) Units=km Length=0.012787 bus1=p4udm1838.1.2 bus2=p4ulv700.1.2 switch=n enabled=y phases=2 Linecode=1P_UG_AL_4/0_Sweetbriar_0_416_0_2_2_2_2

New Line.l(r:p4udm1838-p4ulv38835) Units=km Length=0.0121138 bus1=p4udm1838.1.2 bus2=p4ulv38835.1.2 switch=n enabled=y phases=2 Linecode=1P_UG_AL_4/0_Sweetbriar_0_416_0_2_2_2_2

New Line.l(r:p4udm1838-p4udt687lv) Units=km Length=0.00937361 bus1=p4udt687lv.1.2 bus2=p4udm1838.1.2 switch=n enabled=y phases=2 Linecode=1P_UG_AL_4/0_Sweetbriar_0_416_0_2_2_2_2

New Line.l(r:p4udm1839-p4ulv19013) Units=km Length=0.0126381 bus1=p4udm1839.1.2 bus2=p4ulv19013.1.2 switch=n enabled=y phases=2 Linecode=1P_UG_AL_2/0_Converse_0_416_0_2_2_2_2

New Line.l(r:p4udm1839-p4udt687lv) Units=km Length=0.00936915 bus1=p4udt687lv.1.2 bus2=p4udm1839.1.2 switch=n enabled=y phases=2 Linecode=1P_UG_AL_2/0_Converse_0_416_0_2_2_2_2

New Line.l(r:p4udm2887-p4ulv1112) Units=km Length=0.0179161 bus1=p4udm2887.1.2 bus2=p4ulv1112.1.2 switch=n enabled=y phases=2 Linecode=1P_UG_AL_2/0_Converse_0_416_0_2_2_2_2

New Line.l(r:p4udm2887-p4udt1083lv) Units=km Length=0.0370993 bus1=p4udt1083lv.1.2 bus2=p4udm2887.1.2 switch=n enabled=y phases=2 Linecode=1P_UG_AL_2/0_Converse_0_416_0_2_2_2_2

New Line.l(r:p4udm2888-p4ulv3637) Units=km Length=0.0178202 bus1=p4udm2888.1.2 bus2=p4ulv3637.1.2 switch=n enabled=y phases=2 Linecode=1P_UG_AL_1/0_Brenau_0_416_0_2_2_2_2

New Line.l(r:p4udm2888-p4ulv39248) Units=km Length=0.0143809 bus1=p4udm2888.1.2 bus2=p4ulv39248.1.2 switch=n enabled=y phases=2 Linecode=1P_UG_AL_1/0_Brenau_0_416_0_2_2_2_2

New Line.l(r:p4udm2888-p4udt1083lv) Units=km Length=0.018547 bus1=p4udt1083lv.1.2 bus2=p4udm2888.1.2 switch=n enabled=y phases=2 Linecode=1P_UG_AL_4/0_Sweetbriar_0_416_0_2_2_2_2

New Line.l(r:p4udm3219-p4ulv1231) Units=km Length=0.00782413 bus1=p4udm3219.1.2 bus2=p4ulv1231.1.2 switch=n enabled=y phases=2 Linecode=1P_UG_AL_4/0_Sweetbriar_0_416_0_2_2_2_2

New Line.l(r:p4udm3219-p4ulv35185) Units=km Length=0.00863009 bus1=p4udm3219.1.2 bus2=p4ulv35185.1.2 switch=n enabled=y phases=2 Linecode=1P_UG_AL_4/0_Sweetbriar_0_416_0_2_2_2_2

New Line.l(r:p4udm3219-p4udt1194lv) Units=km Length=0.005914680000000001 bus1=p4udt1194lv.1.2 bus2=p4udm3219.1.2 switch=n enabled=y phases=2 Linecode=1P_UG_AL_4/0_Sweetbriar_0_416_0_2_2_2_2

New Line.l(r:p4udm3221-p4ulv39677) Units=km Length=0.013174300000000002 bus1=p4udm3221.1.2 bus2=p4ulv39677.1.2 switch=n enabled=y phases=2 Linecode=1P_UG_AL_4/0_Sweetbriar_0_416_0_2_2_2_2

New Line.l(r:p4udm3221-p4udt1194lv) Units=km Length=0.0176241 bus1=p4udt1194lv.1.2 bus2=p4udm3221.1.2 switch=n enabled=y phases=2 Linecode=1P_UG_AL_4/0_Sweetbriar_0_416_0_2_2_2_2

New Line.l(r:p4udt1482lv-p4ulv35077) Units=km Length=0.0168584 bus1=p4udt1482lv.1.2 bus2=p4ulv35077.1.2 switch=n enabled=y phases=2 Linecode=1P_UG_AL_1/0_Brenau_0_416_0_2_2_2_2

New Line.l(r:p4udm3960-p4ulv1540) Units=km Length=0.0129581 bus1=p4udm3960.1.2 bus2=p4ulv1540.1.2 switch=n enabled=y phases=2 Linecode=1P_UG_AL_1/0_Brenau_0_416_0_2_2_2_2

New Line.l(r:p4udm3961-p4ulv10769) Units=km Length=0.015053 bus1=p4udm3961.1.2 bus2=p4ulv10769.1.2 switch=n enabled=y phases=2 Linecode=1P_UG_AL_4/0_Sweetbriar_0_416_0_2_2_2_2

New Line.l(r:p4udm3960-p4udm3961) Units=km Length=0.009658240000000002 bus1=p4udm3960.1.2 bus2=p4udm3961.1.2 switch=n enabled=y phases=2 Linecode=1P_UG_AL_4/0_Sweetbriar_0_416_0_2_2_2_2

New Line.l(r:p4udm3960-p4udt1482lv) Units=km Length=0.00965037 bus1=p4udt1482lv.1.2 bus2=p4udm3960.1.2 switch=n enabled=y phases=2 Linecode=1P_UG_AL_4/0_Sweetbriar_0_416_0_2_2_2_2

New Line.l(r:p4udm3962-p4ulv32541) Units=km Length=0.015655 bus1=p4udm3962.1.2 bus2=p4ulv32541.1.2 switch=n enabled=y phases=2 Linecode=1P_UG_AL_1/0_Brenau_0_416_0_2_2_2_2

New Line.l(r:p4udm3962-p4udt1482lv) Units=km Length=0.00966441 bus1=p4udt1482lv.1.2 bus2=p4udm3962.1.2 switch=n enabled=y phases=2 Linecode=1P_UG_AL_1/0_Brenau_0_416_0_2_2_2_2

New Line.l(r:p4udt1483lv-p4ulv1541) Units=km Length=0.0415371 bus1=p4udt1483lv.1.2 bus2=p4ulv1541.1.2 switch=n enabled=y phases=2 Linecode=1P_OH_AL_4/0_Zuzara_0_416_0_2_2_2_2

New Line.l(r:p4udt2237lv-p4ulv2345) Units=km Length=0.012159 bus1=p4udt2237lv.1.2 bus2=p4ulv2345.1.2 switch=n enabled=y phases=2 Linecode=1P_UG_AL_1/0_Brenau_0_416_0_2_2_2_2

New Line.l(r:p4udm5949-p4ulv20298) Units=km Length=0.015564100000000003 bus1=p4udm5949.1.2 bus2=p4ulv20298.1.2 switch=n enabled=y phases=2 Linecode=1P_UG_AL_1/0_Brenau_0_416_0_2_2_2_2

New Line.l(r:p4udm5949-p4udt2237lv) Units=km Length=0.00878655 bus1=p4udt2237lv.1.2 bus2=p4udm5949.1.2 switch=n enabled=y phases=2 Linecode=1P_UG_AL_1/0_Brenau_0_416_0_2_2_2_2

New Line.l(r:p4udm5950-p4ulv32117) Units=km Length=0.0154302 bus1=p4udm5950.1.2 bus2=p4ulv32117.1.2 switch=n enabled=y phases=2 Linecode=1P_UG_AL_1/0_Brenau_0_416_0_2_2_2_2

New Line.l(r:p4udm5950-p4udt2237lv) Units=km Length=0.00878655 bus1=p4udt2237lv.1.2 bus2=p4udm5950.1.2 switch=n enabled=y phases=2 Linecode=1P_UG_AL_1/0_Brenau_0_416_0_2_2_2_2

New Line.l(r:p4udt2626lv-p4ulv2784) Units=km Length=0.0155959 bus1=p4udt2626lv.1.2 bus2=p4ulv2784.1.2 switch=n enabled=y phases=2 Linecode=1P_UG_AL_1/0_Brenau_0_416_0_2_2_2_2

New Line.l(r:p4udm6970-p4ulv3196) Units=km Length=0.014615500000000002 bus1=p4udm6970.1.2 bus2=p4ulv3196.1.2 switch=n enabled=y phases=2 Linecode=1P_UG_AL_1/0_Brenau_0_416_0_2_2_2_2

New Line.l(r:p4udm6970-p4udt2626lv) Units=km Length=0.009658240000000002 bus1=p4udt2626lv.1.2 bus2=p4udm6970.1.2 switch=n enabled=y phases=2 Linecode=1P_UG_AL_1/0_Brenau_0_416_0_2_2_2_2

New Line.l(r:p4udm6971-p4ulv42172) Units=km Length=0.0151356 bus1=p4udm6971.1.2 bus2=p4ulv42172.1.2 switch=n enabled=y phases=2 Linecode=1P_UG_AL_1/0_Brenau_0_416_0_2_2_2_2

New Line.l(r:p4udm6971-p4udt2626lv) Units=km Length=0.009658240000000002 bus1=p4udt2626lv.1.2 bus2=p4udm6971.1.2 switch=n enabled=y phases=2 Linecode=1P_UG_AL_1/0_Brenau_0_416_0_2_2_2_2

New Line.l(r:p4udt2998lv-p4ulv27027) Units=km Length=0.0753331 bus1=p4udt2998lv.1.2 bus2=p4ulv27027.1.2 switch=n enabled=y phases=2 Linecode=1P_OH_AL_4/0_Zuzara_0_416_0_2_2_2_2

New Line.l(r:p4udt2998lv-p4ulv28312) Units=km Length=0.0797432 bus1=p4udt2998lv.1.2 bus2=p4ulv28312.1.2 switch=n enabled=y phases=2 Linecode=1P_OH_AL_4/0_Zuzara_0_416_0_2_2_2_2

New Line.l(r:p4udm7929-p4ulv3198) Units=km Length=0.10972 bus1=p4udm7929.1.2 bus2=p4ulv3198.1.2 switch=n enabled=y phases=2 Linecode=1P_OH_AL_4/0_Zuzara_0_416_0_2_2_2_2

New Line.l(r:p4udm7930-p4ulv21590) Units=km Length=0.0596567 bus1=p4udm7930.1.2 bus2=p4ulv21590.1.2 switch=n enabled=y phases=2 Linecode=1P_OH_AL_4/0_Zuzara_0_416_0_2_2_2_2

New Line.l(r:p4udm7929-p4udm7930) Units=km Length=0.0166284 bus1=p4udm7929.1.2 bus2=p4udm7930.1.2 switch=n enabled=y phases=2 Linecode=1P_OH_AL_2/0_Rucina_0_416_0_2_2_2_2

New Line.l(r:p4udm7929-p4udt2998lv) Units=km Length=0.016615200000000004 bus1=p4udt2998lv.1.2 bus2=p4udm7929.1.2 switch=n enabled=y phases=2 Linecode=1P_OH_AL_2/0_Rucina_0_416_0_2_2_2_2

New Line.l(r:p4udt3083lv-p4ulv3291) Units=km Length=0.024872000000000002 bus1=p4udt3083lv.1.2 bus2=p4ulv3291.1.2 switch=n enabled=y phases=2 Linecode=1P_OH_AL_2/0_Rucina_0_416_0_2_2_2_2

New Line.l(r:p4udt3083lv-p4ulv4555) Units=km Length=0.0251071 bus1=p4udt3083lv.1.2 bus2=p4ulv4555.1.2 switch=n enabled=y phases=2 Linecode=1P_OH_AL_2/0_Rucina_0_416_0_2_2_2_2

New Line.l(r:p4udm8197-p4ulv27562) Units=km Length=0.0155168 bus1=p4udm8197.1.2 bus2=p4ulv27562.1.2 switch=n enabled=y phases=2 Linecode=1P_OH_AL_2/0_Rucina_0_416_0_2_2_2_2

New Line.l(r:p4udm8197-p4udt3083lv) Units=km Length=0.0189433 bus1=p4udt3083lv.1.2 bus2=p4udm8197.1.2 switch=n enabled=y phases=2 Linecode=1P_OH_AL_2/0_Rucina_0_416_0_2_2_2_2

New Line.l(r:p4udm8933-p4ulv3633) Units=km Length=0.0236014 bus1=p4udm8933.1.2 bus2=p4ulv3633.1.2 switch=n enabled=y phases=2 Linecode=1P_OH_AL_2/0_Rucina_0_416_0_2_2_2_2

New Line.l(r:p4udm8933-p4udt3392lv) Units=km Length=0.0581086 bus1=p4udt3392lv.1.2 bus2=p4udm8933.1.2 switch=n enabled=y phases=2 Linecode=1P_OH_AL_4/0_Zuzara_0_416_0_2_2_2_2

New Line.l(r:p4udm8935-p4ulv20767) Units=km Length=0.0333755 bus1=p4udm8935.1.2 bus2=p4ulv20767.1.2 switch=n enabled=y phases=2 Linecode=1P_OH_AL_4/0_Zuzara_0_416_0_2_2_2_2

New Line.l(r:p4udm8934-p4ulv15566) Units=km Length=0.0255457 bus1=p4udm8934.1.2 bus2=p4ulv15566.1.2 switch=n enabled=y phases=2 Linecode=1P_UG_AL_1/0_Brenau_0_416_0_2_2_2_2

New Line.l(r:p4udm8934-p4udm8935) Units=km Length=0.00876495 bus1=p4udm8935.1.2 bus2=p4udm8934.1.2 switch=n enabled=y phases=2 Linecode=1P_OH_AL_2/0_Rucina_0_416_0_2_2_2_2

New Line.l(r:p4udm8935-p4udt3392lv) Units=km Length=0.0169587 bus1=p4udt3392lv.1.2 bus2=p4udm8935.1.2 switch=n enabled=y phases=2 Linecode=1P_OH_AL_2/0_Rucina_0_416_0_2_2_2_2

New Line.l(r:p4udm8936-p4ulv3634) Units=km Length=0.0126701 bus1=p4udm8936.1.2 bus2=p4ulv3634.1.2 switch=n enabled=y phases=2 Linecode=1P_UG_AL_1/0_Brenau_0_416_0_2_2_2_2

New Line.l(r:p4udm8936-p4ulv15992) Units=km Length=0.014928 bus1=p4udm8936.1.2 bus2=p4ulv15992.1.2 switch=n enabled=y phases=2 Linecode=1P_UG_AL_1/0_Brenau_0_416_0_2_2_2_2

New Line.l(r:p4udm8940-p4ulv39676) Units=km Length=0.0149507 bus1=p4udm8940.1.2 bus2=p4ulv39676.1.2 switch=n enabled=y phases=2 Linecode=1P_UG_AL_1/0_Brenau_0_416_0_2_2_2_2

New Line.l(r:p4udm8936-p4udm8940) Units=km Length=0.00821911 bus1=p4udm8936.1.2 bus2=p4udm8940.1.2 switch=n enabled=y phases=2 Linecode=1P_UG_AL_1/0_Brenau_0_416_0_2_2_2_2

New Line.l(r:p4udm8936-p4udt3393lv) Units=km Length=0.00873492 bus1=p4udt3393lv.1.2 bus2=p4udm8936.1.2 switch=n enabled=y phases=2 Linecode=1P_UG_AL_4/0_Sweetbriar_0_416_0_2_2_2_2

New Line.l(r:p4udm8939-p4ulv34678) Units=km Length=0.012424100000000002 bus1=p4udm8939.1.2 bus2=p4ulv34678.1.2 switch=n enabled=y phases=2 Linecode=1P_UG_AL_1/0_Brenau_0_416_0_2_2_2_2

New Line.l(r:p4udm8937-p4ulv6139) Units=km Length=0.0115069 bus1=p4udm8937.1.2 bus2=p4ulv6139.1.2 switch=n enabled=y phases=2 Linecode=1P_UG_AL_1/0_Brenau_0_416_0_2_2_2_2

New Line.l(r:p4udm8937-p4udm8939) Units=km Length=0.0551795 bus1=p4udm8939.1.2 bus2=p4udm8937.1.2 switch=n enabled=y phases=2 Linecode=1P_UG_AL_1/0_Brenau_0_416_0_2_2_2_2

New Line.l(r:p4udm8939-p4udt3393lv) Units=km Length=0.00872872 bus1=p4udt3393lv.1.2 bus2=p4udm8939.1.2 switch=n enabled=y phases=2 Linecode=1P_UG_AL_4/0_Sweetbriar_0_416_0_2_2_2_2

New Line.l(r:p4udt3394lv-p4ulv3635) Units=km Length=0.0218265 bus1=p4udt3394lv.1.2 bus2=p4ulv3635.1.2 switch=n enabled=y phases=2 Linecode=1P_UG_AL_1/0_Brenau_0_416_0_2_2_2_2

New Line.l(r:p4udm9850-p4ulv4063) Units=km Length=0.0277825 bus1=p4udm9850.1.2 bus2=p4ulv4063.1.2 switch=n enabled=y phases=2 Linecode=1P_OH_AL_4/0_Zuzara_0_416_0_2_2_2_2

New Line.l(r:p4udm9850-p4udt3760lv) Units=km Length=0.0154804 bus1=p4udt3760lv.1.2 bus2=p4udm9850.1.2 switch=n enabled=y phases=2 Linecode=1P_OH_AL_2/0_Rucina_0_416_0_2_2_2_2

New Line.l(r:p4udm9851-p4ulv31291) Units=km Length=0.0289154 bus1=p4udm9851.1.2 bus2=p4ulv31291.1.2 switch=n enabled=y phases=2 Linecode=1P_OH_AL_4/0_Zuzara_0_416_0_2_2_2_2

New Line.l(r:p4udm9851-p4udt3760lv) Units=km Length=0.0271909 bus1=p4udt3760lv.1.2 bus2=p4udm9851.1.2 switch=n enabled=y phases=2 Linecode=1P_OH_AL_4/0_Zuzara_0_416_0_2_2_2_2

New Line.l(r:p4udm10092-p4ulv7061) Units=km Length=0.00845156 bus1=p4udm10092.1.2 bus2=p4ulv7061.1.2 switch=n enabled=y phases=2 Linecode=1P_UG_AL_4/0_Sweetbriar_0_416_0_2_2_2_2

New Line.l(r:p4udm10091-p4ulv4166) Units=km Length=0.0083992 bus1=p4udm10091.1.2 bus2=p4ulv4166.1.2 switch=n enabled=y phases=2 Linecode=1P_UG_AL_4/0_Sweetbriar_0_416_0_2_2_2_2

New Line.l(r:p4udm10091-p4udm10092) Units=km Length=0.0133649 bus1=p4udm10092.1.2 bus2=p4udm10091.1.2 switch=n enabled=y phases=2 Linecode=1P_UG_AL_4/0_Sweetbriar_0_416_0_2_2_2_2

New Line.l(r:p4udm10092-p4udt3847lv) Units=km Length=0.00701058 bus1=p4udt3847lv.1.2 bus2=p4udm10092.1.2 switch=n enabled=y phases=2 Linecode=1P_UG_AL_4/0_Sweetbriar_0_416_0_2_2_2_2

New Line.l(r:p4udm10093-p4ulv16108) Units=km Length=0.006500810000000001 bus1=p4udm10093.1.2 bus2=p4ulv16108.1.2 switch=n enabled=y phases=2 Linecode=1P_UG_AL_1/0_Brenau_0_416_0_2_2_2_2

New Line.l(r:p4udm10093-p4udt3847lv) Units=km Length=0.0257251 bus1=p4udt3847lv.1.2 bus2=p4udm10093.1.2 switch=n enabled=y phases=2 Linecode=1P_UG_AL_1/0_Brenau_0_416_0_2_2_2_2

New Line.l(r:p4udt4414lv-p4ulv4837) Units=km Length=0.0283191 bus1=p4udt4414lv.1.2 bus2=p4ulv4837.1.2 switch=n enabled=y phases=2 Linecode=1P_UG_AL_1/0_Brenau_0_416_0_2_2_2_2

New Line.l(r:p4udt4414lv-p4ulv28310) Units=km Length=0.0274532 bus1=p4udt4414lv.1.2 bus2=p4ulv28310.1.2 switch=n enabled=y phases=2 Linecode=1P_UG_AL_1/0_Brenau_0_416_0_2_2_2_2

New Line.l(r:p4udm11494-p4ulv6140) Units=km Length=0.021739600000000005 bus1=p4udm11494.1.2 bus2=p4ulv6140.1.2 switch=n enabled=y phases=2 Linecode=1P_UG_AL_1/0_Brenau_0_416_0_2_2_2_2

New Line.l(r:p4udm11494-p4udt4414lv) Units=km Length=0.009658240000000002 bus1=p4udt4414lv.1.2 bus2=p4udm11494.1.2 switch=n enabled=y phases=2 Linecode=1P_UG_AL_1/0_Brenau_0_416_0_2_2_2_2

New Line.l(r:p4udt5130lv-p4ulv5724) Units=km Length=0.0284283 bus1=p4udt5130lv.1.2 bus2=p4ulv5724.1.2 switch=n enabled=y phases=2 Linecode=1P_UG_AL_1/0_Brenau_0_416_0_2_2_2_2

New Line.l(r:p4udt5130lv-p4ulv32537) Units=km Length=0.0347274 bus1=p4udt5130lv.1.2 bus2=p4ulv32537.1.2 switch=n enabled=y phases=2 Linecode=1P_UG_AL_1/0_Brenau_0_416_0_2_2_2_2

New Line.l(r:p4udt5130lv-p4ulv39241) Units=km Length=0.0226901 bus1=p4udt5130lv.1.2 bus2=p4ulv39241.1.2 switch=n enabled=y phases=2 Linecode=1P_UG_AL_2/0_Converse_0_416_0_2_2_2_2

New Line.l(r:p4udt5131lv-p4ulv5725) Units=km Length=0.0185245 bus1=p4udt5131lv.1.2 bus2=p4ulv5725.1.2 switch=n enabled=y phases=2 Linecode=1P_OH_AL_2/0_Rucina_0_416_0_2_2_2_2

New Line.l(r:p4udt5131lv-p4ulv17328) Units=km Length=0.0283502 bus1=p4udt5131lv.1.2 bus2=p4ulv17328.1.2 switch=n enabled=y phases=2 Linecode=1P_OH_AL_4/0_Zuzara_0_416_0_2_2_2_2

New Line.l(r:p4udt5793lv-p4ulv22456) Units=km Length=0.0179951 bus1=p4udt5793lv.1.2 bus2=p4ulv22456.1.2 switch=n enabled=y phases=2 Linecode=1P_OH_AL_2/0_Rucina_0_416_0_2_2_2_2

New Line.l(r:p4udm14850-p4ulv6549) Units=km Length=0.0230607 bus1=p4udm14850.1.2 bus2=p4ulv6549.1.2 switch=n enabled=y phases=2 Linecode=1P_OH_AL_2/0_Rucina_0_416_0_2_2_2_2

New Line.l(r:p4udm14850-p4ulv36332) Units=km Length=0.0169293 bus1=p4udm14850.1.2 bus2=p4ulv36332.1.2 switch=n enabled=y phases=2 Linecode=1P_OH_AL_2/0_Rucina_0_416_0_2_2_2_2

New Line.l(r:p4udm14850-p4udt5793lv) Units=km Length=0.0190531 bus1=p4udt5793lv.1.2 bus2=p4udm14850.1.2 switch=n enabled=y phases=2 Linecode=1P_OH_AL_2/0_Rucina_0_416_0_2_2_2_2

New Line.l(r:p4udt5794lv-p4ulv6550) Units=km Length=0.0302664 bus1=p4udt5794lv.1.2 bus2=p4ulv6550.1.2 switch=n enabled=y phases=2 Linecode=1P_OH_AL_4/0_Zuzara_0_416_0_2_2_2_2

New Line.l(r:p4udt5794lv-p4ulv8673) Units=km Length=0.0286236 bus1=p4udt5794lv.1.2 bus2=p4ulv8673.1.2 switch=n enabled=y phases=2 Linecode=1P_OH_AL_4/0_Zuzara_0_416_0_2_2_2_2

New Line.l(r:p4udt5794lv-p4ulv22859) Units=km Length=0.033178 bus1=p4udt5794lv.1.2 bus2=p4ulv22859.1.2 switch=n enabled=y phases=2 Linecode=1P_OH_AL_4/0_Zuzara_0_416_0_2_2_2_2

New Line.l(r:p4udt5794lv-p4ulv38018) Units=km Length=0.0319972 bus1=p4udt5794lv.1.2 bus2=p4ulv38018.1.2 switch=n enabled=y phases=2 Linecode=1P_OH_AL_4/0_Zuzara_0_416_0_2_2_2_2

New Line.l(r:p4udt5797lv-p4ulv6555) Units=km Length=0.021461100000000004 bus1=p4udt5797lv.1.2 bus2=p4ulv6555.1.2 switch=n enabled=y phases=2 Linecode=1P_UG_AL_4/0_Sweetbriar_0_416_0_2_2_2_2

New Line.l(r:p4udt6189lv-p4ulv7060) Units=km Length=0.0102946 bus1=p4udt6189lv.1.2 bus2=p4ulv7060.1.2 switch=n enabled=y phases=2 Linecode=1P_UG_AL_4/0_Sweetbriar_0_416_0_2_2_2_2

New Line.l(r:p4udm18503-p4ulv8675) Units=km Length=0.0114184 bus1=p4udm18503.1.2 bus2=p4ulv8675.1.2 switch=n enabled=y phases=2 Linecode=1P_UG_AL_4/0_Sweetbriar_0_416_0_2_2_2_2

New Line.l(r:p4udm18503-p4udt7381lv) Units=km Length=0.00936915 bus1=p4udt7381lv.1.2 bus2=p4udm18503.1.2 switch=n enabled=y phases=2 Linecode=1P_UG_AL_4/0_Sweetbriar_0_416_0_2_2_2_2

New Line.l(r:p4udm18504-p4ulv13083) Units=km Length=0.005731710000000001 bus1=p4udm18504.1.2 bus2=p4ulv13083.1.2 switch=n enabled=y phases=2 Linecode=1P_UG_AL_4/0_Sweetbriar_0_416_0_2_2_2_2

New Line.l(r:p4udm18504-p4udt7381lv) Units=km Length=0.00937361 bus1=p4udt7381lv.1.2 bus2=p4udm18504.1.2 switch=n enabled=y phases=2 Linecode=1P_UG_AL_4/0_Sweetbriar_0_416_0_2_2_2_2

New Line.l(r:p4udm19149-p4ulv9076) Units=km Length=0.00729433 bus1=p4udm19149.1.2 bus2=p4ulv9076.1.2 switch=n enabled=y phases=2 Linecode=1P_UG_AL_4/0_Sweetbriar_0_416_0_2_2_2_2

New Line.l(r:p4udm19149-p4udt7667lv) Units=km Length=0.007392 bus1=p4udt7667lv.1.2 bus2=p4udm19149.1.2 switch=n enabled=y phases=2 Linecode=1P_UG_AL_4/0_Sweetbriar_0_416_0_2_2_2_2

New Line.l(r:p4udm19150-p4ulv40085) Units=km Length=0.009188720000000001 bus1=p4udm19150.1.2 bus2=p4ulv40085.1.2 switch=n enabled=y phases=2 Linecode=1P_UG_AL_4/0_Sweetbriar_0_416_0_2_2_2_2

New Line.l(r:p4udm19150-p4udt7667lv) Units=km Length=0.007386 bus1=p4udt7667lv.1.2 bus2=p4udm19150.1.2 switch=n enabled=y phases=2 Linecode=1P_UG_AL_4/0_Sweetbriar_0_416_0_2_2_2_2

New Line.l(r:p4udt7960lv-p4ulv9505) Units=km Length=0.0132652 bus1=p4udt7960lv.1.2 bus2=p4ulv9505.1.2 switch=n enabled=y phases=2 Linecode=1P_OH_AL_2/0_Rucina_0_416_0_2_2_2_2

New Line.l(r:p4udt7960lv-p4ulv43016) Units=km Length=0.0158676 bus1=p4udt7960lv.1.2 bus2=p4ulv43016.1.2 switch=n enabled=y phases=2 Linecode=1P_OH_AL_2/0_Rucina_0_416_0_2_2_2_2

New Line.l(r:p4udm19750-p4ulv18179) Units=km Length=0.0172813 bus1=p4udm19750.1.2 bus2=p4ulv18179.1.2 switch=n enabled=y phases=2 Linecode=1P_OH_AL_2/0_Rucina_0_416_0_2_2_2_2

New Line.l(r:p4udm19750-p4ulv43015) Units=km Length=0.014316200000000001 bus1=p4udm19750.1.2 bus2=p4ulv43015.1.2 switch=n enabled=y phases=2 Linecode=1P_OH_AL_2/0_Rucina_0_416_0_2_2_2_2

New Line.l(r:p4udm19750-p4udt7960lv) Units=km Length=0.0163126 bus1=p4udt7960lv.1.2 bus2=p4udm19750.1.2 switch=n enabled=y phases=2 Linecode=1P_OH_AL_2/0_Rucina_0_416_0_2_2_2_2

New Line.l(r:p4udt7962lv-p4ulv9507) Units=km Length=0.0174506 bus1=p4udt7962lv.1.2 bus2=p4ulv9507.1.2 switch=n enabled=y phases=2 Linecode=1P_OH_AL_2/0_Rucina_0_416_0_2_2_2_2

New Line.l(r:p4udt7963lv-p4ulv9508) Units=km Length=0.0284966 bus1=p4udt7963lv.1.2 bus2=p4ulv9508.1.2 switch=n enabled=y phases=2 Linecode=1P_OH_AL_4/0_Zuzara_0_416_0_2_2_2_2

New Line.l(r:p4udm20410-p4ulv9927) Units=km Length=0.0637826 bus1=p4udm20410.1.2 bus2=p4ulv9927.1.2 switch=n enabled=y phases=2 Linecode=1P_OH_AL_4/0_Zuzara_0_416_0_2_2_2_2

New Line.l(r:p4udm20410-p4udt8255lv) Units=km Length=0.0105331 bus1=p4udt8255lv.1.2 bus2=p4udm20410.1.2 switch=n enabled=y phases=2 Linecode=1P_OH_AL_2/0_Rucina_0_416_0_2_2_2_2

New Line.l(r:p4udm20411-p4ulv28311) Units=km Length=0.06818470000000001 bus1=p4udm20411.1.2 bus2=p4ulv28311.1.2 switch=n enabled=y phases=2 Linecode=1P_OH_AL_4/0_Zuzara_0_416_0_2_2_2_2

New Line.l(r:p4udm20411-p4udt8255lv) Units=km Length=0.0119133 bus1=p4udt8255lv.1.2 bus2=p4udm20411.1.2 switch=n enabled=y phases=2 Linecode=1P_OH_AL_2/0_Rucina_0_416_0_2_2_2_2

New Line.l(r:p4udt8256lv-p4ulv9928) Units=km Length=0.00608401 bus1=p4udt8256lv.1.2 bus2=p4ulv9928.1.2 switch=n enabled=y phases=2 Linecode=1P_UG_AL_2/0_Converse_0_416_0_2_2_2_2

New Line.l(r:p4udt8332lv-p4ulv10047) Units=km Length=0.00795785 bus1=p4udt8332lv.1.2 bus2=p4ulv10047.1.2 switch=n enabled=y phases=2 Linecode=1P_UG_AL_4/0_Sweetbriar_0_416_0_2_2_2_2

New Line.l(r:p4udt8547lv-p4ulv10351) Units=km Length=0.0230734 bus1=p4udt8547lv.1.2 bus2=p4ulv10351.1.2 switch=n enabled=y phases=2 Linecode=1P_UG_AL_1/0_Brenau_0_416_0_2_2_2_2

New Line.l(r:p4udt8547lv-p4ulv16881) Units=km Length=0.0236791 bus1=p4udt8547lv.1.2 bus2=p4ulv16881.1.2 switch=n enabled=y phases=2 Linecode=1P_UG_AL_1/0_Brenau_0_416_0_2_2_2_2

New Line.l(r:p4udt8547lv-p4ulv24491) Units=km Length=0.021307 bus1=p4udt8547lv.1.2 bus2=p4ulv24491.1.2 switch=n enabled=y phases=2 Linecode=1P_UG_AL_1/0_Brenau_0_416_0_2_2_2_2

New Line.l(r:p4udt8547lv-p4ulv25735) Units=km Length=0.0252318 bus1=p4udt8547lv.1.2 bus2=p4ulv25735.1.2 switch=n enabled=y phases=2 Linecode=1P_UG_AL_1/0_Brenau_0_416_0_2_2_2_2

New Line.l(r:p4udt8547lv-p4ulv30444) Units=km Length=0.0241167 bus1=p4udt8547lv.1.2 bus2=p4ulv30444.1.2 switch=n enabled=y phases=2 Linecode=1P_UG_AL_1/0_Brenau_0_416_0_2_2_2_2

New Line.l(r:p4udt8828lv-p4ulv34677) Units=km Length=0.0152019 bus1=p4udt8828lv.1.2 bus2=p4ulv34677.1.2 switch=n enabled=y phases=2 Linecode=1P_UG_AL_1/0_Brenau_0_416_0_2_2_2_2

New Line.l(r:p4udm21587-p4ulv10767) Units=km Length=0.0155976 bus1=p4udm21587.1.2 bus2=p4ulv10767.1.2 switch=n enabled=y phases=2 Linecode=1P_UG_AL_1/0_Brenau_0_416_0_2_2_2_2

New Line.l(r:p4udm21588-p4ulv31699) Units=km Length=0.018875200000000005 bus1=p4udm21588.1.2 bus2=p4ulv31699.1.2 switch=n enabled=y phases=2 Linecode=1P_UG_AL_1/0_Brenau_0_416_0_2_2_2_2

New Line.l(r:p4udm21587-p4udm21588) Units=km Length=0.00886825 bus1=p4udm21587.1.2 bus2=p4udm21588.1.2 switch=n enabled=y phases=2 Linecode=1P_UG_AL_1/0_Brenau_0_416_0_2_2_2_2

New Line.l(r:p4udm21587-p4udt8828lv) Units=km Length=0.008212510000000001 bus1=p4udt8828lv.1.2 bus2=p4udm21587.1.2 switch=n enabled=y phases=2 Linecode=1P_UG_AL_4/0_Sweetbriar_0_416_0_2_2_2_2

New Line.l(r:p4udm21590-p4ulv38833) Units=km Length=0.014264 bus1=p4udm21590.1.2 bus2=p4ulv38833.1.2 switch=n enabled=y phases=2 Linecode=1P_UG_AL_1/0_Brenau_0_416_0_2_2_2_2

New Line.l(r:p4udm21590-p4udt8828lv) Units=km Length=0.008212510000000001 bus1=p4udt8828lv.1.2 bus2=p4udm21590.1.2 switch=n enabled=y phases=2 Linecode=1P_UG_AL_1/0_Brenau_0_416_0_2_2_2_2

New Line.l(r:p4udt8893lv-p4ulv25401) Units=km Length=0.0161181 bus1=p4udt8893lv.1.2 bus2=p4ulv25401.1.2 switch=n enabled=y phases=2 Linecode=1P_OH_AL_2/0_Rucina_0_416_0_2_2_2_2

New Line.l(r:p4udm21744-p4ulv10874) Units=km Length=0.013976100000000002 bus1=p4udm21744.1.2 bus2=p4ulv10874.1.2 switch=n enabled=y phases=2 Linecode=1P_OH_AL_2/0_Rucina_0_416_0_2_2_2_2

New Line.l(r:p4udm21744-p4udt8893lv) Units=km Length=0.0157124 bus1=p4udt8893lv.1.2 bus2=p4udm21744.1.2 switch=n enabled=y phases=2 Linecode=1P_OH_AL_2/0_Rucina_0_416_0_2_2_2_2

New Line.l(r:p4udm21745-p4ulv22560) Units=km Length=0.0163692 bus1=p4udm21745.1.2 bus2=p4ulv22560.1.2 switch=n enabled=y phases=2 Linecode=1P_OH_AL_2/0_Rucina_0_416_0_2_2_2_2

New Line.l(r:p4udm21745-p4ulv34236) Units=km Length=0.016266 bus1=p4udm21745.1.2 bus2=p4ulv34236.1.2 switch=n enabled=y phases=2 Linecode=1P_OH_AL_2/0_Rucina_0_416_0_2_2_2_2

New Line.l(r:p4udm21745-p4udt8893lv) Units=km Length=0.0157028 bus1=p4udt8893lv.1.2 bus2=p4udm21745.1.2 switch=n enabled=y phases=2 Linecode=1P_OH_AL_2/0_Rucina_0_416_0_2_2_2_2

New Line.l(r:p4udt9123lv-p4ulv11217) Units=km Length=0.0262054 bus1=p4udt9123lv.1.2 bus2=p4ulv11217.1.2 switch=n enabled=y phases=2 Linecode=1P_UG_AL_4/0_Sweetbriar_0_416_0_2_2_2_2

New Line.l(r:p4udm22209-p4ulv43878) Units=km Length=0.02136 bus1=p4udm22209.1.2 bus2=p4ulv43878.1.2 switch=n enabled=y phases=2 Linecode=1P_UG_AL_1/0_Brenau_0_416_0_2_2_2_2

New Line.l(r:p4udm22209-p4udt9123lv) Units=km Length=0.009658240000000002 bus1=p4udt9123lv.1.2 bus2=p4udm22209.1.2 switch=n enabled=y phases=2 Linecode=1P_UG_AL_1/0_Brenau_0_416_0_2_2_2_2

New Line.l(r:p4udt9179lv-p4ulv11320) Units=km Length=0.06240790000000001 bus1=p4udt9179lv.1.2 bus2=p4ulv11320.1.2 switch=n enabled=y phases=2 Linecode=1P_UG_AL_1/0_Brenau_0_416_0_2_2_2_2

New Line.l(r:p4udt9691lv-p4ulv12084) Units=km Length=0.0121261 bus1=p4udt9691lv.1.2 bus2=p4ulv12084.1.2 switch=n enabled=y phases=2 Linecode=1P_UG_AL_4/0_Sweetbriar_0_416_0_2_2_2_2

New Line.l(r:p4udt9959lv-p4ulv12517) Units=km Length=0.0149621 bus1=p4udt9959lv.1.2 bus2=p4ulv12517.1.2 switch=n enabled=y phases=2 Linecode=1P_OH_AL_2/0_Rucina_0_416_0_2_2_2_2

New Line.l(r:p4udt10493lv-p4ulv13390) Units=km Length=0.0190227 bus1=p4udt10493lv.1.2 bus2=p4ulv13390.1.2 switch=n enabled=y phases=2 Linecode=1P_UG_AL_1/0_Brenau_0_416_0_2_2_2_2

New Line.l(r:p4udt10493lv-p4ulv13391) Units=km Length=0.0133958 bus1=p4udt10493lv.1.2 bus2=p4ulv13391.1.2 switch=n enabled=y phases=2 Linecode=1P_UG_AL_1/0_Brenau_0_416_0_2_2_2_2

New Line.l(r:p4udm24956-p4ulv30440) Units=km Length=0.0169868 bus1=p4udm24956.1.2 bus2=p4ulv30440.1.2 switch=n enabled=y phases=2 Linecode=1P_UG_AL_2/0_Converse_0_416_0_2_2_2_2

New Line.l(r:p4udm24956-p4udt10493lv) Units=km Length=0.0185696 bus1=p4udt10493lv.1.2 bus2=p4udm24956.1.2 switch=n enabled=y phases=2 Linecode=1P_UG_AL_2/0_Converse_0_416_0_2_2_2_2

New Line.l(r:p4udm24957-p4ulv35078) Units=km Length=0.0285365 bus1=p4udm24957.1.2 bus2=p4ulv35078.1.2 switch=n enabled=y phases=2 Linecode=1P_UG_AL_2/0_Converse_0_416_0_2_2_2_2

New Line.l(r:p4udm24957-p4udt10493lv) Units=km Length=0.0278489 bus1=p4udt10493lv.1.2 bus2=p4udm24957.1.2 switch=n enabled=y phases=2 Linecode=1P_UG_AL_2/0_Converse_0_416_0_2_2_2_2

New Line.l(r:p4udm24958-p4ulv13392) Units=km Length=0.0167665 bus1=p4udm24958.1.2 bus2=p4ulv13392.1.2 switch=n enabled=y phases=2 Linecode=1P_OH_AL_2/0_Rucina_0_416_0_2_2_2_2

New Line.l(r:p4udm24958-p4ulv39242) Units=km Length=0.0153395 bus1=p4udm24958.1.2 bus2=p4ulv39242.1.2 switch=n enabled=y phases=2 Linecode=1P_OH_AL_2/0_Rucina_0_416_0_2_2_2_2

New Line.l(r:p4udm24958-p4udt10494lv) Units=km Length=0.0314952 bus1=p4udt10494lv.1.2 bus2=p4udm24958.1.2 switch=n enabled=y phases=2 Linecode=1P_OH_AL_4/0_Zuzara_0_416_0_2_2_2_2

New Line.l(r:p4udm24959-p4ulv29120) Units=km Length=0.022020000000000005 bus1=p4udm24959.1.2 bus2=p4ulv29120.1.2 switch=n enabled=y phases=2 Linecode=1P_OH_AL_2/0_Rucina_0_416_0_2_2_2_2

New Line.l(r:p4udm24959-p4udt10494lv) Units=km Length=0.0358349 bus1=p4udt10494lv.1.2 bus2=p4udm24959.1.2 switch=n enabled=y phases=2 Linecode=1P_OH_AL_4/0_Zuzara_0_416_0_2_2_2_2

New Line.l(r:p4udt10785lv-p4ulv13841) Units=km Length=0.0174089 bus1=p4udt10785lv.1.2 bus2=p4ulv13841.1.2 switch=n enabled=y phases=2 Linecode=1P_UG_AL_1/0_Brenau_0_416_0_2_2_2_2

New Line.l(r:p4udt10785lv-p4ulv32543) Units=km Length=0.0138 bus1=p4udt10785lv.1.2 bus2=p4ulv32543.1.2 switch=n enabled=y phases=2 Linecode=1P_UG_AL_1/0_Brenau_0_416_0_2_2_2_2

New Line.l(r:p4udm25515-p4ulv16445) Units=km Length=0.015188100000000001 bus1=p4udm25515.1.2 bus2=p4ulv16445.1.2 switch=n enabled=y phases=2 Linecode=1P_UG_AL_2/0_Converse_0_416_0_2_2_2_2

New Line.l(r:p4udm25515-p4udt10785lv) Units=km Length=0.00926892 bus1=p4udt10785lv.1.2 bus2=p4udm25515.1.2 switch=n enabled=y phases=2 Linecode=1P_UG_AL_2/0_Converse_0_416_0_2_2_2_2

New Line.l(r:p4udt11048lv-p4ulv14284) Units=km Length=0.018701900000000004 bus1=p4udt11048lv.1.2 bus2=p4ulv14284.1.2 switch=n enabled=y phases=2 Linecode=1P_UG_AL_1/0_Brenau_0_416_0_2_2_2_2

New Line.l(r:p4udt11306lv-p4ulv14704) Units=km Length=0.00867341 bus1=p4udt11306lv.1.2 bus2=p4ulv14704.1.2 switch=n enabled=y phases=2 Linecode=1P_OH_AL_2/0_Rucina_0_416_0_2_2_2_2

New Line.l(r:p4udt11356lv-p4ulv14796) Units=km Length=0.0200996 bus1=p4udt11356lv.1.2 bus2=p4ulv14796.1.2 switch=n enabled=y phases=2 Linecode=1P_UG_AL_4/0_Sweetbriar_0_416_0_2_2_2_2

New Line.l(r:p4udt11571lv-p4ulv15144) Units=km Length=0.0250241 bus1=p4udt11571lv.1.2 bus2=p4ulv15144.1.2 switch=n enabled=y phases=2 Linecode=1P_OH_AL_2/0_Rucina_0_416_0_2_2_2_2

New Line.l(r:p4udt12059lv-p4ulv15993) Units=km Length=0.023007900000000005 bus1=p4udt12059lv.1.2 bus2=p4ulv15993.1.2 switch=n enabled=y phases=2 Linecode=1P_OH_AL_2/0_Rucina_0_416_0_2_2_2_2

New Line.l(r:p4udt12059lv-p4ulv23278) Units=km Length=0.0367708 bus1=p4udt12059lv.1.2 bus2=p4ulv23278.1.2 switch=n enabled=y phases=2 Linecode=1P_OH_AL_4/0_Zuzara_0_416_0_2_2_2_2

New Line.l(r:p4udt12319lv-p4ulv23276) Units=km Length=0.0334185 bus1=p4udt12319lv.1.2 bus2=p4ulv23276.1.2 switch=n enabled=y phases=2 Linecode=1P_UG_AL_1/0_Brenau_0_416_0_2_2_2_2

New Line.l(r:p4udm28336-p4ulv16443) Units=km Length=0.015339600000000002 bus1=p4udm28336.1.2 bus2=p4ulv16443.1.2 switch=n enabled=y phases=2 Linecode=1P_UG_AL_1/0_Brenau_0_416_0_2_2_2_2

New Line.l(r:p4udm28336-p4ulv38458) Units=km Length=0.0234988 bus1=p4udm28336.1.2 bus2=p4ulv38458.1.2 switch=n enabled=y phases=2 Linecode=1P_UG_AL_1/0_Brenau_0_416_0_2_2_2_2

New Line.l(r:p4udm28336-p4udt12319lv) Units=km Length=0.0097551 bus1=p4udt12319lv.1.2 bus2=p4udm28336.1.2 switch=n enabled=y phases=2 Linecode=1P_UG_AL_4/0_Sweetbriar_0_416_0_2_2_2_2

New Line.l(r:p4udt12571lv-p4ulv16882) Units=km Length=0.0548233 bus1=p4udt12571lv.1.2 bus2=p4ulv16882.1.2 switch=n enabled=y phases=2 Linecode=1P_OH_AL_4/0_Zuzara_0_416_0_2_2_2_2

New Line.l(r:p4udt12805lv-p4ulv17329) Units=km Length=0.018633700000000003 bus1=p4udt12805lv.1.2 bus2=p4ulv17329.1.2 switch=n enabled=y phases=2 Linecode=1P_OH_AL_2/0_Rucina_0_416_0_2_2_2_2

New Line.l(r:p4udt13261lv-p4ulv18181) Units=km Length=0.0278033 bus1=p4udt13261lv.1.2 bus2=p4ulv18181.1.2 switch=n enabled=y phases=2 Linecode=1P_UG_AL_1/0_Brenau_0_416_0_2_2_2_2

New Line.l(r:p4udt13479lv-p4ulv42171) Units=km Length=0.01259 bus1=p4udt13479lv.1.2 bus2=p4ulv42171.1.2 switch=n enabled=y phases=2 Linecode=1P_UG_AL_1/0_Brenau_0_416_0_2_2_2_2

New Line.l(r:p4udm30339-p4ulv18604) Units=km Length=0.0134001 bus1=p4udm30339.1.2 bus2=p4ulv18604.1.2 switch=n enabled=y phases=2 Linecode=1P_UG_AL_1/0_Brenau_0_416_0_2_2_2_2

New Line.l(r:p4udm30341-p4ulv36746) Units=km Length=0.0166308 bus1=p4udm30341.1.2 bus2=p4ulv36746.1.2 switch=n enabled=y phases=2 Linecode=1P_UG_AL_1/0_Brenau_0_416_0_2_2_2_2

New Line.l(r:p4udm30339-p4udm30341) Units=km Length=0.009762500000000002 bus1=p4udm30339.1.2 bus2=p4udm30341.1.2 switch=n enabled=y phases=2 Linecode=1P_UG_AL_1/0_Brenau_0_416_0_2_2_2_2

New Line.l(r:p4udm30339-p4udt13479lv) Units=km Length=0.009755790000000002 bus1=p4udt13479lv.1.2 bus2=p4udm30339.1.2 switch=n enabled=y phases=2 Linecode=1P_UG_AL_4/0_Sweetbriar_0_416_0_2_2_2_2

New Line.l(r:p4udm30340-p4ulv35487) Units=km Length=0.0125982 bus1=p4udm30340.1.2 bus2=p4ulv35487.1.2 switch=n enabled=y phases=2 Linecode=1P_UG_AL_2/0_Converse_0_416_0_2_2_2_2

New Line.l(r:p4udm30340-p4udt13479lv) Units=km Length=0.0097551 bus1=p4udt13479lv.1.2 bus2=p4udm30340.1.2 switch=n enabled=y phases=2 Linecode=1P_UG_AL_2/0_Converse_0_416_0_2_2_2_2

New Line.l(r:p4udt13481lv-p4ulv18606) Units=km Length=0.0345155 bus1=p4udt13481lv.1.2 bus2=p4ulv18606.1.2 switch=n enabled=y phases=2 Linecode=1P_OH_AL_4/0_Zuzara_0_416_0_2_2_2_2

New Line.l(r:p4udt13481lv-p4ulv28733) Units=km Length=0.0375588 bus1=p4udt13481lv.1.2 bus2=p4ulv28733.1.2 switch=n enabled=y phases=2 Linecode=1P_OH_AL_4/0_Zuzara_0_416_0_2_2_2_2

New Line.l(r:p4udt13674lv-p4ulv19009) Units=km Length=0.0232546 bus1=p4udt13674lv.1.2 bus2=p4ulv19009.1.2 switch=n enabled=y phases=2 Linecode=1P_OH_AL_2/0_Rucina_0_416_0_2_2_2_2

New Line.l(r:p4udt13675lv-p4ulv19010) Units=km Length=0.0247075 bus1=p4udt13675lv.1.2 bus2=p4ulv19010.1.2 switch=n enabled=y phases=2 Linecode=1P_OH_AL_2/0_Rucina_0_416_0_2_2_2_2

New Line.l(r:p4udt13675lv-p4ulv22034) Units=km Length=0.0283023 bus1=p4udt13675lv.1.2 bus2=p4ulv22034.1.2 switch=n enabled=y phases=2 Linecode=1P_OH_AL_4/0_Zuzara_0_416_0_2_2_2_2

New Line.l(r:p4udt13675lv-p4ulv34675) Units=km Length=0.0267845 bus1=p4udt13675lv.1.2 bus2=p4ulv34675.1.2 switch=n enabled=y phases=2 Linecode=1P_OH_AL_2/0_Rucina_0_416_0_2_2_2_2

New Line.l(r:p4udm30662-p4ulv26688) Units=km Length=0.024337700000000004 bus1=p4udm30662.1.2 bus2=p4ulv26688.1.2 switch=n enabled=y phases=2 Linecode=1P_OH_AL_2/0_Rucina_0_416_0_2_2_2_2

New Line.l(r:p4udm30662-p4udt13675lv) Units=km Length=0.0167825 bus1=p4udt13675lv.1.2 bus2=p4udm30662.1.2 switch=n enabled=y phases=2 Linecode=1P_OH_AL_2/0_Rucina_0_416_0_2_2_2_2

New Line.l(r:p4udt13735lv-p4ulv19117) Units=km Length=0.00728995 bus1=p4udt13735lv.1.2 bus2=p4ulv19117.1.2 switch=n enabled=y phases=2 Linecode=1P_UG_AL_4/0_Sweetbriar_0_416_0_2_2_2_2

New Line.l(r:p4udt14143lv-p4ulv19857) Units=km Length=0.0256066 bus1=p4udt14143lv.1.2 bus2=p4ulv19857.1.2 switch=n enabled=y phases=2 Linecode=1P_OH_AL_2/0_Rucina_0_416_0_2_2_2_2

New Line.l(r:p4udt14593lv-p4ulv20770) Units=km Length=0.0293832 bus1=p4udt14593lv.1.2 bus2=p4ulv20770.1.2 switch=n enabled=y phases=2 Linecode=1P_OH_AL_4/0_Zuzara_0_416_0_2_2_2_2

New Line.l(r:p4udt15412lv-p4ulv22460) Units=km Length=0.0168916 bus1=p4udt15412lv.1.2 bus2=p4ulv22460.1.2 switch=n enabled=y phases=2 Linecode=1P_UG_AL_1/0_Brenau_0_416_0_2_2_2_2

New Line.l(r:p4udt15616lv-p4ulv22860) Units=km Length=0.0134731 bus1=p4udt15616lv.1.2 bus2=p4ulv22860.1.2 switch=n enabled=y phases=2 Linecode=1P_UG_AL_4/0_Sweetbriar_0_416_0_2_2_2_2

New Line.l(r:p4udt15616lv-p4ulv23277) Units=km Length=0.0148045 bus1=p4udt15616lv.1.2 bus2=p4ulv23277.1.2 switch=n enabled=y phases=2 Linecode=1P_UG_AL_1/0_Brenau_0_416_0_2_2_2_2

New Line.l(r:p4udt17099lv-p4ulv26161) Units=km Length=0.0121055 bus1=p4udt17099lv.1.2 bus2=p4ulv26161.1.2 switch=n enabled=y phases=2 Linecode=1P_UG_AL_1/0_Brenau_0_416_0_2_2_2_2

New Line.l(r:p4udm35900-p4ulv31288) Units=km Length=0.016647 bus1=p4udm35900.1.2 bus2=p4ulv31288.1.2 switch=n enabled=y phases=2 Linecode=1P_UG_AL_2/0_Converse_0_416_0_2_2_2_2

New Line.l(r:p4udm35900-p4udt17099lv) Units=km Length=0.00928296 bus1=p4udt17099lv.1.2 bus2=p4udm35900.1.2 switch=n enabled=y phases=2 Linecode=1P_UG_AL_2/0_Converse_0_416_0_2_2_2_2

New Line.l(r:p4udt17100lv-p4ulv28736) Units=km Length=0.052873 bus1=p4udt17100lv.1.2 bus2=p4ulv28736.1.2 switch=n enabled=y phases=2 Linecode=1P_OH_AL_4/0_Zuzara_0_416_0_2_2_2_2

New Line.l(r:p4udm35901-p4ulv26162) Units=km Length=0.07062870000000002 bus1=p4udm35901.1.2 bus2=p4ulv26162.1.2 switch=n enabled=y phases=2 Linecode=1P_OH_AL_4/0_Zuzara_0_416_0_2_2_2_2

New Line.l(r:p4udm35901-p4udt17100lv) Units=km Length=0.0174009 bus1=p4udt17100lv.1.2 bus2=p4udm35901.1.2 switch=n enabled=y phases=2 Linecode=1P_OH_AL_2/0_Rucina_0_416_0_2_2_2_2

New Line.l(r:p4udt17134lv-p4ulv26262) Units=km Length=0.021573800000000004 bus1=p4udt17134lv.1.2 bus2=p4ulv26262.1.2 switch=n enabled=y phases=2 Linecode=1P_UG_AL_1/0_Brenau_0_416_0_2_2_2_2

New Line.l(r:p4udt17281lv-p4ulv26583) Units=km Length=0.0246533 bus1=p4udt17281lv.1.2 bus2=p4ulv26583.1.2 switch=n enabled=y phases=2 Linecode=1P_OH_AL_2/0_Rucina_0_416_0_2_2_2_2

New Line.l(r:p4udt17476lv-p4ulv27023) Units=km Length=0.020295100000000003 bus1=p4udt17476lv.1.2 bus2=p4ulv27023.1.2 switch=n enabled=y phases=2 Linecode=1P_OH_AL_2/0_Rucina_0_416_0_2_2_2_2

New Line.l(r:p4udt17477lv-p4ulv42592) Units=km Length=0.0141146 bus1=p4udt17477lv.1.2 bus2=p4ulv42592.1.2 switch=n enabled=y phases=2 Linecode=1P_OH_AL_2/0_Rucina_0_416_0_2_2_2_2

New Line.l(r:p4udm36418-p4ulv27024) Units=km Length=0.0151796 bus1=p4udm36418.1.2 bus2=p4ulv27024.1.2 switch=n enabled=y phases=2 Linecode=1P_OH_AL_2/0_Rucina_0_416_0_2_2_2_2

New Line.l(r:p4udm36418-p4ulv31697) Units=km Length=0.0200506 bus1=p4udm36418.1.2 bus2=p4ulv31697.1.2 switch=n enabled=y phases=2 Linecode=1P_OH_AL_2/0_Rucina_0_416_0_2_2_2_2

New Line.l(r:p4udm36418-p4udt17477lv) Units=km Length=0.0163126 bus1=p4udt17477lv.1.2 bus2=p4udm36418.1.2 switch=n enabled=y phases=2 Linecode=1P_OH_AL_2/0_Rucina_0_416_0_2_2_2_2

New Line.l(r:p4udm36420-p4ulv38455) Units=km Length=0.0157177 bus1=p4udm36420.1.2 bus2=p4ulv38455.1.2 switch=n enabled=y phases=2 Linecode=1P_OH_AL_2/0_Rucina_0_416_0_2_2_2_2

New Line.l(r:p4udm36420-p4udt17477lv) Units=km Length=0.0662666 bus1=p4udt17477lv.1.2 bus2=p4udm36420.1.2 switch=n enabled=y phases=2 Linecode=1P_OH_AL_4/0_Zuzara_0_416_0_2_2_2_2

New Line.l(r:p4udt17672lv-p4ulv27470) Units=km Length=0.016452 bus1=p4udt17672lv.1.2 bus2=p4ulv27470.1.2 switch=n enabled=y phases=2 Linecode=1P_OH_AL_2/0_Rucina_0_416_0_2_2_2_2

New Line.l(r:p4udt17835lv-p4ulv27894) Units=km Length=0.0442186 bus1=p4udt17835lv.1.2 bus2=p4ulv27894.1.2 switch=n enabled=y phases=2 Linecode=1P_UG_AL_1/0_Brenau_0_416_0_2_2_2_2

New Line.l(r:p4udt18019lv-p4ulv28308) Units=km Length=0.0338565 bus1=p4udt18019lv.1.2 bus2=p4ulv28308.1.2 switch=n enabled=y phases=2 Linecode=1P_OH_AL_4/0_Zuzara_0_416_0_2_2_2_2

New Line.l(r:p4udt18019lv-p4ulv41766) Units=km Length=0.0321701 bus1=p4udt18019lv.1.2 bus2=p4ulv41766.1.2 switch=n enabled=y phases=2 Linecode=1P_OH_AL_4/0_Zuzara_0_416_0_2_2_2_2

New Line.l(r:p4udt18208lv-p4ulv28734) Units=km Length=0.0242737 bus1=p4udt18208lv.1.2 bus2=p4ulv28734.1.2 switch=n enabled=y phases=2 Linecode=1P_OH_AL_2/0_Rucina_0_416_0_2_2_2_2

New Line.l(r:p4udt18344lv-p4ulv29122) Units=km Length=0.042791 bus1=p4udt18344lv.1.2 bus2=p4ulv29122.1.2 switch=n enabled=y phases=2 Linecode=1P_UG_AL_2/0_Converse_0_416_0_2_2_2_2

New Line.l(r:p4udt18345lv-p4ulv29123) Units=km Length=0.0229713 bus1=p4udt18345lv.1.2 bus2=p4ulv29123.1.2 switch=n enabled=y phases=2 Linecode=1P_OH_AL_2/0_Rucina_0_416_0_2_2_2_2

New Line.l(r:p4udt18715lv-p4ulv30008) Units=km Length=0.0161868 bus1=p4udt18715lv.1.2 bus2=p4ulv30008.1.2 switch=n enabled=y phases=2 Linecode=1P_OH_AL_2/0_Rucina_0_416_0_2_2_2_2

New Line.l(r:p4udt18716lv-p4ulv30009) Units=km Length=0.0076345 bus1=p4udt18716lv.1.2 bus2=p4ulv30009.1.2 switch=n enabled=y phases=2 Linecode=1P_UG_AL_2/0_Converse_0_416_0_2_2_2_2

New Line.l(r:p4udt19063lv-p4ulv30875) Units=km Length=0.020083 bus1=p4udt19063lv.1.2 bus2=p4ulv30875.1.2 switch=n enabled=y phases=2 Linecode=1P_UG_AL_2/0_Converse_0_416_0_2_2_2_2

New Line.l(r:p4udm38477-p4ulv37592) Units=km Length=0.0280369 bus1=p4udm38477.1.2 bus2=p4ulv37592.1.2 switch=n enabled=y phases=2 Linecode=1P_UG_AL_1/0_Brenau_0_416_0_2_2_2_2

New Line.l(r:p4udm38477-p4udt19063lv) Units=km Length=0.00917593 bus1=p4udt19063lv.1.2 bus2=p4udm38477.1.2 switch=n enabled=y phases=2 Linecode=1P_UG_AL_1/0_Brenau_0_416_0_2_2_2_2

New Line.l(r:p4udt19065lv-p4ulv30879) Units=km Length=0.0160803 bus1=p4udt19065lv.1.2 bus2=p4ulv30879.1.2 switch=n enabled=y phases=2 Linecode=1P_UG_AL_2/0_Converse_0_416_0_2_2_2_2

New Line.l(r:p4udt19225lv-p4ulv31292) Units=km Length=0.0949228 bus1=p4udt19225lv.1.2 bus2=p4ulv31292.1.2 switch=n enabled=y phases=2 Linecode=1P_OH_AL_4/0_Zuzara_0_416_0_2_2_2_2

New Line.l(r:p4udt19712lv-p4ulv32538) Units=km Length=0.0161471 bus1=p4udt19712lv.1.2 bus2=p4ulv32538.1.2 switch=n enabled=y phases=2 Linecode=1P_OH_AL_2/0_Rucina_0_416_0_2_2_2_2

New Line.l(r:p4udt19860lv-p4ulv32951) Units=km Length=0.0196856 bus1=p4udt19860lv.1.2 bus2=p4ulv32951.1.2 switch=n enabled=y phases=2 Linecode=1P_UG_AL_2/0_Converse_0_416_0_2_2_2_2

New Line.l(r:p4udt20017lv-p4ulv33365) Units=km Length=0.0294651 bus1=p4udt20017lv.1.2 bus2=p4ulv33365.1.2 switch=n enabled=y phases=2 Linecode=1P_OH_AL_4/0_Zuzara_0_416_0_2_2_2_2

New Line.l(r:p4udt20640lv-p4ulv35079) Units=km Length=0.022298 bus1=p4udt20640lv.1.2 bus2=p4ulv35079.1.2 switch=n enabled=y phases=2 Linecode=1P_UG_AL_4/0_Sweetbriar_0_416_0_2_2_2_2

New Line.l(r:p4udt21834lv-p4ulv38454) Units=km Length=0.017971 bus1=p4udt21834lv.1.2 bus2=p4ulv38454.1.2 switch=n enabled=y phases=2 Linecode=1P_OH_AL_2/0_Rucina_0_416_0_2_2_2_2

New Line.l(r:p4udt21836lv-p4ulv39245) Units=km Length=0.0134693 bus1=p4udt21836lv.1.2 bus2=p4ulv39245.1.2 switch=n enabled=y phases=2 Linecode=1P_UG_AL_1/0_Brenau_0_416_0_2_2_2_2

New Line.l(r:p4udm41675-p4ulv38459) Units=km Length=0.015311200000000002 bus1=p4udm41675.1.2 bus2=p4ulv38459.1.2 switch=n enabled=y phases=2 Linecode=1P_UG_AL_1/0_Brenau_0_416_0_2_2_2_2

New Line.l(r:p4udm41675-p4udt21836lv) Units=km Length=0.009658240000000002 bus1=p4udt21836lv.1.2 bus2=p4udm41675.1.2 switch=n enabled=y phases=2 Linecode=1P_UG_AL_1/0_Brenau_0_416_0_2_2_2_2

New Line.l(r:p4udt21838lv-p4ulv38461) Units=km Length=0.0319359 bus1=p4udt21838lv.1.2 bus2=p4ulv38461.1.2 switch=n enabled=y phases=2 Linecode=1P_OH_AL_4/0_Zuzara_0_416_0_2_2_2_2

New Line.l(r:p4udt21977lv-p4ulv38830) Units=km Length=0.0166319 bus1=p4udt21977lv.1.2 bus2=p4ulv38830.1.2 switch=n enabled=y phases=2 Linecode=1P_OH_AL_2/0_Rucina_0_416_0_2_2_2_2

New Line.l(r:p4udt22122lv-p4ulv39246) Units=km Length=0.00638424 bus1=p4udt22122lv.1.2 bus2=p4ulv39246.1.2 switch=n enabled=y phases=2 Linecode=1P_UG_AL_4/0_Sweetbriar_0_416_0_2_2_2_2

New Line.l(r:p4udt22395lv-p4ulv40080) Units=km Length=0.0283925 bus1=p4udt22395lv.1.2 bus2=p4ulv40080.1.2 switch=n enabled=y phases=2 Linecode=1P_OH_AL_4/0_Zuzara_0_416_0_2_2_2_2

New Line.l(r:p4udt22397lv-p4ulv40084) Units=km Length=0.00544929 bus1=p4udt22397lv.1.2 bus2=p4ulv40084.1.2 switch=n enabled=y phases=2 Linecode=1P_OH_AL_2/0_Rucina_0_416_0_2_2_2_2

New Line.l(r:p4udt22398lv-p4ulv40086) Units=km Length=0.005962500000000001 bus1=p4udt22398lv.1.2 bus2=p4ulv40086.1.2 switch=n enabled=y phases=2 Linecode=1P_UG_AL_4/0_Sweetbriar_0_416_0_2_2_2_2

New Line.l(r:p4udt22426lv-p4ulv40178) Units=km Length=0.0182317 bus1=p4udt22426lv.1.2 bus2=p4ulv40178.1.2 switch=n enabled=y phases=2 Linecode=1P_OH_AL_2/0_Rucina_0_416_0_2_2_2_2

New Line.l(r:p4udt22866lv-p4ulv41377) Units=km Length=0.0107709 bus1=p4udt22866lv.1.2 bus2=p4ulv41377.1.2 switch=n enabled=y phases=2 Linecode=1P_UG_AL_2/0_Converse_0_416_0_2_2_2_2

New Line.l(r:p4udt23122lv-p4ulv42174) Units=km Length=0.0121487 bus1=p4udt23122lv.1.2 bus2=p4ulv42174.1.2 switch=n enabled=y phases=2 Linecode=1P_UG_AL_4/0_Sweetbriar_0_416_0_2_2_2_2

New Line.l(r:p4udt23404lv-p4ulv43017) Units=km Length=0.020128 bus1=p4udt23404lv.1.2 bus2=p4ulv43017.1.2 switch=n enabled=y phases=2 Linecode=1P_OH_AL_2/0_Rucina_0_416_0_2_2_2_2

New Line.l(r:p4udt23562lv-p4ulv43461) Units=km Length=0.00758537 bus1=p4udt23562lv.1.2 bus2=p4ulv43461.1.2 switch=n enabled=y phases=2 Linecode=1P_UG_AL_4/0_Sweetbriar_0_416_0_2_2_2_2

New Line.l(r:p4udt4414-p4udt9123) Units=km Length=0.001 bus1=p4udt4414-p4udt9123x.2 bus2=p4udt4414-p4udt9123xx.2 switch=n enabled=y phases=1 Linecode=1P_UG_AL_#2_15_12_47_0_1_1_1_1

New Line.l(r:p4udt15616-p4udt4414) Units=km Length=0.0289747 bus1=p4udt15616-p4udt4414x.2 bus2=p4udt15616-p4udt4414xx.2 switch=n enabled=y phases=1 Linecode=1P_UG_AL_#2_15_12_47_0_1_1_1_1

New Line.l(r:p4udt15616-p4udt21836) Units=km Length=0.0289669 bus1=p4udt15616-p4udt21836xx.2 bus2=p4udt15616-p4udt21836x.2 switch=n enabled=y phases=1 Linecode=1P_UG_AL_#2_15_12_47_0_1_1_1_1

New Line.l(r:p4udt1482-p4udt21836) Units=km Length=0.00966441 bus1=p4udt1482-p4udt21836x.2 bus2=p4udt1482-p4udt21836xx.2 switch=n enabled=y phases=1 Linecode=1P_UG_AL_#2_15_12_47_0_1_1_1_1

New Line.l(r:p4udt1482-p4udt2626) Units=km Length=0.0579337 bus1=p4udt1482-p4udt2626xx.2 bus2=p4udt1482-p4udt2626x.2 switch=n enabled=y phases=1 Linecode=1P_UG_AL_#2_15_12_47_0_1_1_1_1

New Line.l(r:p4udt12319-p4udt8547) Units=km Length=0.009755790000000002 bus1=p4udt12319-p4udt8547x.2 bus2=p4udt12319-p4udt8547xx.2 switch=n enabled=y phases=1 Linecode=1P_UG_AL_#2_15_12_47_0_1_1_1_1

New Line.l(r:p4udt12319-p4udt13479) Units=km Length=0.0390285 bus1=p4udt12319-p4udt13479xx.2 bus2=p4udt12319-p4udt13479x.2 switch=n enabled=y phases=1 Linecode=1P_UG_AL_#2_15_12_47_0_1_1_1_1

New Line.l(r:p4udt13479-p4udt8828) Units=km Length=0.0631897 bus1=p4udt13479-p4udt8828xx.2 bus2=p4udt13479-p4udt8828x.2 switch=n enabled=y phases=1 Linecode=1P_UG_AL_#2_15_12_47_0_1_1_1_1

New Line.l(r:p4udt3393-p4udt8828) Units=km Length=0.0333715 bus1=p4udt3393-p4udt8828x.2 bus2=p4udt3393-p4udt8828xx.2 switch=n enabled=y phases=1 Linecode=1P_UG_AL_#2_15_12_47_0_1_1_1_1

New Line.l(r:p4udt2626-p4udt3393) Units=km Length=0.0445917 bus1=p4udt2626-p4udt3393x.2 bus2=p4udt2626-p4udt3393xx.2 switch=n enabled=y phases=1 Linecode=1P_UG_AL_#2_15_12_47_0_1_1_1_1

New Line.l(r:p4udt2237-p4udt2626) Units=km Length=0.0447904 bus1=p4udt2237-p4udt2626x.2 bus2=p4udt2237-p4udt2626xx.2 switch=n enabled=y phases=1 Linecode=1P_UG_AL_#2_15_12_47_0_1_1_1_1

New Line.l(r:p4udt12805-p4udt7962) Units=km Length=0.165856 bus1=p4udt12805.2 bus2=p4udt7962.2 switch=n enabled=y phases=1 Linecode=1P_OH_AL_ACSR_#2_Sparrow_12_47_0_1_1_1_1

New Line.l(r:p4udt12805-p4udt2237) Units=km Length=0.117125 bus1=p4udt2237.2 bus2=p4udt12805.2 switch=n enabled=y phases=1 Linecode=1P_OH_AL_ACSR_#2_Sparrow_12_47_0_1_1_1_1

New Line.l(r:p4udt19860-p4udt2237) Units=km Length=0.28518200000000005 bus1=p4udt19860-p4udt2237x.2 bus2=p4udt19860-p4udt2237xx.2 switch=n enabled=y phases=1 Linecode=1P_UG_AL_#2_15_12_47_0_1_1_1_1

New Line.l(r:p4udt19860-p4udt3394) Units=km Length=0.00888548 bus1=p4udt19860-p4udt3394xx.2 bus2=p4udt19860-p4udt3394x.2 switch=n enabled=y phases=1 Linecode=1P_UG_AL_#2_15_12_47_0_1_1_1_1

New Line.l(r:p4udt17835-p4udt3394) Units=km Length=0.0293537 bus1=p4udt17835-p4udt3394xx.2 bus2=p4udt17835-p4udt3394xxx.2 switch=n enabled=y phases=1 Linecode=1P_UG_AL_#2_15_12_47_0_1_1_1_1

New Line.l(r:p4udt11306-p4udt12571) Units=km Length=0.0572163 bus1=p4udt11306-p4udt12571x.2 bus2=p4udt11306.2 switch=n enabled=y phases=1 Linecode=1P_OH_AL_ACSR_#2_Sparrow_12_47_0_1_1_1_1

New Line.l(r:p4udt22395-p4udt5794) Units=km Length=0.0169628 bus1=p4udt22395.2 bus2=p4udt5794.2 switch=n enabled=y phases=1 Linecode=1P_OH_AL_ACSR_#2_Sparrow_12_47_0_1_1_1_1

New Line.l(r:p4udt21977-p4udt22395) Units=km Length=0.0290318 bus1=p4udt21977.2 bus2=p4udt22395.2 switch=n enabled=y phases=1 Linecode=1P_OH_AL_ACSR_#2_Sparrow_12_47_0_1_1_1_1

New Line.l(r:p4udt21977-p4udt5131) Units=km Length=0.013985100000000002 bus1=p4udt5131.2 bus2=p4udt21977.2 switch=n enabled=y phases=1 Linecode=1P_OH_AL_ACSR_#2_Sparrow_12_47_0_1_1_1_1

New Line.l(r:p4udt17477-p4udt5131) Units=km Length=0.038305500000000006 bus1=p4udt17477.2 bus2=p4udt5131.2 switch=n enabled=y phases=1 Linecode=1P_OH_AL_ACSR_#2_Sparrow_12_47_0_1_1_1_1

New Line.l(r:p4udt17477-p4udt7960) Units=km Length=0.0652502 bus1=p4udt7960.2 bus2=p4udt17477.2 switch=n enabled=y phases=1 Linecode=1P_OH_AL_ACSR_#2_Sparrow_12_47_0_1_1_1_1

New Line.l(r:p4udt682-p4udt7960) Units=km Length=0.0713913 bus1=p4udt682.2 bus2=p4udt7960.2 switch=n enabled=y phases=1 Linecode=1P_OH_AL_ACSR_#2_Sparrow_12_47_0_1_1_1_1

New Line.l(r:p4udt10494-p4udt682) Units=km Length=0.001 bus1=p4udt682.2 bus2=p4udt10494.2 switch=n enabled=y phases=1 Linecode=1P_OH_AL_ACSR_#2_Sparrow_12_47_0_1_1_1_1

New Line.l(r:p4udt13675-p4udt23404) Units=km Length=0.0167825 bus1=p4udt23404.2 bus2=p4udt13675.2 switch=n enabled=y phases=1 Linecode=1P_OH_AL_ACSR_#2_Sparrow_12_47_0_1_1_1_1

New Line.l(r:p4udt23404-p4udt8893) Units=km Length=0.04821140000000001 bus1=p4udt8893.2 bus2=p4udt23404.2 switch=n enabled=y phases=1 Linecode=1P_OH_AL_ACSR_#2_Sparrow_12_47_0_1_1_1_1

New Line.l(r:p4udt17672-p4udt8893) Units=km Length=0.0346632 bus1=p4udt17672.2 bus2=p4udt8893.2 switch=n enabled=y phases=1 Linecode=1P_OH_AL_ACSR_#2_Sparrow_12_47_0_1_1_1_1

New Line.l(r:p4udt17672-p4udt3083) Units=km Length=0.037896400000000004 bus1=p4udt3083.2 bus2=p4udt17672.2 switch=n enabled=y phases=1 Linecode=1P_OH_AL_ACSR_#2_Sparrow_12_47_0_1_1_1_1

New Line.l(r:p4udt22426-p4udt3083) Units=km Length=0.03589210000000001 bus1=p4udt22426.2 bus2=p4udt3083.2 switch=n enabled=y phases=1 Linecode=1P_OH_AL_ACSR_#2_Sparrow_12_47_0_1_1_1_1

New Line.l(r:p4udt17476-p4udt22426) Units=km Length=0.0179438 bus1=p4udt17476.2 bus2=p4udt22426.2 switch=n enabled=y phases=1 Linecode=1P_OH_AL_ACSR_#2_Sparrow_12_47_0_1_1_1_1

New Line.l(r:p4udt17476-p4udt682) Units=km Length=0.05378100000000001 bus1=p4udt682.2 bus2=p4udt17476.2 switch=n enabled=y phases=1 Linecode=1P_OH_AL_ACSR_#2_Sparrow_12_47_0_1_1_1_1

New Line.l(r:p4udt681-p4udt682) Units=km Length=0.0882894 bus1=p4udt681-p4udt682x.2 bus2=p4udt682.2 switch=n enabled=y phases=1 Linecode=1P_OH_AL_ACSR_#2_Sparrow_12_47_0_1_1_1_1

New Line.l(r:p4udt10785-p4udt268) Units=km Length=0.0582263 bus1=p4udt10785-p4udt268x.1 bus2=p4udt10785-p4udt268xx.1 switch=n enabled=y phases=1 Linecode=1P_UG_AL_#2_15_12_47_0_1_1_1_1

New Line.l(r:p4udt10785-p4udt1083) Units=km Length=0.00927418 bus1=p4udt10785-p4udt1083xx.1 bus2=p4udt10785-p4udt1083x.1 switch=n enabled=y phases=1 Linecode=1P_UG_AL_#2_15_12_47_0_1_1_1_1

New Line.l(r:p4udt1083-p4udt15412) Units=km Length=0.0463683 bus1=p4udt1083-p4udt15412xx.1 bus2=p4udt1083-p4udt15412x.1 switch=n enabled=y phases=1 Linecode=1P_UG_AL_#2_15_12_47_0_1_1_1_1

New Line.l(r:p4udt19063-p4udt5130) Units=km Length=0.001 bus1=p4udt19063-p4udt5130xx.1 bus2=p4udt19063-p4udt5130x.1 switch=n enabled=y phases=1 Linecode=1P_UG_AL_#2_15_12_47_0_1_1_1_1

New Line.l(r:p4udt11048-p4udt5130) Units=km Length=0.027509000000000002 bus1=p4udt11048-p4udt5130x.1 bus2=p4udt11048-p4udt5130xx.1 switch=n enabled=y phases=1 Linecode=1P_UG_AL_#2_15_12_47_0_1_1_1_1

New Line.l(r:p4udt11048-p4udt19065) Units=km Length=0.00917593 bus1=p4udt11048-p4udt19065xx.1 bus2=p4udt11048-p4udt19065x.1 switch=n enabled=y phases=1 Linecode=1P_UG_AL_#2_15_12_47_0_1_1_1_1

New Line.l(r:p4udt19065-p4udt22866) Units=km Length=0.0275123 bus1=p4udt19065-p4udt22866xx.1 bus2=p4udt19065-p4udt22866x.1 switch=n enabled=y phases=1 Linecode=1P_UG_AL_#2_15_12_47_0_1_1_1_1

New Line.l(r:p4udt15412-p4udt22866) Units=km Length=0.0401511 bus1=p4udt15412-p4udt22866x.1 bus2=p4udt15412-p4udt22866xx.1 switch=n enabled=y phases=1 Linecode=1P_UG_AL_#2_15_12_47_0_1_1_1_1

New Line.l(r:p4udt10493-p4udt15412) Units=km Length=0.0556966 bus1=p4udt10493-p4udt15412x.1 bus2=p4udt10493-p4udt15412xx.1 switch=n enabled=y phases=1 Linecode=1P_UG_AL_#2_15_12_47_0_1_1_1_1

New Line.l(r:p4udt10493-p4udt17099) Units=km Length=0.0371355 bus1=p4udt10493-p4udt17099xx.1 bus2=p4udt10493-p4udt17099x.1 switch=n enabled=y phases=1 Linecode=1P_UG_AL_#2_15_12_47_0_1_1_1_1

New Line.l(r:p4udt17099-p4udt18019) Units=km Length=0.0371355 bus1=p4udt18019.1 bus2=p4udt17099.1 switch=n enabled=y phases=1 Linecode=1P_OH_AL_ACSR_#2_Sparrow_12_47_0_1_1_1_1

New Line.l(r:p4udt18019-p4udt5793) Units=km Length=0.0571535 bus1=p4udt5793.1 bus2=p4udt18019.1 switch=n enabled=y phases=1 Linecode=1P_OH_AL_ACSR_#2_Sparrow_12_47_0_1_1_1_1

New Line.l(r:p4udt21834-p4udt5793) Units=km Length=0.0190473 bus1=p4udt21834.1 bus2=p4udt5793.1 switch=n enabled=y phases=1 Linecode=1P_OH_AL_ACSR_#2_Sparrow_12_47_0_1_1_1_1

New Line.l(r:p4udt21834-p4udt9959) Units=km Length=0.0190531 bus1=p4udt9959.1 bus2=p4udt21834.1 switch=n enabled=y phases=1 Linecode=1P_OH_AL_ACSR_#2_Sparrow_12_47_0_1_1_1_1

New Line.l(r:p4udt13674-p4udt9959) Units=km Length=0.0190473 bus1=p4udt13674.1 bus2=p4udt9959.1 switch=n enabled=y phases=1 Linecode=1P_OH_AL_ACSR_#2_Sparrow_12_47_0_1_1_1_1

New Line.l(r:p4udt13674-p4udt19712) Units=km Length=0.0190531 bus1=p4udt19712.1 bus2=p4udt13674.1 switch=n enabled=y phases=1 Linecode=1P_OH_AL_ACSR_#2_Sparrow_12_47_0_1_1_1_1

New Line.l(r:p4udt19712-p4udt681) Units=km Length=0.0361846 bus1=p4udt19712-p4udt681x.1 bus2=p4udt19712.1 switch=n enabled=y phases=1 Linecode=1P_OH_AL_ACSR_#2_Sparrow_12_47_0_1_1_1_1

New Line.l(r:p4udt20640-p4udt388) Units=km Length=0.001 bus1=p4udt20640-p4udt388xx.3 bus2=p4udt20640-p4udt388x.3 switch=n enabled=y phases=1 Linecode=1P_UG_AL_#2_15_12_47_0_1_1_1_1

New Line.l(r:p4udt7381-p4udt9691) Units=km Length=0.001 bus1=p4udt7381-p4udt9691xx.3 bus2=p4udt7381-p4udt9691xxx.3 switch=n enabled=y phases=1 Linecode=1P_UG_AL_#2_15_12_47_0_1_1_1_1

New Line.l(r:p4udt13735-p4udt6189) Units=km Length=0.0293035 bus1=p4udt13735-p4udt6189xx.1 bus2=p4udt13735-p4udt6189x.1 switch=n enabled=y phases=1 Linecode=1P_UG_AL_#2_15_12_47_0_1_1_1_1

New Line.l(r:p4udt6189-p4udt9179) Units=km Length=0.0839521 bus1=p4udt6189-p4udt9179xx.1 bus2=p4udt6189-p4udt9179x.1 switch=n enabled=y phases=1 Linecode=1P_UG_AL_#2_15_12_47_0_1_1_1_1

New Line.l(r:p4udt1194-p4udt8332) Units=km Length=0.001 bus1=p4udt1194-p4udt8332xx.1 bus2=p4udt1194-p4udt8332xxx.1 switch=n enabled=y phases=1 Linecode=1P_UG_AL_#2_15_12_47_0_1_1_1_1

New Line.l(r:p4udt15247-p4udt5797) Units=km Length=0.00857401 bus1=p4udt15247-p4udt5797xx.3 bus2=p4udt15247-p4udt5797xxx.3 switch=n enabled=y phases=1 Linecode=1P_UG_AL_#2_15_12_47_0_1_1_1_1

New Line.l(r:p4udt20017-p4udt8256) Units=km Length=0.0167795 bus1=p4udt20017-p4udt8256x.3 bus2=p4udt8256.3 switch=n enabled=y phases=1 Linecode=1P_OH_AL_ACSR_#2_Sparrow_12_47_0_1_1_1_1

New Line.l(r:p4udt14593-p4udt19225) Units=km Length=0.001 bus1=p4udt14593-p4udt19225x.1 bus2=p4udt19225.1 switch=n enabled=y phases=1 Linecode=1P_OH_AL_ACSR_#2_Sparrow_12_47_0_1_1_1_1

New Line.l(r:p4udt18715-p4udt22397) Units=km Length=0.0609005 bus1=p4udt18715.3 bus2=p4udt22397.3 switch=n enabled=y phases=1 Linecode=1P_OH_AL_ACSR_#2_Sparrow_12_47_0_1_1_1_1

New Line.l(r:p4udt13481-p4udt18715) Units=km Length=0.0435388 bus1=p4udt13481.3 bus2=p4udt18715.3 switch=n enabled=y phases=1 Linecode=1P_OH_AL_ACSR_#2_Sparrow_12_47_0_1_1_1_1

New Line.l(r:p4udt13481-p4udt18208) Units=km Length=0.0331469 bus1=p4udt18208.3 bus2=p4udt13481.3 switch=n enabled=y phases=1 Linecode=1P_OH_AL_ACSR_#2_Sparrow_12_47_0_1_1_1_1

New Line.l(r:p4udt14143-p4udt18208) Units=km Length=0.0307385 bus1=p4udt14143.3 bus2=p4udt18208.3 switch=n enabled=y phases=1 Linecode=1P_OH_AL_ACSR_#2_Sparrow_12_47_0_1_1_1_1

New Line.l(r:p4udt14143-p4udt3392) Units=km Length=0.0273701 bus1=p4udt14143-p4udt3392x.3 bus2=p4udt14143.3 switch=n enabled=y phases=1 Linecode=1P_OH_AL_ACSR_#2_Sparrow_12_47_0_1_1_1_1

New Line.l(r:p4udt3392-p4uhs17_1247) Units=km Length=0.6425540000000001 bus1=p4udt3392-p4uhs17_1247x.1.2.3 bus2=p4udt3392-p4uhs17_1247x_b1_1.1.2.3 switch=n enabled=y phases=3 Linecode=3P_OH_AL_ACSR_1033kcmil_Curlew_12.47_1_3_3_3_3

New Line.l(r:p4udt388-p4udt681) Units=km Length=0.684216 bus1=p4udt388.1.2.3 bus2=p4udt681.1.2.3 switch=n enabled=y phases=3 Linecode=3P_OH_AL_ACSR_4/0_Penguin_12_47_0_3_3_3_3

New Line.l(r:p4udt22398-p4udt388) Units=km Length=0.0190208 bus1=p4udt22398-p4udt388x.1.2.3 bus2=p4udt22398-p4udt388xx.1.2.3 switch=n enabled=y phases=3 Linecode=3P_UG_AL_4/0_25_12_47_0_3_3_3_3

New Line.l(r:p4udt16717-p4udt22398) Units=km Length=0.0452264 bus1=p4udt16717-p4udt22398x.1.2.3 bus2=p4udt16717-p4udt22398xx.1.2.3 switch=n enabled=y phases=3 Linecode=3P_UG_AL_4/0_25_12_47_0_3_3_3_3

New Line.l(r:p4udt16717-p4udt23122) Units=km Length=0.0232111 bus1=p4udt16717-p4udt23122xx.1.2.3 bus2=p4udt16717-p4udt23122x.1.2.3 switch=n enabled=y phases=3 Linecode=3P_UG_AL_4/0_25_12_47_0_3_3_3_3

New Line.l(r:p4udt23122-p4udt687) Units=km Length=0.0169542 bus1=p4udt23122-p4udt687xx.1.2.3 bus2=p4udt23122-p4udt687x.1.2.3 switch=n enabled=y phases=3 Linecode=3P_UG_AL_4/0_25_12_47_0_3_3_3_3

New Line.l(r:p4udt687-p4udt7381) Units=km Length=0.028120900000000004 bus1=p4udt687-p4udt7381xx.1.2.3 bus2=p4udt687-p4udt7381x.1.2.3 switch=n enabled=y phases=3 Linecode=3P_UG_AL_4/0_25_12_47_0_3_3_3_3

New Line.l(r:p4udt1483-p4udt7381) Units=km Length=0.200268 bus1=p4udt1483.1.2.3 bus2=p4udt7381.1.2.3 switch=n enabled=y phases=3 Linecode=3P_OH_AL_ACSR_4/0_Penguin_12_47_0_3_3_3_3

New Line.l(r:p4udt1483-p4udt20017) Units=km Length=0.13296000000000002 bus1=p4udt20017.1.2.3 bus2=p4udt20017_b1_1.1.2.3 switch=n enabled=y phases=3 Linecode=3P_OH_AL_ACSR_4/0_Penguin_12_47_0_3_3_3_3

New Line.l(r:p4udt12571-p4udt20017) Units=km Length=0.0793419 bus1=p4udt12571.1.2.3 bus2=p4udt20017.1.2.3 switch=n enabled=y phases=3 Linecode=3P_OH_AL_ACSR_4/0_Penguin_12_47_0_3_3_3_3

New Line.l(r:p4udt12571-p4udt2998) Units=km Length=0.015904 bus1=p4udt2998.1.2.3 bus2=p4udt12571.1.2.3 switch=n enabled=y phases=3 Linecode=3P_OH_AL_ACSR_4/0_Penguin_12_47_0_3_3_3_3

New Line.l(r:p4udt18345-p4udt2998) Units=km Length=0.03324370000000001 bus1=p4udt18345.1.2.3 bus2=p4udt2998.1.2.3 switch=n enabled=y phases=3 Linecode=3P_OH_AL_ACSR_4/0_Penguin_12_47_0_3_3_3_3

New Line.l(r:p4udt17281-p4udt18345) Units=km Length=0.0500345 bus1=p4udt17281.1.2.3 bus2=p4udt18345.1.2.3 switch=n enabled=y phases=3 Linecode=3P_OH_AL_ACSR_4/0_Penguin_12_47_0_3_3_3_3

New Line.l(r:p4udt17281-p4udt21838) Units=km Length=0.0489531 bus1=p4udt21838.1.2.3 bus2=p4udt17281.1.2.3 switch=n enabled=y phases=3 Linecode=3P_OH_AL_ACSR_4/0_Penguin_12_47_0_3_3_3_3

New Line.l(r:p4udt21838-p4udt3760) Units=km Length=0.0126314 bus1=p4udt3760.1.2.3 bus2=p4udt21838.1.2.3 switch=n enabled=y phases=3 Linecode=3P_OH_AL_ACSR_4/0_Penguin_12_47_0_3_3_3_3

New Line.l(r:p4udt14593-p4udt3760) Units=km Length=0.0775501 bus1=p4udt14593.1.2.3 bus2=p4udt3760.1.2.3 switch=n enabled=y phases=3 Linecode=3P_OH_AL_ACSR_4/0_Penguin_12_47_0_3_3_3_3

New Line.l(r:p4udt14593-p4udt8255) Units=km Length=0.0250981 bus1=p4udt8255.1.2.3 bus2=p4udt14593.1.2.3 switch=n enabled=y phases=3 Linecode=3P_OH_AL_ACSR_4/0_Penguin_12_47_0_3_3_3_3

New Line.l(r:p4udt7963-p4udt8255) Units=km Length=0.0221881 bus1=p4udt7963.1.2.3 bus2=p4udt8255.1.2.3 switch=n enabled=y phases=3 Linecode=3P_OH_AL_ACSR_4/0_Penguin_12_47_0_3_3_3_3

New Line.l(r:p4udt17100-p4udt7963) Units=km Length=0.0314278 bus1=p4udt17100.1.2.3 bus2=p4udt7963.1.2.3 switch=n enabled=y phases=3 Linecode=3P_OH_AL_ACSR_4/0_Penguin_12_47_0_3_3_3_3

New Line.l(r:p4udt12059-p4udt17100) Units=km Length=0.0348019 bus1=p4udt12059.1.2.3 bus2=p4udt17100.1.2.3 switch=n enabled=y phases=3 Linecode=3P_OH_AL_ACSR_4/0_Penguin_12_47_0_3_3_3_3

New Line.l(r:p4udt12059-p4udt18344) Units=km Length=0.034788 bus1=p4udt18344.1.2.3 bus2=p4udt12059.1.2.3 switch=n enabled=y phases=3 Linecode=3P_OH_AL_ACSR_4/0_Penguin_12_47_0_3_3_3_3

New Line.l(r:p4udt17835-p4udt18344) Units=km Length=0.0564002 bus1=p4udt17835-p4udt18344x.1.2.3 bus2=p4udt17835-p4udt18344xx.1.2.3 switch=n enabled=y phases=3 Linecode=3P_UG_AL_4/0_25_12_47_0_3_3_3_3

New Line.l(r:p4udt13261-p4udt17835) Units=km Length=0.0577582 bus1=p4udt13261-p4udt17835x.1.2.3 bus2=p4udt13261-p4udt17835xx.1.2.3 switch=n enabled=y phases=3 Linecode=3P_UG_AL_4/0_25_12_47_0_3_3_3_3

New Line.l(r:p4udt11571-p4udt13261) Units=km Length=0.0267089 bus1=p4udt11571.1.2.3 bus2=p4udt13261.1.2.3 switch=n enabled=y phases=3 Linecode=3P_OH_AL_ACSR_4/0_Penguin_12_47_0_3_3_3_3

New Line.l(r:p4udt11571-p4udt3392) Units=km Length=0.0355735 bus1=p4udt3392.1.2.3 bus2=p4udt11571.1.2.3 switch=n enabled=y phases=3 Linecode=3P_OH_AL_ACSR_4/0_Penguin_12_47_0_3_3_3_3

New Line.l(r:p4udt16717lv-p4ulv25273) Units=km Length=0.00874562 bus1=p4udt16717lv.1.2.3 bus2=p4ulv25273.1.2.3 switch=n enabled=y phases=3 Linecode=3P_UG_AL_350kcmil_15_0_416_0_3_3_3_3

New Line.l(r:p4udt388lv-p4ulv394) Units=km Length=0.0189959 bus1=p4udt388lv.1.2.3 bus2=p4ulv394.1.2.3 switch=n enabled=y phases=3 Linecode=3P_UG_AL_350kcmil_15_0_416_0_3_3_3_3

New Line.l(r:p4udt16716lv-p4ulv25272) Units=km Length=0.005908 bus1=p4udt16716lv.1.2.3 bus2=p4ulv25272.1.2.3 switch=n enabled=y phases=3 Linecode=3P_UG_AL_350kcmil_15_0_416_0_3_3_3_3

New Line.l(r:p4udt6190lv-p4ulv7062) Units=km Length=0.009995220000000003 bus1=p4udt6190lv.1.2.3 bus2=p4ulv7062.1.2.3 switch=n enabled=y phases=3 Linecode=3P_UG_AL_350kcmil_15_0_416_0_3_3_3_3

New Line.l(r:p4udt15656lv-p4ulv22969) Units=km Length=0.0155889 bus1=p4udt15656lv.1.2.3 bus2=p4ulv22969.1.2.3 switch=n enabled=y phases=3 Linecode=3P_UG_AL_350kcmil_15_0_416_0_3_3_3_3

New Line.l(r:p4udt15656lv-p4ulv36016) Units=km Length=0.0154801 bus1=p4udt15656lv.1.2.3 bus2=p4ulv36016.1.2.3 switch=n enabled=y phases=3 Linecode=3P_UG_AL_350kcmil_15_0_416_0_3_3_3_3

New Line.l(r:p4udt11356-p4udt15656) Units=km Length=0.001 bus1=p4udt11356-p4udt15656x.1.2.3 bus2=p4udt11356-p4udt15656xx.1.2.3 switch=n enabled=y phases=3 Linecode=3P_UG_AL_4/0_25_12_47_0_3_3_3_3

New Line.l(r:p4udt11356-p4udt3847) Units=km Length=0.0535359 bus1=p4udt11356-p4udt3847xx.1.2.3 bus2=p4udt11356-p4udt3847x.1.2.3 switch=n enabled=y phases=3 Linecode=3P_UG_AL_4/0_25_12_47_0_3_3_3_3

New Line.l(r:p4udt3847-p4udt6190) Units=km Length=0.0257251 bus1=p4udt3847-p4udt6190xx.1.2.3 bus2=p4udt3847-p4udt6190x.1.2.3 switch=n enabled=y phases=3 Linecode=3P_UG_AL_4/0_25_12_47_0_3_3_3_3

New Line.l(r:p4udt6190-p4udt9179) Units=km Length=0.058854100000000006 bus1=p4udt6190-p4udt9179xx.1.2.3 bus2=p4udt6190-p4udt9179x.1.2.3 switch=n enabled=y phases=3 Linecode=3P_UG_AL_4/0_25_12_47_0_3_3_3_3

New Line.l(r:p4udt17134-p4udt9179) Units=km Length=0.0670571 bus1=p4udt17134-p4udt9179x.1.2.3 bus2=p4udt17134-p4udt9179xx.1.2.3 switch=n enabled=y phases=3 Linecode=3P_UG_AL_4/0_25_12_47_0_3_3_3_3

New Line.l(r:p4udt16716-p4udt17134) Units=km Length=0.0477118 bus1=p4udt16716-p4udt17134x.1.2.3 bus2=p4udt16716-p4udt17134xx.1.2.3 switch=n enabled=y phases=3 Linecode=3P_UG_AL_4/0_25_12_47_0_3_3_3_3

New Line.l(r:p4udt16716-p4udt7381) Units=km Length=0.261338 bus1=p4udt16716-p4udt7381xx.1.2.3 bus2=p4udt16716-p4udt7381x.1.2.3 switch=n enabled=y phases=3 Linecode=3P_UG_AL_4/0_25_12_47_0_3_3_3_3

New Line.l(r:p4udt7669lv-p4ulv20769) Units=km Length=0.019092 bus1=p4udt7669lv.1.2.3 bus2=p4ulv20769.1.2.3 switch=n enabled=y phases=3 Linecode=3P_UG_AL_350kcmil_15_0_416_0_3_3_3_3

New Line.l(r:p4udm19156-p4ulv9078) Units=km Length=0.00734897 bus1=p4udm19156.1.2.3 bus2=p4ulv9078.1.2.3 switch=n enabled=y phases=3 Linecode=3P_UG_AL_350kcmil_15_0_416_0_3_3_3_3

New Line.l(r:p4udm19156-p4udt7669lv) Units=km Length=0.00718752 bus1=p4udt7669lv.1.2.3 bus2=p4udm19156.1.2.3 switch=n enabled=y phases=3 Linecode=3P_UG_AL_350kcmil_15_0_416_0_3_3_3_3

New Line.l(r:p4udt21837lv-p4ulv38460) Units=km Length=0.0203953 bus1=p4udt21837lv.1.2.3 bus2=p4ulv38460.1.2.3 switch=n enabled=y phases=3 Linecode=3P_UG_AL_350kcmil_15_0_416_0_3_3_3_3

New Line.l(r:p4udt15247lv-p4ulv22154) Units=km Length=0.0155898 bus1=p4udt15247lv.1.2.3 bus2=p4ulv22154.1.2.3 switch=n enabled=y phases=3 Linecode=3P_UG_AL_350kcmil_15_0_416_0_3_3_3_3

New Line.l(r:p4udt1194-p4udt15247) Units=km Length=0.0347752 bus1=p4udt1194-p4udt15247x.1.2.3 bus2=p4udt1194-p4udt15247xx.1.2.3 switch=n enabled=y phases=3 Linecode=3P_UG_AL_4/0_25_12_47_0_3_3_3_3

New Line.l(r:p4udt1194-p4udt22122) Units=km Length=0.11564300000000001 bus1=p4udt1194-p4udt22122xx.1.2.3 bus2=p4udt1194-p4udt22122x.1.2.3 switch=n enabled=y phases=3 Linecode=3P_UG_AL_4/0_25_12_47_0_3_3_3_3

New Line.l(r:p4udt21837-p4udt22122) Units=km Length=0.0157262 bus1=p4udt21837-p4udt22122x.1.2.3 bus2=p4udt21837-p4udt22122xx.1.2.3 switch=n enabled=y phases=3 Linecode=3P_UG_AL_4/0_25_12_47_0_3_3_3_3

New Line.l(r:p4udt21837-p4udt7667) Units=km Length=0.023101600000000003 bus1=p4udt21837-p4udt7667xx.1.2.3 bus2=p4udt21837-p4udt7667x.1.2.3 switch=n enabled=y phases=3 Linecode=3P_UG_AL_4/0_25_12_47_0_3_3_3_3

New Line.l(r:p4udt7667-p4udt7669) Units=km Length=0.0163134 bus1=p4udt7667-p4udt7669xx.1.2.3 bus2=p4udt7667-p4udt7669x.1.2.3 switch=n enabled=y phases=3 Linecode=3P_UG_AL_4/0_25_12_47_0_3_3_3_3

New Line.l(r:p4udt23562-p4udt7669) Units=km Length=0.0800572 bus1=p4udt23562-p4udt7669x.1.2.3 bus2=p4udt23562-p4udt7669xx.1.2.3 switch=n enabled=y phases=3 Linecode=3P_UG_AL_4/0_25_12_47_0_3_3_3_3

New Line.l(r:p4udt18716-p4udt23562) Units=km Length=0.0756389 bus1=p4udt18716-p4udt23562x.1.2.3 bus2=p4udt18716-p4udt23562xx.1.2.3 switch=n enabled=y phases=3 Linecode=3P_UG_AL_4/0_25_12_47_0_3_3_3_3

New Line.l(r:p4udt1483-p4udt18716) Units=km Length=0.36080600000000007 bus1=p4udt1483.1.2.3 bus2=p4udt18716.1.2.3 switch=n enabled=y phases=3 Linecode=3P_OH_AL_ACSR_4/0_Penguin_12_47_0_3_3_3_3

New Line.l(r:p4udt10235-p4udt3392) Units=km Length=0.45241 bus1=p4udt10235-p4udt3392x.1.2.3 bus2=p4udt3392.1.2.3 switch=n enabled=y phases=3 Linecode=3P_OH_AL_ACSR_1033kcmil_Curlew_12.47_1_3_3_3_3

New Line.padswitch(r:p4udt4414-p4udt9123)p4u_75598 Units=km Length=0.001 bus1=p4udt4414.2 bus2=p4udt4414-p4udt9123x.2 switch=y enabled=y phases=1 Linecode=padswitch_1_1_1_1

New Line.padswitch(r:p4udt4414-p4udt9123)p4u_75599 Units=km Length=0.001 bus1=p4udt4414-p4udt9123xx.2 bus2=p4udt9123.2 switch=y enabled=y phases=1 Linecode=padswitch_1_2_1_1_1

New Line.padswitch(r:p4udt15616-p4udt4414)p4u_75600 Units=km Length=0.001 bus1=p4udt15616.2 bus2=p4udt15616-p4udt4414x.2 switch=y enabled=y phases=1 Linecode=padswitch_1_1_1_1

New Line.padswitch(r:p4udt15616-p4udt4414)p4u_75601 Units=km Length=0.001 bus1=p4udt15616-p4udt4414xx.2 bus2=p4udt4414.2 switch=y enabled=y phases=1 Linecode=padswitch_1_2_1_0_1_1

New Line.padswitch(r:p4udt15616-p4udt21836)p4u_75602 Units=km Length=0.001 bus1=p4udt21836.2 bus2=p4udt15616-p4udt21836xx.2 switch=y enabled=y phases=1 Linecode=padswitch_1_1_1_1

New Line.padswitch(r:p4udt15616-p4udt21836)p4u_75603 Units=km Length=0.001 bus1=p4udt15616-p4udt21836x.2 bus2=p4udt15616.2 switch=y enabled=y phases=1 Linecode=padswitch_1_2_1_0_1_0_1

New Line.padswitch(r:p4udt1482-p4udt21836)p4u_75604 Units=km Length=0.001 bus1=p4udt1482.2 bus2=p4udt1482-p4udt21836x.2 switch=y enabled=y phases=1 Linecode=padswitch_1_1_1_1

New Line.padswitch(r:p4udt1482-p4udt21836)p4u_75605 Units=km Length=0.001 bus1=p4udt1482-p4udt21836xx.2 bus2=p4udt21836.2 switch=y enabled=y phases=1 Linecode=padswitch_1_1_1_1

New Line.padswitch(r:p4udt1482-p4udt2626)p4u_75606 Units=km Length=0.001 bus1=p4udt2626.2 bus2=p4udt1482-p4udt2626xx.2 switch=y enabled=y phases=1 Linecode=padswitch_1_1_1_1

New Line.padswitch(r:p4udt1482-p4udt2626)p4u_75607 Units=km Length=0.001 bus1=p4udt1482-p4udt2626x.2 bus2=p4udt1482.2 switch=y enabled=y phases=1 Linecode=padswitch_1_1_1_1

New Line.padswitch(r:p4udt12319-p4udt8547)p4u_75608 Units=km Length=0.001 bus1=p4udt12319.2 bus2=p4udt12319-p4udt8547x.2 switch=y enabled=y phases=1 Linecode=padswitch_1_1_1_1

New Line.padswitch(r:p4udt12319-p4udt8547)p4u_75609 Units=km Length=0.001 bus1=p4udt12319-p4udt8547xx.2 bus2=p4udt8547.2 switch=y enabled=y phases=1 Linecode=padswitch_1_2_1_1_1

New Line.padswitch(r:p4udt12319-p4udt13479)p4u_75610 Units=km Length=0.001 bus1=p4udt13479.2 bus2=p4udt12319-p4udt13479xx.2 switch=y enabled=y phases=1 Linecode=padswitch_1_1_1_1

New Line.padswitch(r:p4udt12319-p4udt13479)p4u_75611 Units=km Length=0.001 bus1=p4udt12319-p4udt13479x.2 bus2=p4udt12319.2 switch=y enabled=y phases=1 Linecode=padswitch_1_1_1_1

New Line.padswitch(r:p4udt13479-p4udt8828)p4u_75612 Units=km Length=0.001 bus1=p4udt8828.2 bus2=p4udt13479-p4udt8828xx.2 switch=y enabled=y phases=1 Linecode=padswitch_1_1_1_1

New Line.padswitch(r:p4udt13479-p4udt8828)p4u_75613 Units=km Length=0.001 bus1=p4udt13479-p4udt8828x.2 bus2=p4udt13479.2 switch=y enabled=y phases=1 Linecode=padswitch_1_1_1_1

New Line.padswitch(r:p4udt3393-p4udt8828)p4u_75614 Units=km Length=0.001 bus1=p4udt3393.2 bus2=p4udt3393-p4udt8828x.2 switch=y enabled=y phases=1 Linecode=padswitch_1_1_1_1

New Line.padswitch(r:p4udt3393-p4udt8828)p4u_75615 Units=km Length=0.001 bus1=p4udt3393-p4udt8828xx.2 bus2=p4udt8828.2 switch=y enabled=y phases=1 Linecode=padswitch_1_1_1_1

New Line.padswitch(r:p4udt2626-p4udt3393)p4u_75616 Units=km Length=0.001 bus1=p4udt2626.2 bus2=p4udt2626-p4udt3393x.2 switch=y enabled=y phases=1 Linecode=padswitch_1_1_1_1

New Line.padswitch(r:p4udt2626-p4udt3393)p4u_75617 Units=km Length=0.001 bus1=p4udt2626-p4udt3393xx.2 bus2=p4udt3393.2 switch=y enabled=y phases=1 Linecode=padswitch_1_1_1_1

New Line.padswitch(r:p4udt2237-p4udt2626)p4u_75618 Units=km Length=0.001 bus1=p4udt2237.2 bus2=p4udt2237-p4udt2626x.2 switch=y enabled=y phases=1 Linecode=padswitch_1_2_1_0_1_0_1_0

New Line.padswitch(r:p4udt2237-p4udt2626)p4u_75619 Units=km Length=0.001 bus1=p4udt2237-p4udt2626xx.2 bus2=p4udt2626.2 switch=y enabled=y phases=1 Linecode=padswitch_1_1_1_1

New Line.padswitch(r:p4udt19860-p4udt2237)p4u_75620 Units=km Length=0.001 bus1=p4udt19860.2 bus2=p4udt19860-p4udt2237x.2 switch=y enabled=y phases=1 Linecode=padswitch_1_2_1_0_1_0_1_0

New Line.padswitch(r:p4udt19860-p4udt2237)p4u_75621 Units=km Length=0.001 bus1=p4udt19860-p4udt2237xx.2 bus2=p4udt2237.2 switch=y enabled=y phases=1 Linecode=padswitch_1_2_1_0_1_0_1_0

New Line.padswitch(r:p4udt19860-p4udt3394)p4u_75622 Units=km Length=0.001 bus1=p4udt3394.2 bus2=p4udt19860-p4udt3394xx.2 switch=y enabled=y phases=1 Linecode=padswitch_1_1_1_1

New Line.padswitch(r:p4udt19860-p4udt3394)p4u_75623 Units=km Length=0.001 bus1=p4udt19860-p4udt3394x.2 bus2=p4udt19860.2 switch=y enabled=y phases=1 Linecode=padswitch_1_2_1_1_1

New Line.padswitch(r:p4udt17835-p4udt3394)p4u_75624 Units=km Length=0.001 bus1=p4udt17835-p4udt3394x.2 bus2=p4udt17835-p4udt3394xx.2 switch=y enabled=y phases=1 Linecode=padswitch_1_1_1_1

New Line.padswitch(r:p4udt17835-p4udt3394)p4u_75625 Units=km Length=0.001 bus1=p4udt17835-p4udt3394xxx.2 bus2=p4udt3394.2 switch=y enabled=y phases=1 Linecode=padswitch_1_2_1_1_1

New Line.padswitch(r:p4udt10785-p4udt268)p4u_75626 Units=km Length=0.001 bus1=p4udt10785.1 bus2=p4udt10785-p4udt268x.1 switch=y enabled=y phases=1 Linecode=padswitch_1_1_1_1

New Line.padswitch(r:p4udt10785-p4udt268)p4u_75627 Units=km Length=0.001 bus1=p4udt10785-p4udt268xx.1 bus2=p4udt268.1 switch=y enabled=y phases=1 Linecode=padswitch_1_2_1_0_1_1

New Line.padswitch(r:p4udt10785-p4udt1083)p4u_75628 Units=km Length=0.001 bus1=p4udt1083.1 bus2=p4udt10785-p4udt1083xx.1 switch=y enabled=y phases=1 Linecode=padswitch_1_1_1_1

New Line.padswitch(r:p4udt10785-p4udt1083)p4u_75629 Units=km Length=0.001 bus1=p4udt10785-p4udt1083x.1 bus2=p4udt10785.1 switch=y enabled=y phases=1 Linecode=padswitch_1_1_1_1

New Line.padswitch(r:p4udt1083-p4udt15412)p4u_75630 Units=km Length=0.001 bus1=p4udt15412.1 bus2=p4udt1083-p4udt15412xx.1 switch=y enabled=y phases=1 Linecode=padswitch_1_1_1_1

New Line.padswitch(r:p4udt1083-p4udt15412)p4u_75631 Units=km Length=0.001 bus1=p4udt1083-p4udt15412x.1 bus2=p4udt1083.1 switch=y enabled=y phases=1 Linecode=padswitch_1_1_1_1

New Line.padswitch(r:p4udt19063-p4udt5130)p4u_75632 Units=km Length=0.001 bus1=p4udt5130.1 bus2=p4udt19063-p4udt5130xx.1 switch=y enabled=y phases=1 Linecode=padswitch_1_2_1_1_1

New Line.padswitch(r:p4udt19063-p4udt5130)p4u_75633 Units=km Length=0.001 bus1=p4udt19063-p4udt5130x.1 bus2=p4udt19063.1 switch=y enabled=y phases=1 Linecode=padswitch_1_2_1_0_1_1

New Line.padswitch(r:p4udt11048-p4udt5130)p4u_75634 Units=km Length=0.001 bus1=p4udt11048.1 bus2=p4udt11048-p4udt5130x.1 switch=y enabled=y phases=1 Linecode=padswitch_1_2_1_1_1

New Line.padswitch(r:p4udt11048-p4udt5130)p4u_75635 Units=km Length=0.001 bus1=p4udt11048-p4udt5130xx.1 bus2=p4udt5130.1 switch=y enabled=y phases=1 Linecode=padswitch_1_2_1_1_1

New Line.padswitch(r:p4udt11048-p4udt19065)p4u_75636 Units=km Length=0.001 bus1=p4udt19065.1 bus2=p4udt11048-p4udt19065xx.1 switch=y enabled=y phases=1 Linecode=padswitch_1_2_1_1_1

New Line.padswitch(r:p4udt11048-p4udt19065)p4u_75637 Units=km Length=0.001 bus1=p4udt11048-p4udt19065x.1 bus2=p4udt11048.1 switch=y enabled=y phases=1 Linecode=padswitch_1_2_1_1_1

New Line.padswitch(r:p4udt19065-p4udt22866)p4u_75638 Units=km Length=0.001 bus1=p4udt22866.1 bus2=p4udt19065-p4udt22866xx.1 switch=y enabled=y phases=1 Linecode=padswitch_1_2_1_1_1

New Line.padswitch(r:p4udt19065-p4udt22866)p4u_75639 Units=km Length=0.001 bus1=p4udt19065-p4udt22866x.1 bus2=p4udt19065.1 switch=y enabled=y phases=1 Linecode=padswitch_1_2_1_1_1

New Line.padswitch(r:p4udt15412-p4udt22866)p4u_75640 Units=km Length=0.001 bus1=p4udt15412.1 bus2=p4udt15412-p4udt22866x.1 switch=y enabled=y phases=1 Linecode=padswitch_1_1_1_1

New Line.padswitch(r:p4udt15412-p4udt22866)p4u_75641 Units=km Length=0.001 bus1=p4udt15412-p4udt22866xx.1 bus2=p4udt22866.1 switch=y enabled=y phases=1 Linecode=padswitch_1_1_1_1

New Line.padswitch(r:p4udt10493-p4udt15412)p4u_75642 Units=km Length=0.001 bus1=p4udt10493.1 bus2=p4udt10493-p4udt15412x.1 switch=y enabled=y phases=1 Linecode=padswitch_1_2_1_1_1

New Line.padswitch(r:p4udt10493-p4udt15412)p4u_75643 Units=km Length=0.001 bus1=p4udt10493-p4udt15412xx.1 bus2=p4udt15412.1 switch=y enabled=y phases=1 Linecode=padswitch_1_1_1_1

New Line.padswitch(r:p4udt10493-p4udt17099)p4u_75644 Units=km Length=0.001 bus1=p4udt17099.1 bus2=p4udt10493-p4udt17099xx.1 switch=y enabled=y phases=1 Linecode=padswitch_1_1_1_1

New Line.padswitch(r:p4udt10493-p4udt17099)p4u_75645 Units=km Length=0.001 bus1=p4udt10493-p4udt17099x.1 bus2=p4udt10493.1 switch=y enabled=y phases=1 Linecode=padswitch_1_2_1_1_1

New Line.padswitch(r:p4udt20640-p4udt388)p4u_75646 Units=km Length=0.001 bus1=p4udt20640-p4udt388xxx.3 bus2=p4udt20640-p4udt388xx.3 switch=y enabled=y phases=1 Linecode=padswitch_1_1_1_1

New Line.padswitch(r:p4udt20640-p4udt388)p4u_75647 Units=km Length=0.001 bus1=p4udt20640-p4udt388x.3 bus2=p4udt20640.3 switch=y enabled=y phases=1 Linecode=padswitch_1_2_1_0_1_0_1

New Line.padswitch(r:p4udt7381-p4udt9691)p4u_75658 Units=km Length=0.001 bus1=p4udt7381-p4udt9691x.3 bus2=p4udt7381-p4udt9691xx.3 switch=y enabled=y phases=1 Linecode=padswitch_1_2_1_0_1_0_1

New Line.padswitch(r:p4udt7381-p4udt9691)p4u_75659 Units=km Length=0.001 bus1=p4udt7381-p4udt9691xxx.3 bus2=p4udt9691.3 switch=y enabled=y phases=1 Linecode=padswitch_1_2_1_0_1_0_1

New Line.padswitch(r:p4udt13735-p4udt6189)p4u_75660 Units=km Length=0.001 bus1=p4udt6189.1 bus2=p4udt13735-p4udt6189xx.1 switch=y enabled=y phases=1 Linecode=padswitch_1_2_1_0_1_0_1

New Line.padswitch(r:p4udt13735-p4udt6189)p4u_75661 Units=km Length=0.001 bus1=p4udt13735-p4udt6189x.1 bus2=p4udt13735.1 switch=y enabled=y phases=1 Linecode=padswitch_1_2_1_0_1_0_1

New Line.padswitch(r:p4udt6189-p4udt9179)p4u_75662 Units=km Length=0.001 bus1=p4udt6189-p4udt9179xxx.1 bus2=p4udt6189-p4udt9179xx.1 switch=y enabled=y phases=1 Linecode=padswitch_1_1_1_1

New Line.padswitch(r:p4udt6189-p4udt9179)p4u_75663 Units=km Length=0.001 bus1=p4udt6189-p4udt9179x.1 bus2=p4udt6189.1 switch=y enabled=y phases=1 Linecode=padswitch_1_2_1_0_1_0_1

New Line.padswitch(r:p4udt1194-p4udt8332)p4u_75678 Units=km Length=0.001 bus1=p4udt1194-p4udt8332x.1 bus2=p4udt1194-p4udt8332xx.1 switch=y enabled=y phases=1 Linecode=padswitch_1_1_1_1

New Line.padswitch(r:p4udt1194-p4udt8332)p4u_75679 Units=km Length=0.001 bus1=p4udt1194-p4udt8332xxx.1 bus2=p4udt8332.1 switch=y enabled=y phases=1 Linecode=padswitch_1_1_1_1

New Line.padswitch(r:p4udt15247-p4udt5797)p4u_75680 Units=km Length=0.001 bus1=p4udt15247-p4udt5797x.3 bus2=p4udt15247-p4udt5797xx.3 switch=y enabled=y phases=1 Linecode=padswitch_1_1_1_1

New Line.padswitch(r:p4udt15247-p4udt5797)p4u_75681 Units=km Length=0.001 bus1=p4udt15247-p4udt5797xxx.3 bus2=p4udt5797.3 switch=y enabled=y phases=1 Linecode=padswitch_1_2_1_0_1_0_1

New Line.padswitch(r:p4udt22398-p4udt388)p4u_75648 Units=km Length=0.001 bus1=p4udt22398.1.2.3 bus2=p4udt22398-p4udt388x.1.2.3 switch=y enabled=y phases=3 Linecode=padswitch_3_3_3_3

New Line.padswitch(r:p4udt22398-p4udt388)p4u_75649 Units=km Length=0.001 bus1=p4udt22398-p4udt388xx.1.2.3 bus2=p4udt388.1.2.3 switch=y enabled=y phases=3 Linecode=padswitch_3_3_3_3_3

New Line.padswitch(r:p4udt16717-p4udt22398)p4u_75650 Units=km Length=0.001 bus1=p4udt16717.1.2.3 bus2=p4udt16717-p4udt22398x.1.2.3 switch=y enabled=y phases=3 Linecode=padswitch_3_3_3_3

New Line.padswitch(r:p4udt16717-p4udt22398)p4u_75651 Units=km Length=0.001 bus1=p4udt16717-p4udt22398xx.1.2.3 bus2=p4udt22398.1.2.3 switch=y enabled=y phases=3 Linecode=padswitch_3_3_3_1_3_3

New Line.padswitch(r:p4udt16717-p4udt23122)p4u_75652 Units=km Length=0.001 bus1=p4udt23122.1.2.3 bus2=p4udt16717-p4udt23122xx.1.2.3 switch=y enabled=y phases=3 Linecode=padswitch_3_3_3_3

New Line.padswitch(r:p4udt16717-p4udt23122)p4u_75653 Units=km Length=0.001 bus1=p4udt16717-p4udt23122x.1.2.3 bus2=p4udt16717.1.2.3 switch=y enabled=y phases=3 Linecode=padswitch_3_3_3_3

New Line.padswitch(r:p4udt23122-p4udt687)p4u_75654 Units=km Length=0.001 bus1=p4udt687.1.2.3 bus2=p4udt23122-p4udt687xx.1.2.3 switch=y enabled=y phases=3 Linecode=padswitch_3_3_3_3

New Line.padswitch(r:p4udt23122-p4udt687)p4u_75655 Units=km Length=0.001 bus1=p4udt23122-p4udt687x.1.2.3 bus2=p4udt23122.1.2.3 switch=y enabled=y phases=3 Linecode=padswitch_3_3_3_3

New Line.padswitch(r:p4udt687-p4udt7381)p4u_75656 Units=km Length=0.001 bus1=p4udt7381.1.2.3 bus2=p4udt687-p4udt7381xx.1.2.3 switch=y enabled=y phases=3 Linecode=padswitch_3_3_3_3

New Line.padswitch(r:p4udt687-p4udt7381)p4u_75657 Units=km Length=0.001 bus1=p4udt687-p4udt7381x.1.2.3 bus2=p4udt687.1.2.3 switch=y enabled=y phases=3 Linecode=padswitch_3_3_3_3

New Line.padswitch(r:p4udt17835-p4udt18344)p4u_75696 Units=km Length=0.001 bus1=p4udt17835.1.2.3 bus2=p4udt17835-p4udt18344x.1.2.3 switch=y enabled=y phases=3 Linecode=padswitch_3_3_3_3_3

New Line.padswitch(r:p4udt17835-p4udt18344)p4u_75697 Units=km Length=0.001 bus1=p4udt17835-p4udt18344xx.1.2.3 bus2=p4udt18344.1.2.3 switch=y enabled=y phases=3 Linecode=padswitch_3_3_3_3_3

New Line.padswitch(r:p4udt13261-p4udt17835)p4u_75698 Units=km Length=0.001 bus1=p4udt13261.1.2.3 bus2=p4udt13261-p4udt17835x.1.2.3 switch=y enabled=y phases=3 Linecode=padswitch_3_3_3_3_3

New Line.padswitch(r:p4udt13261-p4udt17835)p4u_75699 Units=km Length=0.001 bus1=p4udt13261-p4udt17835xx.1.2.3 bus2=p4udt17835.1.2.3 switch=y enabled=y phases=3 Linecode=padswitch_3_3_3_3_3

New Line.padswitch(r:p4udt11356-p4udt15656)p4u_75664 Units=km Length=0.001 bus1=p4udt11356.1.2.3 bus2=p4udt11356-p4udt15656x.1.2.3 switch=y enabled=y phases=3 Linecode=padswitch_3_3_3_3

New Line.padswitch(r:p4udt11356-p4udt15656)p4u_75665 Units=km Length=0.001 bus1=p4udt11356-p4udt15656xx.1.2.3 bus2=p4udt15656.1.2.3 switch=y enabled=y phases=3 Linecode=padswitch_3_3_3_3

New Line.padswitch(r:p4udt11356-p4udt3847)p4u_75666 Units=km Length=0.001 bus1=p4udt3847.1.2.3 bus2=p4udt11356-p4udt3847xx.1.2.3 switch=y enabled=y phases=3 Linecode=padswitch_3_3_3_3

New Line.padswitch(r:p4udt11356-p4udt3847)p4u_75667 Units=km Length=0.001 bus1=p4udt11356-p4udt3847x.1.2.3 bus2=p4udt11356.1.2.3 switch=y enabled=y phases=3 Linecode=padswitch_3_3_3_3

New Line.padswitch(r:p4udt3847-p4udt6190)p4u_75668 Units=km Length=0.001 bus1=p4udt6190.1.2.3 bus2=p4udt3847-p4udt6190xx.1.2.3 switch=y enabled=y phases=3 Linecode=padswitch_3_3_3_3

New Line.padswitch(r:p4udt3847-p4udt6190)p4u_75669 Units=km Length=0.001 bus1=p4udt3847-p4udt6190x.1.2.3 bus2=p4udt3847.1.2.3 switch=y enabled=y phases=3 Linecode=padswitch_3_3_3_3

New Line.padswitch(r:p4udt6190-p4udt9179)p4u_75670 Units=km Length=0.001 bus1=p4udt9179.1.2.3 bus2=p4udt6190-p4udt9179xx.1.2.3 switch=y enabled=y phases=3 Linecode=padswitch_3_3_3_1_3_1_3

New Line.padswitch(r:p4udt6190-p4udt9179)p4u_75671 Units=km Length=0.001 bus1=p4udt6190-p4udt9179x.1.2.3 bus2=p4udt6190.1.2.3 switch=y enabled=y phases=3 Linecode=padswitch_3_3_3_3

New Line.padswitch(r:p4udt17134-p4udt9179)p4u_75672 Units=km Length=0.001 bus1=p4udt17134.1.2.3 bus2=p4udt17134-p4udt9179x.1.2.3 switch=y enabled=y phases=3 Linecode=padswitch_3_3_3_1_3_1_3_1

New Line.padswitch(r:p4udt17134-p4udt9179)p4u_75673 Units=km Length=0.001 bus1=p4udt17134-p4udt9179xx.1.2.3 bus2=p4udt9179.1.2.3 switch=y enabled=y phases=3 Linecode=padswitch_3_3_3_3

New Line.padswitch(r:p4udt16716-p4udt17134)p4u_75674 Units=km Length=0.001 bus1=p4udt16716.1.2.3 bus2=p4udt16716-p4udt17134x.1.2.3 switch=y enabled=y phases=3 Linecode=padswitch_3_3_3_3

New Line.padswitch(r:p4udt16716-p4udt17134)p4u_75675 Units=km Length=0.001 bus1=p4udt16716-p4udt17134xx.1.2.3 bus2=p4udt17134.1.2.3 switch=y enabled=y phases=3 Linecode=padswitch_3_3_3_1_3_1_3_1

New Line.padswitch(r:p4udt16716-p4udt7381)p4u_75676 Units=km Length=0.001 bus1=p4udt7381.1.2.3 bus2=p4udt16716-p4udt7381xx.1.2.3 switch=y enabled=y phases=3 Linecode=padswitch_3_3_3_3

New Line.padswitch(r:p4udt16716-p4udt7381)p4u_75677 Units=km Length=0.001 bus1=p4udt16716-p4udt7381x.1.2.3 bus2=p4udt16716.1.2.3 switch=y enabled=y phases=3 Linecode=padswitch_3_3_3_3

New Line.padswitch(r:p4udt1194-p4udt15247)p4u_75682 Units=km Length=0.001 bus1=p4udt1194.1.2.3 bus2=p4udt1194-p4udt15247x.1.2.3 switch=y enabled=y phases=3 Linecode=padswitch_3_3_3_1_3_1_3_1

New Line.padswitch(r:p4udt1194-p4udt15247)p4u_75683 Units=km Length=0.001 bus1=p4udt1194-p4udt15247xx.1.2.3 bus2=p4udt15247.1.2.3 switch=y enabled=y phases=3 Linecode=padswitch_3_3_3_1_3_1_3_1

New Line.padswitch(r:p4udt1194-p4udt22122)p4u_75684 Units=km Length=0.001 bus1=p4udt22122.1.2.3 bus2=p4udt1194-p4udt22122xx.1.2.3 switch=y enabled=y phases=3 Linecode=padswitch_3_3_3_3

New Line.padswitch(r:p4udt1194-p4udt22122)p4u_75685 Units=km Length=0.001 bus1=p4udt1194-p4udt22122x.1.2.3 bus2=p4udt1194.1.2.3 switch=y enabled=y phases=3 Linecode=padswitch_3_3_3_3

New Line.padswitch(r:p4udt21837-p4udt22122)p4u_75686 Units=km Length=0.001 bus1=p4udt21837.1.2.3 bus2=p4udt21837-p4udt22122x.1.2.3 switch=y enabled=y phases=3 Linecode=padswitch_3_3_3_3

New Line.padswitch(r:p4udt21837-p4udt22122)p4u_75687 Units=km Length=0.001 bus1=p4udt21837-p4udt22122xx.1.2.3 bus2=p4udt22122.1.2.3 switch=y enabled=y phases=3 Linecode=padswitch_3_3_3_3

New Line.padswitch(r:p4udt21837-p4udt7667)p4u_75688 Units=km Length=0.001 bus1=p4udt7667.1.2.3 bus2=p4udt21837-p4udt7667xx.1.2.3 switch=y enabled=y phases=3 Linecode=padswitch_3_3_3_3

New Line.padswitch(r:p4udt21837-p4udt7667)p4u_75689 Units=km Length=0.001 bus1=p4udt21837-p4udt7667x.1.2.3 bus2=p4udt21837.1.2.3 switch=y enabled=y phases=3 Linecode=padswitch_3_3_3_3

New Line.padswitch(r:p4udt7667-p4udt7669)p4u_75690 Units=km Length=0.001 bus1=p4udt7669.1.2.3 bus2=p4udt7667-p4udt7669xx.1.2.3 switch=y enabled=y phases=3 Linecode=padswitch_3_3_3_3

New Line.padswitch(r:p4udt7667-p4udt7669)p4u_75691 Units=km Length=0.001 bus1=p4udt7667-p4udt7669x.1.2.3 bus2=p4udt7667.1.2.3 switch=y enabled=y phases=3 Linecode=padswitch_3_3_3_3

New Line.padswitch(r:p4udt23562-p4udt7669)p4u_75692 Units=km Length=0.001 bus1=p4udt23562.1.2.3 bus2=p4udt23562-p4udt7669x.1.2.3 switch=y enabled=y phases=3 Linecode=padswitch_3_3_3_1_3_1_3_1

New Line.padswitch(r:p4udt23562-p4udt7669)p4u_75693 Units=km Length=0.001 bus1=p4udt23562-p4udt7669xx.1.2.3 bus2=p4udt7669.1.2.3 switch=y enabled=y phases=3 Linecode=padswitch_3_3_3_3

New Line.padswitch(r:p4udt18716-p4udt23562)p4u_75694 Units=km Length=0.001 bus1=p4udt18716.1.2.3 bus2=p4udt18716-p4udt23562x.1.2.3 switch=y enabled=y phases=3 Linecode=padswitch_3_3_3_3_3

New Line.padswitch(r:p4udt18716-p4udt23562)p4u_75695 Units=km Length=0.001 bus1=p4udt18716-p4udt23562xx.1.2.3 bus2=p4udt23562.1.2.3 switch=y enabled=y phases=3 Linecode=padswitch_3_3_3_3

New Line.fuse(r:p4udt20640-p4udt388)p4u_79633 Units=km Length=0.001 bus1=p4udt388.3 bus2=p4udt20640-p4udt388xxx.3 switch=n enabled=y phases=1 Linecode=fuse_1_1_1_1

New Fuse.Fuse_fuse(r:p4udt20640-p4udt388)p4u_79633 monitoredobj=Line.fuse(r:p4udt20640-p4udt388)p4u_79633 enabled=y ratedcurrent=100.0

New Line.fuse(r:p4udt681-p4udt682)p4u_79664 Units=km Length=0.001 bus1=p4udt681.2 bus2=p4udt681-p4udt682x.2 switch=n enabled=y phases=1 Linecode=fuse_1_6_1_1_1

New Fuse.Fuse_fuse(r:p4udt681-p4udt682)p4u_79664 monitoredobj=Line.fuse(r:p4udt681-p4udt682)p4u_79664 enabled=y ratedcurrent=100.0

New Line.fuse(r:p4udt19712-p4udt681)p4u_79665 Units=km Length=0.001 bus1=p4udt681.1 bus2=p4udt19712-p4udt681x.1 switch=n enabled=y phases=1 Linecode=fuse_1_6_1_3_1_1

New Fuse.Fuse_fuse(r:p4udt19712-p4udt681)p4u_79665 monitoredobj=Line.fuse(r:p4udt19712-p4udt681)p4u_79665 enabled=y ratedcurrent=100.0

New Line.fuse(r:p4udt1194-p4udt8332)p4u_79722 Units=km Length=0.001 bus1=p4udt1194.1 bus2=p4udt1194-p4udt8332x.1 switch=n enabled=y phases=1 Linecode=fuse_1_6_1_3_1_3_1

New Fuse.Fuse_fuse(r:p4udt1194-p4udt8332)p4u_79722 monitoredobj=Line.fuse(r:p4udt1194-p4udt8332)p4u_79722 enabled=y ratedcurrent=100.0

New Line.fuse(r:p4udt14143-p4udt3392)p4u_79940 Units=km Length=0.001 bus1=p4udt3392.3 bus2=p4udt14143-p4udt3392x.3 switch=n enabled=y phases=1 Linecode=fuse_1_6_1_3_1_3_1

New Fuse.Fuse_fuse(r:p4udt14143-p4udt3392)p4u_79940 monitoredobj=Line.fuse(r:p4udt14143-p4udt3392)p4u_79940 enabled=y ratedcurrent=100.0

New Line.fuse(r:p4udt7381-p4udt9691)p4u_80323 Units=km Length=0.001 bus1=p4udt7381.3 bus2=p4udt7381-p4udt9691x.3 switch=n enabled=y phases=1 Linecode=fuse_1_6_1_3_1_3_1_3

New Fuse.Fuse_fuse(r:p4udt7381-p4udt9691)p4u_80323 monitoredobj=Line.fuse(r:p4udt7381-p4udt9691)p4u_80323 enabled=y ratedcurrent=100.0

New Line.fuse(r:p4udt6189-p4udt9179)p4u_80512 Units=km Length=0.001 bus1=p4udt9179.1 bus2=p4udt6189-p4udt9179xxx.1 switch=n enabled=y phases=1 Linecode=fuse_1_6_1_3_1_3_1_3

New Fuse.Fuse_fuse(r:p4udt6189-p4udt9179)p4u_80512 monitoredobj=Line.fuse(r:p4udt6189-p4udt9179)p4u_80512 enabled=y ratedcurrent=100.0

New Line.fuse(r:p4udt11306-p4udt12571)p4u_80838 Units=km Length=0.001 bus1=p4udt12571.2 bus2=p4udt11306-p4udt12571x.2 switch=n enabled=y phases=1 Linecode=fuse_1_6_1_1_1

New Fuse.Fuse_fuse(r:p4udt11306-p4udt12571)p4u_80838 monitoredobj=Line.fuse(r:p4udt11306-p4udt12571)p4u_80838 enabled=y ratedcurrent=100.0

New Line.fuse(r:p4udt14593-p4udt19225)p4u_81007 Units=km Length=0.001 bus1=p4udt14593.1 bus2=p4udt14593-p4udt19225x.1 switch=n enabled=y phases=1 Linecode=fuse_1_6_1_1_1

New Fuse.Fuse_fuse(r:p4udt14593-p4udt19225)p4u_81007 monitoredobj=Line.fuse(r:p4udt14593-p4udt19225)p4u_81007 enabled=y ratedcurrent=100.0

New Line.fuse(r:p4udt15247-p4udt5797)p4u_81078 Units=km Length=0.001 bus1=p4udt15247.3 bus2=p4udt15247-p4udt5797x.3 switch=n enabled=y phases=1 Linecode=fuse_1_6_1_3_1_3_1_3

New Fuse.Fuse_fuse(r:p4udt15247-p4udt5797)p4u_81078 monitoredobj=Line.fuse(r:p4udt15247-p4udt5797)p4u_81078 enabled=y ratedcurrent=100.0

New Line.fuse(r:p4udt17835-p4udt3394)p4u_81332 Units=km Length=0.001 bus1=p4udt17835.2 bus2=p4udt17835-p4udt3394x.2 switch=n enabled=y phases=1 Linecode=fuse_1_6_1_1_1

New Fuse.Fuse_fuse(r:p4udt17835-p4udt3394)p4u_81332 monitoredobj=Line.fuse(r:p4udt17835-p4udt3394)p4u_81332 enabled=y ratedcurrent=100.0

New Line.fuse(r:p4udt20017-p4udt8256)p4u_81531 Units=km Length=0.001 bus1=p4udt20017.3 bus2=p4udt20017-p4udt8256x.3 switch=n enabled=y phases=1 Linecode=fuse_1_6_1_1_1

New Fuse.Fuse_fuse(r:p4udt20017-p4udt8256)p4u_81531 monitoredobj=Line.fuse(r:p4udt20017-p4udt8256)p4u_81531 enabled=y ratedcurrent=100.0

New Line.l(r:p4udt3392-p4uhs17_1247)_disconnect Units=km Length=0.001 bus1=p4udt3392-p4uhs17_1247x_b1_1.1.2.3 bus2=p4udt3392-p4uhs17_1247x_b2_1.1.2.3 switch=y enabled=y phases=3 Linecode=3P_OH_AL_ACSR_1033kcmil_Curlew_12.47_1_3_3_3_3

New Line.l(r:p4udt3392-p4uhs17_1247)_cont Units=km Length=5.791986 bus1=p4udt3392-p4uhs17_1247x_b2_1.1.2.3 bus2=p4udt3392.1.2.3 switch=n enabled=y phases=3 Linecode=3P_OH_AL_ACSR_1033kcmil_Curlew_12.47_1_3_3_3_3

New Line.l(r:p4udt1483-p4udt20017)_disconnect Units=km Length=0.001 bus1=p4udt20017_b1_1.1.2.3 bus2=p4udt20017_b2_1.1.2.3 switch=y enabled=y phases=3 Linecode=3P_OH_AL_ACSR_4/0_Penguin_12_47_0_3_3_3_3

New Line.l(r:p4udt1483-p4udt20017)_cont Units=km Length=1.2056399999999998 bus1=p4udt20017_b2_1.1.2.3 bus2=p4udt1483.1.2.3 switch=n enabled=y phases=3 Linecode=3P_OH_AL_ACSR_4/0_Penguin_12_47_0_3_3_3_3
