New Capacitor.p4uc99 Bus1=p4udt2355 phases=3 Kv=12.47 conn=Wye Kvar=300.0

New CapControl.p4uc99 Capacitor=p4uc99 Element=Line.padswitch(r:p4udt2355-p4udt813)p4u_75858 Terminal=1 delay=100.0 Type=voltage Vmin=120.5 Vmax=125.0 Ptratio=59.99631547328862 Ctratio=100.0

New Capacitor.p4uc104 Bus1=p4udt15475 phases=3 Kv=12.47 conn=Wye Kvar=300.0

New CapControl.p4uc104 Capacitor=p4uc104 Element=Line.l(r:p4udt15475-p4udt15865) Terminal=1 delay=100.0 Type=voltage Vmin=120.5 Vmax=125.0 Ptratio=59.99631547328862 Ctratio=100.0
