New Capacitor.p4uc101 Bus1=p4udt13910 phases=3 Kv=12.47 conn=Wye Kvar=300.0

New CapControl.p4uc101 Capacitor=p4uc101 Element=Line.padswitch(r:p4udt13910-p4udt14608)p4u_76263 Terminal=1 delay=100.0 Type=voltage Vmin=120.5 Vmax=125.0 Ptratio=59.99631547328862 Ctratio=100.0

New Capacitor.p4uc105 Bus1=p4udt12582 phases=3 Kv=12.47 conn=Wye Kvar=300.0

New CapControl.p4uc105 Capacitor=p4uc105 Element=Line.padswitch(r:p4udt12582-p4udt15976)p4u_75993 Terminal=1 delay=100.0 Type=voltage Vmin=120.5 Vmax=125.0 Ptratio=59.99631547328862 Ctratio=100.0
