New Capacitor.p4uc108 Bus1=p4udt8839 phases=3 Kv=12.47 conn=Wye Kvar=300.0

New CapControl.p4uc108 Capacitor=p4uc108 Element=Line.l(r:p4udt7073-p4udt8839) Terminal=1 delay=100.0 Type=voltage Vmin=120.5 Vmax=125.0 Ptratio=59.99631547328862 Ctratio=100.0
