New Capacitor.p4uc111 Bus1=p4udt15275 phases=3 Kv=12.47 conn=Wye Kvar=300.0

New CapControl.p4uc111 Capacitor=p4uc111 Element=Line.l(r:p4udt13328-p4udt15275) Terminal=1 delay=100.0 Type=voltage Vmin=120.5 Vmax=125.0 Ptratio=59.99631547328862 Ctratio=100.0
