Clear

New Circuit.substation_p4uhs19_69 bus1=p4uhs19_69 pu=1.0 basekV=69.0 R1=1e-05 X1=1e-05 R0=1e-05 X0=1e-05

Redirect Transformers.dss
Redirect p4uhs19_1247--p4udt4849/Transformers.dss
Redirect p4uhs19_1247--p4udt21543/Transformers.dss
Redirect p4uhs19_1247--p4udt10279/Transformers.dss
Redirect p4uhs19_1247--p4udt22137/Transformers.dss
Redirect p4uhs19_1247--p4udt18907/Transformers.dss
Redirect Regulators.dss
Redirect p4uhs19_1247--p4udt4849/Loads.dss
Redirect p4uhs19_1247--p4udt21543/Loads.dss
Redirect p4uhs19_1247--p4udt10279/Loads.dss
Redirect p4uhs19_1247--p4udt22137/Loads.dss
Redirect p4uhs19_1247--p4udt18907/Loads.dss
Redirect LineCodes.dss
Redirect p4uhs19_1247--p4udt4849/LineCodes.dss
Redirect p4uhs19_1247--p4udt21543/LineCodes.dss
Redirect p4uhs19_1247--p4udt10279/LineCodes.dss
Redirect p4uhs19_1247--p4udt22137/LineCodes.dss
Redirect p4uhs19_1247--p4udt18907/LineCodes.dss
Redirect Lines.dss
Redirect p4uhs19_1247--p4udt4849/Lines.dss
Redirect p4uhs19_1247--p4udt21543/Lines.dss
Redirect p4uhs19_1247--p4udt10279/Lines.dss
Redirect p4uhs19_1247--p4udt22137/Lines.dss
Redirect p4uhs19_1247--p4udt18907/Lines.dss
Redirect p4uhs19_1247--p4udt4849/Capacitors.dss
Redirect p4uhs19_1247--p4udt18907/Capacitors.dss
Redirect p4uhs19_1247--p4udt10279/Capacitors.dss
Redirect p4uhs19_1247--p4udt22137/Capacitors.dss

Set Voltagebases=[0.2080002494301389, 0.48, 7.199560000000001, 12.47, 69.0]

Calcvoltagebases

Buscoords Buscoords.dss

Solve
