New Line.l(r:p4udt3810lv-p4ulv4124) Units=km Length=0.0866693 bus1=p4udt3810lv.1.2 bus2=p4ulv4124.1.2 switch=n enabled=y phases=2 Linecode=1P_OH_AL_4/0_Zuzara_0_416_0_2_2_2_2

New Line.l(r:p4udt10546lv-p4ulv13475) Units=km Length=0.0346439 bus1=p4udt10546lv.1.2 bus2=p4ulv13475.1.2 switch=n enabled=y phases=2 Linecode=1P_UG_AL_1/0_Brenau_0_416_0_2_2_2_2

New Line.l(r:p4udt13059lv-p4ulv17824) Units=km Length=0.016018500000000005 bus1=p4udt13059lv.1.2 bus2=p4ulv17824.1.2 switch=n enabled=y phases=2 Linecode=1P_UG_AL_1/0_Brenau_0_416_0_2_2_2_2

New Line.l(r:p4udt16386lv-p4ulv24569) Units=km Length=0.0084224 bus1=p4udt16386lv.1.2 bus2=p4ulv24569.1.2 switch=n enabled=y phases=2 Linecode=1P_OH_AL_2/0_Rucina_0_416_0_2_2_2_2

New Line.l(r:p4udt21543lv-p4ulv37657) Units=km Length=0.0674207 bus1=p4udt21543lv.1.2 bus2=p4ulv37657.1.2 switch=n enabled=y phases=2 Linecode=1P_OH_AL_4/0_Zuzara_0_416_0_2_2_2_2

New Line.l(r:p4udt21997lv-p4ulv38896) Units=km Length=0.0382849 bus1=p4udt21997lv.1.2 bus2=p4ulv38896.1.2 switch=n enabled=y phases=2 Linecode=1P_UG_AL_4/0_Sweetbriar_0_416_0_2_2_2_2

New Line.l(r:p4udt23577lv-p4ulv43519) Units=km Length=0.0366887 bus1=p4udt23577lv.1.2 bus2=p4ulv43519.1.2 switch=n enabled=y phases=2 Linecode=1P_OH_AL_4/0_Zuzara_0_416_0_2_2_2_2

New Line.l(r:p4udt21997-p4udt9733) Units=km Length=0.0216795 bus1=p4udt21997-p4udt9733xx.2 bus2=p4udt21997-p4udt9733x.2 switch=n enabled=y phases=1 Linecode=1P_UG_AL_#2_15_12_47_0_1_1_1_1

New Line.l(r:p4udt10546-p4udt23714) Units=km Length=0.17276500000000003 bus1=p4udt10546-p4udt23714x.1.2.3 bus2=p4udt10546-p4udt23714xx.1.2.3 switch=n enabled=y phases=3 Linecode=3P_UG_AL_4/0_25_12_47_0_3_3_3_3

New Line.l(r:p4udt10546-p4udt23577) Units=km Length=0.220242 bus1=p4udt23577.1.2.3 bus2=p4udt10546.1.2.3 switch=n enabled=y phases=3 Linecode=3P_OH_AL_ACSR_4/0_Penguin_12_47_0_3_3_3_3

New Line.l(r:p4udt21543-p4udt23577) Units=km Length=0.227456 bus1=p4udt21543.1.2.3 bus2=p4udt23577.1.2.3 switch=n enabled=y phases=3 Linecode=3P_OH_AL_ACSR_4/0_Penguin_12_47_0_3_3_3_3

New Line.l(r:p4udt21543-p4uhs19_1247) Units=km Length=0.27848400000000006 bus1=p4udt21543-p4uhs19_1247x.1.2.3 bus2=p4udt21543.1.2.3 switch=n enabled=y phases=3 Linecode=3P_OH_AL_ACSR_4/0_Penguin_12_47_0_3_3_3_3

New Line.l(r:p4udt13058lv-p4ulv17822) Units=km Length=0.0216564 bus1=p4udt13058lv.1.2.3 bus2=p4ulv17822.1.2.3 switch=n enabled=y phases=3 Linecode=3P_UG_AL_350kcmil_15_0_416_0_3_3_3_3

New Line.l(r:p4udt11849lv-p4ulv15640) Units=km Length=0.0135008 bus1=p4udt11849lv.1.2.3 bus2=p4ulv15640.1.2.3 switch=n enabled=y phases=3 Linecode=3P_UG_AL_750kcmil_25_0_416_0_3_3_3_3

New Line.l(r:p4udt5521lv-p4ulv6214) Units=km Length=0.0615333 bus1=p4udt5521lv.1.2.3 bus2=p4ulv6214.1.2.3 switch=n enabled=y phases=3 Linecode=3P_UG_AL_350kcmil_15_0_416_0_3_3_3_3

New Line.l(r:p4udt11849-p4udt5521) Units=km Length=0.06616940000000002 bus1=p4udt11849.1.2.3 bus2=p4udt5521.1.2.3 switch=n enabled=y phases=3 Linecode=3P_OH_AL_ACSR_4/0_Penguin_12_47_0_3_3_3_3

New Line.l(r:p4udt11849-p4udt3810) Units=km Length=0.0994969 bus1=p4udt3810.1.2.3 bus2=p4udt11849.1.2.3 switch=n enabled=y phases=3 Linecode=3P_OH_AL_ACSR_4/0_Penguin_12_47_0_3_3_3_3

New Line.l(r:p4udt13058-p4udt3810) Units=km Length=0.0723773 bus1=p4udt13058.1.2.3 bus2=p4udt3810.1.2.3 switch=n enabled=y phases=3 Linecode=3P_OH_AL_ACSR_4/0_Penguin_12_47_0_3_3_3_3

New Line.l(r:p4udt13058-p4udt21543) Units=km Length=0.0576034 bus1=p4udt21543.1.2.3 bus2=p4udt13058.1.2.3 switch=n enabled=y phases=3 Linecode=3P_OH_AL_ACSR_4/0_Penguin_12_47_0_3_3_3_3

New Line.l(r:p4udt21870lv-p4ulv38526) Units=km Length=0.0119561 bus1=p4udt21870lv.1.2.3 bus2=p4ulv38526.1.2.3 switch=n enabled=y phases=3 Linecode=3P_UG_AL_350kcmil_15_0_416_0_3_3_3_3

New Line.l(r:p4udt4487lv-p4ulv4923) Units=km Length=0.0432505 bus1=p4udt4487lv.1.2.3 bus2=p4ulv4923.1.2.3 switch=n enabled=y phases=3 Linecode=3P_UG_AL_350kcmil_15_0_416_0_3_3_3_3

New Line.l(r:p4udt13059-p4udt4487) Units=km Length=0.019381 bus1=p4udt13059-p4udt4487x.1.2.3 bus2=p4udt13059-p4udt4487xx.1.2.3 switch=n enabled=y phases=3 Linecode=3P_UG_AL_4/0_25_12_47_0_3_3_3_3

New Line.l(r:p4udt13059-p4udt21870) Units=km Length=0.135658 bus1=p4udt13059-p4udt21870xx.1.2.3 bus2=p4udt13059-p4udt21870x.1.2.3 switch=n enabled=y phases=3 Linecode=3P_UG_AL_4/0_25_12_47_0_3_3_3_3

New Line.l(r:p4udt21543-p4udt21870) Units=km Length=0.262787 bus1=p4udt21543.1.2.3 bus2=p4udt21870.1.2.3 switch=n enabled=y phases=3 Linecode=3P_OH_AL_ACSR_4/0_Penguin_12_47_0_3_3_3_3

New Line.l(r:p4udt23714lv-p4ulv43969) Units=km Length=0.0216023 bus1=p4udt23714lv.1.2.3 bus2=p4ulv43969.1.2.3 switch=n enabled=y phases=3 Linecode=3P_UG_AL_350kcmil_15_0_416_0_3_3_3_3

New Line.l(r:p4udt9733lv-p4ulv12158) Units=km Length=0.0218546 bus1=p4udt9733lv.1.2.3 bus2=p4ulv12158.1.2.3 switch=n enabled=y phases=3 Linecode=3P_UG_AL_350kcmil_15_0_416_0_3_3_3_3

New Line.l(r:p4udt23714-p4udt9733) Units=km Length=0.0652918 bus1=p4udt23714-p4udt9733x.1.2.3 bus2=p4udt23714-p4udt9733xx.1.2.3 switch=n enabled=y phases=3 Linecode=3P_UG_AL_4/0_25_12_47_0_3_3_3_3

New Line.l(r:p4udt16575lv-p4ulv24959) Units=km Length=0.012656 bus1=p4udt16575lv.1.2.3 bus2=p4ulv24959.1.2.3 switch=n enabled=y phases=3 Linecode=3P_UG_AL_350kcmil_15_0_416_0_3_3_3_3

New Line.l(r:p4udt11608lv-p4ulv15227) Units=km Length=0.0111812 bus1=p4udt11608lv.1.2.3 bus2=p4ulv15227.1.2.3 switch=n enabled=y phases=3 Linecode=3P_UG_AL_350kcmil_15_0_416_0_3_3_3_3

New Line.l(r:p4udt19255lv-p4ulv31370) Units=km Length=0.00886071 bus1=p4udt19255lv.1.2.3 bus2=p4ulv31370.1.2.3 switch=n enabled=y phases=3 Linecode=3P_UG_AL_350kcmil_15_0_416_0_3_3_3_3

New Line.l(r:p4udt11608-p4udt19255) Units=km Length=0.0316003 bus1=p4udt11608.1.2.3 bus2=p4udt19255.1.2.3 switch=n enabled=y phases=3 Linecode=3P_OH_AL_ACSR_4/0_Penguin_12_47_0_3_3_3_3

New Line.l(r:p4udt11608-p4udt16575) Units=km Length=0.0376048 bus1=p4udt16575.1.2.3 bus2=p4udt11608.1.2.3 switch=n enabled=y phases=3 Linecode=3P_OH_AL_ACSR_4/0_Penguin_12_47_0_3_3_3_3

New Line.l(r:p4udt16386-p4udt16575) Units=km Length=0.077688 bus1=p4udt16386.1.2.3 bus2=p4udt16575.1.2.3 switch=n enabled=y phases=3 Linecode=3P_OH_AL_ACSR_4/0_Penguin_12_47_0_3_3_3_3

New Line.l(r:p4udt18575lv-p4ulv29676) Units=km Length=0.006078720000000001 bus1=p4udt18575lv.1.2.3 bus2=p4ulv29676.1.2.3 switch=n enabled=y phases=3 Linecode=3P_UG_AL_350kcmil_15_0_416_0_3_3_3_3

New Line.l(r:p4udt16386-p4udt18575) Units=km Length=0.0171137 bus1=p4udt16386.1.2.3 bus2=p4udt18575.1.2.3 switch=n enabled=y phases=3 Linecode=3P_OH_AL_ACSR_4/0_Penguin_12_47_0_3_3_3_3

New Line.l(r:p4udt16386-p4udt23714) Units=km Length=0.16666500000000004 bus1=p4udt23714.1.2.3 bus2=p4udt16386.1.2.3 switch=n enabled=y phases=3 Linecode=3P_OH_AL_ACSR_4/0_Penguin_12_47_0_3_3_3_3

New Line.l(r:p4udt18060lv-p4ulv42681) Units=km Length=0.0129262 bus1=p4udt18060lv.1.2.3 bus2=p4ulv42681.1.2.3 switch=n enabled=y phases=3 Linecode=3P_UG_AL_750kcmil_25_0_416_0_3_3_3_3

New Line.l(r:p4udm37217-p4ulv30092) Units=km Length=0.0151532 bus1=p4udm37217.1.2.3 bus2=p4ulv30092.1.2.3 switch=n enabled=y phases=3 Linecode=3P_UG_AL_750kcmil_25_0_416_0_3_3_3_3

New Line.l(r:p4udm37216-p4ulv28390) Units=km Length=0.0149159 bus1=p4udm37216.1.2.3 bus2=p4ulv28390.1.2.3 switch=n enabled=y phases=3 Linecode=3P_UG_AL_350kcmil_15_0_416_0_3_3_3_3

New Line.l(r:p4udm37216-p4udm37217) Units=km Length=0.0137855 bus1=p4udm37217.1.2.3 bus2=p4udm37216.1.2.3 switch=n enabled=y phases=3 Linecode=3P_UG_AL_350kcmil_15_0_416_0_3_3_3_3

New Line.l(r:p4udm37217-p4udt18060lv) Units=km Length=0.0116186 bus1=p4udt18060lv.1.2.3 bus2=p4udm37217.1.2.3 switch=n enabled=y phases=3 Linecode=3P_UG_AL_750kcmil_25_0_416_0_3_3_3_3

New Line.l(r:p4udm19872-p4ulv9580) Units=km Length=0.0124281 bus1=p4udm19872.1.2.3 bus2=p4ulv9580.1.2.3 switch=n enabled=y phases=3 Linecode=3P_UG_AL_350kcmil_15_0_416_0_3_3_3_3

New Line.l(r:p4udm19872-p4udt8010lv) Units=km Length=0.0176066 bus1=p4udt8010lv.1.2.3 bus2=p4udm19872.1.2.3 switch=n enabled=y phases=3 Linecode=3P_UG_AL_350kcmil_15_0_416_0_3_3_3_3

New Line.l(r:p4udm19873-p4ulv35162) Units=km Length=0.0099173 bus1=p4udm19873.1.2.3 bus2=p4ulv35162.1.2.3 switch=n enabled=y phases=3 Linecode=3P_UG_AL_750kcmil_25_0_416_0_3_3_3_3

New Line.l(r:p4udm19873-p4udt8010lv) Units=km Length=0.00666973 bus1=p4udt8010lv.1.2.3 bus2=p4udm19873.1.2.3 switch=n enabled=y phases=3 Linecode=3P_UG_AL_750kcmil_25_0_416_0_3_3_3_3

New Line.l(r:p4udt18060-p4udt8010) Units=km Length=0.0917675 bus1=p4udt18060.1.2.3 bus2=p4udt8010.1.2.3 switch=n enabled=y phases=3 Linecode=3P_OH_AL_ACSR_4/0_Penguin_12_47_0_3_3_3_3

New Line.l(r:p4udt18060-p4udt23714) Units=km Length=0.094671 bus1=p4udt23714.1.2.3 bus2=p4udt18060.1.2.3 switch=n enabled=y phases=3 Linecode=3P_OH_AL_ACSR_4/0_Penguin_12_47_0_3_3_3_3

New Line.padswitch(r:p4udt21997-p4udt9733)p4u_77540 Units=km Length=0.001 bus1=p4udt21997-p4udt9733xxx.2 bus2=p4udt21997-p4udt9733xx.2 switch=y enabled=y phases=1 Linecode=padswitch_1_1_1_1

New Line.padswitch(r:p4udt21997-p4udt9733)p4u_77541 Units=km Length=0.001 bus1=p4udt21997-p4udt9733x.2 bus2=p4udt21997.2 switch=y enabled=y phases=1 Linecode=padswitch_1_2_1_1_1

New Line.padswitch(r:p4udt10546-p4udt23714)p4u_77544 Units=km Length=0.001 bus1=p4udt10546.1.2.3 bus2=p4udt10546-p4udt23714x.1.2.3 switch=y enabled=y phases=3 Linecode=padswitch_3_3_3_3

New Line.padswitch(r:p4udt10546-p4udt23714)p4u_77545 Units=km Length=0.001 bus1=p4udt10546-p4udt23714xx.1.2.3 bus2=p4udt23714.1.2.3 switch=y enabled=y phases=3 Linecode=padswitch_3_3_3_3_3

New Line.padswitch(r:p4udt13059-p4udt4487)p4u_77536 Units=km Length=0.001 bus1=p4udt13059.1.2.3 bus2=p4udt13059-p4udt4487x.1.2.3 switch=y enabled=y phases=3 Linecode=padswitch_3_3_3_3

New Line.padswitch(r:p4udt13059-p4udt4487)p4u_77537 Units=km Length=0.001 bus1=p4udt13059-p4udt4487xx.1.2.3 bus2=p4udt4487.1.2.3 switch=y enabled=y phases=3 Linecode=padswitch_3_3_3_1_3_3

New Line.padswitch(r:p4udt13059-p4udt21870)p4u_77538 Units=km Length=0.001 bus1=p4udt21870.1.2.3 bus2=p4udt13059-p4udt21870xx.1.2.3 switch=y enabled=y phases=3 Linecode=padswitch_3_3_3_3_3

New Line.padswitch(r:p4udt13059-p4udt21870)p4u_77539 Units=km Length=0.001 bus1=p4udt13059-p4udt21870x.1.2.3 bus2=p4udt13059.1.2.3 switch=y enabled=y phases=3 Linecode=padswitch_3_3_3_3

New Line.padswitch(r:p4udt23714-p4udt9733)p4u_77542 Units=km Length=0.001 bus1=p4udt23714.1.2.3 bus2=p4udt23714-p4udt9733x.1.2.3 switch=y enabled=y phases=3 Linecode=padswitch_3_3_3_3_3

New Line.padswitch(r:p4udt23714-p4udt9733)p4u_77543 Units=km Length=0.001 bus1=p4udt23714-p4udt9733xx.1.2.3 bus2=p4udt9733.1.2.3 switch=y enabled=y phases=3 Linecode=padswitch_3_3_3_1_3_1_3

New Line.fuse(r:p4udt21997-p4udt9733)p4u_80570 Units=km Length=0.001 bus1=p4udt9733.2 bus2=p4udt21997-p4udt9733xxx.2 switch=n enabled=y phases=1 Linecode=fuse_1_1_1_1

New Fuse.Fuse_fuse(r:p4udt21997-p4udt9733)p4u_80570 monitoredobj=Line.fuse(r:p4udt21997-p4udt9733)p4u_80570 enabled=y ratedcurrent=100.0
