New Capacitor.p4uc116 Bus1=p4udt309 phases=3 Kv=12.47 conn=Wye Kvar=300.0

New CapControl.p4uc116 Capacitor=p4uc116 Element=Line.padswitch(r:p4udt2268-p4udt309)p4u_77768 Terminal=1 delay=100.0 Type=voltage Vmin=120.5 Vmax=125.0 Ptratio=59.99631547328862 Ctratio=100.0
