New Capacitor.p4uc113 Bus1=p4udt1930 phases=3 Kv=12.47 conn=Wye Kvar=300.0

New CapControl.p4uc113 Capacitor=p4uc113 Element=Line.l(r:p4udt16751-p4udt1930) Terminal=1 delay=100.0 Type=voltage Vmin=120.5 Vmax=125.0 Ptratio=59.99631547328862 Ctratio=100.0

New Capacitor.p4uc118 Bus1=p4udt5853 phases=3 Kv=12.47 conn=Wye Kvar=300.0

New CapControl.p4uc118 Capacitor=p4uc118 Element=Line.padswitch(r:p4udt13716-p4udt5853)p4u_77300 Terminal=1 delay=100.0 Type=voltage Vmin=120.5 Vmax=125.0 Ptratio=59.99631547328862 Ctratio=100.0

New Capacitor.p4uc119 Bus1=p4udt2292 phases=3 Kv=12.47 conn=Wye Kvar=300.0

New CapControl.p4uc119 Capacitor=p4uc119 Element=Line.l(r:p4udt17696-p4udt2292) Terminal=1 delay=100.0 Type=voltage Vmin=120.5 Vmax=125.0 Ptratio=59.99631547328862 Ctratio=100.0
