New Capacitor.p4uc9 Bus1=p4udt4193 phases=3 Kv=12.47 conn=Wye Kvar=300.0

New CapControl.p4uc9 Capacitor=p4uc9 Element=Line.padswitch(r:p4udt4193-p4udt6503)p4u_66080 Terminal=1 delay=100.0 Type=voltage Vmin=120.5 Vmax=125.0 Ptratio=59.99631547328862 Ctratio=100.0

New Capacitor.p4uc10 Bus1=p4umv4 phases=3 Kv=12.47 conn=Wye Kvar=300.0

New CapControl.p4uc10 Capacitor=p4uc10 Element=Line.l(r:p4udt22591-p4umv4) Terminal=1 delay=100.0 Type=voltage Vmin=120.5 Vmax=125.0 Ptratio=59.99631547328862 Ctratio=100.0

New Capacitor.p4uc12 Bus1=p4udt2730 phases=3 Kv=12.47 conn=Wye Kvar=300.0

New CapControl.p4uc12 Capacitor=p4uc12 Element=Line.l(r:p4udt2728-p4udt2730) Terminal=1 delay=100.0 Type=voltage Vmin=120.5 Vmax=125.0 Ptratio=59.99631547328862 Ctratio=100.0
