Clear

New Circuit.substation_p4uhs20_69 bus1=p4uhs20_69 pu=1.0 basekV=69.0 R1=1e-05 X1=1e-05 R0=1e-05 X0=1e-05

Redirect Transformers.dss
Redirect p4uhs20_1247--p4udt9759/Transformers.dss
Redirect p4uhs20_1247--p4udt7428/Transformers.dss
Redirect p4uhs20_1247--p4udt13530/Transformers.dss
Redirect p4uhs20_1247--p4udt8037/Transformers.dss
Redirect p4uhs20_1247--p4udt1954/Transformers.dss
Redirect p4uhs20_1247--p4udt19742/Transformers.dss
Redirect Regulators.dss
Redirect p4uhs20_1247--p4udt9759/Loads.dss
Redirect p4uhs20_1247--p4udt7428/Loads.dss
Redirect p4uhs20_1247--p4udt13530/Loads.dss
Redirect p4uhs20_1247--p4udt8037/Loads.dss
Redirect p4uhs20_1247--p4udt1954/Loads.dss
Redirect p4uhs20_1247--p4udt19742/Loads.dss
Redirect LineCodes.dss
Redirect p4uhs20_1247--p4udt9759/LineCodes.dss
Redirect p4uhs20_1247--p4udt7428/LineCodes.dss
Redirect p4uhs20_1247--p4udt13530/LineCodes.dss
Redirect p4uhs20_1247--p4udt8037/LineCodes.dss
Redirect p4uhs20_1247--p4udt1954/LineCodes.dss
Redirect p4uhs20_1247--p4udt19742/LineCodes.dss
Redirect Lines.dss
Redirect p4uhs20_1247--p4udt9759/Lines.dss
Redirect p4uhs20_1247--p4udt7428/Lines.dss
Redirect p4uhs20_1247--p4udt13530/Lines.dss
Redirect p4uhs20_1247--p4udt8037/Lines.dss
Redirect p4uhs20_1247--p4udt1954/Lines.dss
Redirect p4uhs20_1247--p4udt19742/Lines.dss
Redirect p4uhs20_1247--p4udt13530/Capacitors.dss
Redirect p4uhs20_1247--p4udt1954/Capacitors.dss
Redirect p4uhs20_1247--p4udt8037/Capacitors.dss

Set Voltagebases=[0.2080002494301389, 0.48, 7.199560000000001, 12.47, 69.0]

Calcvoltagebases

Buscoords Buscoords.dss

Solve
