New Line.l(r:p4udt394lv-p4ulv400) Units=km Length=0.00812412 bus1=p4udt394lv.1.2 bus2=p4ulv400.1.2 switch=n enabled=y phases=2 Linecode=1P_OH_AL_2/0_Rucina_0_416_0_2_2_2_2

New Line.l(r:p4udt394lv-p4ulv28006) Units=km Length=0.0352891 bus1=p4udt394lv.1.2 bus2=p4ulv28006.1.2 switch=n enabled=y phases=2 Linecode=1P_OH_AL_4/0_Zuzara_0_416_0_2_2_2_2

New Line.l(r:p4udt394lv-p4ulv28438) Units=km Length=0.019931400000000002 bus1=p4udt394lv.1.2 bus2=p4ulv28438.1.2 switch=n enabled=y phases=2 Linecode=1P_OH_AL_2/0_Rucina_0_416_0_2_2_2_2

New Line.l(r:p4udt394lv-p4ulv39362) Units=km Length=0.0238313 bus1=p4udt394lv.1.2 bus2=p4ulv39362.1.2 switch=n enabled=y phases=2 Linecode=1P_OH_AL_2/0_Rucina_0_416_0_2_2_2_2

New Line.l(r:p4udt395lv-p4ulv8377) Units=km Length=0.027574 bus1=p4udt395lv.1.2 bus2=p4ulv8377.1.2 switch=n enabled=y phases=2 Linecode=1P_OH_AL_4/0_Zuzara_0_416_0_2_2_2_2

New Line.l(r:p4udt395lv-p4ulv25421) Units=km Length=0.0301064 bus1=p4udt395lv.1.2 bus2=p4ulv25421.1.2 switch=n enabled=y phases=2 Linecode=1P_OH_AL_4/0_Zuzara_0_416_0_2_2_2_2

New Line.l(r:p4udm1056-p4ulv401) Units=km Length=0.0280267 bus1=p4udm1056.1.2 bus2=p4ulv401.1.2 switch=n enabled=y phases=2 Linecode=1P_OH_AL_4/0_Zuzara_0_416_0_2_2_2_2

New Line.l(r:p4udm1056-p4udt395lv) Units=km Length=0.0179277 bus1=p4udt395lv.1.2 bus2=p4udm1056.1.2 switch=n enabled=y phases=2 Linecode=1P_OH_AL_2/0_Rucina_0_416_0_2_2_2_2

New Line.l(r:p4udt785lv-p4ulv800) Units=km Length=0.0206586 bus1=p4udt785lv.1.2 bus2=p4ulv800.1.2 switch=n enabled=y phases=2 Linecode=1P_OH_AL_2/0_Rucina_0_416_0_2_2_2_2

New Line.l(r:p4udt785lv-p4ulv12643) Units=km Length=0.0145698 bus1=p4udt785lv.1.2 bus2=p4ulv12643.1.2 switch=n enabled=y phases=2 Linecode=1P_OH_AL_2/0_Rucina_0_416_0_2_2_2_2

New Line.l(r:p4udm2140-p4ulv5413) Units=km Length=0.0139841 bus1=p4udm2140.1.2 bus2=p4ulv5413.1.2 switch=n enabled=y phases=2 Linecode=1P_OH_AL_2/0_Rucina_0_416_0_2_2_2_2

New Line.l(r:p4udm2140-p4udt785lv) Units=km Length=0.019001300000000002 bus1=p4udt785lv.1.2 bus2=p4udm2140.1.2 switch=n enabled=y phases=2 Linecode=1P_OH_AL_2/0_Rucina_0_416_0_2_2_2_2

New Line.l(r:p4udt786lv-p4ulv17878) Units=km Length=0.0266845 bus1=p4udt786lv.1.2 bus2=p4ulv17878.1.2 switch=n enabled=y phases=2 Linecode=1P_OH_AL_2/0_Rucina_0_416_0_2_2_2_2

New Line.l(r:p4udm2142-p4ulv801) Units=km Length=0.0169706 bus1=p4udm2142.1.2 bus2=p4ulv801.1.2 switch=n enabled=y phases=2 Linecode=1P_OH_AL_2/0_Rucina_0_416_0_2_2_2_2

New Line.l(r:p4udm2142-p4ulv11334) Units=km Length=0.0264351 bus1=p4udm2142.1.2 bus2=p4ulv11334.1.2 switch=n enabled=y phases=2 Linecode=1P_OH_AL_2/0_Rucina_0_416_0_2_2_2_2

New Line.l(r:p4udm2142-p4udt786lv) Units=km Length=0.0160475 bus1=p4udt786lv.1.2 bus2=p4udm2142.1.2 switch=n enabled=y phases=2 Linecode=1P_OH_AL_2/0_Rucina_0_416_0_2_2_2_2

New Line.l(r:p4udt787lv-p4ulv802) Units=km Length=0.0387666 bus1=p4udt787lv.1.2 bus2=p4ulv802.1.2 switch=n enabled=y phases=2 Linecode=1P_UG_AL_1/0_Brenau_0_416_0_2_2_2_2

New Line.l(r:p4udt787lv-p4ulv5851) Units=km Length=0.037158 bus1=p4udt787lv.1.2 bus2=p4ulv5851.1.2 switch=n enabled=y phases=2 Linecode=1P_UG_AL_1/0_Brenau_0_416_0_2_2_2_2

New Line.l(r:p4udt787lv-p4ulv9631) Units=km Length=0.0221571 bus1=p4udt787lv.1.2 bus2=p4ulv9631.1.2 switch=n enabled=y phases=2 Linecode=1P_UG_AL_1/0_Brenau_0_416_0_2_2_2_2

New Line.l(r:p4udt787lv-p4ulv33942) Units=km Length=0.0226437 bus1=p4udt787lv.1.2 bus2=p4ulv33942.1.2 switch=n enabled=y phases=2 Linecode=1P_UG_AL_2/0_Converse_0_416_0_2_2_2_2

New Line.l(r:p4udt793lv-p4ulv808) Units=km Length=0.025923400000000003 bus1=p4udt793lv.1.2 bus2=p4ulv808.1.2 switch=n enabled=y phases=2 Linecode=1P_UG_AL_2/0_Converse_0_416_0_2_2_2_2

New Line.l(r:p4udt793lv-p4ulv1244) Units=km Length=0.0223651 bus1=p4udt793lv.1.2 bus2=p4ulv1244.1.2 switch=n enabled=y phases=2 Linecode=1P_UG_AL_1/0_Brenau_0_416_0_2_2_2_2

New Line.l(r:p4udt793lv-p4ulv13099) Units=km Length=0.0194016 bus1=p4udt793lv.1.2 bus2=p4ulv13099.1.2 switch=n enabled=y phases=2 Linecode=1P_UG_AL_1/0_Brenau_0_416_0_2_2_2_2

New Line.l(r:p4udt793lv-p4ulv30140) Units=km Length=0.0172223 bus1=p4udt793lv.1.2 bus2=p4ulv30140.1.2 switch=n enabled=y phases=2 Linecode=1P_UG_AL_2/0_Converse_0_416_0_2_2_2_2

New Line.l(r:p4udt1204lv-p4ulv4963) Units=km Length=0.013812 bus1=p4udt1204lv.1.2 bus2=p4ulv4963.1.2 switch=n enabled=y phases=2 Linecode=1P_OH_AL_2/0_Rucina_0_416_0_2_2_2_2

New Line.l(r:p4udm3253-p4ulv1242) Units=km Length=0.012833300000000002 bus1=p4udm3253.1.2 bus2=p4ulv1242.1.2 switch=n enabled=y phases=2 Linecode=1P_OH_AL_2/0_Rucina_0_416_0_2_2_2_2

New Line.l(r:p4udm3253-p4ulv23375) Units=km Length=0.013803 bus1=p4udm3253.1.2 bus2=p4ulv23375.1.2 switch=n enabled=y phases=2 Linecode=1P_OH_AL_2/0_Rucina_0_416_0_2_2_2_2

New Line.l(r:p4udm3253-p4udt1204lv) Units=km Length=0.0156906 bus1=p4udt1204lv.1.2 bus2=p4udm3253.1.2 switch=n enabled=y phases=2 Linecode=1P_OH_AL_2/0_Rucina_0_416_0_2_2_2_2

New Line.l(r:p4udm3255-p4ulv15683) Units=km Length=0.014986300000000001 bus1=p4udm3255.1.2 bus2=p4ulv15683.1.2 switch=n enabled=y phases=2 Linecode=1P_OH_AL_2/0_Rucina_0_416_0_2_2_2_2

New Line.l(r:p4udm3255-p4ulv38944) Units=km Length=0.0159415 bus1=p4udm3255.1.2 bus2=p4ulv38944.1.2 switch=n enabled=y phases=2 Linecode=1P_OH_AL_2/0_Rucina_0_416_0_2_2_2_2

New Line.l(r:p4udm3255-p4udt1204lv) Units=km Length=0.0157006 bus1=p4udt1204lv.1.2 bus2=p4udm3255.1.2 switch=n enabled=y phases=2 Linecode=1P_OH_AL_2/0_Rucina_0_416_0_2_2_2_2

New Line.l(r:p4udt1612lv-p4ulv1678) Units=km Length=0.0232233 bus1=p4udt1612lv.1.2 bus2=p4ulv1678.1.2 switch=n enabled=y phases=2 Linecode=1P_OH_AL_2/0_Rucina_0_416_0_2_2_2_2

New Line.l(r:p4udm4376-p4ulv4959) Units=km Length=0.0191565 bus1=p4udm4376.1.2 bus2=p4ulv4959.1.2 switch=n enabled=y phases=2 Linecode=1P_OH_AL_2/0_Rucina_0_416_0_2_2_2_2

New Line.l(r:p4udm4376-p4ulv37287) Units=km Length=0.0153684 bus1=p4udm4376.1.2 bus2=p4ulv37287.1.2 switch=n enabled=y phases=2 Linecode=1P_OH_AL_2/0_Rucina_0_416_0_2_2_2_2

New Line.l(r:p4udm4376-p4udt1612lv) Units=km Length=0.0120292 bus1=p4udt1612lv.1.2 bus2=p4udm4376.1.2 switch=n enabled=y phases=2 Linecode=1P_OH_AL_2/0_Rucina_0_416_0_2_2_2_2

New Line.l(r:p4udt2329lv-p4ulv2446) Units=km Length=0.0286156 bus1=p4udt2329lv.1.2 bus2=p4ulv2446.1.2 switch=n enabled=y phases=2 Linecode=1P_UG_AL_1/0_Brenau_0_416_0_2_2_2_2

New Line.l(r:p4udt2329lv-p4ulv5415) Units=km Length=0.0255166 bus1=p4udt2329lv.1.2 bus2=p4ulv5415.1.2 switch=n enabled=y phases=2 Linecode=1P_UG_AL_1/0_Brenau_0_416_0_2_2_2_2

New Line.l(r:p4udt2329lv-p4ulv6258) Units=km Length=0.0277634 bus1=p4udt2329lv.1.2 bus2=p4ulv6258.1.2 switch=n enabled=y phases=2 Linecode=1P_UG_AL_2/0_Converse_0_416_0_2_2_2_2

New Line.l(r:p4udm6227-p4ulv36855) Units=km Length=0.021299 bus1=p4udm6227.1.2 bus2=p4ulv36855.1.2 switch=n enabled=y phases=2 Linecode=1P_UG_AL_1/0_Brenau_0_416_0_2_2_2_2

New Line.l(r:p4udm6227-p4udt2329lv) Units=km Length=0.0192632 bus1=p4udt2329lv.1.2 bus2=p4udm6227.1.2 switch=n enabled=y phases=2 Linecode=1P_UG_AL_1/0_Brenau_0_416_0_2_2_2_2

New Line.l(r:p4udt2725lv-p4ulv37709) Units=km Length=0.0224344 bus1=p4udt2725lv.1.2 bus2=p4ulv37709.1.2 switch=n enabled=y phases=2 Linecode=1P_OH_AL_2/0_Rucina_0_416_0_2_2_2_2

New Line.l(r:p4udm7280-p4ulv38942) Units=km Length=0.03867870000000001 bus1=p4udm7280.1.2 bus2=p4ulv38942.1.2 switch=n enabled=y phases=2 Linecode=1P_OH_AL_4/0_Zuzara_0_416_0_2_2_2_2

New Line.l(r:p4udm7278-p4ulv2897) Units=km Length=0.0689915 bus1=p4udm7278.1.2 bus2=p4ulv2897.1.2 switch=n enabled=y phases=2 Linecode=1P_OH_AL_4/0_Zuzara_0_416_0_2_2_2_2

New Line.l(r:p4udm7278-p4udm7280) Units=km Length=0.0166632 bus1=p4udm7280.1.2 bus2=p4udm7278.1.2 switch=n enabled=y phases=2 Linecode=1P_OH_AL_2/0_Rucina_0_416_0_2_2_2_2

New Line.l(r:p4udm7280-p4udt2725lv) Units=km Length=0.0166632 bus1=p4udt2725lv.1.2 bus2=p4udm7280.1.2 switch=n enabled=y phases=2 Linecode=1P_OH_AL_2/0_Rucina_0_416_0_2_2_2_2

New Line.l(r:p4udt2726lv-p4ulv15682) Units=km Length=0.0106797 bus1=p4udt2726lv.1.2 bus2=p4ulv15682.1.2 switch=n enabled=y phases=2 Linecode=1P_OH_AL_2/0_Rucina_0_416_0_2_2_2_2

New Line.l(r:p4udm7281-p4ulv2898) Units=km Length=0.007409240000000001 bus1=p4udm7281.1.2 bus2=p4ulv2898.1.2 switch=n enabled=y phases=2 Linecode=1P_OH_AL_2/0_Rucina_0_416_0_2_2_2_2

New Line.l(r:p4udm7281-p4udt2726lv) Units=km Length=0.0361056 bus1=p4udt2726lv.1.2 bus2=p4udm7281.1.2 switch=n enabled=y phases=2 Linecode=1P_OH_AL_4/0_Zuzara_0_416_0_2_2_2_2

New Line.l(r:p4udm7283-p4ulv26272) Units=km Length=0.0120281 bus1=p4udm7283.1.2 bus2=p4ulv26272.1.2 switch=n enabled=y phases=2 Linecode=1P_OH_AL_2/0_Rucina_0_416_0_2_2_2_2

New Line.l(r:p4udm7283-p4udt2726lv) Units=km Length=0.00787524 bus1=p4udt2726lv.1.2 bus2=p4udm7283.1.2 switch=n enabled=y phases=2 Linecode=1P_OH_AL_2/0_Rucina_0_416_0_2_2_2_2

New Line.l(r:p4udt3502lv-p4ulv35201) Units=km Length=0.0202861 bus1=p4udt3502lv.1.2 bus2=p4ulv35201.1.2 switch=n enabled=y phases=2 Linecode=1P_UG_AL_2/0_Converse_0_416_0_2_2_2_2

New Line.l(r:p4udm9252-p4ulv4177) Units=km Length=0.0177687 bus1=p4udm9252.1.2 bus2=p4ulv4177.1.2 switch=n enabled=y phases=2 Linecode=1P_UG_AL_1/0_Brenau_0_416_0_2_2_2_2

New Line.l(r:p4udm9251-p4ulv3769) Units=km Length=0.0217466 bus1=p4udm9251.1.2 bus2=p4ulv3769.1.2 switch=n enabled=y phases=2 Linecode=1P_UG_AL_1/0_Brenau_0_416_0_2_2_2_2

New Line.l(r:p4udm9251-p4udm9252) Units=km Length=0.0343212 bus1=p4udm9252.1.2 bus2=p4udm9251.1.2 switch=n enabled=y phases=2 Linecode=1P_UG_AL_1/0_Brenau_0_416_0_2_2_2_2

New Line.l(r:p4udm9252-p4udt3502lv) Units=km Length=0.009045670000000002 bus1=p4udt3502lv.1.2 bus2=p4udm9252.1.2 switch=n enabled=y phases=2 Linecode=1P_UG_AL_4/0_Sweetbriar_0_416_0_2_2_2_2

New Line.l(r:p4udm9254-p4ulv40612) Units=km Length=0.014305 bus1=p4udm9254.1.2 bus2=p4ulv40612.1.2 switch=n enabled=y phases=2 Linecode=1P_UG_AL_1/0_Brenau_0_416_0_2_2_2_2

New Line.l(r:p4udm9254-p4udt3502lv) Units=km Length=0.00904027 bus1=p4udt3502lv.1.2 bus2=p4udm9254.1.2 switch=n enabled=y phases=2 Linecode=1P_UG_AL_1/0_Brenau_0_416_0_2_2_2_2

New Line.l(r:p4udt4191lv-p4ulv4570) Units=km Length=0.0285107 bus1=p4udt4191lv.1.2 bus2=p4ulv4570.1.2 switch=n enabled=y phases=2 Linecode=1P_OH_AL_4/0_Zuzara_0_416_0_2_2_2_2

New Line.l(r:p4udm10937-p4ulv17452) Units=km Length=0.0123713 bus1=p4udm10937.1.2 bus2=p4ulv17452.1.2 switch=n enabled=y phases=2 Linecode=1P_OH_AL_2/0_Rucina_0_416_0_2_2_2_2

New Line.l(r:p4udm10937-p4ulv20882) Units=km Length=0.0248262 bus1=p4udm10937.1.2 bus2=p4ulv20882.1.2 switch=n enabled=y phases=2 Linecode=1P_OH_AL_2/0_Rucina_0_416_0_2_2_2_2

New Line.l(r:p4udm10937-p4udt4191lv) Units=km Length=0.0100842 bus1=p4udt4191lv.1.2 bus2=p4udm10937.1.2 switch=n enabled=y phases=2 Linecode=1P_OH_AL_2/0_Rucina_0_416_0_2_2_2_2

New Line.l(r:p4udt4513lv-p4ulv9190) Units=km Length=0.0130974 bus1=p4udt4513lv.1.2 bus2=p4ulv9190.1.2 switch=n enabled=y phases=2 Linecode=1P_OH_AL_2/0_Rucina_0_416_0_2_2_2_2

New Line.l(r:p4udm11781-p4ulv4960) Units=km Length=0.00479009 bus1=p4udm11781.1.2 bus2=p4ulv4960.1.2 switch=n enabled=y phases=2 Linecode=1P_OH_AL_2/0_Rucina_0_416_0_2_2_2_2

New Line.l(r:p4udm11781-p4udt4513lv) Units=km Length=0.018148 bus1=p4udt4513lv.1.2 bus2=p4udm11781.1.2 switch=n enabled=y phases=2 Linecode=1P_OH_AL_2/0_Rucina_0_416_0_2_2_2_2

New Line.l(r:p4udm11783-p4ulv26711) Units=km Length=0.0129733 bus1=p4udm11783.1.2 bus2=p4ulv26711.1.2 switch=n enabled=y phases=2 Linecode=1P_OH_AL_2/0_Rucina_0_416_0_2_2_2_2

New Line.l(r:p4udm11783-p4udt4513lv) Units=km Length=0.0181391 bus1=p4udt4513lv.1.2 bus2=p4udm11783.1.2 switch=n enabled=y phases=2 Linecode=1P_OH_AL_2/0_Rucina_0_416_0_2_2_2_2

New Line.l(r:p4udt4514lv-p4ulv4961) Units=km Length=0.0149933 bus1=p4udt4514lv.1.2 bus2=p4ulv4961.1.2 switch=n enabled=y phases=2 Linecode=1P_OH_AL_2/0_Rucina_0_416_0_2_2_2_2

New Line.l(r:p4udt4515lv-p4ulv4962) Units=km Length=0.0429663 bus1=p4udt4515lv.1.2 bus2=p4ulv4962.1.2 switch=n enabled=y phases=2 Linecode=1P_OH_AL_4/0_Zuzara_0_416_0_2_2_2_2

New Line.l(r:p4udm11786-p4ulv18710) Units=km Length=0.035352 bus1=p4udm11786.1.2 bus2=p4ulv18710.1.2 switch=n enabled=y phases=2 Linecode=1P_OH_AL_4/0_Zuzara_0_416_0_2_2_2_2

New Line.l(r:p4udm11786-p4udt4515lv) Units=km Length=0.012836 bus1=p4udt4515lv.1.2 bus2=p4udm11786.1.2 switch=n enabled=y phases=2 Linecode=1P_OH_AL_2/0_Rucina_0_416_0_2_2_2_2

New Line.l(r:p4udm11787-p4ulv27587) Units=km Length=0.0635787 bus1=p4udm11787.1.2 bus2=p4ulv27587.1.2 switch=n enabled=y phases=2 Linecode=1P_OH_AL_4/0_Zuzara_0_416_0_2_2_2_2

New Line.l(r:p4udm11787-p4udt4515lv) Units=km Length=0.0128457 bus1=p4udt4515lv.1.2 bus2=p4udm11787.1.2 switch=n enabled=y phases=2 Linecode=1P_OH_AL_2/0_Rucina_0_416_0_2_2_2_2

New Line.l(r:p4udm11788-p4ulv4964) Units=km Length=0.0300317 bus1=p4udm11788.1.2 bus2=p4ulv4964.1.2 switch=n enabled=y phases=2 Linecode=1P_UG_AL_1/0_Brenau_0_416_0_2_2_2_2

New Line.l(r:p4udm11791-p4ulv30133) Units=km Length=0.0295045 bus1=p4udm11791.1.2 bus2=p4ulv30133.1.2 switch=n enabled=y phases=2 Linecode=1P_UG_AL_1/0_Brenau_0_416_0_2_2_2_2

New Line.l(r:p4udm11788-p4udm11791) Units=km Length=0.0247566 bus1=p4udm11788.1.2 bus2=p4udm11791.1.2 switch=n enabled=y phases=2 Linecode=1P_UG_AL_1/0_Brenau_0_416_0_2_2_2_2

New Line.l(r:p4udm11788-p4udt4516lv) Units=km Length=0.0199685 bus1=p4udt4516lv.1.2 bus2=p4udm11788.1.2 switch=n enabled=y phases=2 Linecode=1P_UG_AL_4/0_Sweetbriar_0_416_0_2_2_2_2

New Line.l(r:p4udm11790-p4ulv22164) Units=km Length=0.019200200000000004 bus1=p4udm11790.1.2 bus2=p4ulv22164.1.2 switch=n enabled=y phases=2 Linecode=1P_UG_AL_1/0_Brenau_0_416_0_2_2_2_2

New Line.l(r:p4udm11789-p4ulv11335) Units=km Length=0.0183082 bus1=p4udm11789.1.2 bus2=p4ulv11335.1.2 switch=n enabled=y phases=2 Linecode=1P_UG_AL_1/0_Brenau_0_416_0_2_2_2_2

New Line.l(r:p4udm11789-p4ulv31816) Units=km Length=0.0125253 bus1=p4udm11789.1.2 bus2=p4ulv31816.1.2 switch=n enabled=y phases=2 Linecode=1P_UG_AL_1/0_Brenau_0_416_0_2_2_2_2

New Line.l(r:p4udm11789-p4udm11790) Units=km Length=0.018989 bus1=p4udm11790.1.2 bus2=p4udm11789.1.2 switch=n enabled=y phases=2 Linecode=1P_UG_AL_4/0_Sweetbriar_0_416_0_2_2_2_2

New Line.l(r:p4udm11790-p4udt4516lv) Units=km Length=0.009496570000000001 bus1=p4udt4516lv.1.2 bus2=p4udm11790.1.2 switch=n enabled=y phases=2 Linecode=1P_UG_AL_4/0_Sweetbriar_0_416_0_2_2_2_2

New Line.l(r:p4udt4882lv-p4ulv5414) Units=km Length=0.013407800000000001 bus1=p4udt4882lv.1.2 bus2=p4ulv5414.1.2 switch=n enabled=y phases=2 Linecode=1P_OH_AL_2/0_Rucina_0_416_0_2_2_2_2

New Line.l(r:p4udm13543-p4ulv5850) Units=km Length=0.0161667 bus1=p4udm13543.1.2 bus2=p4ulv5850.1.2 switch=n enabled=y phases=2 Linecode=1P_OH_AL_2/0_Rucina_0_416_0_2_2_2_2

New Line.l(r:p4udm13543-p4udt5229lv) Units=km Length=0.014432700000000001 bus1=p4udt5229lv.1.2 bus2=p4udm13543.1.2 switch=n enabled=y phases=2 Linecode=1P_OH_AL_2/0_Rucina_0_416_0_2_2_2_2

New Line.l(r:p4udm13544-p4ulv34795) Units=km Length=0.0121988 bus1=p4udm13544.1.2 bus2=p4ulv34795.1.2 switch=n enabled=y phases=2 Linecode=1P_OH_AL_2/0_Rucina_0_416_0_2_2_2_2

New Line.l(r:p4udm13544-p4ulv43141) Units=km Length=0.0120544 bus1=p4udm13544.1.2 bus2=p4ulv43141.1.2 switch=n enabled=y phases=2 Linecode=1P_OH_AL_2/0_Rucina_0_416_0_2_2_2_2

New Line.l(r:p4udm13544-p4udt5229lv) Units=km Length=0.0126227 bus1=p4udt5229lv.1.2 bus2=p4udm13544.1.2 switch=n enabled=y phases=2 Linecode=1P_OH_AL_2/0_Rucina_0_416_0_2_2_2_2

New Line.l(r:p4udt5553lv-p4ulv6256) Units=km Length=0.0169718 bus1=p4udt5553lv.1.2 bus2=p4ulv6256.1.2 switch=n enabled=y phases=2 Linecode=1P_OH_AL_2/0_Rucina_0_416_0_2_2_2_2

New Line.l(r:p4udt5554lv-p4ulv6257) Units=km Length=0.0212585 bus1=p4udt5554lv.1.2 bus2=p4ulv6257.1.2 switch=n enabled=y phases=2 Linecode=1P_OH_AL_2/0_Rucina_0_416_0_2_2_2_2

New Line.l(r:p4udm14299-p4ulv6259) Units=km Length=0.00974397 bus1=p4udm14299.1.2 bus2=p4ulv6259.1.2 switch=n enabled=y phases=2 Linecode=1P_UG_AL_1/0_Brenau_0_416_0_2_2_2_2

New Line.l(r:p4udm14299-p4udt5555lv) Units=km Length=0.0502804 bus1=p4udt5555lv.1.2 bus2=p4udm14299.1.2 switch=n enabled=y phases=2 Linecode=1P_UG_AL_1/0_Brenau_0_416_0_2_2_2_2

New Line.l(r:p4udm14300-p4ulv7497) Units=km Length=0.0159834 bus1=p4udm14300.1.2 bus2=p4ulv7497.1.2 switch=n enabled=y phases=2 Linecode=1P_UG_AL_1/0_Brenau_0_416_0_2_2_2_2

New Line.l(r:p4udm14300-p4ulv19985) Units=km Length=0.0395671 bus1=p4udm14300.1.2 bus2=p4ulv19985.1.2 switch=n enabled=y phases=2 Linecode=1P_UG_AL_1/0_Brenau_0_416_0_2_2_2_2

New Line.l(r:p4udm14301-p4ulv15685) Units=km Length=0.0391568 bus1=p4udm14301.1.2 bus2=p4ulv15685.1.2 switch=n enabled=y phases=2 Linecode=1P_UG_AL_1/0_Brenau_0_416_0_2_2_2_2

New Line.l(r:p4udm14300-p4udm14301) Units=km Length=0.00909243 bus1=p4udm14300.1.2 bus2=p4udm14301.1.2 switch=n enabled=y phases=2 Linecode=1P_UG_AL_1/0_Brenau_0_416_0_2_2_2_2

New Line.l(r:p4udm14300-p4udt5555lv) Units=km Length=0.00908243 bus1=p4udt5555lv.1.2 bus2=p4udm14300.1.2 switch=n enabled=y phases=2 Linecode=1P_UG_AL_4/0_Sweetbriar_0_416_0_2_2_2_2

New Line.l(r:p4udt6501lv-p4ulv7499) Units=km Length=0.016609 bus1=p4udt6501lv.1.2 bus2=p4ulv7499.1.2 switch=n enabled=y phases=2 Linecode=1P_OH_AL_2/0_Rucina_0_416_0_2_2_2_2

New Line.l(r:p4udm17285-p4ulv7938) Units=km Length=0.017273600000000004 bus1=p4udm17285.1.2 bus2=p4ulv7938.1.2 switch=n enabled=y phases=2 Linecode=1P_OH_AL_2/0_Rucina_0_416_0_2_2_2_2

New Line.l(r:p4udm17285-p4udt6836lv) Units=km Length=0.0360995 bus1=p4udt6836lv.1.2 bus2=p4udm17285.1.2 switch=n enabled=y phases=2 Linecode=1P_OH_AL_4/0_Zuzara_0_416_0_2_2_2_2

New Line.l(r:p4udm17286-p4ulv12208) Units=km Length=0.0147847 bus1=p4udm17286.1.2 bus2=p4ulv12208.1.2 switch=n enabled=y phases=2 Linecode=1P_OH_AL_2/0_Rucina_0_416_0_2_2_2_2

New Line.l(r:p4udm17286-p4ulv13970) Units=km Length=0.0248848 bus1=p4udm17286.1.2 bus2=p4ulv13970.1.2 switch=n enabled=y phases=2 Linecode=1P_OH_AL_2/0_Rucina_0_416_0_2_2_2_2

New Line.l(r:p4udm17286-p4udt6836lv) Units=km Length=0.0180498 bus1=p4udt6836lv.1.2 bus2=p4udm17286.1.2 switch=n enabled=y phases=2 Linecode=1P_OH_AL_2/0_Rucina_0_416_0_2_2_2_2

New Line.l(r:p4udt6838lv-p4ulv7941) Units=km Length=0.0150369 bus1=p4udt6838lv.1.2 bus2=p4ulv7941.1.2 switch=n enabled=y phases=2 Linecode=1P_OH_AL_2/0_Rucina_0_416_0_2_2_2_2

New Line.l(r:p4udt6838lv-p4ulv34796) Units=km Length=0.0219777 bus1=p4udt6838lv.1.2 bus2=p4ulv34796.1.2 switch=n enabled=y phases=2 Linecode=1P_OH_AL_2/0_Rucina_0_416_0_2_2_2_2

New Line.l(r:p4udm17295-p4ulv41873) Units=km Length=0.0170161 bus1=p4udm17295.1.2 bus2=p4ulv41873.1.2 switch=n enabled=y phases=2 Linecode=1P_OH_AL_2/0_Rucina_0_416_0_2_2_2_2

New Line.l(r:p4udm17295-p4udt6838lv) Units=km Length=0.0298089 bus1=p4udt6838lv.1.2 bus2=p4udm17295.1.2 switch=n enabled=y phases=2 Linecode=1P_OH_AL_4/0_Zuzara_0_416_0_2_2_2_2

New Line.l(r:p4udt7426lv-p4ulv8744) Units=km Length=0.018517 bus1=p4udt7426lv.1.2 bus2=p4ulv8744.1.2 switch=n enabled=y phases=2 Linecode=1P_OH_AL_2/0_Rucina_0_416_0_2_2_2_2

New Line.l(r:p4udt7737lv-p4ulv9189) Units=km Length=0.0172553 bus1=p4udt7737lv.1.2 bus2=p4ulv9189.1.2 switch=n enabled=y phases=2 Linecode=1P_OH_AL_2/0_Rucina_0_416_0_2_2_2_2

New Line.l(r:p4udt8045lv-p4ulv18299) Units=km Length=0.0122692 bus1=p4udt8045lv.1.2 bus2=p4ulv18299.1.2 switch=n enabled=y phases=2 Linecode=1P_OH_AL_2/0_Rucina_0_416_0_2_2_2_2

New Line.l(r:p4udm19958-p4ulv9630) Units=km Length=0.014034400000000002 bus1=p4udm19958.1.2 bus2=p4ulv9630.1.2 switch=n enabled=y phases=2 Linecode=1P_OH_AL_2/0_Rucina_0_416_0_2_2_2_2

New Line.l(r:p4udm19958-p4udt8045lv) Units=km Length=0.00476161 bus1=p4udt8045lv.1.2 bus2=p4udm19958.1.2 switch=n enabled=y phases=2 Linecode=1P_OH_AL_2/0_Rucina_0_416_0_2_2_2_2

New Line.l(r:p4udm19959-p4ulv15684) Units=km Length=0.0134747 bus1=p4udm19959.1.2 bus2=p4ulv15684.1.2 switch=n enabled=y phases=2 Linecode=1P_OH_AL_2/0_Rucina_0_416_0_2_2_2_2

New Line.l(r:p4udm19959-p4udt8045lv) Units=km Length=0.0157167 bus1=p4udt8045lv.1.2 bus2=p4udm19959.1.2 switch=n enabled=y phases=2 Linecode=1P_OH_AL_2/0_Rucina_0_416_0_2_2_2_2

New Line.l(r:p4udm20598-p4ulv10059) Units=km Length=0.012404700000000001 bus1=p4udm20598.1.2 bus2=p4ulv10059.1.2 switch=n enabled=y phases=2 Linecode=1P_OH_AL_2/0_Rucina_0_416_0_2_2_2_2

New Line.l(r:p4udm20598-p4ulv13971) Units=km Length=0.0217696 bus1=p4udm20598.1.2 bus2=p4ulv13971.1.2 switch=n enabled=y phases=2 Linecode=1P_OH_AL_2/0_Rucina_0_416_0_2_2_2_2

New Line.l(r:p4udm20598-p4udt8342lv) Units=km Length=0.0185246 bus1=p4udt8342lv.1.2 bus2=p4udm20598.1.2 switch=n enabled=y phases=2 Linecode=1P_OH_AL_2/0_Rucina_0_416_0_2_2_2_2

New Line.l(r:p4udm20600-p4ulv28849) Units=km Length=0.017937 bus1=p4udm20600.1.2 bus2=p4ulv28849.1.2 switch=n enabled=y phases=2 Linecode=1P_OH_AL_2/0_Rucina_0_416_0_2_2_2_2

New Line.l(r:p4udm20600-p4udt8342lv) Units=km Length=0.0320904 bus1=p4udt8342lv.1.2 bus2=p4udm20600.1.2 switch=n enabled=y phases=2 Linecode=1P_OH_AL_4/0_Zuzara_0_416_0_2_2_2_2

New Line.l(r:p4udm21197-p4ulv10477) Units=km Length=0.0217532 bus1=p4udm21197.1.2 bus2=p4ulv10477.1.2 switch=n enabled=y phases=2 Linecode=1P_OH_AL_2/0_Rucina_0_416_0_2_2_2_2

New Line.l(r:p4udm21197-p4udt8630lv) Units=km Length=0.0190096 bus1=p4udt8630lv.1.2 bus2=p4udm21197.1.2 switch=n enabled=y phases=2 Linecode=1P_OH_AL_2/0_Rucina_0_416_0_2_2_2_2

New Line.l(r:p4udm21198-p4ulv22163) Units=km Length=0.0202756 bus1=p4udm21198.1.2 bus2=p4ulv22163.1.2 switch=n enabled=y phases=2 Linecode=1P_OH_AL_2/0_Rucina_0_416_0_2_2_2_2

New Line.l(r:p4udm21198-p4ulv41872) Units=km Length=0.0139488 bus1=p4udm21198.1.2 bus2=p4ulv41872.1.2 switch=n enabled=y phases=2 Linecode=1P_OH_AL_2/0_Rucina_0_416_0_2_2_2_2

New Line.l(r:p4udm21198-p4udt8630lv) Units=km Length=0.019001300000000002 bus1=p4udt8630lv.1.2 bus2=p4udm21198.1.2 switch=n enabled=y phases=2 Linecode=1P_OH_AL_2/0_Rucina_0_416_0_2_2_2_2

New Line.l(r:p4udt8631lv-p4ulv10478) Units=km Length=0.0126121 bus1=p4udt8631lv.1.2 bus2=p4ulv10478.1.2 switch=n enabled=y phases=2 Linecode=1P_OH_AL_2/0_Rucina_0_416_0_2_2_2_2

New Line.l(r:p4udt9186lv-p4ulv11332) Units=km Length=0.022666000000000002 bus1=p4udt9186lv.1.2 bus2=p4ulv11332.1.2 switch=n enabled=y phases=2 Linecode=1P_OH_AL_2/0_Rucina_0_416_0_2_2_2_2

New Line.l(r:p4udt9187lv-p4ulv11333) Units=km Length=0.0197468 bus1=p4udt9187lv.1.2 bus2=p4ulv11333.1.2 switch=n enabled=y phases=2 Linecode=1P_OH_AL_2/0_Rucina_0_416_0_2_2_2_2

New Line.l(r:p4udt9465lv-p4ulv11765) Units=km Length=0.0179374 bus1=p4udt9465lv.1.2 bus2=p4ulv11765.1.2 switch=n enabled=y phases=2 Linecode=1P_OH_AL_2/0_Rucina_0_416_0_2_2_2_2

New Line.l(r:p4udt10024lv-p4ulv12644) Units=km Length=0.0194118 bus1=p4udt10024lv.1.2 bus2=p4ulv12644.1.2 switch=n enabled=y phases=2 Linecode=1P_OH_AL_2/0_Rucina_0_416_0_2_2_2_2

New Line.l(r:p4udt12130lv-p4ulv27589) Units=km Length=0.00890788 bus1=p4udt12130lv.1.2 bus2=p4ulv27589.1.2 switch=n enabled=y phases=2 Linecode=1P_OH_AL_2/0_Rucina_0_416_0_2_2_2_2

New Line.l(r:p4udm28019-p4ulv16123) Units=km Length=0.0131918 bus1=p4udm28019.1.2 bus2=p4ulv16123.1.2 switch=n enabled=y phases=2 Linecode=1P_OH_AL_2/0_Rucina_0_416_0_2_2_2_2

New Line.l(r:p4udm28019-p4udt12130lv) Units=km Length=0.0345222 bus1=p4udt12130lv.1.2 bus2=p4udm28019.1.2 switch=n enabled=y phases=2 Linecode=1P_OH_AL_4/0_Zuzara_0_416_0_2_2_2_2

New Line.l(r:p4udm28020-p4ulv22982) Units=km Length=0.00942981 bus1=p4udm28020.1.2 bus2=p4ulv22982.1.2 switch=n enabled=y phases=2 Linecode=1P_OH_AL_2/0_Rucina_0_416_0_2_2_2_2

New Line.l(r:p4udm28020-p4udt12130lv) Units=km Length=0.013874800000000001 bus1=p4udt12130lv.1.2 bus2=p4udm28020.1.2 switch=n enabled=y phases=2 Linecode=1P_OH_AL_2/0_Rucina_0_416_0_2_2_2_2

New Line.l(r:p4udt12131lv-p4ulv41056) Units=km Length=0.0261635 bus1=p4udt12131lv.1.2 bus2=p4ulv41056.1.2 switch=n enabled=y phases=2 Linecode=1P_UG_AL_1/0_Brenau_0_416_0_2_2_2_2

New Line.l(r:p4udm28022-p4ulv16124) Units=km Length=0.0224648 bus1=p4udm28022.1.2 bus2=p4ulv16124.1.2 switch=n enabled=y phases=2 Linecode=1P_UG_AL_1/0_Brenau_0_416_0_2_2_2_2

New Line.l(r:p4udm28022-p4ulv22984) Units=km Length=0.0328316 bus1=p4udm28022.1.2 bus2=p4ulv22984.1.2 switch=n enabled=y phases=2 Linecode=1P_UG_AL_1/0_Brenau_0_416_0_2_2_2_2

New Line.l(r:p4udm28022-p4udt12131lv) Units=km Length=0.00999185 bus1=p4udt12131lv.1.2 bus2=p4udm28022.1.2 switch=n enabled=y phases=2 Linecode=1P_UG_AL_4/0_Sweetbriar_0_416_0_2_2_2_2

New Line.l(r:p4udt12133lv-p4ulv16126) Units=km Length=0.018131700000000004 bus1=p4udt12133lv.1.2 bus2=p4ulv16126.1.2 switch=n enabled=y phases=2 Linecode=1P_OH_AL_2/0_Rucina_0_416_0_2_2_2_2

New Line.l(r:p4udt12386lv-p4ulv23740) Units=km Length=0.0074282 bus1=p4udt12386lv.1.2 bus2=p4ulv23740.1.2 switch=n enabled=y phases=2 Linecode=1P_OH_AL_2/0_Rucina_0_416_0_2_2_2_2

New Line.l(r:p4udm28458-p4ulv16576) Units=km Length=0.00685522 bus1=p4udm28458.1.2 bus2=p4ulv16576.1.2 switch=n enabled=y phases=2 Linecode=1P_OH_AL_2/0_Rucina_0_416_0_2_2_2_2

New Line.l(r:p4udm28458-p4udt12386lv) Units=km Length=0.0166874 bus1=p4udt12386lv.1.2 bus2=p4udm28458.1.2 switch=n enabled=y phases=2 Linecode=1P_OH_AL_2/0_Rucina_0_416_0_2_2_2_2

New Line.l(r:p4udt12857lv-p4ulv17453) Units=km Length=0.0172563 bus1=p4udt12857lv.1.2 bus2=p4ulv17453.1.2 switch=n enabled=y phases=2 Linecode=1P_OH_AL_2/0_Rucina_0_416_0_2_2_2_2

New Line.l(r:p4udm29266-p4ulv22165) Units=km Length=0.0157512 bus1=p4udm29266.1.2 bus2=p4ulv22165.1.2 switch=n enabled=y phases=2 Linecode=1P_UG_AL_1/0_Brenau_0_416_0_2_2_2_2

New Line.l(r:p4udm29265-p4ulv17454) Units=km Length=0.0125908 bus1=p4udm29265.1.2 bus2=p4ulv17454.1.2 switch=n enabled=y phases=2 Linecode=1P_UG_AL_1/0_Brenau_0_416_0_2_2_2_2

New Line.l(r:p4udm29265-p4udm29266) Units=km Length=0.0334064 bus1=p4udm29266.1.2 bus2=p4udm29265.1.2 switch=n enabled=y phases=2 Linecode=1P_UG_AL_1/0_Brenau_0_416_0_2_2_2_2

New Line.l(r:p4udm29266-p4udt12858lv) Units=km Length=0.012647700000000001 bus1=p4udt12858lv.1.2 bus2=p4udm29266.1.2 switch=n enabled=y phases=2 Linecode=1P_UG_AL_4/0_Sweetbriar_0_416_0_2_2_2_2

New Line.l(r:p4udm29267-p4ulv32646) Units=km Length=0.0291186 bus1=p4udm29267.1.2 bus2=p4ulv32646.1.2 switch=n enabled=y phases=2 Linecode=1P_UG_AL_1/0_Brenau_0_416_0_2_2_2_2

New Line.l(r:p4udm29267-p4udt12858lv) Units=km Length=0.0258222 bus1=p4udt12858lv.1.2 bus2=p4udm29267.1.2 switch=n enabled=y phases=2 Linecode=1P_UG_AL_1/0_Brenau_0_416_0_2_2_2_2

New Line.l(r:p4udt13537lv-p4ulv18709) Units=km Length=0.0168048 bus1=p4udt13537lv.1.2 bus2=p4ulv18709.1.2 switch=n enabled=y phases=2 Linecode=1P_OH_AL_2/0_Rucina_0_416_0_2_2_2_2

New Line.l(r:p4udt13928lv-p4ulv19490) Units=km Length=0.09188360000000001 bus1=p4udt13928lv.1.2 bus2=p4ulv19490.1.2 switch=n enabled=y phases=2 Linecode=1P_OH_AL_4/0_Zuzara_0_416_0_2_2_2_2

New Line.l(r:p4udt13945lv-p4ulv19538) Units=km Length=0.0153296 bus1=p4udt13945lv.1.2 bus2=p4ulv19538.1.2 switch=n enabled=y phases=2 Linecode=1P_OH_AL_2/0_Rucina_0_416_0_2_2_2_2

New Line.l(r:p4udt14198lv-p4ulv19986) Units=km Length=0.0162242 bus1=p4udt14198lv.1.2 bus2=p4ulv19986.1.2 switch=n enabled=y phases=2 Linecode=1P_UG_AL_1/0_Brenau_0_416_0_2_2_2_2

New Line.l(r:p4udt14199lv-p4ulv19987) Units=km Length=0.0150628 bus1=p4udt14199lv.1.2 bus2=p4ulv19987.1.2 switch=n enabled=y phases=2 Linecode=1P_OH_AL_2/0_Rucina_0_416_0_2_2_2_2

New Line.l(r:p4udt14397lv-p4ulv20406) Units=km Length=0.0172184 bus1=p4udt14397lv.1.2 bus2=p4ulv20406.1.2 switch=n enabled=y phases=2 Linecode=1P_OH_AL_2/0_Rucina_0_416_0_2_2_2_2

New Line.l(r:p4udt14633lv-p4ulv27586) Units=km Length=0.0169821 bus1=p4udt14633lv.1.2 bus2=p4ulv27586.1.2 switch=n enabled=y phases=2 Linecode=1P_OH_AL_2/0_Rucina_0_416_0_2_2_2_2

New Line.l(r:p4udt14633lv-p4ulv30132) Units=km Length=0.0147872 bus1=p4udt14633lv.1.2 bus2=p4ulv30132.1.2 switch=n enabled=y phases=2 Linecode=1P_OH_AL_2/0_Rucina_0_416_0_2_2_2_2

New Line.l(r:p4udm32221-p4ulv20881) Units=km Length=0.024134 bus1=p4udm32221.1.2 bus2=p4ulv20881.1.2 switch=n enabled=y phases=2 Linecode=1P_OH_AL_2/0_Rucina_0_416_0_2_2_2_2

New Line.l(r:p4udm32221-p4ulv27136) Units=km Length=0.0179665 bus1=p4udm32221.1.2 bus2=p4ulv27136.1.2 switch=n enabled=y phases=2 Linecode=1P_OH_AL_2/0_Rucina_0_416_0_2_2_2_2

New Line.l(r:p4udm32221-p4udt14633lv) Units=km Length=0.0172048 bus1=p4udt14633lv.1.2 bus2=p4udm32221.1.2 switch=n enabled=y phases=2 Linecode=1P_OH_AL_2/0_Rucina_0_416_0_2_2_2_2

New Line.l(r:p4udt14634lv-p4ulv20883) Units=km Length=0.034109400000000005 bus1=p4udt14634lv.1.2 bus2=p4ulv20883.1.2 switch=n enabled=y phases=2 Linecode=1P_OH_AL_4/0_Zuzara_0_416_0_2_2_2_2

New Line.l(r:p4udm32226-p4ulv34794) Units=km Length=0.0285127 bus1=p4udm32226.1.2 bus2=p4ulv34794.1.2 switch=n enabled=y phases=2 Linecode=1P_OH_AL_4/0_Zuzara_0_416_0_2_2_2_2

New Line.l(r:p4udm32226-p4udt14634lv) Units=km Length=0.0179277 bus1=p4udt14634lv.1.2 bus2=p4udm32226.1.2 switch=n enabled=y phases=2 Linecode=1P_OH_AL_2/0_Rucina_0_416_0_2_2_2_2

New Line.l(r:p4udt15462lv-p4ulv22574) Units=km Length=0.0181366 bus1=p4udt15462lv.1.2 bus2=p4ulv22574.1.2 switch=n enabled=y phases=2 Linecode=1P_OH_AL_2/0_Rucina_0_416_0_2_2_2_2

New Line.l(r:p4udt15463lv-p4ulv22575) Units=km Length=0.0221447 bus1=p4udt15463lv.1.2 bus2=p4ulv22575.1.2 switch=n enabled=y phases=2 Linecode=1P_OH_AL_2/0_Rucina_0_416_0_2_2_2_2

New Line.l(r:p4udt15662lv-p4ulv22981) Units=km Length=0.014384800000000001 bus1=p4udt15662lv.1.2 bus2=p4ulv22981.1.2 switch=n enabled=y phases=2 Linecode=1P_OH_AL_2/0_Rucina_0_416_0_2_2_2_2

New Line.l(r:p4udm33811-p4ulv22983) Units=km Length=0.0229594 bus1=p4udm33811.1.2 bus2=p4ulv22983.1.2 switch=n enabled=y phases=2 Linecode=1P_OH_AL_2/0_Rucina_0_416_0_2_2_2_2

New Line.l(r:p4udm33811-p4ulv38943) Units=km Length=0.023374 bus1=p4udm33811.1.2 bus2=p4ulv38943.1.2 switch=n enabled=y phases=2 Linecode=1P_OH_AL_2/0_Rucina_0_416_0_2_2_2_2

New Line.l(r:p4udm33811-p4udt15663lv) Units=km Length=0.013874800000000001 bus1=p4udt15663lv.1.2 bus2=p4udm33811.1.2 switch=n enabled=y phases=2 Linecode=1P_OH_AL_2/0_Rucina_0_416_0_2_2_2_2

New Line.l(r:p4udm33812-p4ulv27588) Units=km Length=0.0128953 bus1=p4udm33812.1.2 bus2=p4ulv27588.1.2 switch=n enabled=y phases=2 Linecode=1P_OH_AL_2/0_Rucina_0_416_0_2_2_2_2

New Line.l(r:p4udm33812-p4udt15663lv) Units=km Length=0.0459467 bus1=p4udt15663lv.1.2 bus2=p4udm33812.1.2 switch=n enabled=y phases=2 Linecode=1P_OH_AL_4/0_Zuzara_0_416_0_2_2_2_2

New Line.l(r:p4udt15855lv-p4ulv23376) Units=km Length=0.0164994 bus1=p4udt15855lv.1.2 bus2=p4ulv23376.1.2 switch=n enabled=y phases=2 Linecode=1P_UG_AL_1/0_Brenau_0_416_0_2_2_2_2

New Line.l(r:p4udt16403lv-p4ulv24600) Units=km Length=0.0145466 bus1=p4udt16403lv.1.2 bus2=p4ulv24600.1.2 switch=n enabled=y phases=2 Linecode=1P_OH_AL_2/0_Rucina_0_416_0_2_2_2_2

New Line.l(r:p4udt16404lv-p4ulv24601) Units=km Length=0.0192205 bus1=p4udt16404lv.1.2 bus2=p4ulv24601.1.2 switch=n enabled=y phases=2 Linecode=1P_OH_AL_2/0_Rucina_0_416_0_2_2_2_2

New Line.l(r:p4udt16405lv-p4ulv24603) Units=km Length=0.0176445 bus1=p4udt16405lv.1.2 bus2=p4ulv24603.1.2 switch=n enabled=y phases=2 Linecode=1P_OH_AL_2/0_Rucina_0_416_0_2_2_2_2

New Line.l(r:p4udt16948lv-p4ulv25860) Units=km Length=0.0168808 bus1=p4udt16948lv.1.2 bus2=p4ulv25860.1.2 switch=n enabled=y phases=2 Linecode=1P_OH_AL_2/0_Rucina_0_416_0_2_2_2_2

New Line.l(r:p4udt17136lv-p4ulv26275) Units=km Length=0.0271198 bus1=p4udt17136lv.1.2 bus2=p4ulv26275.1.2 switch=n enabled=y phases=2 Linecode=1P_OH_AL_4/0_Zuzara_0_416_0_2_2_2_2

New Line.l(r:p4udt17137lv-p4ulv26276) Units=km Length=0.0271422 bus1=p4udt17137lv.1.2 bus2=p4ulv26276.1.2 switch=n enabled=y phases=2 Linecode=1P_OH_AL_4/0_Zuzara_0_416_0_2_2_2_2

New Line.l(r:p4udm36964-p4ulv28007) Units=km Length=0.0117533 bus1=p4udm36964.1.2 bus2=p4ulv28007.1.2 switch=n enabled=y phases=2 Linecode=1P_OH_AL_2/0_Rucina_0_416_0_2_2_2_2

New Line.l(r:p4udm36964-p4udt17872lv) Units=km Length=0.0103084 bus1=p4udt17872lv.1.2 bus2=p4udm36964.1.2 switch=n enabled=y phases=2 Linecode=1P_OH_AL_2/0_Rucina_0_416_0_2_2_2_2

New Line.l(r:p4udm36965-p4ulv34367) Units=km Length=0.0134448 bus1=p4udm36965.1.2 bus2=p4ulv34367.1.2 switch=n enabled=y phases=2 Linecode=1P_OH_AL_2/0_Rucina_0_416_0_2_2_2_2

New Line.l(r:p4udm36965-p4udt17872lv) Units=km Length=0.0260746 bus1=p4udt17872lv.1.2 bus2=p4udm36965.1.2 switch=n enabled=y phases=2 Linecode=1P_OH_AL_2/0_Rucina_0_416_0_2_2_2_2

New Line.l(r:p4udm36966-p4ulv40196) Units=km Length=0.011138800000000003 bus1=p4udm36966.1.2 bus2=p4ulv40196.1.2 switch=n enabled=y phases=2 Linecode=1P_OH_AL_2/0_Rucina_0_416_0_2_2_2_2

New Line.l(r:p4udm36966-p4udt17872lv) Units=km Length=0.0126371 bus1=p4udt17872lv.1.2 bus2=p4udm36966.1.2 switch=n enabled=y phases=2 Linecode=1P_OH_AL_2/0_Rucina_0_416_0_2_2_2_2

New Line.l(r:p4udt18588lv-p4ulv29715) Units=km Length=0.015892 bus1=p4udt18588lv.1.2 bus2=p4ulv29715.1.2 switch=n enabled=y phases=2 Linecode=1P_OH_AL_2/0_Rucina_0_416_0_2_2_2_2

New Line.l(r:p4udt18924lv-p4ulv30570) Units=km Length=0.0166049 bus1=p4udt18924lv.1.2 bus2=p4ulv30570.1.2 switch=n enabled=y phases=2 Linecode=1P_OH_AL_2/0_Rucina_0_416_0_2_2_2_2

New Line.l(r:p4udt18925lv-p4ulv30571) Units=km Length=0.0261101 bus1=p4udt18925lv.1.2 bus2=p4ulv30571.1.2 switch=n enabled=y phases=2 Linecode=1P_OH_AL_2/0_Rucina_0_416_0_2_2_2_2

New Line.l(r:p4udt19091lv-p4ulv30973) Units=km Length=0.0136623 bus1=p4udt19091lv.1.2 bus2=p4ulv30973.1.2 switch=n enabled=y phases=2 Linecode=1P_OH_AL_2/0_Rucina_0_416_0_2_2_2_2

New Line.l(r:p4udt19268lv-p4ulv31415) Units=km Length=0.0220381 bus1=p4udt19268lv.1.2 bus2=p4ulv31415.1.2 switch=n enabled=y phases=2 Linecode=1P_OH_AL_2/0_Rucina_0_416_0_2_2_2_2

New Line.l(r:p4udt19269lv-p4ulv31417) Units=km Length=0.0194497 bus1=p4udt19269lv.1.2 bus2=p4ulv31417.1.2 switch=n enabled=y phases=2 Linecode=1P_OH_AL_2/0_Rucina_0_416_0_2_2_2_2

New Line.l(r:p4udt19269lv-p4ulv41511) Units=km Length=0.02772 bus1=p4udt19269lv.1.2 bus2=p4ulv41511.1.2 switch=n enabled=y phases=2 Linecode=1P_OH_AL_4/0_Zuzara_0_416_0_2_2_2_2

New Line.l(r:p4udt19742lv-p4ulv32647) Units=km Length=0.013247 bus1=p4udt19742lv.1.2 bus2=p4ulv32647.1.2 switch=n enabled=y phases=2 Linecode=1P_OH_AL_2/0_Rucina_0_416_0_2_2_2_2

New Line.l(r:p4udt19889lv-p4ulv33064) Units=km Length=0.00769938 bus1=p4udt19889lv.1.2 bus2=p4ulv33064.1.2 switch=n enabled=y phases=2 Linecode=1P_OH_AL_2/0_Rucina_0_416_0_2_2_2_2

New Line.l(r:p4udt19890lv-p4ulv33065) Units=km Length=0.0243872 bus1=p4udt19890lv.1.2 bus2=p4ulv33065.1.2 switch=n enabled=y phases=2 Linecode=1P_OH_AL_2/0_Rucina_0_416_0_2_2_2_2

New Line.l(r:p4udt20055lv-p4ulv33483) Units=km Length=0.0148823 bus1=p4udt20055lv.1.2 bus2=p4ulv33483.1.2 switch=n enabled=y phases=2 Linecode=1P_OH_AL_2/0_Rucina_0_416_0_2_2_2_2

New Line.l(r:p4udt20378lv-p4ulv34368) Units=km Length=0.0201127 bus1=p4udt20378lv.1.2 bus2=p4ulv34368.1.2 switch=n enabled=y phases=2 Linecode=1P_OH_AL_2/0_Rucina_0_416_0_2_2_2_2

New Line.l(r:p4udt20667lv-p4ulv39794) Units=km Length=0.010172200000000001 bus1=p4udt20667lv.1.2 bus2=p4ulv39794.1.2 switch=n enabled=y phases=2 Linecode=1P_OH_AL_2/0_Rucina_0_416_0_2_2_2_2

New Line.l(r:p4udm40373-p4ulv35197) Units=km Length=0.00879141 bus1=p4udm40373.1.2 bus2=p4ulv35197.1.2 switch=n enabled=y phases=2 Linecode=1P_OH_AL_2/0_Rucina_0_416_0_2_2_2_2

New Line.l(r:p4udm40373-p4udt20667lv) Units=km Length=0.0383793 bus1=p4udt20667lv.1.2 bus2=p4udm40373.1.2 switch=n enabled=y phases=2 Linecode=1P_OH_AL_4/0_Zuzara_0_416_0_2_2_2_2

New Line.l(r:p4udm40374-p4ulv35198) Units=km Length=0.014409000000000002 bus1=p4udm40374.1.2 bus2=p4ulv35198.1.2 switch=n enabled=y phases=2 Linecode=1P_OH_AL_2/0_Rucina_0_416_0_2_2_2_2

New Line.l(r:p4udm40374-p4udt20667lv) Units=km Length=0.00751054 bus1=p4udt20667lv.1.2 bus2=p4udm40374.1.2 switch=n enabled=y phases=2 Linecode=1P_OH_AL_2/0_Rucina_0_416_0_2_2_2_2

New Line.l(r:p4udt20668lv-p4ulv35199) Units=km Length=0.0146632 bus1=p4udt20668lv.1.2 bus2=p4ulv35199.1.2 switch=n enabled=y phases=2 Linecode=1P_OH_AL_2/0_Rucina_0_416_0_2_2_2_2

New Line.l(r:p4udt20669lv-p4ulv35200) Units=km Length=0.0220932 bus1=p4udt20669lv.1.2 bus2=p4ulv35200.1.2 switch=n enabled=y phases=2 Linecode=1P_OH_AL_2/0_Rucina_0_416_0_2_2_2_2

New Line.l(r:p4udt20671lv-p4ulv35206) Units=km Length=0.0213516 bus1=p4udt20671lv.1.2 bus2=p4ulv35206.1.2 switch=n enabled=y phases=2 Linecode=1P_OH_AL_2/0_Rucina_0_416_0_2_2_2_2

New Line.l(r:p4udt21109lv-p4ulv36457) Units=km Length=0.013769 bus1=p4udt21109lv.1.2 bus2=p4ulv36457.1.2 switch=n enabled=y phases=2 Linecode=1P_UG_AL_2/0_Converse_0_416_0_2_2_2_2

New Line.l(r:p4udt21239lv-p4ulv36854) Units=km Length=0.0332813 bus1=p4udt21239lv.1.2 bus2=p4ulv36854.1.2 switch=n enabled=y phases=2 Linecode=1P_OH_AL_4/0_Zuzara_0_416_0_2_2_2_2

New Line.l(r:p4udt21694lv-p4ulv40150) Units=km Length=0.0396213 bus1=p4udt21694lv.1.2 bus2=p4ulv40150.1.2 switch=n enabled=y phases=2 Linecode=1P_OH_AL_4/0_Zuzara_0_416_0_2_2_2_2

New Line.l(r:p4udm41512-p4ulv38100) Units=km Length=0.0590281 bus1=p4udm41512.1.2 bus2=p4ulv38100.1.2 switch=n enabled=y phases=2 Linecode=1P_OH_AL_4/0_Zuzara_0_416_0_2_2_2_2

New Line.l(r:p4udm41512-p4udt21694lv) Units=km Length=0.0124946 bus1=p4udt21694lv.1.2 bus2=p4udm41512.1.2 switch=n enabled=y phases=2 Linecode=1P_OH_AL_2/0_Rucina_0_416_0_2_2_2_2

New Line.l(r:p4udt21705lv-p4ulv38146) Units=km Length=0.0189701 bus1=p4udt21705lv.1.2 bus2=p4ulv38146.1.2 switch=n enabled=y phases=2 Linecode=1P_OH_AL_2/0_Rucina_0_416_0_2_2_2_2

New Line.l(r:p4udt21708lv-p4ulv38150) Units=km Length=0.0158609 bus1=p4udt21708lv.1.2 bus2=p4ulv38150.1.2 switch=n enabled=y phases=2 Linecode=1P_OH_AL_2/0_Rucina_0_416_0_2_2_2_2

New Line.l(r:p4udt22014lv-p4ulv38952) Units=km Length=0.0323177 bus1=p4udt22014lv.1.2 bus2=p4ulv38952.1.2 switch=n enabled=y phases=2 Linecode=1P_UG_AL_1/0_Brenau_0_416_0_2_2_2_2

New Line.l(r:p4udt22304lv-p4ulv39793) Units=km Length=0.020653100000000004 bus1=p4udt22304lv.1.2 bus2=p4ulv39793.1.2 switch=n enabled=y phases=2 Linecode=1P_OH_AL_2/0_Rucina_0_416_0_2_2_2_2

New Line.l(r:p4udt22428lv-p4ulv40197) Units=km Length=0.0188444 bus1=p4udt22428lv.1.2 bus2=p4ulv40197.1.2 switch=n enabled=y phases=2 Linecode=1P_OH_AL_2/0_Rucina_0_416_0_2_2_2_2

New Line.l(r:p4udt22739lv-p4ulv41054) Units=km Length=0.0215004 bus1=p4udt22739lv.1.2 bus2=p4ulv41054.1.2 switch=n enabled=y phases=2 Linecode=1P_OH_AL_2/0_Rucina_0_416_0_2_2_2_2

New Line.l(r:p4udt22895lv-p4ulv41508) Units=km Length=0.01779 bus1=p4udt22895lv.1.2 bus2=p4ulv41508.1.2 switch=n enabled=y phases=2 Linecode=1P_OH_AL_2/0_Rucina_0_416_0_2_2_2_2

New Line.l(r:p4udt23019lv-p4ulv41874) Units=km Length=0.005818050000000001 bus1=p4udt23019lv.1.2 bus2=p4ulv41874.1.2 switch=n enabled=y phases=2 Linecode=1P_OH_AL_2/0_Rucina_0_416_0_2_2_2_2

New Line.l(r:p4udt23020lv-p4ulv41879) Units=km Length=0.0144967 bus1=p4udt23020lv.1.2 bus2=p4ulv41879.1.2 switch=n enabled=y phases=2 Linecode=1P_UG_AL_2/0_Converse_0_416_0_2_2_2_2

New Line.l(r:p4udt23167lv-p4ulv42309) Units=km Length=0.0128399 bus1=p4udt23167lv.1.2 bus2=p4ulv42309.1.2 switch=n enabled=y phases=2 Linecode=1P_OH_AL_2/0_Rucina_0_416_0_2_2_2_2

New Line.l(r:p4udt23168lv-p4ulv42310) Units=km Length=0.0225702 bus1=p4udt23168lv.1.2 bus2=p4ulv42310.1.2 switch=n enabled=y phases=2 Linecode=1P_OH_AL_2/0_Rucina_0_416_0_2_2_2_2

New Line.l(r:p4udt23298lv-p4ulv42722) Units=km Length=0.0246274 bus1=p4udt23298lv.1.2 bus2=p4ulv42722.1.2 switch=n enabled=y phases=2 Linecode=1P_OH_AL_2/0_Rucina_0_416_0_2_2_2_2

New Line.l(r:p4udt394-p4udt7737) Units=km Length=0.04998840000000001 bus1=p4udt394-p4udt7737x.1 bus2=p4udt394.1 switch=n enabled=y phases=1 Linecode=1P_OH_AL_ACSR_#2_Sparrow_12_47_0_1_1_1_1

New Line.l(r:p4udt20668-p4udt8342) Units=km Length=0.0509821 bus1=p4udt20668.2 bus2=p4udt8342.2 switch=n enabled=y phases=1 Linecode=1P_OH_AL_ACSR_#2_Sparrow_12_47_0_1_1_1_1

New Line.l(r:p4udt20668-p4udt8631) Units=km Length=0.0566882 bus1=p4udt8631.2 bus2=p4udt20668.2 switch=n enabled=y phases=1 Linecode=1P_OH_AL_ACSR_#2_Sparrow_12_47_0_1_1_1_1

New Line.l(r:p4udt8631-p4udt9187) Units=km Length=0.0517913 bus1=p4udt9187.2 bus2=p4udt8631.2 switch=n enabled=y phases=1 Linecode=1P_OH_AL_ACSR_#2_Sparrow_12_47_0_1_1_1_1

New Line.l(r:p4udt4513-p4udt9187) Units=km Length=0.054430700000000005 bus1=p4udt4513.2 bus2=p4udt9187.2 switch=n enabled=y phases=1 Linecode=1P_OH_AL_ACSR_#2_Sparrow_12_47_0_1_1_1_1

New Line.l(r:p4udt4513-p4udt9186) Units=km Length=0.0519215 bus1=p4udt9186.2 bus2=p4udt4513.2 switch=n enabled=y phases=1 Linecode=1P_OH_AL_ACSR_#2_Sparrow_12_47_0_1_1_1_1

New Line.l(r:p4udt2329-p4udt3502) Units=km Length=0.0722584 bus1=p4udt2329-p4udt3502xx.2 bus2=p4udt2329-p4udt3502x.2 switch=n enabled=y phases=1 Linecode=1P_UG_AL_#2_15_12_47_0_1_1_1_1

New Line.l(r:p4udt15855-p4udt3502) Units=km Length=0.0345463 bus1=p4udt15855-p4udt3502xx.2 bus2=p4udt15855-p4udt3502x.2 switch=n enabled=y phases=1 Linecode=1P_UG_AL_#2_15_12_47_0_1_1_1_1

New Line.l(r:p4udt18925-p4udt3502) Units=km Length=0.0431142 bus1=p4udt18925.2 bus2=p4udt3502.2 switch=n enabled=y phases=1 Linecode=1P_OH_AL_ACSR_#2_Sparrow_12_47_0_1_1_1_1

New Line.l(r:p4udt18925-p4udt20669) Units=km Length=0.015992 bus1=p4udt20669.2 bus2=p4udt18925.2 switch=n enabled=y phases=1 Linecode=1P_OH_AL_ACSR_#2_Sparrow_12_47_0_1_1_1_1

New Line.l(r:p4udt20669-p4udt21705) Units=km Length=0.015992 bus1=p4udt21705.2 bus2=p4udt20669.2 switch=n enabled=y phases=1 Linecode=1P_OH_AL_ACSR_#2_Sparrow_12_47_0_1_1_1_1

New Line.l(r:p4udt21705-p4udt786) Units=km Length=0.0320493 bus1=p4udt786.2 bus2=p4udt21705.2 switch=n enabled=y phases=1 Linecode=1P_OH_AL_ACSR_#2_Sparrow_12_47_0_1_1_1_1

New Line.l(r:p4udt4515-p4udt786) Units=km Length=0.04493780000000001 bus1=p4udt4515.2 bus2=p4udt786.2 switch=n enabled=y phases=1 Linecode=1P_OH_AL_ACSR_#2_Sparrow_12_47_0_1_1_1_1

New Line.l(r:p4udt4515-p4udt9465) Units=km Length=0.001 bus1=p4udt4515.2 bus2=p4udt9465.2 switch=n enabled=y phases=1 Linecode=1P_OH_AL_ACSR_#2_Sparrow_12_47_0_1_1_1_1

New Line.l(r:p4udt22895-p4udt4515) Units=km Length=0.0391854 bus1=p4udt22895.2 bus2=p4udt4515.2 switch=n enabled=y phases=1 Linecode=1P_OH_AL_ACSR_#2_Sparrow_12_47_0_1_1_1_1

New Line.l(r:p4udt22895-p4udt5553) Units=km Length=0.0190071 bus1=p4udt5553.2 bus2=p4udt22895.2 switch=n enabled=y phases=1 Linecode=1P_OH_AL_ACSR_#2_Sparrow_12_47_0_1_1_1_1

New Line.l(r:p4udt14397-p4udt5553) Units=km Length=0.0189935 bus1=p4udt14397.2 bus2=p4udt5553.2 switch=n enabled=y phases=1 Linecode=1P_OH_AL_ACSR_#2_Sparrow_12_47_0_1_1_1_1

New Line.l(r:p4udt14397-p4udt4514) Units=km Length=0.0190071 bus1=p4udt4514.2 bus2=p4udt14397.2 switch=n enabled=y phases=1 Linecode=1P_OH_AL_ACSR_#2_Sparrow_12_47_0_1_1_1_1

New Line.l(r:p4udt10024-p4udt4514) Units=km Length=0.0189935 bus1=p4udt10024.2 bus2=p4udt4514.2 switch=n enabled=y phases=1 Linecode=1P_OH_AL_ACSR_#2_Sparrow_12_47_0_1_1_1_1

New Line.l(r:p4udt14633-p4udt18924) Units=km Length=0.0297471 bus1=p4udt18924.2 bus2=p4udt14633.2 switch=n enabled=y phases=1 Linecode=1P_OH_AL_ACSR_#2_Sparrow_12_47_0_1_1_1_1

New Line.l(r:p4udt18924-p4udt2725) Units=km Length=0.0125516 bus1=p4udt2725.2 bus2=p4udt18924.2 switch=n enabled=y phases=1 Linecode=1P_OH_AL_ACSR_#2_Sparrow_12_47_0_1_1_1_1

New Line.l(r:p4udt22304-p4udt2725) Units=km Length=0.0333263 bus1=p4udt22304.2 bus2=p4udt2725.2 switch=n enabled=y phases=1 Linecode=1P_OH_AL_ACSR_#2_Sparrow_12_47_0_1_1_1_1

New Line.l(r:p4udt10024-p4udt22304) Units=km Length=0.0331977 bus1=p4udt10024.2 bus2=p4udt22304.2 switch=n enabled=y phases=1 Linecode=1P_OH_AL_ACSR_#2_Sparrow_12_47_0_1_1_1_1

New Line.l(r:p4udt10024-p4udt23167) Units=km Length=0.029886400000000004 bus1=p4udt23167.2 bus2=p4udt10024.2 switch=n enabled=y phases=1 Linecode=1P_OH_AL_ACSR_#2_Sparrow_12_47_0_1_1_1_1

New Line.l(r:p4udt23167-p4udt9186) Units=km Length=0.0314906 bus1=p4udt9186.2 bus2=p4udt23167.2 switch=n enabled=y phases=1 Linecode=1P_OH_AL_ACSR_#2_Sparrow_12_47_0_1_1_1_1

New Line.l(r:p4udt4191-p4udt9186) Units=km Length=0.0190928 bus1=p4udt4191.2 bus2=p4udt9186.2 switch=n enabled=y phases=1 Linecode=1P_OH_AL_ACSR_#2_Sparrow_12_47_0_1_1_1_1

New Line.l(r:p4udt19268-p4udt4191) Units=km Length=0.0866257 bus1=p4udt19268-p4udt4191x.2 bus2=p4udt4191.2 switch=n enabled=y phases=1 Linecode=1P_OH_AL_ACSR_#2_Sparrow_12_47_0_1_1_1_1

New Line.l(r:p4udt19268-p4udt21239) Units=km Length=0.10457600000000002 bus1=p4udt19268-p4udt21239x.3 bus2=p4udt21239.3 switch=n enabled=y phases=1 Linecode=1P_OH_AL_ACSR_#2_Sparrow_12_47_0_1_1_1_1

New Line.l(r:p4udt23168-p4udt4516) Units=km Length=0.130887 bus1=p4udt23168-p4udt4516x.3 bus2=p4udt4516.3 switch=n enabled=y phases=1 Linecode=1P_OH_AL_ACSR_#2_Sparrow_12_47_0_1_1_1_1

New Line.l(r:p4udt21109-p4udt787) Units=km Length=0.0431372 bus1=p4udt21109-p4udt787xx.1 bus2=p4udt21109-p4udt787xxx.1 switch=n enabled=y phases=1 Linecode=1P_UG_AL_#2_15_12_47_0_1_1_1_1

New Line.l(r:p4udt13928-p4udt17137) Units=km Length=0.29457 bus1=p4udt13928-p4udt17137x.3 bus2=p4udt17137.3 switch=n enabled=y phases=1 Linecode=1P_OH_AL_ACSR_#2_Sparrow_12_47_0_1_1_1_1

New Line.l(r:p4udt22883-p4udt7426) Units=km Length=0.001 bus1=p4udt22883-p4udt7426x.3 bus2=p4udt7426.3 switch=n enabled=y phases=1 Linecode=1P_OH_AL_ACSR_#2_Sparrow_12_47_0_1_1_1_1

New Line.l(r:p4udt17136-p4udt20378) Units=km Length=0.001 bus1=p4udt17136-p4udt20378x.3 bus2=p4udt20378.3 switch=n enabled=y phases=1 Linecode=1P_OH_AL_ACSR_#2_Sparrow_12_47_0_1_1_1_1

New Line.l(r:p4udt16948-p4udt22739) Units=km Length=0.01886 bus1=p4udt16948.1 bus2=p4udt22739.1 switch=n enabled=y phases=1 Linecode=1P_OH_AL_ACSR_#2_Sparrow_12_47_0_1_1_1_1

New Line.l(r:p4udt16948-p4udt395) Units=km Length=0.39395100000000005 bus1=p4udt16948-p4udt395x.1 bus2=p4udt16948.1 switch=n enabled=y phases=1 Linecode=1P_OH_AL_ACSR_#2_Sparrow_12_47_0_1_1_1_1

New Line.l(r:p4udt12130-p4udt15663) Units=km Length=0.013874800000000001 bus1=p4udt12130.3 bus2=p4udt15663.3 switch=n enabled=y phases=1 Linecode=1P_OH_AL_ACSR_#2_Sparrow_12_47_0_1_1_1_1

New Line.l(r:p4udt12130-p4udt15463) Units=km Length=0.0436996 bus1=p4udt15463.3 bus2=p4udt12130.3 switch=n enabled=y phases=1 Linecode=1P_OH_AL_ACSR_#2_Sparrow_12_47_0_1_1_1_1

New Line.l(r:p4udt23019-p4udt6501) Units=km Length=0.173046 bus1=p4udt6501.3 bus2=p4udt6501_b1_1.3 switch=n enabled=y phases=1 Linecode=1P_OH_AL_ACSR_#2_Sparrow_12_47_0_1_1_1_1

New Line.l(r:p4udt19091-p4udt6501) Units=km Length=0.0279678 bus1=p4udt19091.3 bus2=p4udt6501.3 switch=n enabled=y phases=1 Linecode=1P_OH_AL_ACSR_#2_Sparrow_12_47_0_1_1_1_1

New Line.l(r:p4udt14199-p4udt19091) Units=km Length=0.0325038 bus1=p4udt14199.3 bus2=p4udt19091.3 switch=n enabled=y phases=1 Linecode=1P_OH_AL_ACSR_#2_Sparrow_12_47_0_1_1_1_1

New Line.l(r:p4udt14199-p4udt6838) Units=km Length=0.069816 bus1=p4udt6838.3 bus2=p4udt14199.3 switch=n enabled=y phases=1 Linecode=1P_OH_AL_ACSR_#2_Sparrow_12_47_0_1_1_1_1

New Line.l(r:p4udt1204-p4udt6838) Units=km Length=0.0566083 bus1=p4udt1204.3 bus2=p4udt6838.3 switch=n enabled=y phases=1 Linecode=1P_OH_AL_ACSR_#2_Sparrow_12_47_0_1_1_1_1

New Line.l(r:p4udt1204-p4udt17872) Units=km Length=0.08132060000000002 bus1=p4udt17872.3 bus2=p4udt1204.3 switch=n enabled=y phases=1 Linecode=1P_OH_AL_ACSR_#2_Sparrow_12_47_0_1_1_1_1

New Line.l(r:p4udt17872-p4udt8045) Units=km Length=0.0421783 bus1=p4udt17872.3 bus2=p4udt8045.3 switch=n enabled=y phases=1 Linecode=1P_OH_AL_ACSR_#2_Sparrow_12_47_0_1_1_1_1

New Line.l(r:p4udt15463-p4udt17872) Units=km Length=0.0983449 bus1=p4udt15463.3 bus2=p4udt17872.3 switch=n enabled=y phases=1 Linecode=1P_OH_AL_ACSR_#2_Sparrow_12_47_0_1_1_1_1

New Line.l(r:p4udt12857-p4udt15463) Units=km Length=0.0302478 bus1=p4udt12857.3 bus2=p4udt15463.3 switch=n enabled=y phases=1 Linecode=1P_OH_AL_ACSR_#2_Sparrow_12_47_0_1_1_1_1

New Line.l(r:p4udt12857-p4udt13945) Units=km Length=0.0215853 bus1=p4udt13945.3 bus2=p4udt12857.3 switch=n enabled=y phases=1 Linecode=1P_OH_AL_ACSR_#2_Sparrow_12_47_0_1_1_1_1

New Line.l(r:p4udt20667-p4udt2726) Units=km Length=0.0322635 bus1=p4udt20667.3 bus2=p4udt2726.3 switch=n enabled=y phases=1 Linecode=1P_OH_AL_ACSR_#2_Sparrow_12_47_0_1_1_1_1

New Line.l(r:p4udt13945-p4udt20667) Units=km Length=0.0750331 bus1=p4udt13945.3 bus2=p4udt20667.3 switch=n enabled=y phases=1 Linecode=1P_OH_AL_ACSR_#2_Sparrow_12_47_0_1_1_1_1

New Line.l(r:p4udt13945-p4udt15662) Units=km Length=0.024427700000000004 bus1=p4udt15662.3 bus2=p4udt13945.3 switch=n enabled=y phases=1 Linecode=1P_OH_AL_ACSR_#2_Sparrow_12_47_0_1_1_1_1

New Line.l(r:p4udt15662-p4udt5229) Units=km Length=0.0301514 bus1=p4udt5229.3 bus2=p4udt15662.3 switch=n enabled=y phases=1 Linecode=1P_OH_AL_ACSR_#2_Sparrow_12_47_0_1_1_1_1

New Line.l(r:p4udt18588-p4udt5229) Units=km Length=0.0485651 bus1=p4udt18588.3 bus2=p4udt5229.3 switch=n enabled=y phases=1 Linecode=1P_OH_AL_ACSR_#2_Sparrow_12_47_0_1_1_1_1

New Line.l(r:p4udt18588-p4udt4882) Units=km Length=0.0170729 bus1=p4udt4882.3 bus2=p4udt18588.3 switch=n enabled=y phases=1 Linecode=1P_OH_AL_ACSR_#2_Sparrow_12_47_0_1_1_1_1

New Line.l(r:p4udt15462-p4udt4882) Units=km Length=0.6167 bus1=p4udt15462-p4udt4882x.3 bus2=p4udt4882.3 switch=n enabled=y phases=1 Linecode=1P_OH_AL_ACSR_#2_Sparrow_12_47_0_1_1_1_1

New Line.l(r:p4udt22014-p4udt793) Units=km Length=0.00898804 bus1=p4udt22014-p4udt793x.1 bus2=p4udt22014-p4udt793xx.1 switch=n enabled=y phases=1 Linecode=1P_UG_AL_#2_15_12_47_0_1_1_1_1

New Line.l(r:p4udt22014-p4udt23020) Units=km Length=0.0269537 bus1=p4udt22014-p4udt23020xx.1 bus2=p4udt22014-p4udt23020x.1 switch=n enabled=y phases=1 Linecode=1P_UG_AL_#2_15_12_47_0_1_1_1_1

New Line.l(r:p4udt20671-p4udt23020) Units=km Length=0.042473 bus1=p4udt20671-p4udt23020x.1 bus2=p4udt23020.1 switch=n enabled=y phases=1 Linecode=1P_OH_AL_ACSR_#2_Sparrow_12_47_0_1_1_1_1

New Line.l(r:p4udt14634-p4udt19268) Units=km Length=0.104956 bus1=p4udt14634.1.2.3 bus2=p4udt19268.1.2.3 switch=n enabled=y phases=3 Linecode=3P_OH_AL_ACSR_4/0_Penguin_12_47_0_3_3_3_3

New Line.l(r:p4udt14634-p4udt395) Units=km Length=0.0537896 bus1=p4udt395.1.2.3 bus2=p4udt14634.1.2.3 switch=n enabled=y phases=3 Linecode=3P_OH_AL_ACSR_4/0_Penguin_12_47_0_3_3_3_3

New Line.l(r:p4udt15462-p4udt395) Units=km Length=0.291543 bus1=p4udt15462.1.2.3 bus2=p4udt395.1.2.3 switch=n enabled=y phases=3 Linecode=3P_OH_AL_ACSR_4/0_Penguin_12_47_0_3_3_3_3

New Line.l(r:p4udt13537-p4udt15462) Units=km Length=0.0360876 bus1=p4udt13537.1.2.3 bus2=p4udt15462.1.2.3 switch=n enabled=y phases=3 Linecode=3P_OH_AL_ACSR_4/0_Penguin_12_47_0_3_3_3_3

New Line.l(r:p4udt13537-p4udt6836) Units=km Length=0.0180498 bus1=p4udt6836.1.2.3 bus2=p4udt13537.1.2.3 switch=n enabled=y phases=3 Linecode=3P_OH_AL_ACSR_4/0_Penguin_12_47_0_3_3_3_3

New Line.l(r:p4udt6836-p4udt7737) Units=km Length=0.0360898 bus1=p4udt7737.1.2.3 bus2=p4udt6836.1.2.3 switch=n enabled=y phases=3 Linecode=3P_OH_AL_ACSR_4/0_Penguin_12_47_0_3_3_3_3

New Line.l(r:p4udt16403-p4udt7737) Units=km Length=0.0207029 bus1=p4udt16403.1.2.3 bus2=p4udt7737.1.2.3 switch=n enabled=y phases=3 Linecode=3P_OH_AL_ACSR_4/0_Penguin_12_47_0_3_3_3_3

New Line.l(r:p4udt16403-p4udt20055) Units=km Length=0.0220078 bus1=p4udt20055.1.2.3 bus2=p4udt16403.1.2.3 switch=n enabled=y phases=3 Linecode=3P_OH_AL_ACSR_4/0_Penguin_12_47_0_3_3_3_3

New Line.l(r:p4udt20055-p4udt8630) Units=km Length=0.030739800000000005 bus1=p4udt8630.1.2.3 bus2=p4udt20055.1.2.3 switch=n enabled=y phases=3 Linecode=3P_OH_AL_ACSR_4/0_Penguin_12_47_0_3_3_3_3

New Line.l(r:p4udt785-p4udt8630) Units=km Length=0.0570039 bus1=p4udt785.1.2.3 bus2=p4udt8630.1.2.3 switch=n enabled=y phases=3 Linecode=3P_OH_AL_ACSR_4/0_Penguin_12_47_0_3_3_3_3

New Line.l(r:p4udt1612-p4udt785) Units=km Length=0.029467 bus1=p4udt1612.1.2.3 bus2=p4udt785.1.2.3 switch=n enabled=y phases=3 Linecode=3P_OH_AL_ACSR_4/0_Penguin_12_47_0_3_3_3_3

New Line.l(r:p4udt1612-p4udt22428) Units=km Length=0.025454 bus1=p4udt22428.1.2.3 bus2=p4udt1612.1.2.3 switch=n enabled=y phases=3 Linecode=3P_OH_AL_ACSR_4/0_Penguin_12_47_0_3_3_3_3

New Line.l(r:p4udt19269-p4udt22428) Units=km Length=0.0214438 bus1=p4udt19269.1.2.3 bus2=p4udt22428.1.2.3 switch=n enabled=y phases=3 Linecode=3P_OH_AL_ACSR_4/0_Penguin_12_47_0_3_3_3_3

New Line.l(r:p4udt12133-p4udt19269) Units=km Length=0.026531 bus1=p4udt12133.1.2.3 bus2=p4udt19269.1.2.3 switch=n enabled=y phases=3 Linecode=3P_OH_AL_ACSR_4/0_Penguin_12_47_0_3_3_3_3

New Line.l(r:p4udt12133-p4udt20671) Units=km Length=0.028322 bus1=p4udt20671.1.2.3 bus2=p4udt12133.1.2.3 switch=n enabled=y phases=3 Linecode=3P_OH_AL_ACSR_4/0_Penguin_12_47_0_3_3_3_3

New Line.l(r:p4udt20671-p4udt21708) Units=km Length=0.0148052 bus1=p4udt21708.1.2.3 bus2=p4udt20671.1.2.3 switch=n enabled=y phases=3 Linecode=3P_OH_AL_ACSR_4/0_Penguin_12_47_0_3_3_3_3

New Line.l(r:p4udt16405-p4udt21708) Units=km Length=0.03499420000000001 bus1=p4udt16405.1.2.3 bus2=p4udt21708.1.2.3 switch=n enabled=y phases=3 Linecode=3P_OH_AL_ACSR_4/0_Penguin_12_47_0_3_3_3_3

New Line.l(r:p4udt16405-p4udt19742) Units=km Length=0.0178639 bus1=p4udt19742.1.2.3 bus2=p4udt16405.1.2.3 switch=n enabled=y phases=3 Linecode=3P_OH_AL_ACSR_4/0_Penguin_12_47_0_3_3_3_3

New Line.l(r:p4udt19742-p4uhs20_1247) Units=km Length=0.683346 bus1=p4udt19742-p4uhs20_1247x.1.2.3 bus2=p4udt19742-p4uhs20_1247x_b1_1.1.2.3 switch=n enabled=y phases=3 Linecode=3P_OH_AL_ACSR_4/0_Penguin_12_47_0_3_3_3_3

New Line.l(r:p4udt22896lv-p4ulv41509) Units=km Length=0.0024797000000000005 bus1=p4udt22896lv.1.2.3 bus2=p4ulv41509.1.2.3 switch=n enabled=y phases=3 Linecode=3P_UG_AL_750kcmil_25_0_416_0_3_3_3_3

New Line.l(r:p4udt22883lv-p4ulv41452) Units=km Length=0.00395218 bus1=p4udt22883lv.1.2.3 bus2=p4ulv41452.1.2.3 switch=n enabled=y phases=3 Linecode=3P_UG_AL_350kcmil_15_0_416_0_3_3_3_3

New Line.l(r:p4udt21694-p4udt22883) Units=km Length=0.102497 bus1=p4udt21694.1.2.3 bus2=p4udt22883.1.2.3 switch=n enabled=y phases=3 Linecode=3P_OH_AL_ACSR_4/0_Penguin_12_47_0_3_3_3_3

New Line.l(r:p4udt13928-p4udt21694) Units=km Length=0.557049 bus1=p4udt13928.1.2.3 bus2=p4udt21694.1.2.3 switch=n enabled=y phases=3 Linecode=3P_OH_AL_ACSR_4/0_Penguin_12_47_0_3_3_3_3

New Line.l(r:p4udt12386-p4udt13928) Units=km Length=0.0822761 bus1=p4udt12386.1.2.3 bus2=p4udt12386_b1_1.1.2.3 switch=n enabled=y phases=3 Linecode=3P_OH_AL_ACSR_4/0_Penguin_12_47_0_3_3_3_3

New Line.l(r:p4udt12386-p4udt17136) Units=km Length=0.0166776 bus1=p4udt17136.1.2.3 bus2=p4udt12386.1.2.3 switch=n enabled=y phases=3 Linecode=3P_OH_AL_ACSR_4/0_Penguin_12_47_0_3_3_3_3

New Line.l(r:p4udt17136-p4udt19890) Units=km Length=0.0166776 bus1=p4udt19890.1.2.3 bus2=p4udt17136.1.2.3 switch=n enabled=y phases=3 Linecode=3P_OH_AL_ACSR_4/0_Penguin_12_47_0_3_3_3_3

New Line.l(r:p4udt16404-p4udt19890) Units=km Length=0.020245 bus1=p4udt16404.1.2.3 bus2=p4udt19890.1.2.3 switch=n enabled=y phases=3 Linecode=3P_OH_AL_ACSR_4/0_Penguin_12_47_0_3_3_3_3

New Line.l(r:p4udt12131-p4udt16404) Units=km Length=0.0200036 bus1=p4udt12131.1.2.3 bus2=p4udt16404.1.2.3 switch=n enabled=y phases=3 Linecode=3P_OH_AL_ACSR_4/0_Penguin_12_47_0_3_3_3_3

New Line.l(r:p4udt12131-p4udt21109) Units=km Length=0.051691400000000005 bus1=p4udt12131-p4udt21109xx.1.2.3 bus2=p4udt12131-p4udt21109x.1.2.3 switch=n enabled=y phases=3 Linecode=3P_UG_AL_4/0_25_12_47_0_3_3_3_3

New Line.l(r:p4udt21109-p4udt5555) Units=km Length=0.0885541 bus1=p4udt21109-p4udt5555xx.1.2.3 bus2=p4udt21109-p4udt5555x.1.2.3 switch=n enabled=y phases=3 Linecode=3P_UG_AL_4/0_25_12_47_0_3_3_3_3

New Line.l(r:p4udt14198-p4udt5555) Units=km Length=0.0363497 bus1=p4udt14198-p4udt5555x.1.2.3 bus2=p4udt14198-p4udt5555xx.1.2.3 switch=n enabled=y phases=3 Linecode=3P_UG_AL_4/0_25_12_47_0_3_3_3_3

New Line.l(r:p4udt12858-p4udt14198) Units=km Length=0.0258222 bus1=p4udt12858-p4udt14198x.1.2.3 bus2=p4udt12858-p4udt14198xx.1.2.3 switch=n enabled=y phases=3 Linecode=3P_UG_AL_4/0_25_12_47_0_3_3_3_3

New Line.l(r:p4udt12858-p4udt19889) Units=km Length=0.257131 bus1=p4udt19889.1.2.3 bus2=p4udt12858.1.2.3 switch=n enabled=y phases=3 Linecode=3P_OH_AL_ACSR_4/0_Penguin_12_47_0_3_3_3_3

New Line.l(r:p4udt19889-p4udt22896) Units=km Length=0.221107 bus1=p4udt22896.1.2.3 bus2=p4udt19889.1.2.3 switch=n enabled=y phases=3 Linecode=3P_OH_AL_ACSR_4/0_Penguin_12_47_0_3_3_3_3

New Line.l(r:p4udt22896-p4udt23168) Units=km Length=0.122868 bus1=p4udt23168.1.2.3 bus2=p4udt22896.1.2.3 switch=n enabled=y phases=3 Linecode=3P_OH_AL_ACSR_4/0_Penguin_12_47_0_3_3_3_3

New Line.l(r:p4udt23168-p4udt5554) Units=km Length=0.0421781 bus1=p4udt5554.1.2.3 bus2=p4udt23168.1.2.3 switch=n enabled=y phases=3 Linecode=3P_OH_AL_ACSR_4/0_Penguin_12_47_0_3_3_3_3

New Line.l(r:p4udt23298-p4udt5554) Units=km Length=0.0262734 bus1=p4udt23298.1.2.3 bus2=p4udt5554.1.2.3 switch=n enabled=y phases=3 Linecode=3P_OH_AL_ACSR_4/0_Penguin_12_47_0_3_3_3_3

New Line.l(r:p4udt19268-p4udt23298) Units=km Length=0.165062 bus1=p4udt19268.1.2.3 bus2=p4udt23298.1.2.3 switch=n enabled=y phases=3 Linecode=3P_OH_AL_ACSR_4/0_Penguin_12_47_0_3_3_3_3

New Line.l(r:p4udt11107-p4udt19742) Units=km Length=0.0240987 bus1=p4udt11107-p4udt19742x.1.2.3 bus2=p4udt19742.1.2.3 switch=n enabled=y phases=3 Linecode=3P_OH_AL_ACSR_1033kcmil_Curlew_12.47_1_3_3_3_3

New Line.padswitch(r:p4udt2329-p4udt3502)p4u_79381 Units=km Length=0.001 bus1=p4udt3502.2 bus2=p4udt2329-p4udt3502xx.2 switch=y enabled=y phases=1 Linecode=padswitch_1_1_1_1

New Line.padswitch(r:p4udt2329-p4udt3502)p4u_79382 Units=km Length=0.001 bus1=p4udt2329-p4udt3502x.2 bus2=p4udt2329.2 switch=y enabled=y phases=1 Linecode=padswitch_1_2_1_1_1

New Line.padswitch(r:p4udt15855-p4udt3502)p4u_79383 Units=km Length=0.001 bus1=p4udt3502.2 bus2=p4udt15855-p4udt3502xx.2 switch=y enabled=y phases=1 Linecode=padswitch_1_1_1_1

New Line.padswitch(r:p4udt15855-p4udt3502)p4u_79384 Units=km Length=0.001 bus1=p4udt15855-p4udt3502x.2 bus2=p4udt15855.2 switch=y enabled=y phases=1 Linecode=padswitch_1_2_1_1_1

New Line.padswitch(r:p4udt21109-p4udt787)p4u_79385 Units=km Length=0.001 bus1=p4udt21109-p4udt787x.1 bus2=p4udt21109-p4udt787xx.1 switch=y enabled=y phases=1 Linecode=padswitch_1_1_1_1

New Line.padswitch(r:p4udt21109-p4udt787)p4u_79386 Units=km Length=0.001 bus1=p4udt21109-p4udt787xxx.1 bus2=p4udt787.1 switch=y enabled=y phases=1 Linecode=padswitch_1_2_1_1_1

New Line.padswitch(r:p4udt22014-p4udt793)p4u_79395 Units=km Length=0.001 bus1=p4udt22014.1 bus2=p4udt22014-p4udt793x.1 switch=y enabled=y phases=1 Linecode=padswitch_1_2_1_1_1

New Line.padswitch(r:p4udt22014-p4udt793)p4u_79396 Units=km Length=0.001 bus1=p4udt22014-p4udt793xx.1 bus2=p4udt793.1 switch=y enabled=y phases=1 Linecode=padswitch_1_2_1_1_1

New Line.padswitch(r:p4udt22014-p4udt23020)p4u_79397 Units=km Length=0.001 bus1=p4udt23020.1 bus2=p4udt22014-p4udt23020xx.1 switch=y enabled=y phases=1 Linecode=padswitch_1_2_1_1_1

New Line.padswitch(r:p4udt22014-p4udt23020)p4u_79398 Units=km Length=0.001 bus1=p4udt22014-p4udt23020x.1 bus2=p4udt22014.1 switch=y enabled=y phases=1 Linecode=padswitch_1_2_1_1_1

New Line.padswitch(r:p4udt12131-p4udt21109)p4u_79387 Units=km Length=0.001 bus1=p4udt21109.1.2.3 bus2=p4udt12131-p4udt21109xx.1.2.3 switch=y enabled=y phases=3 Linecode=padswitch_3_3_3_3

New Line.padswitch(r:p4udt12131-p4udt21109)p4u_79388 Units=km Length=0.001 bus1=p4udt12131-p4udt21109x.1.2.3 bus2=p4udt12131.1.2.3 switch=y enabled=y phases=3 Linecode=padswitch_3_3_3_3_3

New Line.padswitch(r:p4udt21109-p4udt5555)p4u_79389 Units=km Length=0.001 bus1=p4udt5555.1.2.3 bus2=p4udt21109-p4udt5555xx.1.2.3 switch=y enabled=y phases=3 Linecode=padswitch_3_3_3_1_3_3

New Line.padswitch(r:p4udt21109-p4udt5555)p4u_79390 Units=km Length=0.001 bus1=p4udt21109-p4udt5555x.1.2.3 bus2=p4udt21109.1.2.3 switch=y enabled=y phases=3 Linecode=padswitch_3_3_3_3

New Line.padswitch(r:p4udt14198-p4udt5555)p4u_79391 Units=km Length=0.001 bus1=p4udt14198.1.2.3 bus2=p4udt14198-p4udt5555x.1.2.3 switch=y enabled=y phases=3 Linecode=padswitch_3_3_3_3

New Line.padswitch(r:p4udt14198-p4udt5555)p4u_79392 Units=km Length=0.001 bus1=p4udt14198-p4udt5555xx.1.2.3 bus2=p4udt5555.1.2.3 switch=y enabled=y phases=3 Linecode=padswitch_3_3_3_3

New Line.padswitch(r:p4udt12858-p4udt14198)p4u_79393 Units=km Length=0.001 bus1=p4udt12858.1.2.3 bus2=p4udt12858-p4udt14198x.1.2.3 switch=y enabled=y phases=3 Linecode=padswitch_3_3_3_3

New Line.padswitch(r:p4udt12858-p4udt14198)p4u_79394 Units=km Length=0.001 bus1=p4udt12858-p4udt14198xx.1.2.3 bus2=p4udt14198.1.2.3 switch=y enabled=y phases=3 Linecode=padswitch_3_3_3_3

New Line.fuse(r:p4udt16948-p4udt395)p4u_79635 Units=km Length=0.001 bus1=p4udt395.1 bus2=p4udt16948-p4udt395x.1 switch=n enabled=y phases=1 Linecode=fuse_1_1_1_1

New Fuse.Fuse_fuse(r:p4udt16948-p4udt395)p4u_79635 monitoredobj=Line.fuse(r:p4udt16948-p4udt395)p4u_79635 enabled=y ratedcurrent=100.0

New Line.fuse(r:p4udt394-p4udt7737)p4u_80361 Units=km Length=0.001 bus1=p4udt7737.1 bus2=p4udt394-p4udt7737x.1 switch=n enabled=y phases=1 Linecode=fuse_1_6_1_1_1

New Fuse.Fuse_fuse(r:p4udt394-p4udt7737)p4u_80361 monitoredobj=Line.fuse(r:p4udt394-p4udt7737)p4u_80361 enabled=y ratedcurrent=100.0

New Line.fuse(r:p4udt13928-p4udt17137)p4u_80956 Units=km Length=0.001 bus1=p4udt13928.3 bus2=p4udt13928-p4udt17137x.3 switch=n enabled=y phases=1 Linecode=fuse_1_6_1_1_1

New Fuse.Fuse_fuse(r:p4udt13928-p4udt17137)p4u_80956 monitoredobj=Line.fuse(r:p4udt13928-p4udt17137)p4u_80956 enabled=y ratedcurrent=100.0

New Line.fuse(r:p4udt15462-p4udt4882)p4u_81095 Units=km Length=0.001 bus1=p4udt15462.3 bus2=p4udt15462-p4udt4882x.3 switch=n enabled=y phases=1 Linecode=fuse_1_6_1_1_1

New Fuse.Fuse_fuse(r:p4udt15462-p4udt4882)p4u_81095 monitoredobj=Line.fuse(r:p4udt15462-p4udt4882)p4u_81095 enabled=y ratedcurrent=100.0

New Line.fuse(r:p4udt17136-p4udt20378)p4u_81267 Units=km Length=0.001 bus1=p4udt17136.3 bus2=p4udt17136-p4udt20378x.3 switch=n enabled=y phases=1 Linecode=fuse_1_6_1_1_1

New Fuse.Fuse_fuse(r:p4udt17136-p4udt20378)p4u_81267 monitoredobj=Line.fuse(r:p4udt17136-p4udt20378)p4u_81267 enabled=y ratedcurrent=100.0

New Line.fuse(r:p4udt19268-p4udt4191)p4u_81454 Units=km Length=0.001 bus1=p4udt19268.2 bus2=p4udt19268-p4udt4191x.2 switch=n enabled=y phases=1 Linecode=fuse_1_6_1_3_1_1

New Fuse.Fuse_fuse(r:p4udt19268-p4udt4191)p4u_81454 monitoredobj=Line.fuse(r:p4udt19268-p4udt4191)p4u_81454 enabled=y ratedcurrent=100.0

New Line.fuse(r:p4udt19268-p4udt21239)p4u_81455 Units=km Length=0.001 bus1=p4udt19268.3 bus2=p4udt19268-p4udt21239x.3 switch=n enabled=y phases=1 Linecode=fuse_1_6_1_3_1_3_1

New Fuse.Fuse_fuse(r:p4udt19268-p4udt21239)p4u_81455 monitoredobj=Line.fuse(r:p4udt19268-p4udt21239)p4u_81455 enabled=y ratedcurrent=100.0

New Line.fuse(r:p4udt20671-p4udt23020)p4u_81595 Units=km Length=0.001 bus1=p4udt20671.1 bus2=p4udt20671-p4udt23020x.1 switch=n enabled=y phases=1 Linecode=fuse_1_6_1_1_1

New Fuse.Fuse_fuse(r:p4udt20671-p4udt23020)p4u_81595 monitoredobj=Line.fuse(r:p4udt20671-p4udt23020)p4u_81595 enabled=y ratedcurrent=100.0

New Line.fuse(r:p4udt21109-p4udt787)p4u_81641 Units=km Length=0.001 bus1=p4udt21109.1 bus2=p4udt21109-p4udt787x.1 switch=n enabled=y phases=1 Linecode=fuse_1_1_1_1

New Fuse.Fuse_fuse(r:p4udt21109-p4udt787)p4u_81641 monitoredobj=Line.fuse(r:p4udt21109-p4udt787)p4u_81641 enabled=y ratedcurrent=100.0

New Line.fuse(r:p4udt22883-p4udt7426)p4u_81796 Units=km Length=0.001 bus1=p4udt22883.3 bus2=p4udt22883-p4udt7426x.3 switch=n enabled=y phases=1 Linecode=fuse_1_6_1_3_1_3_1_3

New Fuse.Fuse_fuse(r:p4udt22883-p4udt7426)p4u_81796 monitoredobj=Line.fuse(r:p4udt22883-p4udt7426)p4u_81796 enabled=y ratedcurrent=100.0

New Line.fuse(r:p4udt23168-p4udt4516)p4u_81817 Units=km Length=0.001 bus1=p4udt23168.3 bus2=p4udt23168-p4udt4516x.3 switch=n enabled=y phases=1 Linecode=fuse_1_6_1_1_1

New Fuse.Fuse_fuse(r:p4udt23168-p4udt4516)p4u_81817 monitoredobj=Line.fuse(r:p4udt23168-p4udt4516)p4u_81817 enabled=y ratedcurrent=100.0

New Line.l(r:p4udt23019-p4udt6501)_disconnect Units=km Length=0.001 bus1=p4udt6501_b1_1.3 bus2=p4udt6501_b2_1.3 switch=y enabled=y phases=1 Linecode=1P_OH_AL_ACSR_#2_Sparrow_12_47_0_1_1_1_1

New Line.l(r:p4udt23019-p4udt6501)_cont Units=km Length=1.5664139999999998 bus1=p4udt6501_b2_1.3 bus2=p4udt23019.3 switch=n enabled=y phases=1 Linecode=1P_OH_AL_ACSR_#2_Sparrow_12_47_0_1_1_1_1

New Line.l(r:p4udt19742-p4uhs20_1247)_disconnect Units=km Length=0.001 bus1=p4udt19742-p4uhs20_1247x_b1_1.1.2.3 bus2=p4udt19742-p4uhs20_1247x_b2_1.1.2.3 switch=y enabled=y phases=3 Linecode=3P_OH_AL_ACSR_4/0_Penguin_12_47_0_3_3_3_3

New Line.l(r:p4udt19742-p4uhs20_1247)_cont Units=km Length=6.159114000000001 bus1=p4udt19742-p4uhs20_1247x_b2_1.1.2.3 bus2=p4udt19742.1.2.3 switch=n enabled=y phases=3 Linecode=3P_OH_AL_ACSR_4/0_Penguin_12_47_0_3_3_3_3

New Line.l(r:p4udt12386-p4udt13928)_disconnect Units=km Length=0.001 bus1=p4udt12386_b1_1.1.2.3 bus2=p4udt12386_b2_1.1.2.3 switch=y enabled=y phases=3 Linecode=3P_OH_AL_ACSR_4/0_Penguin_12_47_0_3_3_3_3

New Line.l(r:p4udt12386-p4udt13928)_cont Units=km Length=0.7494849 bus1=p4udt12386_b2_1.1.2.3 bus2=p4udt13928.1.2.3 switch=n enabled=y phases=3 Linecode=3P_OH_AL_ACSR_4/0_Penguin_12_47_0_3_3_3_3
