New Line.l(r:p4udt343lv-p4ulv349) Units=km Length=0.0231366 bus1=p4udt343lv.1.2 bus2=p4ulv349.1.2 switch=n enabled=y phases=2 Linecode=1P_UG_AL_1/0_Brenau_0_416_0_2_2_2_2

New Line.l(r:p4udt343lv-p4ulv4921) Units=km Length=0.0281589 bus1=p4udt343lv.1.2 bus2=p4ulv4921.1.2 switch=n enabled=y phases=2 Linecode=1P_UG_AL_1/0_Brenau_0_416_0_2_2_2_2

New Line.l(r:p4udt343lv-p4ulv19086) Units=km Length=0.0301143 bus1=p4udt343lv.1.2 bus2=p4ulv19086.1.2 switch=n enabled=y phases=2 Linecode=1P_UG_AL_1/0_Brenau_0_416_0_2_2_2_2

New Line.l(r:p4udt343lv-p4ulv30089) Units=km Length=0.0251378 bus1=p4udt343lv.1.2 bus2=p4ulv30089.1.2 switch=n enabled=y phases=2 Linecode=1P_UG_AL_1/0_Brenau_0_416_0_2_2_2_2

New Line.l(r:p4udm885-p4ulv39747) Units=km Length=0.0140527 bus1=p4udm885.1.2 bus2=p4ulv39747.1.2 switch=n enabled=y phases=2 Linecode=1P_OH_AL_2/0_Rucina_0_416_0_2_2_2_2

New Line.l(r:p4udm885-p4udt343lv) Units=km Length=0.05013600000000001 bus1=p4udt343lv.1.2 bus2=p4udm885.1.2 switch=n enabled=y phases=2 Linecode=1P_OH_AL_4/0_Zuzara_0_416_0_2_2_2_2

New Line.l(r:p4udm3096-p4ulv1188) Units=km Length=0.029139100000000005 bus1=p4udm3096.1.2 bus2=p4ulv1188.1.2 switch=n enabled=y phases=2 Linecode=1P_OH_AL_4/0_Zuzara_0_416_0_2_2_2_2

New Line.l(r:p4udm3096-p4ulv27535) Units=km Length=0.0243592 bus1=p4udm3096.1.2 bus2=p4ulv27535.1.2 switch=n enabled=y phases=2 Linecode=1P_OH_AL_2/0_Rucina_0_416_0_2_2_2_2

New Line.l(r:p4udm3096-p4udt1155lv) Units=km Length=0.027433 bus1=p4udt1155lv.1.2 bus2=p4udm3096.1.2 switch=n enabled=y phases=2 Linecode=1P_OH_AL_4/0_Zuzara_0_416_0_2_2_2_2

New Line.l(r:p4udm3097-p4ulv3269) Units=km Length=0.0176446 bus1=p4udm3097.1.2 bus2=p4ulv3269.1.2 switch=n enabled=y phases=2 Linecode=1P_UG_AL_1/0_Brenau_0_416_0_2_2_2_2

New Line.l(r:p4udm3097-p4udt1155lv) Units=km Length=0.0625135 bus1=p4udt1155lv.1.2 bus2=p4udm3097.1.2 switch=n enabled=y phases=2 Linecode=1P_UG_AL_1/0_Brenau_0_416_0_2_2_2_2

New Line.l(r:p4udt1156lv-p4ulv1189) Units=km Length=0.0405892 bus1=p4udt1156lv.1.2 bus2=p4ulv1189.1.2 switch=n enabled=y phases=2 Linecode=1P_UG_AL_1/0_Brenau_0_416_0_2_2_2_2

New Line.l(r:p4udt1156lv-p4ulv14353) Units=km Length=0.022114 bus1=p4udt1156lv.1.2 bus2=p4ulv14353.1.2 switch=n enabled=y phases=2 Linecode=1P_UG_AL_1/0_Brenau_0_416_0_2_2_2_2

New Line.l(r:p4udt1156lv-p4ulv16527) Units=km Length=0.0240511 bus1=p4udt1156lv.1.2 bus2=p4ulv16527.1.2 switch=n enabled=y phases=2 Linecode=1P_UG_AL_1/0_Brenau_0_416_0_2_2_2_2

New Line.l(r:p4udt1156lv-p4ulv22936) Units=km Length=0.0222725 bus1=p4udt1156lv.1.2 bus2=p4ulv22936.1.2 switch=n enabled=y phases=2 Linecode=1P_UG_AL_1/0_Brenau_0_416_0_2_2_2_2

New Line.l(r:p4udt1157lv-p4ulv1190) Units=km Length=0.0139561 bus1=p4udt1157lv.1.2 bus2=p4ulv1190.1.2 switch=n enabled=y phases=2 Linecode=1P_UG_AL_1/0_Brenau_0_416_0_2_2_2_2

New Line.l(r:p4udm3104-p4ulv10434) Units=km Length=0.0194471 bus1=p4udm3104.1.2 bus2=p4ulv10434.1.2 switch=n enabled=y phases=2 Linecode=1P_UG_AL_1/0_Brenau_0_416_0_2_2_2_2

New Line.l(r:p4udm3104-p4udt1157lv) Units=km Length=0.00913731 bus1=p4udt1157lv.1.2 bus2=p4udm3104.1.2 switch=n enabled=y phases=2 Linecode=1P_UG_AL_1/0_Brenau_0_416_0_2_2_2_2

New Line.l(r:p4udm3105-p4ulv13923) Units=km Length=0.0183707 bus1=p4udm3105.1.2 bus2=p4ulv13923.1.2 switch=n enabled=y phases=2 Linecode=1P_UG_AL_1/0_Brenau_0_416_0_2_2_2_2

New Line.l(r:p4udm3105-p4udt1157lv) Units=km Length=0.009100450000000001 bus1=p4udt1157lv.1.2 bus2=p4udm3105.1.2 switch=n enabled=y phases=2 Linecode=1P_UG_AL_1/0_Brenau_0_416_0_2_2_2_2

New Line.l(r:p4udt1158lv-p4ulv1191) Units=km Length=0.0205239 bus1=p4udt1158lv.1.2 bus2=p4ulv1191.1.2 switch=n enabled=y phases=2 Linecode=1P_UG_AL_1/0_Brenau_0_416_0_2_2_2_2

New Line.l(r:p4udt1932lv-p4ulv2016) Units=km Length=0.024949 bus1=p4udt1932lv.1.2 bus2=p4ulv2016.1.2 switch=n enabled=y phases=2 Linecode=1P_UG_AL_1/0_Brenau_0_416_0_2_2_2_2

New Line.l(r:p4udt1932lv-p4ulv8321) Units=km Length=0.024468500000000004 bus1=p4udt1932lv.1.2 bus2=p4ulv8321.1.2 switch=n enabled=y phases=2 Linecode=1P_UG_AL_1/0_Brenau_0_416_0_2_2_2_2

New Line.l(r:p4udt1932lv-p4ulv12160) Units=km Length=0.0232242 bus1=p4udt1932lv.1.2 bus2=p4ulv12160.1.2 switch=n enabled=y phases=2 Linecode=1P_UG_AL_1/0_Brenau_0_416_0_2_2_2_2

New Line.l(r:p4udt1932lv-p4ulv35566) Units=km Length=0.0237945 bus1=p4udt1932lv.1.2 bus2=p4ulv35566.1.2 switch=n enabled=y phases=2 Linecode=1P_UG_AL_1/0_Brenau_0_416_0_2_2_2_2

New Line.l(r:p4udt1933lv-p4ulv31773) Units=km Length=0.0123522 bus1=p4udt1933lv.1.2 bus2=p4ulv31773.1.2 switch=n enabled=y phases=2 Linecode=1P_OH_AL_2/0_Rucina_0_416_0_2_2_2_2

New Line.l(r:p4udm5202-p4ulv2017) Units=km Length=0.0148616 bus1=p4udm5202.1.2 bus2=p4ulv2017.1.2 switch=n enabled=y phases=2 Linecode=1P_OH_AL_2/0_Rucina_0_416_0_2_2_2_2

New Line.l(r:p4udm5202-p4ulv39327) Units=km Length=0.0161738 bus1=p4udm5202.1.2 bus2=p4ulv39327.1.2 switch=n enabled=y phases=2 Linecode=1P_OH_AL_2/0_Rucina_0_416_0_2_2_2_2

New Line.l(r:p4udm5202-p4udt1933lv) Units=km Length=0.0177946 bus1=p4udt1933lv.1.2 bus2=p4udm5202.1.2 switch=n enabled=y phases=2 Linecode=1P_OH_AL_2/0_Rucina_0_416_0_2_2_2_2

New Line.l(r:p4udm5203-p4ulv19087) Units=km Length=0.0181872 bus1=p4udm5203.1.2 bus2=p4ulv19087.1.2 switch=n enabled=y phases=2 Linecode=1P_OH_AL_2/0_Rucina_0_416_0_2_2_2_2

New Line.l(r:p4udm5203-p4udt1933lv) Units=km Length=0.0267684 bus1=p4udt1933lv.1.2 bus2=p4udm5203.1.2 switch=n enabled=y phases=2 Linecode=1P_OH_AL_2/0_Rucina_0_416_0_2_2_2_2

New Line.l(r:p4udt2293lv-p4ulv2406) Units=km Length=0.044733 bus1=p4udt2293lv.1.2 bus2=p4ulv2406.1.2 switch=n enabled=y phases=2 Linecode=1P_OH_AL_4/0_Zuzara_0_416_0_2_2_2_2

New Line.l(r:p4udt2293lv-p4ulv32190) Units=km Length=0.0376628 bus1=p4udt2293lv.1.2 bus2=p4ulv32190.1.2 switch=n enabled=y phases=2 Linecode=1P_OH_AL_4/0_Zuzara_0_416_0_2_2_2_2

New Line.l(r:p4udt2297lv-p4ulv3275) Units=km Length=0.0137759 bus1=p4udt2297lv.1.2 bus2=p4ulv3275.1.2 switch=n enabled=y phases=2 Linecode=1P_UG_AL_1/0_Brenau_0_416_0_2_2_2_2

New Line.l(r:p4udt2297lv-p4ulv21239) Units=km Length=0.017114 bus1=p4udt2297lv.1.2 bus2=p4ulv21239.1.2 switch=n enabled=y phases=2 Linecode=1P_UG_AL_1/0_Brenau_0_416_0_2_2_2_2

New Line.l(r:p4udm6126-p4ulv2410) Units=km Length=0.0199286 bus1=p4udm6126.1.2 bus2=p4ulv2410.1.2 switch=n enabled=y phases=2 Linecode=1P_UG_AL_1/0_Brenau_0_416_0_2_2_2_2

New Line.l(r:p4udm6126-p4udt2297lv) Units=km Length=0.00913269 bus1=p4udt2297lv.1.2 bus2=p4udm6126.1.2 switch=n enabled=y phases=2 Linecode=1P_UG_AL_1/0_Brenau_0_416_0_2_2_2_2

New Line.l(r:p4udt2698lv-p4ulv37663) Units=km Length=0.0158361 bus1=p4udt2698lv.1.2 bus2=p4ulv37663.1.2 switch=n enabled=y phases=2 Linecode=1P_UG_AL_1/0_Brenau_0_416_0_2_2_2_2

New Line.l(r:p4udm7190-p4ulv2862) Units=km Length=0.0221344 bus1=p4udm7190.1.2 bus2=p4ulv2862.1.2 switch=n enabled=y phases=2 Linecode=1P_UG_AL_1/0_Brenau_0_416_0_2_2_2_2

New Line.l(r:p4udm7193-p4ulv34749) Units=km Length=0.0180334 bus1=p4udm7193.1.2 bus2=p4ulv34749.1.2 switch=n enabled=y phases=2 Linecode=1P_UG_AL_2/0_Converse_0_416_0_2_2_2_2

New Line.l(r:p4udm7190-p4udm7193) Units=km Length=0.018205 bus1=p4udm7190.1.2 bus2=p4udm7193.1.2 switch=n enabled=y phases=2 Linecode=1P_UG_AL_2/0_Converse_0_416_0_2_2_2_2

New Line.l(r:p4udm7190-p4udt2698lv) Units=km Length=0.00890329 bus1=p4udt2698lv.1.2 bus2=p4udm7190.1.2 switch=n enabled=y phases=2 Linecode=1P_UG_AL_4/0_Sweetbriar_0_416_0_2_2_2_2

New Line.l(r:p4udm7191-p4ulv7883) Units=km Length=0.0164557 bus1=p4udm7191.1.2 bus2=p4ulv7883.1.2 switch=n enabled=y phases=2 Linecode=1P_UG_AL_1/0_Brenau_0_416_0_2_2_2_2

New Line.l(r:p4udm7192-p4ulv8322) Units=km Length=0.0152021 bus1=p4udm7192.1.2 bus2=p4ulv8322.1.2 switch=n enabled=y phases=2 Linecode=1P_UG_AL_1/0_Brenau_0_416_0_2_2_2_2

New Line.l(r:p4udm7191-p4udm7192) Units=km Length=0.00889612 bus1=p4udm7191.1.2 bus2=p4udm7192.1.2 switch=n enabled=y phases=2 Linecode=1P_UG_AL_1/0_Brenau_0_416_0_2_2_2_2

New Line.l(r:p4udm7191-p4udt2698lv) Units=km Length=0.00891026 bus1=p4udt2698lv.1.2 bus2=p4udm7191.1.2 switch=n enabled=y phases=2 Linecode=1P_UG_AL_4/0_Sweetbriar_0_416_0_2_2_2_2

New Line.l(r:p4udt3068lv-p4ulv37243) Units=km Length=0.0100754 bus1=p4udt3068lv.1.2 bus2=p4ulv37243.1.2 switch=n enabled=y phases=2 Linecode=1P_UG_AL_1/0_Brenau_0_416_0_2_2_2_2

New Line.l(r:p4udm8140-p4ulv7880) Units=km Length=0.0195226 bus1=p4udm8140.1.2 bus2=p4ulv7880.1.2 switch=n enabled=y phases=2 Linecode=1P_UG_AL_1/0_Brenau_0_416_0_2_2_2_2

New Line.l(r:p4udm8141-p4ulv26226) Units=km Length=0.0196247 bus1=p4udm8141.1.2 bus2=p4ulv26226.1.2 switch=n enabled=y phases=2 Linecode=1P_UG_AL_1/0_Brenau_0_416_0_2_2_2_2

New Line.l(r:p4udm8140-p4udm8141) Units=km Length=0.0192435 bus1=p4udm8140.1.2 bus2=p4udm8141.1.2 switch=n enabled=y phases=2 Linecode=1P_UG_AL_1/0_Brenau_0_416_0_2_2_2_2

New Line.l(r:p4udm8140-p4udt3068lv) Units=km Length=0.0096328 bus1=p4udt3068lv.1.2 bus2=p4udm8140.1.2 switch=n enabled=y phases=2 Linecode=1P_UG_AL_4/0_Sweetbriar_0_416_0_2_2_2_2

New Line.l(r:p4udm8142-p4ulv31772) Units=km Length=0.0174311 bus1=p4udm8142.1.2 bus2=p4ulv31772.1.2 switch=n enabled=y phases=2 Linecode=1P_UG_AL_1/0_Brenau_0_416_0_2_2_2_2

New Line.l(r:p4udm8139-p4ulv3274) Units=km Length=0.018859200000000003 bus1=p4udm8139.1.2 bus2=p4ulv3274.1.2 switch=n enabled=y phases=2 Linecode=1P_UG_AL_1/0_Brenau_0_416_0_2_2_2_2

New Line.l(r:p4udm8139-p4udm8142) Units=km Length=0.00962472 bus1=p4udm8142.1.2 bus2=p4udm8139.1.2 switch=n enabled=y phases=2 Linecode=1P_UG_AL_1/0_Brenau_0_416_0_2_2_2_2

New Line.l(r:p4udm8142-p4udt3068lv) Units=km Length=0.0192457 bus1=p4udt3068lv.1.2 bus2=p4udm8142.1.2 switch=n enabled=y phases=2 Linecode=1P_UG_AL_4/0_Sweetbriar_0_416_0_2_2_2_2

New Line.l(r:p4udt3069lv-p4ulv16074) Units=km Length=0.0193783 bus1=p4udt3069lv.1.2 bus2=p4ulv16074.1.2 switch=n enabled=y phases=2 Linecode=1P_UG_AL_1/0_Brenau_0_416_0_2_2_2_2

New Line.l(r:p4udm8145-p4ulv14772) Units=km Length=0.0110174 bus1=p4udm8145.1.2 bus2=p4ulv14772.1.2 switch=n enabled=y phases=2 Linecode=1P_UG_AL_1/0_Brenau_0_416_0_2_2_2_2

New Line.l(r:p4udm8145-p4udt3069lv) Units=km Length=0.0352099 bus1=p4udt3069lv.1.2 bus2=p4udm8145.1.2 switch=n enabled=y phases=2 Linecode=1P_UG_AL_1/0_Brenau_0_416_0_2_2_2_2

New Line.l(r:p4udm8148-p4ulv41454) Units=km Length=0.0123614 bus1=p4udm8148.1.2 bus2=p4ulv41454.1.2 switch=n enabled=y phases=2 Linecode=1P_UG_AL_1/0_Brenau_0_416_0_2_2_2_2

New Line.l(r:p4udm8144-p4ulv3276) Units=km Length=0.0194238 bus1=p4udm8144.1.2 bus2=p4ulv3276.1.2 switch=n enabled=y phases=2 Linecode=1P_UG_AL_1/0_Brenau_0_416_0_2_2_2_2

New Line.l(r:p4udm8147-p4ulv34750) Units=km Length=0.011999300000000001 bus1=p4udm8147.1.2 bus2=p4ulv34750.1.2 switch=n enabled=y phases=2 Linecode=1P_UG_AL_1/0_Brenau_0_416_0_2_2_2_2

New Line.l(r:p4udm8144-p4udm8147) Units=km Length=0.00916158 bus1=p4udm8144.1.2 bus2=p4udm8147.1.2 switch=n enabled=y phases=2 Linecode=1P_UG_AL_1/0_Brenau_0_416_0_2_2_2_2

New Line.l(r:p4udm8144-p4udm8148) Units=km Length=0.00916158 bus1=p4udm8148.1.2 bus2=p4udm8144.1.2 switch=n enabled=y phases=2 Linecode=1P_UG_AL_4/0_Sweetbriar_0_416_0_2_2_2_2

New Line.l(r:p4udm8148-p4udt3069lv) Units=km Length=0.009153110000000002 bus1=p4udt3069lv.1.2 bus2=p4udm8148.1.2 switch=n enabled=y phases=2 Linecode=1P_UG_AL_4/0_Sweetbriar_0_416_0_2_2_2_2

New Line.l(r:p4udt3815lv-p4ulv4130) Units=km Length=0.0128048 bus1=p4udt3815lv.1.2 bus2=p4ulv4130.1.2 switch=n enabled=y phases=2 Linecode=1P_UG_AL_1/0_Brenau_0_416_0_2_2_2_2

New Line.l(r:p4udm9987-p4ulv36822) Units=km Length=0.0219202 bus1=p4udm9987.1.2 bus2=p4ulv36822.1.2 switch=n enabled=y phases=2 Linecode=1P_UG_AL_2/0_Converse_0_416_0_2_2_2_2

New Line.l(r:p4udm9987-p4udt3815lv) Units=km Length=0.00902335 bus1=p4udt3815lv.1.2 bus2=p4udm9987.1.2 switch=n enabled=y phases=2 Linecode=1P_UG_AL_2/0_Converse_0_416_0_2_2_2_2

New Line.l(r:p4udm9988-p4ulv39748) Units=km Length=0.011168 bus1=p4udm9988.1.2 bus2=p4ulv39748.1.2 switch=n enabled=y phases=2 Linecode=1P_UG_AL_1/0_Brenau_0_416_0_2_2_2_2

New Line.l(r:p4udm9988-p4udt3815lv) Units=km Length=0.0180396 bus1=p4udt3815lv.1.2 bus2=p4udm9988.1.2 switch=n enabled=y phases=2 Linecode=1P_UG_AL_1/0_Brenau_0_416_0_2_2_2_2

New Line.l(r:p4udt4158lv-p4ulv9150) Units=km Length=0.0233516 bus1=p4udt4158lv.1.2 bus2=p4ulv9150.1.2 switch=n enabled=y phases=2 Linecode=1P_OH_AL_2/0_Rucina_0_416_0_2_2_2_2

New Line.l(r:p4udt4158lv-p4ulv10848) Units=km Length=0.0355817 bus1=p4udt4158lv.1.2 bus2=p4ulv10848.1.2 switch=n enabled=y phases=2 Linecode=1P_OH_AL_4/0_Zuzara_0_416_0_2_2_2_2

New Line.l(r:p4udm10834-p4ulv4528) Units=km Length=0.0253783 bus1=p4udm10834.1.2 bus2=p4ulv4528.1.2 switch=n enabled=y phases=2 Linecode=1P_OH_AL_2/0_Rucina_0_416_0_2_2_2_2

New Line.l(r:p4udm10834-p4udt4158lv) Units=km Length=0.0161384 bus1=p4udt4158lv.1.2 bus2=p4udm10834.1.2 switch=n enabled=y phases=2 Linecode=1P_OH_AL_2/0_Rucina_0_416_0_2_2_2_2

New Line.l(r:p4udt4484lv-p4ulv11726) Units=km Length=0.0194986 bus1=p4udt4484lv.1.2 bus2=p4ulv11726.1.2 switch=n enabled=y phases=2 Linecode=1P_UG_AL_1/0_Brenau_0_416_0_2_2_2_2

New Line.l(r:p4udm11680-p4ulv5809) Units=km Length=0.0248859 bus1=p4udm11680.1.2 bus2=p4ulv5809.1.2 switch=n enabled=y phases=2 Linecode=1P_UG_AL_1/0_Brenau_0_416_0_2_2_2_2

New Line.l(r:p4udm11682-p4ulv17404) Units=km Length=0.0106637 bus1=p4udm11682.1.2 bus2=p4ulv17404.1.2 switch=n enabled=y phases=2 Linecode=1P_UG_AL_1/0_Brenau_0_416_0_2_2_2_2

New Line.l(r:p4udm11680-p4udm11682) Units=km Length=0.0190678 bus1=p4udm11680.1.2 bus2=p4udm11682.1.2 switch=n enabled=y phases=2 Linecode=1P_UG_AL_1/0_Brenau_0_416_0_2_2_2_2

New Line.l(r:p4udm11680-p4udt4484lv) Units=km Length=0.00952976 bus1=p4udt4484lv.1.2 bus2=p4udm11680.1.2 switch=n enabled=y phases=2 Linecode=1P_UG_AL_4/0_Sweetbriar_0_416_0_2_2_2_2

New Line.l(r:p4udm11683-p4ulv43530) Units=km Length=0.009554710000000001 bus1=p4udm11683.1.2 bus2=p4ulv43530.1.2 switch=n enabled=y phases=2 Linecode=1P_UG_AL_1/0_Brenau_0_416_0_2_2_2_2

New Line.l(r:p4udm11679-p4ulv4919) Units=km Length=0.0177076 bus1=p4udm11679.1.2 bus2=p4ulv4919.1.2 switch=n enabled=y phases=2 Linecode=1P_UG_AL_1/0_Brenau_0_416_0_2_2_2_2

New Line.l(r:p4udm11679-p4udm11683) Units=km Length=0.00897031 bus1=p4udm11683.1.2 bus2=p4udm11679.1.2 switch=n enabled=y phases=2 Linecode=1P_UG_AL_1/0_Brenau_0_416_0_2_2_2_2

New Line.l(r:p4udm11683-p4udt4484lv) Units=km Length=0.00897031 bus1=p4udt4484lv.1.2 bus2=p4udm11683.1.2 switch=n enabled=y phases=2 Linecode=1P_UG_AL_4/0_Sweetbriar_0_416_0_2_2_2_2

New Line.l(r:p4udt4486lv-p4ulv4922) Units=km Length=0.0175396 bus1=p4udt4486lv.1.2 bus2=p4ulv4922.1.2 switch=n enabled=y phases=2 Linecode=1P_UG_AL_1/0_Brenau_0_416_0_2_2_2_2

New Line.l(r:p4udt4843lv-p4ulv5361) Units=km Length=0.0276447 bus1=p4udt4843lv.1.2 bus2=p4ulv5361.1.2 switch=n enabled=y phases=2 Linecode=1P_UG_AL_1/0_Brenau_0_416_0_2_2_2_2

New Line.l(r:p4udt4843lv-p4ulv16968) Units=km Length=0.0259547 bus1=p4udt4843lv.1.2 bus2=p4ulv16968.1.2 switch=n enabled=y phases=2 Linecode=1P_UG_AL_1/0_Brenau_0_416_0_2_2_2_2

New Line.l(r:p4udt4843lv-p4ulv36820) Units=km Length=0.0437434 bus1=p4udt4843lv.1.2 bus2=p4ulv36820.1.2 switch=n enabled=y phases=2 Linecode=1P_UG_AL_1/0_Brenau_0_416_0_2_2_2_2

New Line.l(r:p4udt4848lv-p4ulv5366) Units=km Length=0.0343385 bus1=p4udt4848lv.1.2 bus2=p4ulv5366.1.2 switch=n enabled=y phases=2 Linecode=1P_OH_AL_4/0_Zuzara_0_416_0_2_2_2_2

New Line.l(r:p4udt4848lv-p4ulv8323) Units=km Length=0.0217054 bus1=p4udt4848lv.1.2 bus2=p4ulv8323.1.2 switch=n enabled=y phases=2 Linecode=1P_OH_AL_2/0_Rucina_0_416_0_2_2_2_2

New Line.l(r:p4udt5196lv-p4ulv5807) Units=km Length=0.0178664 bus1=p4udt5196lv.1.2 bus2=p4ulv5807.1.2 switch=n enabled=y phases=2 Linecode=1P_OH_AL_2/0_Rucina_0_416_0_2_2_2_2

New Line.l(r:p4udt5196lv-p4ulv8319) Units=km Length=0.0149012 bus1=p4udt5196lv.1.2 bus2=p4ulv8319.1.2 switch=n enabled=y phases=2 Linecode=1P_OH_AL_2/0_Rucina_0_416_0_2_2_2_2

New Line.l(r:p4udm13461-p4ulv14354) Units=km Length=0.0138481 bus1=p4udm13461.1.2 bus2=p4ulv14354.1.2 switch=n enabled=y phases=2 Linecode=1P_OH_AL_2/0_Rucina_0_416_0_2_2_2_2

New Line.l(r:p4udm13461-p4udt5196lv) Units=km Length=0.0161365 bus1=p4udt5196lv.1.2 bus2=p4udm13461.1.2 switch=n enabled=y phases=2 Linecode=1P_OH_AL_2/0_Rucina_0_416_0_2_2_2_2

New Line.l(r:p4udt5198lv-p4ulv5810) Units=km Length=0.01881 bus1=p4udt5198lv.1.2 bus2=p4ulv5810.1.2 switch=n enabled=y phases=2 Linecode=1P_OH_AL_2/0_Rucina_0_416_0_2_2_2_2

New Line.l(r:p4udt5525lv-p4ulv6218) Units=km Length=0.018176 bus1=p4udt5525lv.1.2 bus2=p4ulv6218.1.2 switch=n enabled=y phases=2 Linecode=1P_UG_AL_1/0_Brenau_0_416_0_2_2_2_2

New Line.l(r:p4udm14221-p4ulv17831) Units=km Length=0.0198046 bus1=p4udm14221.1.2 bus2=p4ulv17831.1.2 switch=n enabled=y phases=2 Linecode=1P_UG_AL_1/0_Brenau_0_416_0_2_2_2_2

New Line.l(r:p4udm14221-p4ulv33441) Units=km Length=0.0171527 bus1=p4udm14221.1.2 bus2=p4ulv33441.1.2 switch=n enabled=y phases=2 Linecode=1P_UG_AL_1/0_Brenau_0_416_0_2_2_2_2

New Line.l(r:p4udm14221-p4udt5525lv) Units=km Length=0.0195431 bus1=p4udt5525lv.1.2 bus2=p4udm14221.1.2 switch=n enabled=y phases=2 Linecode=1P_UG_AL_4/0_Sweetbriar_0_416_0_2_2_2_2

New Line.l(r:p4udm14223-p4ulv29219) Units=km Length=0.017511300000000004 bus1=p4udm14223.1.2 bus2=p4ulv29219.1.2 switch=n enabled=y phases=2 Linecode=1P_UG_AL_1/0_Brenau_0_416_0_2_2_2_2

New Line.l(r:p4udm14222-p4ulv26661) Units=km Length=0.0125726 bus1=p4udm14222.1.2 bus2=p4ulv26661.1.2 switch=n enabled=y phases=2 Linecode=1P_UG_AL_1/0_Brenau_0_416_0_2_2_2_2

New Line.l(r:p4udm14222-p4udm14223) Units=km Length=0.0192595 bus1=p4udm14223.1.2 bus2=p4udm14222.1.2 switch=n enabled=y phases=2 Linecode=1P_UG_AL_1/0_Brenau_0_416_0_2_2_2_2

New Line.l(r:p4udm14223-p4udt5525lv) Units=km Length=0.00977131 bus1=p4udt5525lv.1.2 bus2=p4udm14223.1.2 switch=n enabled=y phases=2 Linecode=1P_UG_AL_4/0_Sweetbriar_0_416_0_2_2_2_2

New Line.l(r:p4udt5526lv-p4ulv6219) Units=km Length=0.0257757 bus1=p4udt5526lv.1.2 bus2=p4ulv6219.1.2 switch=n enabled=y phases=2 Linecode=1P_UG_AL_1/0_Brenau_0_416_0_2_2_2_2

New Line.l(r:p4udt5526lv-p4ulv15645) Units=km Length=0.022847800000000005 bus1=p4udt5526lv.1.2 bus2=p4ulv15645.1.2 switch=n enabled=y phases=2 Linecode=1P_UG_AL_1/0_Brenau_0_416_0_2_2_2_2

New Line.l(r:p4udt5526lv-p4ulv22536) Units=km Length=0.0301684 bus1=p4udt5526lv.1.2 bus2=p4ulv22536.1.2 switch=n enabled=y phases=2 Linecode=1P_UG_AL_1/0_Brenau_0_416_0_2_2_2_2

New Line.l(r:p4udt5527lv-p4ulv6220) Units=km Length=0.024221 bus1=p4udt5527lv.1.2 bus2=p4ulv6220.1.2 switch=n enabled=y phases=2 Linecode=1P_OH_AL_2/0_Rucina_0_416_0_2_2_2_2

New Line.l(r:p4udt5852lv-p4ulv15643) Units=km Length=0.018442400000000005 bus1=p4udt5852lv.1.2 bus2=p4ulv15643.1.2 switch=n enabled=y phases=2 Linecode=1P_UG_AL_1/0_Brenau_0_416_0_2_2_2_2

New Line.l(r:p4udm15014-p4ulv6628) Units=km Length=0.0183061 bus1=p4udm15014.1.2 bus2=p4ulv6628.1.2 switch=n enabled=y phases=2 Linecode=1P_OH_AL_2/0_Rucina_0_416_0_2_2_2_2

New Line.l(r:p4udm15014-p4udt5852lv) Units=km Length=0.0319858 bus1=p4udt5852lv.1.2 bus2=p4udm15014.1.2 switch=n enabled=y phases=2 Linecode=1P_OH_AL_4/0_Zuzara_0_416_0_2_2_2_2

New Line.l(r:p4udt6470lv-p4ulv7454) Units=km Length=0.0143734 bus1=p4udt6470lv.1.2 bus2=p4ulv7454.1.2 switch=n enabled=y phases=2 Linecode=1P_UG_AL_1/0_Brenau_0_416_0_2_2_2_2

New Line.l(r:p4udt6470lv-p4ulv13473) Units=km Length=0.0181446 bus1=p4udt6470lv.1.2 bus2=p4ulv13473.1.2 switch=n enabled=y phases=2 Linecode=1P_UG_AL_2/0_Converse_0_416_0_2_2_2_2

New Line.l(r:p4udt6793lv-p4ulv7881) Units=km Length=0.014909100000000002 bus1=p4udt6793lv.1.2 bus2=p4ulv7881.1.2 switch=n enabled=y phases=2 Linecode=1P_UG_AL_1/0_Brenau_0_416_0_2_2_2_2

New Line.l(r:p4udt6793lv-p4ulv39326) Units=km Length=0.0175061 bus1=p4udt6793lv.1.2 bus2=p4ulv39326.1.2 switch=n enabled=y phases=2 Linecode=1P_UG_AL_1/0_Brenau_0_416_0_2_2_2_2

New Line.l(r:p4udm17183-p4ulv10432) Units=km Length=0.014680400000000001 bus1=p4udm17183.1.2 bus2=p4ulv10432.1.2 switch=n enabled=y phases=2 Linecode=1P_UG_AL_1/0_Brenau_0_416_0_2_2_2_2

New Line.l(r:p4udm17183-p4udt6793lv) Units=km Length=0.0183476 bus1=p4udt6793lv.1.2 bus2=p4udm17183.1.2 switch=n enabled=y phases=2 Linecode=1P_UG_AL_1/0_Brenau_0_416_0_2_2_2_2

New Line.l(r:p4udm17184-p4ulv10850) Units=km Length=0.020107500000000004 bus1=p4udm17184.1.2 bus2=p4ulv10850.1.2 switch=n enabled=y phases=2 Linecode=1P_UG_AL_1/0_Brenau_0_416_0_2_2_2_2

New Line.l(r:p4udm17184-p4udt6793lv) Units=km Length=0.00918452 bus1=p4udt6793lv.1.2 bus2=p4udm17184.1.2 switch=n enabled=y phases=2 Linecode=1P_UG_AL_1/0_Brenau_0_416_0_2_2_2_2

New Line.l(r:p4udt6794lv-p4ulv7882) Units=km Length=0.0213263 bus1=p4udt6794lv.1.2 bus2=p4ulv7882.1.2 switch=n enabled=y phases=2 Linecode=1P_UG_AL_1/0_Brenau_0_416_0_2_2_2_2

New Line.l(r:p4udt6794lv-p4ulv11287) Units=km Length=0.0223256 bus1=p4udt6794lv.1.2 bus2=p4ulv11287.1.2 switch=n enabled=y phases=2 Linecode=1P_UG_AL_1/0_Brenau_0_416_0_2_2_2_2

New Line.l(r:p4udt6794lv-p4ulv35993) Units=km Length=0.02117 bus1=p4udt6794lv.1.2 bus2=p4ulv35993.1.2 switch=n enabled=y phases=2 Linecode=1P_UG_AL_2/0_Converse_0_416_0_2_2_2_2

New Line.l(r:p4udm17189-p4ulv7884) Units=km Length=0.018488 bus1=p4udm17189.1.2 bus2=p4ulv7884.1.2 switch=n enabled=y phases=2 Linecode=1P_OH_AL_2/0_Rucina_0_416_0_2_2_2_2

New Line.l(r:p4udm17189-p4udt6795lv) Units=km Length=0.080792 bus1=p4udt6795lv.1.2 bus2=p4udm17189.1.2 switch=n enabled=y phases=2 Linecode=1P_OH_AL_4/0_Zuzara_0_416_0_2_2_2_2

New Line.l(r:p4udm17190-p4ulv17834) Units=km Length=0.020474100000000002 bus1=p4udm17190.1.2 bus2=p4ulv17834.1.2 switch=n enabled=y phases=2 Linecode=1P_UG_AL_4/0_Sweetbriar_0_416_0_2_2_2_2

New Line.l(r:p4udm17190-p4udt6795lv) Units=km Length=0.017729 bus1=p4udt6795lv.1.2 bus2=p4udm17190.1.2 switch=n enabled=y phases=2 Linecode=1P_UG_AL_4/0_Sweetbriar_0_416_0_2_2_2_2

New Line.l(r:p4udt7428lv-p4ulv15642) Units=km Length=0.0231941 bus1=p4udt7428lv.1.2 bus2=p4ulv15642.1.2 switch=n enabled=y phases=2 Linecode=1P_OH_AL_2/0_Rucina_0_416_0_2_2_2_2

New Line.l(r:p4udt7428lv-p4ulv30087) Units=km Length=0.0163225 bus1=p4udt7428lv.1.2 bus2=p4ulv30087.1.2 switch=n enabled=y phases=2 Linecode=1P_OH_AL_2/0_Rucina_0_416_0_2_2_2_2

New Line.l(r:p4udm18621-p4ulv8746) Units=km Length=0.021824800000000002 bus1=p4udm18621.1.2 bus2=p4ulv8746.1.2 switch=n enabled=y phases=2 Linecode=1P_OH_AL_2/0_Rucina_0_416_0_2_2_2_2

New Line.l(r:p4udm18621-p4udt7428lv) Units=km Length=0.0370067 bus1=p4udt7428lv.1.2 bus2=p4udm18621.1.2 switch=n enabled=y phases=2 Linecode=1P_OH_AL_4/0_Zuzara_0_416_0_2_2_2_2

New Line.l(r:p4udt8016lv-p4ulv9587) Units=km Length=0.014495 bus1=p4udt8016lv.1.2 bus2=p4ulv9587.1.2 switch=n enabled=y phases=2 Linecode=1P_OH_AL_2/0_Rucina_0_416_0_2_2_2_2

New Line.l(r:p4udt8017lv-p4ulv14355) Units=km Length=0.0175467 bus1=p4udt8017lv.1.2 bus2=p4ulv14355.1.2 switch=n enabled=y phases=2 Linecode=1P_UG_AL_1/0_Brenau_0_416_0_2_2_2_2

New Line.l(r:p4udt8017lv-p4ulv20369) Units=km Length=0.0151171 bus1=p4udt8017lv.1.2 bus2=p4ulv20369.1.2 switch=n enabled=y phases=2 Linecode=1P_UG_AL_1/0_Brenau_0_416_0_2_2_2_2

New Line.l(r:p4udm19881-p4ulv9588) Units=km Length=0.0190434 bus1=p4udm19881.1.2 bus2=p4ulv9588.1.2 switch=n enabled=y phases=2 Linecode=1P_OH_AL_2/0_Rucina_0_416_0_2_2_2_2

New Line.l(r:p4udm19881-p4udt8017lv) Units=km Length=0.0326178 bus1=p4udt8017lv.1.2 bus2=p4udm19881.1.2 switch=n enabled=y phases=2 Linecode=1P_OH_AL_4/0_Zuzara_0_416_0_2_2_2_2

New Line.l(r:p4udm19885-p4ulv41832) Units=km Length=0.012496 bus1=p4udm19885.1.2 bus2=p4ulv41832.1.2 switch=n enabled=y phases=2 Linecode=1P_UG_AL_1/0_Brenau_0_416_0_2_2_2_2

New Line.l(r:p4udm19882-p4ulv11288) Units=km Length=0.0131409 bus1=p4udm19882.1.2 bus2=p4ulv11288.1.2 switch=n enabled=y phases=2 Linecode=1P_UG_AL_1/0_Brenau_0_416_0_2_2_2_2

New Line.l(r:p4udm19882-p4udm19885) Units=km Length=0.008601810000000001 bus1=p4udm19885.1.2 bus2=p4udm19882.1.2 switch=n enabled=y phases=2 Linecode=1P_UG_AL_1/0_Brenau_0_416_0_2_2_2_2

New Line.l(r:p4udm19885-p4udt8017lv) Units=km Length=0.0173546 bus1=p4udt8017lv.1.2 bus2=p4udm19885.1.2 switch=n enabled=y phases=2 Linecode=1P_UG_AL_2/0_Converse_0_416_0_2_2_2_2

New Line.l(r:p4udt8310lv-p4ulv10010) Units=km Length=0.021703 bus1=p4udt8310lv.1.2 bus2=p4ulv10010.1.2 switch=n enabled=y phases=2 Linecode=1P_OH_AL_2/0_Rucina_0_416_0_2_2_2_2

New Line.l(r:p4udm21130-p4ulv36412) Units=km Length=0.016466500000000002 bus1=p4udm21130.1.2 bus2=p4ulv36412.1.2 switch=n enabled=y phases=2 Linecode=1P_OH_AL_2/0_Rucina_0_416_0_2_2_2_2

New Line.l(r:p4udm21130-p4udt8599lv) Units=km Length=0.0452923 bus1=p4udt8599lv.1.2 bus2=p4udm21130.1.2 switch=n enabled=y phases=2 Linecode=1P_OH_AL_4/0_Zuzara_0_416_0_2_2_2_2

New Line.l(r:p4udm21131-p4ulv38527) Units=km Length=0.014484 bus1=p4udm21131.1.2 bus2=p4ulv38527.1.2 switch=n enabled=y phases=2 Linecode=1P_UG_AL_1/0_Brenau_0_416_0_2_2_2_2

New Line.l(r:p4udm21129-p4ulv10433) Units=km Length=0.014771 bus1=p4udm21129.1.2 bus2=p4ulv10433.1.2 switch=n enabled=y phases=2 Linecode=1P_UG_AL_1/0_Brenau_0_416_0_2_2_2_2

New Line.l(r:p4udm21129-p4udm21131) Units=km Length=0.0097718 bus1=p4udm21131.1.2 bus2=p4udm21129.1.2 switch=n enabled=y phases=2 Linecode=1P_UG_AL_1/0_Brenau_0_416_0_2_2_2_2

New Line.l(r:p4udm21131-p4udt8599lv) Units=km Length=0.0195431 bus1=p4udt8599lv.1.2 bus2=p4udm21131.1.2 switch=n enabled=y phases=2 Linecode=1P_UG_AL_4/0_Sweetbriar_0_416_0_2_2_2_2

New Line.l(r:p4udm21709-p4ulv10851) Units=km Length=0.0293422 bus1=p4udm21709.1.2 bus2=p4ulv10851.1.2 switch=n enabled=y phases=2 Linecode=1P_OH_AL_4/0_Zuzara_0_416_0_2_2_2_2

New Line.l(r:p4udm21709-p4udt8880lv) Units=km Length=0.0242793 bus1=p4udt8880lv.1.2 bus2=p4udm21709.1.2 switch=n enabled=y phases=2 Linecode=1P_OH_AL_2/0_Rucina_0_416_0_2_2_2_2

New Line.l(r:p4udm21710-p4ulv34751) Units=km Length=0.0267555 bus1=p4udm21710.1.2 bus2=p4ulv34751.1.2 switch=n enabled=y phases=2 Linecode=1P_OH_AL_2/0_Rucina_0_416_0_2_2_2_2

New Line.l(r:p4udm21710-p4udt8880lv) Units=km Length=0.012275 bus1=p4udt8880lv.1.2 bus2=p4udm21710.1.2 switch=n enabled=y phases=2 Linecode=1P_OH_AL_2/0_Rucina_0_416_0_2_2_2_2

New Line.l(r:p4udm22303-p4ulv11285) Units=km Length=0.0169872 bus1=p4udm22303.1.2 bus2=p4ulv11285.1.2 switch=n enabled=y phases=2 Linecode=1P_UG_AL_1/0_Brenau_0_416_0_2_2_2_2

New Line.l(r:p4udm22303-p4udt9158lv) Units=km Length=0.0451365 bus1=p4udt9158lv.1.2 bus2=p4udm22303.1.2 switch=n enabled=y phases=2 Linecode=1P_UG_AL_1/0_Brenau_0_416_0_2_2_2_2

New Line.l(r:p4udm22304-p4ulv14767) Units=km Length=0.0268144 bus1=p4udm22304.1.2 bus2=p4ulv14767.1.2 switch=n enabled=y phases=2 Linecode=1P_UG_AL_1/0_Brenau_0_416_0_2_2_2_2

New Line.l(r:p4udm22305-p4ulv43962) Units=km Length=0.013555600000000001 bus1=p4udm22305.1.2 bus2=p4ulv43962.1.2 switch=n enabled=y phases=2 Linecode=1P_UG_AL_1/0_Brenau_0_416_0_2_2_2_2

New Line.l(r:p4udm22304-p4udm22305) Units=km Length=0.00913657 bus1=p4udm22304.1.2 bus2=p4udm22305.1.2 switch=n enabled=y phases=2 Linecode=1P_UG_AL_1/0_Brenau_0_416_0_2_2_2_2

New Line.l(r:p4udm22304-p4udt9158lv) Units=km Length=0.0177 bus1=p4udt9158lv.1.2 bus2=p4udm22304.1.2 switch=n enabled=y phases=2 Linecode=1P_UG_AL_4/0_Sweetbriar_0_416_0_2_2_2_2

New Line.l(r:p4udt9442lv-p4ulv11729) Units=km Length=0.019801600000000003 bus1=p4udt9442lv.1.2 bus2=p4ulv11729.1.2 switch=n enabled=y phases=2 Linecode=1P_UG_AL_1/0_Brenau_0_416_0_2_2_2_2

New Line.l(r:p4udt9443lv-p4ulv43532) Units=km Length=0.0149138 bus1=p4udt9443lv.1.2 bus2=p4ulv43532.1.2 switch=n enabled=y phases=2 Linecode=1P_UG_AL_1/0_Brenau_0_416_0_2_2_2_2

New Line.l(r:p4udm22883-p4ulv11730) Units=km Length=0.0175907 bus1=p4udm22883.1.2 bus2=p4ulv11730.1.2 switch=n enabled=y phases=2 Linecode=1P_UG_AL_1/0_Brenau_0_416_0_2_2_2_2

New Line.l(r:p4udm22883-p4udt9443lv) Units=km Length=0.00988454 bus1=p4udt9443lv.1.2 bus2=p4udm22883.1.2 switch=n enabled=y phases=2 Linecode=1P_UG_AL_1/0_Brenau_0_416_0_2_2_2_2

New Line.l(r:p4udm22884-p4ulv18673) Units=km Length=0.0148792 bus1=p4udm22884.1.2 bus2=p4ulv18673.1.2 switch=n enabled=y phases=2 Linecode=1P_UG_AL_1/0_Brenau_0_416_0_2_2_2_2

New Line.l(r:p4udm22884-p4udt9443lv) Units=km Length=0.00917772 bus1=p4udt9443lv.1.2 bus2=p4udm22884.1.2 switch=n enabled=y phases=2 Linecode=1P_UG_AL_1/0_Brenau_0_416_0_2_2_2_2

New Line.l(r:p4udm24022-p4ulv12599) Units=km Length=0.027658600000000002 bus1=p4udm24022.1.2 bus2=p4ulv12599.1.2 switch=n enabled=y phases=2 Linecode=1P_UG_AL_1/0_Brenau_0_416_0_2_2_2_2

New Line.l(r:p4udm24022-p4udt10001lv) Units=km Length=0.00924808 bus1=p4udt10001lv.1.2 bus2=p4udm24022.1.2 switch=n enabled=y phases=2 Linecode=1P_UG_AL_1/0_Brenau_0_416_0_2_2_2_2

New Line.l(r:p4udm24023-p4ulv21677) Units=km Length=0.0158423 bus1=p4udm24023.1.2 bus2=p4ulv21677.1.2 switch=n enabled=y phases=2 Linecode=1P_UG_AL_1/0_Brenau_0_416_0_2_2_2_2

New Line.l(r:p4udm24023-p4udt10001lv) Units=km Length=0.00923513 bus1=p4udt10001lv.1.2 bus2=p4udm24023.1.2 switch=n enabled=y phases=2 Linecode=1P_UG_AL_1/0_Brenau_0_416_0_2_2_2_2

New Line.l(r:p4udt10283lv-p4ulv13048) Units=km Length=0.0165644 bus1=p4udt10283lv.1.2 bus2=p4ulv13048.1.2 switch=n enabled=y phases=2 Linecode=1P_UG_AL_1/0_Brenau_0_416_0_2_2_2_2

New Line.l(r:p4udt10283lv-p4ulv35160) Units=km Length=0.0149255 bus1=p4udt10283lv.1.2 bus2=p4ulv35160.1.2 switch=n enabled=y phases=2 Linecode=1P_UG_AL_1/0_Brenau_0_416_0_2_2_2_2

New Line.l(r:p4udt10284lv-p4ulv13049) Units=km Length=0.0173924 bus1=p4udt10284lv.1.2 bus2=p4ulv13049.1.2 switch=n enabled=y phases=2 Linecode=1P_UG_AL_1/0_Brenau_0_416_0_2_2_2_2

New Line.l(r:p4udm24566-p4ulv16531) Units=km Length=0.0114602 bus1=p4udm24566.1.2 bus2=p4ulv16531.1.2 switch=n enabled=y phases=2 Linecode=1P_UG_AL_1/0_Brenau_0_416_0_2_2_2_2

New Line.l(r:p4udm24566-p4udt10284lv) Units=km Length=0.00650083 bus1=p4udt10284lv.1.2 bus2=p4udm24566.1.2 switch=n enabled=y phases=2 Linecode=1P_UG_AL_1/0_Brenau_0_416_0_2_2_2_2

New Line.l(r:p4udm24567-p4ulv43968) Units=km Length=0.0163571 bus1=p4udm24567.1.2 bus2=p4ulv43968.1.2 switch=n enabled=y phases=2 Linecode=1P_UG_AL_1/0_Brenau_0_416_0_2_2_2_2

New Line.l(r:p4udm24567-p4udt10284lv) Units=km Length=0.00694882 bus1=p4udt10284lv.1.2 bus2=p4udm24567.1.2 switch=n enabled=y phases=2 Linecode=1P_UG_AL_1/0_Brenau_0_416_0_2_2_2_2

New Line.l(r:p4udt10541lv-p4ulv13467) Units=km Length=0.0279547 bus1=p4udt10541lv.1.2 bus2=p4ulv13467.1.2 switch=n enabled=y phases=2 Linecode=1P_UG_AL_1/0_Brenau_0_416_0_2_2_2_2

New Line.l(r:p4udm25057-p4ulv13472) Units=km Length=0.018097600000000002 bus1=p4udm25057.1.2 bus2=p4ulv13472.1.2 switch=n enabled=y phases=2 Linecode=1P_UG_AL_1/0_Brenau_0_416_0_2_2_2_2

New Line.l(r:p4udm25057-p4ulv39325) Units=km Length=0.017683 bus1=p4udm25057.1.2 bus2=p4ulv39325.1.2 switch=n enabled=y phases=2 Linecode=1P_UG_AL_1/0_Brenau_0_416_0_2_2_2_2

New Line.l(r:p4udm25057-p4udt10544lv) Units=km Length=0.00909792 bus1=p4udt10544lv.1.2 bus2=p4udm25057.1.2 switch=n enabled=y phases=2 Linecode=1P_UG_AL_4/0_Sweetbriar_0_416_0_2_2_2_2

New Line.l(r:p4udm25058-p4ulv18247) Units=km Length=0.0146139 bus1=p4udm25058.1.2 bus2=p4ulv18247.1.2 switch=n enabled=y phases=2 Linecode=1P_UG_AL_1/0_Brenau_0_416_0_2_2_2_2

New Line.l(r:p4udm25058-p4udt10544lv) Units=km Length=0.0181863 bus1=p4udt10544lv.1.2 bus2=p4udm25058.1.2 switch=n enabled=y phases=2 Linecode=1P_UG_AL_1/0_Brenau_0_416_0_2_2_2_2

New Line.l(r:p4udm25060-p4ulv13474) Units=km Length=0.017279200000000005 bus1=p4udm25060.1.2 bus2=p4ulv13474.1.2 switch=n enabled=y phases=2 Linecode=1P_UG_AL_1/0_Brenau_0_416_0_2_2_2_2

New Line.l(r:p4udm25062-p4ulv27537) Units=km Length=0.0166144 bus1=p4udm25062.1.2 bus2=p4ulv27537.1.2 switch=n enabled=y phases=2 Linecode=1P_UG_AL_1/0_Brenau_0_416_0_2_2_2_2

New Line.l(r:p4udm25060-p4udm25062) Units=km Length=0.008479160000000001 bus1=p4udm25060.1.2 bus2=p4udm25062.1.2 switch=n enabled=y phases=2 Linecode=1P_UG_AL_1/0_Brenau_0_416_0_2_2_2_2

New Line.l(r:p4udm25060-p4udt10545lv) Units=km Length=0.0238049 bus1=p4udt10545lv.1.2 bus2=p4udm25060.1.2 switch=n enabled=y phases=2 Linecode=1P_UG_AL_4/0_Sweetbriar_0_416_0_2_2_2_2

New Line.l(r:p4udm25061-p4ulv18250) Units=km Length=0.0168175 bus1=p4udm25061.1.2 bus2=p4ulv18250.1.2 switch=n enabled=y phases=2 Linecode=1P_UG_AL_1/0_Brenau_0_416_0_2_2_2_2

New Line.l(r:p4udm25061-p4ulv33025) Units=km Length=0.0132034 bus1=p4udm25061.1.2 bus2=p4ulv33025.1.2 switch=n enabled=y phases=2 Linecode=1P_UG_AL_1/0_Brenau_0_416_0_2_2_2_2

New Line.l(r:p4udm25064-p4ulv37664) Units=km Length=0.0232913 bus1=p4udm25064.1.2 bus2=p4ulv37664.1.2 switch=n enabled=y phases=2 Linecode=1P_UG_AL_1/0_Brenau_0_416_0_2_2_2_2

New Line.l(r:p4udm25061-p4udm25064) Units=km Length=0.013236 bus1=p4udm25061.1.2 bus2=p4udm25064.1.2 switch=n enabled=y phases=2 Linecode=1P_UG_AL_1/0_Brenau_0_416_0_2_2_2_2

New Line.l(r:p4udm25061-p4udt10545lv) Units=km Length=0.024208900000000002 bus1=p4udt10545lv.1.2 bus2=p4udm25061.1.2 switch=n enabled=y phases=2 Linecode=1P_UG_AL_4/0_Sweetbriar_0_416_0_2_2_2_2

New Line.l(r:p4udt11091lv-p4ulv14356) Units=km Length=0.0218252 bus1=p4udt11091lv.1.2 bus2=p4ulv14356.1.2 switch=n enabled=y phases=2 Linecode=1P_UG_AL_1/0_Brenau_0_416_0_2_2_2_2

New Line.l(r:p4udm26091-p4ulv19493) Units=km Length=0.0168019 bus1=p4udm26091.1.2 bus2=p4ulv19493.1.2 switch=n enabled=y phases=2 Linecode=1P_UG_AL_1/0_Brenau_0_416_0_2_2_2_2

New Line.l(r:p4udm26094-p4ulv33901) Units=km Length=0.0168557 bus1=p4udm26094.1.2 bus2=p4ulv33901.1.2 switch=n enabled=y phases=2 Linecode=1P_UG_AL_1/0_Brenau_0_416_0_2_2_2_2

New Line.l(r:p4udm26091-p4udm26094) Units=km Length=0.0199042 bus1=p4udm26091.1.2 bus2=p4udm26094.1.2 switch=n enabled=y phases=2 Linecode=1P_UG_AL_1/0_Brenau_0_416_0_2_2_2_2

New Line.l(r:p4udm26091-p4udt11091lv) Units=km Length=0.00940176 bus1=p4udt11091lv.1.2 bus2=p4udm26091.1.2 switch=n enabled=y phases=2 Linecode=1P_UG_AL_4/0_Sweetbriar_0_416_0_2_2_2_2

New Line.l(r:p4udm26092-p4ulv25817) Units=km Length=0.0164051 bus1=p4udm26092.1.2 bus2=p4ulv25817.1.2 switch=n enabled=y phases=2 Linecode=1P_UG_AL_1/0_Brenau_0_416_0_2_2_2_2

New Line.l(r:p4udm26092-p4ulv32193) Units=km Length=0.0188454 bus1=p4udm26092.1.2 bus2=p4ulv32193.1.2 switch=n enabled=y phases=2 Linecode=1P_UG_AL_1/0_Brenau_0_416_0_2_2_2_2

New Line.l(r:p4udm26092-p4udt11091lv) Units=km Length=0.0188035 bus1=p4udt11091lv.1.2 bus2=p4udm26092.1.2 switch=n enabled=y phases=2 Linecode=1P_UG_AL_4/0_Sweetbriar_0_416_0_2_2_2_2

New Line.l(r:p4udt11345lv-p4ulv14771) Units=km Length=0.0244866 bus1=p4udt11345lv.1.2 bus2=p4ulv14771.1.2 switch=n enabled=y phases=2 Linecode=1P_UG_AL_1/0_Brenau_0_416_0_2_2_2_2

New Line.l(r:p4udt11604lv-p4ulv15223) Units=km Length=0.0246073 bus1=p4udt11604lv.1.2 bus2=p4ulv15223.1.2 switch=n enabled=y phases=2 Linecode=1P_OH_AL_2/0_Rucina_0_416_0_2_2_2_2

New Line.l(r:p4udt11604lv-p4ulv19085) Units=km Length=0.0152637 bus1=p4udt11604lv.1.2 bus2=p4ulv19085.1.2 switch=n enabled=y phases=2 Linecode=1P_OH_AL_2/0_Rucina_0_416_0_2_2_2_2

New Line.l(r:p4udm27059-p4ulv22533) Units=km Length=0.0148294 bus1=p4udm27059.1.2 bus2=p4ulv22533.1.2 switch=n enabled=y phases=2 Linecode=1P_OH_AL_2/0_Rucina_0_416_0_2_2_2_2

New Line.l(r:p4udm27059-p4udt11604lv) Units=km Length=0.018559 bus1=p4udt11604lv.1.2 bus2=p4udm27059.1.2 switch=n enabled=y phases=2 Linecode=1P_OH_AL_2/0_Rucina_0_416_0_2_2_2_2

New Line.l(r:p4udt11606lv-p4ulv15225) Units=km Length=0.0251699 bus1=p4udt11606lv.1.2 bus2=p4ulv15225.1.2 switch=n enabled=y phases=2 Linecode=1P_UG_AL_1/0_Brenau_0_416_0_2_2_2_2

New Line.l(r:p4udt11606lv-p4ulv24958) Units=km Length=0.0240542 bus1=p4udt11606lv.1.2 bus2=p4ulv24958.1.2 switch=n enabled=y phases=2 Linecode=1P_UG_AL_1/0_Brenau_0_416_0_2_2_2_2

New Line.l(r:p4udt11606lv-p4ulv26660) Units=km Length=0.0257217 bus1=p4udt11606lv.1.2 bus2=p4ulv26660.1.2 switch=n enabled=y phases=2 Linecode=1P_UG_AL_4/0_Sweetbriar_0_416_0_2_2_2_2

New Line.l(r:p4udm27065-p4ulv24568) Units=km Length=0.0164677 bus1=p4udm27065.1.2 bus2=p4ulv24568.1.2 switch=n enabled=y phases=2 Linecode=1P_UG_AL_1/0_Brenau_0_416_0_2_2_2_2

New Line.l(r:p4udm27065-p4udt11606lv) Units=km Length=0.0505562 bus1=p4udt11606lv.1.2 bus2=p4udm27065.1.2 switch=n enabled=y phases=2 Linecode=1P_UG_AL_1/0_Brenau_0_416_0_2_2_2_2

New Line.l(r:p4udt11607lv-p4ulv34752) Units=km Length=0.0463646 bus1=p4udt11607lv.1.2 bus2=p4ulv34752.1.2 switch=n enabled=y phases=2 Linecode=1P_OH_AL_4/0_Zuzara_0_416_0_2_2_2_2

New Line.l(r:p4udt11607lv-p4ulv39749) Units=km Length=0.0236904 bus1=p4udt11607lv.1.2 bus2=p4ulv39749.1.2 switch=n enabled=y phases=2 Linecode=1P_OH_AL_2/0_Rucina_0_416_0_2_2_2_2

New Line.l(r:p4udm27068-p4ulv15226) Units=km Length=0.0223648 bus1=p4udm27068.1.2 bus2=p4ulv15226.1.2 switch=n enabled=y phases=2 Linecode=1P_OH_AL_2/0_Rucina_0_416_0_2_2_2_2

New Line.l(r:p4udm27068-p4udt11607lv) Units=km Length=0.0164108 bus1=p4udt11607lv.1.2 bus2=p4udm27068.1.2 switch=n enabled=y phases=2 Linecode=1P_OH_AL_2/0_Rucina_0_416_0_2_2_2_2

New Line.l(r:p4udt11851lv-p4ulv20838) Units=km Length=0.013816500000000002 bus1=p4udt11851lv.1.2 bus2=p4ulv20838.1.2 switch=n enabled=y phases=2 Linecode=1P_UG_AL_1/0_Brenau_0_416_0_2_2_2_2

New Line.l(r:p4udm27521-p4ulv15644) Units=km Length=0.0190721 bus1=p4udm27521.1.2 bus2=p4ulv15644.1.2 switch=n enabled=y phases=2 Linecode=1P_UG_AL_1/0_Brenau_0_416_0_2_2_2_2

New Line.l(r:p4udm27521-p4udt11851lv) Units=km Length=0.00917039 bus1=p4udt11851lv.1.2 bus2=p4udm27521.1.2 switch=n enabled=y phases=2 Linecode=1P_UG_AL_1/0_Brenau_0_416_0_2_2_2_2

New Line.l(r:p4udt12367lv-p4ulv16530) Units=km Length=0.023479 bus1=p4udt12367lv.1.2 bus2=p4ulv16530.1.2 switch=n enabled=y phases=2 Linecode=1P_OH_AL_2/0_Rucina_0_416_0_2_2_2_2

New Line.l(r:p4udt13062lv-p4ulv17830) Units=km Length=0.0212231 bus1=p4udt13062lv.1.2 bus2=p4ulv17830.1.2 switch=n enabled=y phases=2 Linecode=1P_OH_AL_2/0_Rucina_0_416_0_2_2_2_2

New Line.l(r:p4udt13063lv-p4ulv17833) Units=km Length=0.023934 bus1=p4udt13063lv.1.2 bus2=p4ulv17833.1.2 switch=n enabled=y phases=2 Linecode=1P_UG_AL_1/0_Brenau_0_416_0_2_2_2_2

New Line.l(r:p4udt13063lv-p4ulv29675) Units=km Length=0.0250802 bus1=p4udt13063lv.1.2 bus2=p4ulv29675.1.2 switch=n enabled=y phases=2 Linecode=1P_UG_AL_1/0_Brenau_0_416_0_2_2_2_2

New Line.l(r:p4udt13063lv-p4ulv32609) Units=km Length=0.0288659 bus1=p4udt13063lv.1.2 bus2=p4ulv32609.1.2 switch=n enabled=y phases=2 Linecode=1P_UG_AL_1/0_Brenau_0_416_0_2_2_2_2

New Line.l(r:p4udt13063lv-p4ulv36413) Units=km Length=0.021649600000000005 bus1=p4udt13063lv.1.2 bus2=p4ulv36413.1.2 switch=n enabled=y phases=2 Linecode=1P_UG_AL_1/0_Brenau_0_416_0_2_2_2_2

New Line.l(r:p4udm29637-p4ulv17832) Units=km Length=0.018055900000000003 bus1=p4udm29637.1.2 bus2=p4ulv17832.1.2 switch=n enabled=y phases=2 Linecode=1P_UG_AL_1/0_Brenau_0_416_0_2_2_2_2

New Line.l(r:p4udm29637-p4udt13063lv) Units=km Length=0.0184962 bus1=p4udt13063lv.1.2 bus2=p4udm29637.1.2 switch=n enabled=y phases=2 Linecode=1P_UG_AL_1/0_Brenau_0_416_0_2_2_2_2

New Line.l(r:p4udt13297lv-p4ulv18249) Units=km Length=0.0238383 bus1=p4udt13297lv.1.2 bus2=p4ulv18249.1.2 switch=n enabled=y phases=2 Linecode=1P_OH_AL_2/0_Rucina_0_416_0_2_2_2_2

New Line.l(r:p4udt14620lv-p4ulv20839) Units=km Length=0.0216996 bus1=p4udt14620lv.1.2 bus2=p4ulv20839.1.2 switch=n enabled=y phases=2 Linecode=1P_OH_AL_2/0_Rucina_0_416_0_2_2_2_2

New Line.l(r:p4udt14811lv-p4ulv21238) Units=km Length=0.0212642 bus1=p4udt14811lv.1.2 bus2=p4ulv21238.1.2 switch=n enabled=y phases=2 Linecode=1P_OH_AL_2/0_Rucina_0_416_0_2_2_2_2

New Line.l(r:p4udt14812lv-p4ulv21240) Units=km Length=0.0460963 bus1=p4udt14812lv.1.2 bus2=p4ulv21240.1.2 switch=n enabled=y phases=2 Linecode=1P_OH_AL_4/0_Zuzara_0_416_0_2_2_2_2

New Line.l(r:p4udt14812lv-p4ulv41834) Units=km Length=0.041152 bus1=p4udt14812lv.1.2 bus2=p4ulv41834.1.2 switch=n enabled=y phases=2 Linecode=1P_OH_AL_4/0_Zuzara_0_416_0_2_2_2_2

New Line.l(r:p4udt15443lv-p4ulv22534) Units=km Length=0.019754300000000002 bus1=p4udt15443lv.1.2 bus2=p4ulv22534.1.2 switch=n enabled=y phases=2 Linecode=1P_UG_AL_1/0_Brenau_0_416_0_2_2_2_2

New Line.l(r:p4udt15444lv-p4ulv22535) Units=km Length=0.0239117 bus1=p4udt15444lv.1.2 bus2=p4ulv22535.1.2 switch=n enabled=y phases=2 Linecode=1P_OH_AL_2/0_Rucina_0_416_0_2_2_2_2

New Line.l(r:p4udt15843lv-p4ulv23340) Units=km Length=0.016739300000000002 bus1=p4udt15843lv.1.2 bus2=p4ulv23340.1.2 switch=n enabled=y phases=2 Linecode=1P_UG_AL_1/0_Brenau_0_416_0_2_2_2_2

New Line.l(r:p4udm34066-p4ulv30527) Units=km Length=0.0161528 bus1=p4udm34066.1.2 bus2=p4ulv30527.1.2 switch=n enabled=y phases=2 Linecode=1P_UG_AL_1/0_Brenau_0_416_0_2_2_2_2

New Line.l(r:p4udm34066-p4udt15843lv) Units=km Length=0.00902335 bus1=p4udt15843lv.1.2 bus2=p4udm34066.1.2 switch=n enabled=y phases=2 Linecode=1P_UG_AL_1/0_Brenau_0_416_0_2_2_2_2

New Line.l(r:p4udm34067-p4ulv42259) Units=km Length=0.0148288 bus1=p4udm34067.1.2 bus2=p4ulv42259.1.2 switch=n enabled=y phases=2 Linecode=1P_UG_AL_1/0_Brenau_0_416_0_2_2_2_2

New Line.l(r:p4udm34067-p4udt15843lv) Units=km Length=0.00902592 bus1=p4udt15843lv.1.2 bus2=p4udm34067.1.2 switch=n enabled=y phases=2 Linecode=1P_UG_AL_1/0_Brenau_0_416_0_2_2_2_2

New Line.l(r:p4udt16175lv-p4ulv24096) Units=km Length=0.013642200000000002 bus1=p4udt16175lv.1.2 bus2=p4ulv24096.1.2 switch=n enabled=y phases=2 Linecode=1P_UG_AL_1/0_Brenau_0_416_0_2_2_2_2

New Line.l(r:p4udm35406-p4ulv25372) Units=km Length=0.0167301 bus1=p4udm35406.1.2 bus2=p4ulv25372.1.2 switch=n enabled=y phases=2 Linecode=1P_UG_AL_1/0_Brenau_0_416_0_2_2_2_2

New Line.l(r:p4udm35406-p4ulv30090) Units=km Length=0.0133375 bus1=p4udm35406.1.2 bus2=p4ulv30090.1.2 switch=n enabled=y phases=2 Linecode=1P_UG_AL_1/0_Brenau_0_416_0_2_2_2_2

New Line.l(r:p4udm35406-p4udt16752lv) Units=km Length=0.0204565 bus1=p4udt16752lv.1.2 bus2=p4udm35406.1.2 switch=n enabled=y phases=2 Linecode=1P_UG_AL_4/0_Sweetbriar_0_416_0_2_2_2_2

New Line.l(r:p4udm35409-p4ulv34753) Units=km Length=0.0173842 bus1=p4udm35409.1.2 bus2=p4ulv34753.1.2 switch=n enabled=y phases=2 Linecode=1P_UG_AL_1/0_Brenau_0_416_0_2_2_2_2

New Line.l(r:p4udm35407-p4ulv27538) Units=km Length=0.0145826 bus1=p4udm35407.1.2 bus2=p4ulv27538.1.2 switch=n enabled=y phases=2 Linecode=1P_UG_AL_1/0_Brenau_0_416_0_2_2_2_2

New Line.l(r:p4udm35407-p4udm35409) Units=km Length=0.00738824 bus1=p4udm35409.1.2 bus2=p4udm35407.1.2 switch=n enabled=y phases=2 Linecode=1P_UG_AL_1/0_Brenau_0_416_0_2_2_2_2

New Line.l(r:p4udm35409-p4udt16752lv) Units=km Length=0.014258 bus1=p4udt16752lv.1.2 bus2=p4udm35409.1.2 switch=n enabled=y phases=2 Linecode=1P_UG_AL_4/0_Sweetbriar_0_416_0_2_2_2_2

New Line.l(r:p4udt17124lv-p4ulv26224) Units=km Length=0.0173242 bus1=p4udt17124lv.1.2 bus2=p4ulv26224.1.2 switch=n enabled=y phases=2 Linecode=1P_OH_AL_2/0_Rucina_0_416_0_2_2_2_2

New Line.l(r:p4udt17125lv-p4ulv26225) Units=km Length=0.0159498 bus1=p4udt17125lv.1.2 bus2=p4ulv26225.1.2 switch=n enabled=y phases=2 Linecode=1P_UG_AL_1/0_Brenau_0_416_0_2_2_2_2

New Line.l(r:p4udt17126lv-p4ulv26227) Units=km Length=0.0186532 bus1=p4udt17126lv.1.2 bus2=p4ulv26227.1.2 switch=n enabled=y phases=2 Linecode=1P_OH_AL_2/0_Rucina_0_416_0_2_2_2_2

New Line.l(r:p4udt17505lv-p4ulv27106) Units=km Length=0.0211581 bus1=p4udt17505lv.1.2 bus2=p4ulv27106.1.2 switch=n enabled=y phases=2 Linecode=1P_OH_AL_2/0_Rucina_0_416_0_2_2_2_2

New Line.l(r:p4udt17506lv-p4ulv27107) Units=km Length=0.0176705 bus1=p4udt17506lv.1.2 bus2=p4ulv27107.1.2 switch=n enabled=y phases=2 Linecode=1P_UG_AL_1/0_Brenau_0_416_0_2_2_2_2

New Line.l(r:p4udt17697lv-p4ulv27536) Units=km Length=0.014281 bus1=p4udt17697lv.1.2 bus2=p4ulv27536.1.2 switch=n enabled=y phases=2 Linecode=1P_UG_AL_1/0_Brenau_0_416_0_2_2_2_2

New Line.l(r:p4udt17698lv-p4ulv27539) Units=km Length=0.013449500000000001 bus1=p4udt17698lv.1.2 bus2=p4ulv27539.1.2 switch=n enabled=y phases=2 Linecode=1P_UG_AL_1/0_Brenau_0_416_0_2_2_2_2

New Line.l(r:p4udm36734-p4ulv41012) Units=km Length=0.0107213 bus1=p4udm36734.1.2 bus2=p4ulv41012.1.2 switch=n enabled=y phases=2 Linecode=1P_UG_AL_1/0_Brenau_0_416_0_2_2_2_2

New Line.l(r:p4udm36734-p4udt17698lv) Units=km Length=0.00887435 bus1=p4udt17698lv.1.2 bus2=p4udm36734.1.2 switch=n enabled=y phases=2 Linecode=1P_UG_AL_1/0_Brenau_0_416_0_2_2_2_2

New Line.l(r:p4udt17857lv-p4ulv27963) Units=km Length=0.015040300000000001 bus1=p4udt17857lv.1.2 bus2=p4ulv27963.1.2 switch=n enabled=y phases=2 Linecode=1P_OH_AL_2/0_Rucina_0_416_0_2_2_2_2

New Line.l(r:p4udt17858lv-p4ulv27964) Units=km Length=0.029075600000000004 bus1=p4udt17858lv.1.2 bus2=p4ulv27964.1.2 switch=n enabled=y phases=2 Linecode=1P_OH_AL_4/0_Zuzara_0_416_0_2_2_2_2

New Line.l(r:p4udt17859lv-p4ulv27965) Units=km Length=0.0225045 bus1=p4udt17859lv.1.2 bus2=p4ulv27965.1.2 switch=n enabled=y phases=2 Linecode=1P_OH_AL_2/0_Rucina_0_416_0_2_2_2_2

New Line.l(r:p4udt18231lv-p4ulv28807) Units=km Length=0.0282746 bus1=p4udt18231lv.1.2 bus2=p4ulv28807.1.2 switch=n enabled=y phases=2 Linecode=1P_OH_AL_4/0_Zuzara_0_416_0_2_2_2_2

New Line.l(r:p4udt18381lv-p4ulv29218) Units=km Length=0.0211111 bus1=p4udt18381lv.1.2 bus2=p4ulv29218.1.2 switch=n enabled=y phases=2 Linecode=1P_UG_AL_1/0_Brenau_0_416_0_2_2_2_2

New Line.l(r:p4udt18909lv-p4ulv30526) Units=km Length=0.0264306 bus1=p4udt18909lv.1.2 bus2=p4ulv30526.1.2 switch=n enabled=y phases=2 Linecode=1P_OH_AL_2/0_Rucina_0_416_0_2_2_2_2

New Line.l(r:p4udt19078lv-p4ulv30933) Units=km Length=0.0207627 bus1=p4udt19078lv.1.2 bus2=p4ulv30933.1.2 switch=n enabled=y phases=2 Linecode=1P_UG_AL_4/0_Sweetbriar_0_416_0_2_2_2_2

New Line.l(r:p4udt19079lv-p4ulv30934) Units=km Length=0.0197282 bus1=p4udt19079lv.1.2 bus2=p4ulv30934.1.2 switch=n enabled=y phases=2 Linecode=1P_OH_AL_2/0_Rucina_0_416_0_2_2_2_2

New Line.l(r:p4udt19080lv-p4ulv30935) Units=km Length=0.0151807 bus1=p4udt19080lv.1.2 bus2=p4ulv30935.1.2 switch=n enabled=y phases=2 Linecode=1P_UG_AL_1/0_Brenau_0_416_0_2_2_2_2

New Line.l(r:p4udt19570lv-p4ulv32191) Units=km Length=0.016899400000000002 bus1=p4udt19570lv.1.2 bus2=p4ulv32191.1.2 switch=n enabled=y phases=2 Linecode=1P_UG_AL_1/0_Brenau_0_416_0_2_2_2_2

New Line.l(r:p4udt19571lv-p4ulv32192) Units=km Length=0.013445700000000001 bus1=p4udt19571lv.1.2 bus2=p4ulv32192.1.2 switch=n enabled=y phases=2 Linecode=1P_UG_AL_1/0_Brenau_0_416_0_2_2_2_2

New Line.l(r:p4udt19571lv-p4ulv41833) Units=km Length=0.0202434 bus1=p4udt19571lv.1.2 bus2=p4ulv41833.1.2 switch=n enabled=y phases=2 Linecode=1P_UG_AL_1/0_Brenau_0_416_0_2_2_2_2

New Line.l(r:p4udt19882lv-p4ulv33029) Units=km Length=0.0162863 bus1=p4udt19882lv.1.2 bus2=p4ulv33029.1.2 switch=n enabled=y phases=2 Linecode=1P_OH_AL_2/0_Rucina_0_416_0_2_2_2_2

New Line.l(r:p4udt20530lv-p4ulv34754) Units=km Length=0.0177702 bus1=p4udt20530lv.1.2 bus2=p4ulv34754.1.2 switch=n enabled=y phases=2 Linecode=1P_OH_AL_2/0_Rucina_0_416_0_2_2_2_2

New Line.l(r:p4udt20662lv-p4ulv35161) Units=km Length=0.025761 bus1=p4udt20662lv.1.2 bus2=p4ulv35161.1.2 switch=n enabled=y phases=2 Linecode=1P_OH_AL_2/0_Rucina_0_416_0_2_2_2_2

New Line.l(r:p4udt20980lv-p4ulv35994) Units=km Length=0.0180754 bus1=p4udt20980lv.1.2 bus2=p4ulv35994.1.2 switch=n enabled=y phases=2 Linecode=1P_OH_AL_2/0_Rucina_0_416_0_2_2_2_2

New Line.l(r:p4udt21999lv-p4ulv38902) Units=km Length=0.0392649 bus1=p4udt21999lv.1.2 bus2=p4ulv38902.1.2 switch=n enabled=y phases=2 Linecode=1P_OH_AL_4/0_Zuzara_0_416_0_2_2_2_2

New Line.l(r:p4udt22291lv-p4ulv39750) Units=km Length=0.0134998 bus1=p4udt22291lv.1.2 bus2=p4ulv39750.1.2 switch=n enabled=y phases=2 Linecode=1P_UG_AL_1/0_Brenau_0_416_0_2_2_2_2

New Line.l(r:p4udm42161-p4ulv39751) Units=km Length=0.016120800000000005 bus1=p4udm42161.1.2 bus2=p4ulv39751.1.2 switch=n enabled=y phases=2 Linecode=1P_UG_AL_1/0_Brenau_0_416_0_2_2_2_2

New Line.l(r:p4udm42161-p4udt22291lv) Units=km Length=0.009517650000000002 bus1=p4udt22291lv.1.2 bus2=p4udm42161.1.2 switch=n enabled=y phases=2 Linecode=1P_UG_AL_1/0_Brenau_0_416_0_2_2_2_2

New Line.l(r:p4udm42162-p4ulv40570) Units=km Length=0.0153706 bus1=p4udm42162.1.2 bus2=p4ulv40570.1.2 switch=n enabled=y phases=2 Linecode=1P_UG_AL_1/0_Brenau_0_416_0_2_2_2_2

New Line.l(r:p4udm42162-p4udt22291lv) Units=km Length=0.0083513 bus1=p4udt22291lv.1.2 bus2=p4udm42162.1.2 switch=n enabled=y phases=2 Linecode=1P_UG_AL_1/0_Brenau_0_416_0_2_2_2_2

New Line.l(r:p4udt22421lv-p4ulv40156) Units=km Length=0.014152300000000001 bus1=p4udt22421lv.1.2 bus2=p4ulv40156.1.2 switch=n enabled=y phases=2 Linecode=1P_UG_AL_2/0_Converse_0_416_0_2_2_2_2

New Line.l(r:p4udt22422lv-p4ulv40157) Units=km Length=0.016431500000000005 bus1=p4udt22422lv.1.2 bus2=p4ulv40157.1.2 switch=n enabled=y phases=2 Linecode=1P_OH_AL_2/0_Rucina_0_416_0_2_2_2_2

New Line.l(r:p4udt22729lv-p4ulv41013) Units=km Length=0.0140146 bus1=p4udt22729lv.1.2 bus2=p4ulv41013.1.2 switch=n enabled=y phases=2 Linecode=1P_UG_AL_1/0_Brenau_0_416_0_2_2_2_2

New Line.l(r:p4udt23580lv-p4ulv43531) Units=km Length=0.0185285 bus1=p4udt23580lv.1.2 bus2=p4ulv43531.1.2 switch=n enabled=y phases=2 Linecode=1P_UG_AL_1/0_Brenau_0_416_0_2_2_2_2

New Line.l(r:p4udt10545-p4udt4843) Units=km Length=0.0374449 bus1=p4udt10545-p4udt4843x.2 bus2=p4udt10545-p4udt4843xx.2 switch=n enabled=y phases=1 Linecode=1P_UG_AL_#2_15_12_47_0_1_1_1_1

New Line.l(r:p4udt10545-p4udt17698) Units=km Length=0.0581167 bus1=p4udt10545-p4udt17698xx.2 bus2=p4udt10545-p4udt17698x.2 switch=n enabled=y phases=1 Linecode=1P_UG_AL_#2_15_12_47_0_1_1_1_1

New Line.l(r:p4udt14620-p4udt17858) Units=km Length=0.001 bus1=p4udt14620.2 bus2=p4udt17858.2 switch=n enabled=y phases=1 Linecode=1P_OH_AL_ACSR_#2_Sparrow_12_47_0_1_1_1_1

New Line.l(r:p4udt14812-p4udt21999) Units=km Length=0.001 bus1=p4udt14812.2 bus2=p4udt21999.2 switch=n enabled=y phases=1 Linecode=1P_OH_AL_ACSR_#2_Sparrow_12_47_0_1_1_1_1

New Line.l(r:p4udt14812-p4udt20662) Units=km Length=0.0189411 bus1=p4udt20662.2 bus2=p4udt14812.2 switch=n enabled=y phases=1 Linecode=1P_OH_AL_ACSR_#2_Sparrow_12_47_0_1_1_1_1

New Line.l(r:p4udt12367-p4udt20662) Units=km Length=0.0189498 bus1=p4udt12367.2 bus2=p4udt20662.2 switch=n enabled=y phases=1 Linecode=1P_OH_AL_ACSR_#2_Sparrow_12_47_0_1_1_1_1

New Line.l(r:p4udt12367-p4udt18231) Units=km Length=0.0189498 bus1=p4udt18231.2 bus2=p4udt12367.2 switch=n enabled=y phases=1 Linecode=1P_OH_AL_ACSR_#2_Sparrow_12_47_0_1_1_1_1

New Line.l(r:p4udt14620-p4udt18231) Units=km Length=0.0189411 bus1=p4udt14620.2 bus2=p4udt18231.2 switch=n enabled=y phases=1 Linecode=1P_OH_AL_ACSR_#2_Sparrow_12_47_0_1_1_1_1

New Line.l(r:p4udt11607-p4udt14620) Units=km Length=0.0737838 bus1=p4udt11607.2 bus2=p4udt14620.2 switch=n enabled=y phases=1 Linecode=1P_OH_AL_ACSR_#2_Sparrow_12_47_0_1_1_1_1

New Line.l(r:p4udt11607-p4udt17859) Units=km Length=0.0164108 bus1=p4udt17859.2 bus2=p4udt11607.2 switch=n enabled=y phases=1 Linecode=1P_OH_AL_ACSR_#2_Sparrow_12_47_0_1_1_1_1

New Line.l(r:p4udt17126-p4udt17859) Units=km Length=0.0666779 bus1=p4udt17126.2 bus2=p4udt17859.2 switch=n enabled=y phases=1 Linecode=1P_OH_AL_ACSR_#2_Sparrow_12_47_0_1_1_1_1

New Line.l(r:p4udt17126-p4udt20980) Units=km Length=0.0278832 bus1=p4udt20980.2 bus2=p4udt17126.2 switch=n enabled=y phases=1 Linecode=1P_OH_AL_ACSR_#2_Sparrow_12_47_0_1_1_1_1

New Line.l(r:p4udt20530-p4udt2293) Units=km Length=0.017815 bus1=p4udt20530.2 bus2=p4udt2293.2 switch=n enabled=y phases=1 Linecode=1P_OH_AL_ACSR_#2_Sparrow_12_47_0_1_1_1_1

New Line.l(r:p4udt20530-p4udt20980) Units=km Length=0.0689606 bus1=p4udt20980.2 bus2=p4udt20530.2 switch=n enabled=y phases=1 Linecode=1P_OH_AL_ACSR_#2_Sparrow_12_47_0_1_1_1_1

New Line.l(r:p4udt20980-p4udt22422) Units=km Length=0.030429100000000004 bus1=p4udt22422.2 bus2=p4udt20980.2 switch=n enabled=y phases=1 Linecode=1P_OH_AL_ACSR_#2_Sparrow_12_47_0_1_1_1_1

New Line.l(r:p4udt22422-p4udt5527) Units=km Length=0.0152145 bus1=p4udt5527.2 bus2=p4udt22422.2 switch=n enabled=y phases=1 Linecode=1P_OH_AL_ACSR_#2_Sparrow_12_47_0_1_1_1_1

New Line.l(r:p4udt5527-p4udt8880) Units=km Length=0.0242793 bus1=p4udt8880.2 bus2=p4udt5527.2 switch=n enabled=y phases=1 Linecode=1P_OH_AL_ACSR_#2_Sparrow_12_47_0_1_1_1_1

New Line.l(r:p4udt17506-p4udt8880) Units=km Length=0.06890490000000002 bus1=p4udt17506.2 bus2=p4udt8880.2 switch=n enabled=y phases=1 Linecode=1P_OH_AL_ACSR_#2_Sparrow_12_47_0_1_1_1_1

New Line.l(r:p4udt10284-p4udt17506) Units=km Length=0.0310105 bus1=p4udt10284-p4udt17506x.2 bus2=p4udt10284-p4udt17506xx.2 switch=n enabled=y phases=1 Linecode=1P_UG_AL_#2_15_12_47_0_1_1_1_1

New Line.l(r:p4udt10284-p4udt22729) Units=km Length=0.042280000000000005 bus1=p4udt10284-p4udt22729xx.2 bus2=p4udt10284-p4udt22729x.2 switch=n enabled=y phases=1 Linecode=1P_UG_AL_#2_15_12_47_0_1_1_1_1

New Line.l(r:p4udt22291-p4udt22729) Units=km Length=0.028553 bus1=p4udt22291-p4udt22729x.2 bus2=p4udt22291-p4udt22729xx.2 switch=n enabled=y phases=1 Linecode=1P_UG_AL_#2_15_12_47_0_1_1_1_1

New Line.l(r:p4udt11091-p4udt22291) Units=km Length=0.0449091 bus1=p4udt11091-p4udt22291x.2 bus2=p4udt11091-p4udt22291xx.2 switch=n enabled=y phases=1 Linecode=1P_UG_AL_#2_15_12_47_0_1_1_1_1

New Line.l(r:p4udt11091-p4udt16752) Units=km Length=0.0633532 bus1=p4udt11091-p4udt16752xx.2 bus2=p4udt11091-p4udt16752x.2 switch=n enabled=y phases=1 Linecode=1P_UG_AL_#2_15_12_47_0_1_1_1_1

New Line.l(r:p4udt16752-p4udt17698) Units=km Length=0.0568339 bus1=p4udt16752-p4udt17698xx.2 bus2=p4udt16752-p4udt17698x.2 switch=n enabled=y phases=1 Linecode=1P_UG_AL_#2_15_12_47_0_1_1_1_1

New Line.l(r:p4udt17698-p4udt3815) Units=km Length=0.0509651 bus1=p4udt17698-p4udt3815xx.2 bus2=p4udt17698-p4udt3815x.2 switch=n enabled=y phases=1 Linecode=1P_UG_AL_#2_15_12_47_0_1_1_1_1

New Line.l(r:p4udt15843-p4udt3815) Units=km Length=0.0270726 bus1=p4udt15843-p4udt3815x.2 bus2=p4udt15843-p4udt3815xx.2 switch=n enabled=y phases=1 Linecode=1P_UG_AL_#2_15_12_47_0_1_1_1_1

New Line.l(r:p4udt15843-p4udt3069) Units=km Length=0.0548143 bus1=p4udt15843-p4udt3069xx.2 bus2=p4udt15843-p4udt3069x.2 switch=n enabled=y phases=1 Linecode=1P_UG_AL_#2_15_12_47_0_1_1_1_1

New Line.l(r:p4udt3069-p4udt6470) Units=km Length=0.064872 bus1=p4udt3069-p4udt6470xx.2 bus2=p4udt3069-p4udt6470x.2 switch=n enabled=y phases=1 Linecode=1P_UG_AL_#2_15_12_47_0_1_1_1_1

New Line.l(r:p4udt5526-p4udt8017) Units=km Length=0.095572 bus1=p4udt5526-p4udt8017xx.1 bus2=p4udt5526-p4udt8017x.1 switch=n enabled=y phases=1 Linecode=1P_UG_AL_#2_15_12_47_0_1_1_1_1

New Line.l(r:p4udt18909-p4udt5198) Units=km Length=0.0166682 bus1=p4udt18909.1 bus2=p4udt5198.1 switch=n enabled=y phases=1 Linecode=1P_OH_AL_ACSR_#2_Sparrow_12_47_0_1_1_1_1

New Line.l(r:p4udt15444-p4udt18909) Units=km Length=0.0179946 bus1=p4udt15444.1 bus2=p4udt18909.1 switch=n enabled=y phases=1 Linecode=1P_OH_AL_ACSR_#2_Sparrow_12_47_0_1_1_1_1

New Line.l(r:p4udt15444-p4udt8017) Units=km Length=0.053333700000000005 bus1=p4udt8017.1 bus2=p4udt15444.1 switch=n enabled=y phases=1 Linecode=1P_OH_AL_ACSR_#2_Sparrow_12_47_0_1_1_1_1

New Line.l(r:p4udt1158-p4udt8310) Units=km Length=0.054697600000000006 bus1=p4udt1158.1 bus2=p4udt8310.1 switch=n enabled=y phases=1 Linecode=1P_OH_AL_ACSR_#2_Sparrow_12_47_0_1_1_1_1

New Line.l(r:p4udt1158-p4udt19079) Units=km Length=0.0616437 bus1=p4udt19079.1 bus2=p4udt1158.1 switch=n enabled=y phases=1 Linecode=1P_OH_AL_ACSR_#2_Sparrow_12_47_0_1_1_1_1

New Line.l(r:p4udt10001-p4udt13063) Units=km Length=0.0277442 bus1=p4udt10001-p4udt13063x.1 bus2=p4udt10001-p4udt13063xx.1 switch=n enabled=y phases=1 Linecode=1P_UG_AL_#2_15_12_47_0_1_1_1_1

New Line.l(r:p4udt10001-p4udt19079) Units=km Length=0.044599 bus1=p4udt19079.1 bus2=p4udt10001.1 switch=n enabled=y phases=1 Linecode=1P_OH_AL_ACSR_#2_Sparrow_12_47_0_1_1_1_1

New Line.l(r:p4udt19079-p4udt8017) Units=km Length=0.0968706 bus1=p4udt8017.1 bus2=p4udt19079.1 switch=n enabled=y phases=1 Linecode=1P_OH_AL_ACSR_#2_Sparrow_12_47_0_1_1_1_1

New Line.l(r:p4udt6470-p4udt8017) Units=km Length=0.0961479 bus1=p4udt6470-p4udt8017xx.1 bus2=p4udt6470-p4udt8017xxx.1 switch=n enabled=y phases=1 Linecode=1P_UG_AL_#2_15_12_47_0_1_1_1_1

New Line.l(r:p4udt1155-p4udt9158) Units=km Length=0.0451213 bus1=p4udt1155-p4udt9158xx.3 bus2=p4udt1155-p4udt9158x.3 switch=n enabled=y phases=1 Linecode=1P_UG_AL_#2_15_12_47_0_1_1_1_1

New Line.l(r:p4udt10541-p4udt9158) Units=km Length=0.0451365 bus1=p4udt10541-p4udt9158x.3 bus2=p4udt10541-p4udt9158xx.3 switch=n enabled=y phases=1 Linecode=1P_UG_AL_#2_15_12_47_0_1_1_1_1

New Line.l(r:p4udt10541-p4udt17697) Units=km Length=0.0534901 bus1=p4udt10541-p4udt17697xx.3 bus2=p4udt10541-p4udt17697x.3 switch=n enabled=y phases=1 Linecode=1P_UG_AL_#2_15_12_47_0_1_1_1_1

New Line.l(r:p4udt16175-p4udt5852) Units=km Length=0.0362205 bus1=p4udt16175-p4udt5852xx.3 bus2=p4udt16175-p4udt5852x.3 switch=n enabled=y phases=1 Linecode=1P_UG_AL_#2_15_12_47_0_1_1_1_1

New Line.l(r:p4udt23580-p4udt5852) Units=km Length=0.0181038 bus1=p4udt23580-p4udt5852x.3 bus2=p4udt23580-p4udt5852xx.3 switch=n enabled=y phases=1 Linecode=1P_UG_AL_#2_15_12_47_0_1_1_1_1

New Line.l(r:p4udt23580-p4udt9442) Units=km Length=0.0220814 bus1=p4udt23580-p4udt9442xx.3 bus2=p4udt23580-p4udt9442x.3 switch=n enabled=y phases=1 Linecode=1P_UG_AL_#2_15_12_47_0_1_1_1_1

New Line.l(r:p4udt13062-p4udt1932) Units=km Length=0.657415 bus1=p4udt13062.1 bus2=p4udt1932.1 switch=n enabled=y phases=1 Linecode=1P_OH_AL_ACSR_#2_Sparrow_12_47_0_1_1_1_1

New Line.l(r:p4udt13062-p4udt14811) Units=km Length=0.0392389 bus1=p4udt13062.1 bus2=p4udt14811.1 switch=n enabled=y phases=1 Linecode=1P_OH_AL_ACSR_#2_Sparrow_12_47_0_1_1_1_1

New Line.l(r:p4udt13062-p4udt17505) Units=km Length=0.0366984 bus1=p4udt13062-p4udt17505x.1 bus2=p4udt13062.1 switch=n enabled=y phases=1 Linecode=1P_OH_AL_ACSR_#2_Sparrow_12_47_0_1_1_1_1

New Line.l(r:p4udt11345-p4udt1156) Units=km Length=0.00909792 bus1=p4udt11345-p4udt1156x.3 bus2=p4udt11345-p4udt1156xx.3 switch=n enabled=y phases=1 Linecode=1P_UG_AL_#2_15_12_47_0_1_1_1_1

New Line.l(r:p4udt10544-p4udt11345) Units=km Length=0.0272874 bus1=p4udt10544-p4udt11345x.3 bus2=p4udt10544-p4udt11345xx.3 switch=n enabled=y phases=1 Linecode=1P_UG_AL_#2_15_12_47_0_1_1_1_1

New Line.l(r:p4udt10544-p4udt343) Units=km Length=0.0733283 bus1=p4udt10544-p4udt343xx.3 bus2=p4udt10544-p4udt343x.3 switch=n enabled=y phases=1 Linecode=1P_UG_AL_#2_15_12_47_0_1_1_1_1

New Line.l(r:p4udt11604-p4udt343) Units=km Length=0.0933051 bus1=p4udt343.3 bus2=p4udt11604.3 switch=n enabled=y phases=1 Linecode=1P_OH_AL_ACSR_#2_Sparrow_12_47_0_1_1_1_1

New Line.l(r:p4udt11606-p4udt343) Units=km Length=0.0971219 bus1=p4udt11606-p4udt343x.3 bus2=p4udt11606-p4udt343xx.3 switch=n enabled=y phases=1 Linecode=1P_UG_AL_#2_15_12_47_0_1_1_1_1

New Line.l(r:p4udt11606-p4udt3068) Units=km Length=0.0658893 bus1=p4udt11606-p4udt3068xx.3 bus2=p4udt11606-p4udt3068x.3 switch=n enabled=y phases=1 Linecode=1P_UG_AL_#2_15_12_47_0_1_1_1_1

New Line.l(r:p4udt1157-p4udt6794) Units=km Length=0.0274119 bus1=p4udt1157-p4udt6794x.3 bus2=p4udt1157-p4udt6794xx.3 switch=n enabled=y phases=1 Linecode=1P_UG_AL_#2_15_12_47_0_1_1_1_1

New Line.l(r:p4udt10283-p4udt1157) Units=km Length=0.0273113 bus1=p4udt10283-p4udt1157x.3 bus2=p4udt10283-p4udt1157xx.3 switch=n enabled=y phases=1 Linecode=1P_UG_AL_#2_15_12_47_0_1_1_1_1

New Line.l(r:p4udt10283-p4udt19571) Units=km Length=0.0303592 bus1=p4udt10283-p4udt19571xx.3 bus2=p4udt10283-p4udt19571x.3 switch=n enabled=y phases=1 Linecode=1P_UG_AL_#2_15_12_47_0_1_1_1_1

New Line.l(r:p4udt19571-p4udt2698) Units=km Length=0.0356198 bus1=p4udt19571-p4udt2698xx.3 bus2=p4udt19571-p4udt2698x.3 switch=n enabled=y phases=1 Linecode=1P_UG_AL_#2_15_12_47_0_1_1_1_1

New Line.l(r:p4udt2297-p4udt2698) Units=km Length=0.0881942 bus1=p4udt2297-p4udt2698x.3 bus2=p4udt2297-p4udt2698xx.3 switch=n enabled=y phases=1 Linecode=1P_UG_AL_#2_15_12_47_0_1_1_1_1

New Line.l(r:p4udt1933-p4udt4848) Units=km Length=0.03557960000000001 bus1=p4udt1933.3 bus2=p4udt4848.3 switch=n enabled=y phases=1 Linecode=1P_OH_AL_ACSR_#2_Sparrow_12_47_0_1_1_1_1

New Line.l(r:p4udt1933-p4udt8599) Units=km Length=0.029450800000000003 bus1=p4udt8599.3 bus2=p4udt1933.3 switch=n enabled=y phases=1 Linecode=1P_OH_AL_ACSR_#2_Sparrow_12_47_0_1_1_1_1

New Line.l(r:p4udt19080-p4udt6795) Units=km Length=0.001 bus1=p4udt19080-p4udt6795xx.3 bus2=p4udt19080-p4udt6795x.3 switch=n enabled=y phases=1 Linecode=1P_UG_AL_#2_15_12_47_0_1_1_1_1

New Line.l(r:p4udt6795-p4udt8599) Units=km Length=0.07683460000000002 bus1=p4udt6795-p4udt8599xx.3 bus2=p4udt6795-p4udt8599x.3 switch=n enabled=y phases=1 Linecode=1P_UG_AL_#2_15_12_47_0_1_1_1_1

New Line.l(r:p4udt5525-p4udt8599) Units=km Length=0.0683911 bus1=p4udt5525-p4udt8599x.3 bus2=p4udt5525-p4udt8599xx.3 switch=n enabled=y phases=1 Linecode=1P_UG_AL_#2_15_12_47_0_1_1_1_1

New Line.l(r:p4udt18381-p4udt5525) Units=km Length=0.0195426 bus1=p4udt18381-p4udt5525x.3 bus2=p4udt18381-p4udt5525xx.3 switch=n enabled=y phases=1 Linecode=1P_UG_AL_#2_15_12_47_0_1_1_1_1

New Line.l(r:p4udt18381-p4udt2297) Units=km Length=0.0560852 bus1=p4udt18381-p4udt2297xx.3 bus2=p4udt18381-p4udt2297x.3 switch=n enabled=y phases=1 Linecode=1P_UG_AL_#2_15_12_47_0_1_1_1_1

New Line.l(r:p4udt2297-p4udt4486) Units=km Length=0.027398100000000005 bus1=p4udt2297-p4udt4486xx.3 bus2=p4udt2297-p4udt4486x.3 switch=n enabled=y phases=1 Linecode=1P_UG_AL_#2_15_12_47_0_1_1_1_1

New Line.l(r:p4udt19570-p4udt4486) Units=km Length=0.00913269 bus1=p4udt19570-p4udt4486x.3 bus2=p4udt19570-p4udt4486xx.3 switch=n enabled=y phases=1 Linecode=1P_UG_AL_#2_15_12_47_0_1_1_1_1

New Line.l(r:p4udt19570-p4udt3068) Units=km Length=0.0739561 bus1=p4udt19570-p4udt3068xx.3 bus2=p4udt19570-p4udt3068x.3 switch=n enabled=y phases=1 Linecode=1P_UG_AL_#2_15_12_47_0_1_1_1_1

New Line.l(r:p4udt19882-p4udt3068) Units=km Length=0.0800889 bus1=p4udt19882-p4udt3068x.3 bus2=p4udt3068.3 switch=n enabled=y phases=1 Linecode=1P_OH_AL_ACSR_#2_Sparrow_12_47_0_1_1_1_1

New Line.l(r:p4udt4158-p4udt5196) Units=km Length=0.032267 bus1=p4udt5196.2 bus2=p4udt4158.2 switch=n enabled=y phases=1 Linecode=1P_OH_AL_ACSR_#2_Sparrow_12_47_0_1_1_1_1

New Line.l(r:p4udt22421-p4udt5196) Units=km Length=0.0473701 bus1=p4udt22421.2 bus2=p4udt5196.2 switch=n enabled=y phases=1 Linecode=1P_OH_AL_ACSR_#2_Sparrow_12_47_0_1_1_1_1

New Line.l(r:p4udt19882-p4udt22421) Units=km Length=0.0278013 bus1=p4udt19882-p4udt22421x.2 bus2=p4udt22421.2 switch=n enabled=y phases=1 Linecode=1P_OH_AL_ACSR_#2_Sparrow_12_47_0_1_1_1_1

New Line.l(r:p4udt7428-p4uhs20_1247) Units=km Length=0.9271520000000001 bus1=p4udt7428-p4uhs20_1247x.1.2.3 bus2=p4udt7428-p4uhs20_1247x_b1_1.1.2.3 switch=n enabled=y phases=3 Linecode=3P_OH_AL_ACSR_1033kcmil_Curlew_12.47_1_3_3_3_3

New Line.l(r:p4udt6470-p4udt9443) Units=km Length=0.0395467 bus1=p4udt6470-p4udt9443xx.1.2.3 bus2=p4udt6470-p4udt9443x.1.2.3 switch=n enabled=y phases=3 Linecode=3P_UG_AL_4/0_25_12_47_0_3_3_3_3

New Line.l(r:p4udt6793-p4udt9443) Units=km Length=0.0275394 bus1=p4udt6793-p4udt9443x.1.2.3 bus2=p4udt6793-p4udt9443xx.1.2.3 switch=n enabled=y phases=3 Linecode=3P_UG_AL_4/0_25_12_47_0_3_3_3_3

New Line.l(r:p4udt11851-p4udt6793) Units=km Length=0.0367093 bus1=p4udt11851-p4udt6793x.1.2.3 bus2=p4udt11851-p4udt6793xx.1.2.3 switch=n enabled=y phases=3 Linecode=3P_UG_AL_4/0_25_12_47_0_3_3_3_3

New Line.l(r:p4udt11851-p4udt4484) Units=km Length=0.0568414 bus1=p4udt11851-p4udt4484xx.1.2.3 bus2=p4udt11851-p4udt4484x.1.2.3 switch=n enabled=y phases=3 Linecode=3P_UG_AL_4/0_25_12_47_0_3_3_3_3

New Line.l(r:p4udt17697-p4udt4484) Units=km Length=0.0612299 bus1=p4udt17697-p4udt4484x.1.2.3 bus2=p4udt17697-p4udt4484xx.1.2.3 switch=n enabled=y phases=3 Linecode=3P_UG_AL_4/0_25_12_47_0_3_3_3_3

New Line.l(r:p4udt17125-p4udt17697) Units=km Length=0.048071300000000004 bus1=p4udt17125-p4udt17697x.1.2.3 bus2=p4udt17125-p4udt17697xx.1.2.3 switch=n enabled=y phases=3 Linecode=3P_UG_AL_4/0_25_12_47_0_3_3_3_3

New Line.l(r:p4udt17125-p4udt8016) Units=km Length=0.0453531 bus1=p4udt8016.1.2.3 bus2=p4udt17125.1.2.3 switch=n enabled=y phases=3 Linecode=3P_OH_AL_ACSR_4/0_Penguin_12_47_0_3_3_3_3

New Line.l(r:p4udt17857-p4udt8016) Units=km Length=0.0189077 bus1=p4udt17857.1.2.3 bus2=p4udt8016.1.2.3 switch=n enabled=y phases=3 Linecode=3P_OH_AL_ACSR_4/0_Penguin_12_47_0_3_3_3_3

New Line.l(r:p4udt17124-p4udt17857) Units=km Length=0.0378192 bus1=p4udt17124.1.2.3 bus2=p4udt17857.1.2.3 switch=n enabled=y phases=3 Linecode=3P_OH_AL_ACSR_4/0_Penguin_12_47_0_3_3_3_3

New Line.l(r:p4udt13297-p4udt17124) Units=km Length=0.0189077 bus1=p4udt13297.1.2.3 bus2=p4udt17124.1.2.3 switch=n enabled=y phases=3 Linecode=3P_OH_AL_ACSR_4/0_Penguin_12_47_0_3_3_3_3

New Line.l(r:p4udt17505-p4udt19882) Units=km Length=0.0667626 bus1=p4udt17505.1.2.3 bus2=p4udt19882.1.2.3 switch=n enabled=y phases=3 Linecode=3P_OH_AL_ACSR_4/0_Penguin_12_47_0_3_3_3_3

New Line.l(r:p4udt13297-p4udt17505) Units=km Length=0.173393 bus1=p4udt13297.1.2.3 bus2=p4udt17505.1.2.3 switch=n enabled=y phases=3 Linecode=3P_OH_AL_ACSR_4/0_Penguin_12_47_0_3_3_3_3

New Line.l(r:p4udt13297-p4udt7428) Units=km Length=0.0937337 bus1=p4udt7428.1.2.3 bus2=p4udt13297.1.2.3 switch=n enabled=y phases=3 Linecode=3P_OH_AL_ACSR_4/0_Penguin_12_47_0_3_3_3_3

New Line.l(r:p4udt12108lv-p4ulv16073) Units=km Length=0.02476 bus1=p4udt12108lv.1.2.3 bus2=p4ulv16073.1.2.3 switch=n enabled=y phases=3 Linecode=3P_UG_AL_350kcmil_15_0_416_0_3_3_3_3

New Line.l(r:p4udt12108-p4udt9442) Units=km Length=0.067644 bus1=p4udt9442.1.2.3 bus2=p4udt12108.1.2.3 switch=n enabled=y phases=3 Linecode=3P_OH_AL_ACSR_4/0_Penguin_12_47_0_3_3_3_3

New Line.l(r:p4udt15443-p4udt9442) Units=km Length=0.036263500000000004 bus1=p4udt15443-p4udt9442x.1.2.3 bus2=p4udt15443-p4udt9442xx.1.2.3 switch=n enabled=y phases=3 Linecode=3P_UG_AL_4/0_25_12_47_0_3_3_3_3

New Line.l(r:p4udt15443-p4udt19078) Units=km Length=0.0181318 bus1=p4udt15443-p4udt19078xx.1.2.3 bus2=p4udt15443-p4udt19078x.1.2.3 switch=n enabled=y phases=3 Linecode=3P_UG_AL_4/0_25_12_47_0_3_3_3_3

New Line.l(r:p4udt17697-p4udt19078) Units=km Length=0.0793044 bus1=p4udt17697-p4udt19078x.1.2.3 bus2=p4udt17697-p4udt19078xx.1.2.3 switch=n enabled=y phases=3 Linecode=3P_UG_AL_4/0_25_12_47_0_3_3_3_3

New Line.padswitch(r:p4udt10545-p4udt4843)p4u_78525 Units=km Length=0.001 bus1=p4udt10545.2 bus2=p4udt10545-p4udt4843x.2 switch=y enabled=y phases=1 Linecode=padswitch_1_1_1_1

New Line.padswitch(r:p4udt10545-p4udt4843)p4u_78526 Units=km Length=0.001 bus1=p4udt10545-p4udt4843xx.2 bus2=p4udt4843.2 switch=y enabled=y phases=1 Linecode=padswitch_1_2_1_1_1

New Line.padswitch(r:p4udt10545-p4udt17698)p4u_78527 Units=km Length=0.001 bus1=p4udt17698.2 bus2=p4udt10545-p4udt17698xx.2 switch=y enabled=y phases=1 Linecode=padswitch_1_1_1_1

New Line.padswitch(r:p4udt10545-p4udt17698)p4u_78528 Units=km Length=0.001 bus1=p4udt10545-p4udt17698x.2 bus2=p4udt10545.2 switch=y enabled=y phases=1 Linecode=padswitch_1_1_1_1

New Line.padswitch(r:p4udt10284-p4udt17506)p4u_78529 Units=km Length=0.001 bus1=p4udt10284.2 bus2=p4udt10284-p4udt17506x.2 switch=y enabled=y phases=1 Linecode=padswitch_1_2_1_0_1_1

New Line.padswitch(r:p4udt10284-p4udt17506)p4u_78530 Units=km Length=0.001 bus1=p4udt10284-p4udt17506xx.2 bus2=p4udt17506.2 switch=y enabled=y phases=1 Linecode=padswitch_1_2_1_0_1_0_1

New Line.padswitch(r:p4udt10284-p4udt22729)p4u_78531 Units=km Length=0.001 bus1=p4udt22729.2 bus2=p4udt10284-p4udt22729xx.2 switch=y enabled=y phases=1 Linecode=padswitch_1_1_1_1

New Line.padswitch(r:p4udt10284-p4udt22729)p4u_78532 Units=km Length=0.001 bus1=p4udt10284-p4udt22729x.2 bus2=p4udt10284.2 switch=y enabled=y phases=1 Linecode=padswitch_1_1_1_1

New Line.padswitch(r:p4udt22291-p4udt22729)p4u_78533 Units=km Length=0.001 bus1=p4udt22291.2 bus2=p4udt22291-p4udt22729x.2 switch=y enabled=y phases=1 Linecode=padswitch_1_1_1_1

New Line.padswitch(r:p4udt22291-p4udt22729)p4u_78534 Units=km Length=0.001 bus1=p4udt22291-p4udt22729xx.2 bus2=p4udt22729.2 switch=y enabled=y phases=1 Linecode=padswitch_1_1_1_1

New Line.padswitch(r:p4udt11091-p4udt22291)p4u_78535 Units=km Length=0.001 bus1=p4udt11091.2 bus2=p4udt11091-p4udt22291x.2 switch=y enabled=y phases=1 Linecode=padswitch_1_1_1_1

New Line.padswitch(r:p4udt11091-p4udt22291)p4u_78536 Units=km Length=0.001 bus1=p4udt11091-p4udt22291xx.2 bus2=p4udt22291.2 switch=y enabled=y phases=1 Linecode=padswitch_1_1_1_1

New Line.padswitch(r:p4udt11091-p4udt16752)p4u_78537 Units=km Length=0.001 bus1=p4udt16752.2 bus2=p4udt11091-p4udt16752xx.2 switch=y enabled=y phases=1 Linecode=padswitch_1_1_1_1

New Line.padswitch(r:p4udt11091-p4udt16752)p4u_78538 Units=km Length=0.001 bus1=p4udt11091-p4udt16752x.2 bus2=p4udt11091.2 switch=y enabled=y phases=1 Linecode=padswitch_1_1_1_1

New Line.padswitch(r:p4udt16752-p4udt17698)p4u_78539 Units=km Length=0.001 bus1=p4udt17698.2 bus2=p4udt16752-p4udt17698xx.2 switch=y enabled=y phases=1 Linecode=padswitch_1_1_1_1

New Line.padswitch(r:p4udt16752-p4udt17698)p4u_78540 Units=km Length=0.001 bus1=p4udt16752-p4udt17698x.2 bus2=p4udt16752.2 switch=y enabled=y phases=1 Linecode=padswitch_1_1_1_1

New Line.padswitch(r:p4udt17698-p4udt3815)p4u_78541 Units=km Length=0.001 bus1=p4udt3815.2 bus2=p4udt17698-p4udt3815xx.2 switch=y enabled=y phases=1 Linecode=padswitch_1_2_1_1_1

New Line.padswitch(r:p4udt17698-p4udt3815)p4u_78542 Units=km Length=0.001 bus1=p4udt17698-p4udt3815x.2 bus2=p4udt17698.2 switch=y enabled=y phases=1 Linecode=padswitch_1_1_1_1

New Line.padswitch(r:p4udt15843-p4udt3815)p4u_78543 Units=km Length=0.001 bus1=p4udt15843.2 bus2=p4udt15843-p4udt3815x.2 switch=y enabled=y phases=1 Linecode=padswitch_1_2_1_0_1_1

New Line.padswitch(r:p4udt15843-p4udt3815)p4u_78544 Units=km Length=0.001 bus1=p4udt15843-p4udt3815xx.2 bus2=p4udt3815.2 switch=y enabled=y phases=1 Linecode=padswitch_1_2_1_1_1

New Line.padswitch(r:p4udt15843-p4udt3069)p4u_78545 Units=km Length=0.001 bus1=p4udt3069.2 bus2=p4udt15843-p4udt3069xx.2 switch=y enabled=y phases=1 Linecode=padswitch_1_1_1_1

New Line.padswitch(r:p4udt15843-p4udt3069)p4u_78546 Units=km Length=0.001 bus1=p4udt15843-p4udt3069x.2 bus2=p4udt15843.2 switch=y enabled=y phases=1 Linecode=padswitch_1_2_1_1_1

New Line.padswitch(r:p4udt3069-p4udt6470)p4u_78547 Units=km Length=0.001 bus1=p4udt3069-p4udt6470xxx.2 bus2=p4udt3069-p4udt6470xx.2 switch=y enabled=y phases=1 Linecode=padswitch_1_1_1_1

New Line.padswitch(r:p4udt3069-p4udt6470)p4u_78548 Units=km Length=0.001 bus1=p4udt3069-p4udt6470x.2 bus2=p4udt3069.2 switch=y enabled=y phases=1 Linecode=padswitch_1_1_1_1

New Line.padswitch(r:p4udt5526-p4udt8017)p4u_78549 Units=km Length=0.001 bus1=p4udt8017.1 bus2=p4udt5526-p4udt8017xx.1 switch=y enabled=y phases=1 Linecode=padswitch_1_2_1_0_1_0_1_0

New Line.padswitch(r:p4udt5526-p4udt8017)p4u_78550 Units=km Length=0.001 bus1=p4udt5526-p4udt8017x.1 bus2=p4udt5526.1 switch=y enabled=y phases=1 Linecode=padswitch_1_1_1_1

New Line.padswitch(r:p4udt10001-p4udt13063)p4u_78551 Units=km Length=0.001 bus1=p4udt10001.1 bus2=p4udt10001-p4udt13063x.1 switch=y enabled=y phases=1 Linecode=padswitch_1_2_1_0_1_0_1_0

New Line.padswitch(r:p4udt10001-p4udt13063)p4u_78552 Units=km Length=0.001 bus1=p4udt10001-p4udt13063xx.1 bus2=p4udt13063.1 switch=y enabled=y phases=1 Linecode=padswitch_1_2_1_1_1

New Line.padswitch(r:p4udt6470-p4udt8017)p4u_78553 Units=km Length=0.001 bus1=p4udt6470-p4udt8017x.1 bus2=p4udt6470-p4udt8017xx.1 switch=y enabled=y phases=1 Linecode=padswitch_1_2_1_0_1_1

New Line.padswitch(r:p4udt6470-p4udt8017)p4u_78554 Units=km Length=0.001 bus1=p4udt6470-p4udt8017xxx.1 bus2=p4udt8017.1 switch=y enabled=y phases=1 Linecode=padswitch_1_2_1_0_1_0_1_0

New Line.padswitch(r:p4udt1155-p4udt9158)p4u_78565 Units=km Length=0.001 bus1=p4udt9158.3 bus2=p4udt1155-p4udt9158xx.3 switch=y enabled=y phases=1 Linecode=padswitch_1_2_1_0_1_0_1_0

New Line.padswitch(r:p4udt1155-p4udt9158)p4u_78566 Units=km Length=0.001 bus1=p4udt1155-p4udt9158x.3 bus2=p4udt1155.3 switch=y enabled=y phases=1 Linecode=padswitch_1_2_1_1_1

New Line.padswitch(r:p4udt10541-p4udt9158)p4u_78567 Units=km Length=0.001 bus1=p4udt10541.3 bus2=p4udt10541-p4udt9158x.3 switch=y enabled=y phases=1 Linecode=padswitch_1_1_1_1

New Line.padswitch(r:p4udt10541-p4udt9158)p4u_78568 Units=km Length=0.001 bus1=p4udt10541-p4udt9158xx.3 bus2=p4udt9158.3 switch=y enabled=y phases=1 Linecode=padswitch_1_1_1_1

New Line.padswitch(r:p4udt10541-p4udt17697)p4u_78569 Units=km Length=0.001 bus1=p4udt10541-p4udt17697xxx.3 bus2=p4udt10541-p4udt17697xx.3 switch=y enabled=y phases=1 Linecode=padswitch_1_1_1_1

New Line.padswitch(r:p4udt10541-p4udt17697)p4u_78570 Units=km Length=0.001 bus1=p4udt10541-p4udt17697x.3 bus2=p4udt10541.3 switch=y enabled=y phases=1 Linecode=padswitch_1_1_1_1

New Line.padswitch(r:p4udt16175-p4udt5852)p4u_78571 Units=km Length=0.001 bus1=p4udt5852.3 bus2=p4udt16175-p4udt5852xx.3 switch=y enabled=y phases=1 Linecode=padswitch_1_1_1_1

New Line.padswitch(r:p4udt16175-p4udt5852)p4u_78572 Units=km Length=0.001 bus1=p4udt16175-p4udt5852x.3 bus2=p4udt16175.3 switch=y enabled=y phases=1 Linecode=padswitch_1_2_1_1_1

New Line.padswitch(r:p4udt23580-p4udt5852)p4u_78573 Units=km Length=0.001 bus1=p4udt23580.3 bus2=p4udt23580-p4udt5852x.3 switch=y enabled=y phases=1 Linecode=padswitch_1_2_1_1_1

New Line.padswitch(r:p4udt23580-p4udt5852)p4u_78574 Units=km Length=0.001 bus1=p4udt23580-p4udt5852xx.3 bus2=p4udt5852.3 switch=y enabled=y phases=1 Linecode=padswitch_1_2_1_1_1

New Line.padswitch(r:p4udt23580-p4udt9442)p4u_78575 Units=km Length=0.001 bus1=p4udt23580-p4udt9442xxx.3 bus2=p4udt23580-p4udt9442xx.3 switch=y enabled=y phases=1 Linecode=padswitch_1_2_1_1_1

New Line.padswitch(r:p4udt23580-p4udt9442)p4u_78576 Units=km Length=0.001 bus1=p4udt23580-p4udt9442x.3 bus2=p4udt23580.3 switch=y enabled=y phases=1 Linecode=padswitch_1_2_1_1_1

New Line.padswitch(r:p4udt11345-p4udt1156)p4u_78585 Units=km Length=0.001 bus1=p4udt11345.3 bus2=p4udt11345-p4udt1156x.3 switch=y enabled=y phases=1 Linecode=padswitch_1_1_1_1

New Line.padswitch(r:p4udt11345-p4udt1156)p4u_78586 Units=km Length=0.001 bus1=p4udt11345-p4udt1156xx.3 bus2=p4udt1156.3 switch=y enabled=y phases=1 Linecode=padswitch_1_2_1_1_1

New Line.padswitch(r:p4udt10544-p4udt11345)p4u_78587 Units=km Length=0.001 bus1=p4udt10544.3 bus2=p4udt10544-p4udt11345x.3 switch=y enabled=y phases=1 Linecode=padswitch_1_1_1_1

New Line.padswitch(r:p4udt10544-p4udt11345)p4u_78588 Units=km Length=0.001 bus1=p4udt10544-p4udt11345xx.3 bus2=p4udt11345.3 switch=y enabled=y phases=1 Linecode=padswitch_1_1_1_1

New Line.padswitch(r:p4udt10544-p4udt343)p4u_78589 Units=km Length=0.001 bus1=p4udt343.3 bus2=p4udt10544-p4udt343xx.3 switch=y enabled=y phases=1 Linecode=padswitch_1_2_1_0_1_0_1_0

New Line.padswitch(r:p4udt10544-p4udt343)p4u_78590 Units=km Length=0.001 bus1=p4udt10544-p4udt343x.3 bus2=p4udt10544.3 switch=y enabled=y phases=1 Linecode=padswitch_1_1_1_1

New Line.padswitch(r:p4udt11606-p4udt343)p4u_78591 Units=km Length=0.001 bus1=p4udt11606.3 bus2=p4udt11606-p4udt343x.3 switch=y enabled=y phases=1 Linecode=padswitch_1_1_1_1

New Line.padswitch(r:p4udt11606-p4udt343)p4u_78592 Units=km Length=0.001 bus1=p4udt11606-p4udt343xx.3 bus2=p4udt343.3 switch=y enabled=y phases=1 Linecode=padswitch_1_2_1_0_1_0_1_0

New Line.padswitch(r:p4udt11606-p4udt3068)p4u_78593 Units=km Length=0.001 bus1=p4udt3068.3 bus2=p4udt11606-p4udt3068xx.3 switch=y enabled=y phases=1 Linecode=padswitch_1_2_1_1_1

New Line.padswitch(r:p4udt11606-p4udt3068)p4u_78594 Units=km Length=0.001 bus1=p4udt11606-p4udt3068x.3 bus2=p4udt11606.3 switch=y enabled=y phases=1 Linecode=padswitch_1_1_1_1

New Line.padswitch(r:p4udt1157-p4udt6794)p4u_78595 Units=km Length=0.001 bus1=p4udt1157.3 bus2=p4udt1157-p4udt6794x.3 switch=y enabled=y phases=1 Linecode=padswitch_1_2_1_1_1

New Line.padswitch(r:p4udt1157-p4udt6794)p4u_78596 Units=km Length=0.001 bus1=p4udt1157-p4udt6794xx.3 bus2=p4udt6794.3 switch=y enabled=y phases=1 Linecode=padswitch_1_2_1_1_1

New Line.padswitch(r:p4udt10283-p4udt1157)p4u_78597 Units=km Length=0.001 bus1=p4udt10283.3 bus2=p4udt10283-p4udt1157x.3 switch=y enabled=y phases=1 Linecode=padswitch_1_2_1_1_1

New Line.padswitch(r:p4udt10283-p4udt1157)p4u_78598 Units=km Length=0.001 bus1=p4udt10283-p4udt1157xx.3 bus2=p4udt1157.3 switch=y enabled=y phases=1 Linecode=padswitch_1_2_1_1_1

New Line.padswitch(r:p4udt10283-p4udt19571)p4u_78599 Units=km Length=0.001 bus1=p4udt19571.3 bus2=p4udt10283-p4udt19571xx.3 switch=y enabled=y phases=1 Linecode=padswitch_1_2_1_1_1

New Line.padswitch(r:p4udt10283-p4udt19571)p4u_78600 Units=km Length=0.001 bus1=p4udt10283-p4udt19571x.3 bus2=p4udt10283.3 switch=y enabled=y phases=1 Linecode=padswitch_1_2_1_1_1

New Line.padswitch(r:p4udt19571-p4udt2698)p4u_78601 Units=km Length=0.001 bus1=p4udt2698.3 bus2=p4udt19571-p4udt2698xx.3 switch=y enabled=y phases=1 Linecode=padswitch_1_1_1_1

New Line.padswitch(r:p4udt19571-p4udt2698)p4u_78602 Units=km Length=0.001 bus1=p4udt19571-p4udt2698x.3 bus2=p4udt19571.3 switch=y enabled=y phases=1 Linecode=padswitch_1_2_1_1_1

New Line.padswitch(r:p4udt2297-p4udt2698)p4u_78603 Units=km Length=0.001 bus1=p4udt2297.3 bus2=p4udt2297-p4udt2698x.3 switch=y enabled=y phases=1 Linecode=padswitch_1_1_1_1

New Line.padswitch(r:p4udt2297-p4udt2698)p4u_78604 Units=km Length=0.001 bus1=p4udt2297-p4udt2698xx.3 bus2=p4udt2698.3 switch=y enabled=y phases=1 Linecode=padswitch_1_1_1_1

New Line.padswitch(r:p4udt19080-p4udt6795)p4u_78605 Units=km Length=0.001 bus1=p4udt6795.3 bus2=p4udt19080-p4udt6795xx.3 switch=y enabled=y phases=1 Linecode=padswitch_1_2_1_1_1

New Line.padswitch(r:p4udt19080-p4udt6795)p4u_78606 Units=km Length=0.001 bus1=p4udt19080-p4udt6795x.3 bus2=p4udt19080.3 switch=y enabled=y phases=1 Linecode=padswitch_1_2_1_1_1

New Line.padswitch(r:p4udt6795-p4udt8599)p4u_78607 Units=km Length=0.001 bus1=p4udt8599.3 bus2=p4udt6795-p4udt8599xx.3 switch=y enabled=y phases=1 Linecode=padswitch_1_2_1_0_1_0_1_0

New Line.padswitch(r:p4udt6795-p4udt8599)p4u_78608 Units=km Length=0.001 bus1=p4udt6795-p4udt8599x.3 bus2=p4udt6795.3 switch=y enabled=y phases=1 Linecode=padswitch_1_2_1_1_1

New Line.padswitch(r:p4udt5525-p4udt8599)p4u_78609 Units=km Length=0.001 bus1=p4udt5525.3 bus2=p4udt5525-p4udt8599x.3 switch=y enabled=y phases=1 Linecode=padswitch_1_1_1_1

New Line.padswitch(r:p4udt5525-p4udt8599)p4u_78610 Units=km Length=0.001 bus1=p4udt5525-p4udt8599xx.3 bus2=p4udt8599.3 switch=y enabled=y phases=1 Linecode=padswitch_1_2_1_0_1_0_1_0

New Line.padswitch(r:p4udt18381-p4udt5525)p4u_78611 Units=km Length=0.001 bus1=p4udt18381.3 bus2=p4udt18381-p4udt5525x.3 switch=y enabled=y phases=1 Linecode=padswitch_1_1_1_1

New Line.padswitch(r:p4udt18381-p4udt5525)p4u_78612 Units=km Length=0.001 bus1=p4udt18381-p4udt5525xx.3 bus2=p4udt5525.3 switch=y enabled=y phases=1 Linecode=padswitch_1_1_1_1

New Line.padswitch(r:p4udt18381-p4udt2297)p4u_78613 Units=km Length=0.001 bus1=p4udt2297.3 bus2=p4udt18381-p4udt2297xx.3 switch=y enabled=y phases=1 Linecode=padswitch_1_1_1_1

New Line.padswitch(r:p4udt18381-p4udt2297)p4u_78614 Units=km Length=0.001 bus1=p4udt18381-p4udt2297x.3 bus2=p4udt18381.3 switch=y enabled=y phases=1 Linecode=padswitch_1_1_1_1

New Line.padswitch(r:p4udt2297-p4udt4486)p4u_78615 Units=km Length=0.001 bus1=p4udt4486.3 bus2=p4udt2297-p4udt4486xx.3 switch=y enabled=y phases=1 Linecode=padswitch_1_1_1_1

New Line.padswitch(r:p4udt2297-p4udt4486)p4u_78616 Units=km Length=0.001 bus1=p4udt2297-p4udt4486x.3 bus2=p4udt2297.3 switch=y enabled=y phases=1 Linecode=padswitch_1_1_1_1

New Line.padswitch(r:p4udt19570-p4udt4486)p4u_78617 Units=km Length=0.001 bus1=p4udt19570.3 bus2=p4udt19570-p4udt4486x.3 switch=y enabled=y phases=1 Linecode=padswitch_1_1_1_1

New Line.padswitch(r:p4udt19570-p4udt4486)p4u_78618 Units=km Length=0.001 bus1=p4udt19570-p4udt4486xx.3 bus2=p4udt4486.3 switch=y enabled=y phases=1 Linecode=padswitch_1_1_1_1

New Line.padswitch(r:p4udt19570-p4udt3068)p4u_78619 Units=km Length=0.001 bus1=p4udt3068.3 bus2=p4udt19570-p4udt3068xx.3 switch=y enabled=y phases=1 Linecode=padswitch_1_1_1_1

New Line.padswitch(r:p4udt19570-p4udt3068)p4u_78620 Units=km Length=0.001 bus1=p4udt19570-p4udt3068x.3 bus2=p4udt19570.3 switch=y enabled=y phases=1 Linecode=padswitch_1_1_1_1

New Line.padswitch(r:p4udt6470-p4udt9443)p4u_78555 Units=km Length=0.001 bus1=p4udt9443.1.2.3 bus2=p4udt6470-p4udt9443xx.1.2.3 switch=y enabled=y phases=3 Linecode=padswitch_3_3_3_3

New Line.padswitch(r:p4udt6470-p4udt9443)p4u_78556 Units=km Length=0.001 bus1=p4udt6470-p4udt9443x.1.2.3 bus2=p4udt6470.1.2.3 switch=y enabled=y phases=3 Linecode=padswitch_3_3_3_3_3

New Line.padswitch(r:p4udt6793-p4udt9443)p4u_78557 Units=km Length=0.001 bus1=p4udt6793.1.2.3 bus2=p4udt6793-p4udt9443x.1.2.3 switch=y enabled=y phases=3 Linecode=padswitch_3_3_3_1_3_3

New Line.padswitch(r:p4udt6793-p4udt9443)p4u_78558 Units=km Length=0.001 bus1=p4udt6793-p4udt9443xx.1.2.3 bus2=p4udt9443.1.2.3 switch=y enabled=y phases=3 Linecode=padswitch_3_3_3_1_3_1_3

New Line.padswitch(r:p4udt11851-p4udt6793)p4u_78559 Units=km Length=0.001 bus1=p4udt11851.1.2.3 bus2=p4udt11851-p4udt6793x.1.2.3 switch=y enabled=y phases=3 Linecode=padswitch_3_3_3_3

New Line.padswitch(r:p4udt11851-p4udt6793)p4u_78560 Units=km Length=0.001 bus1=p4udt11851-p4udt6793xx.1.2.3 bus2=p4udt6793.1.2.3 switch=y enabled=y phases=3 Linecode=padswitch_3_3_3_1_3_3

New Line.padswitch(r:p4udt11851-p4udt4484)p4u_78561 Units=km Length=0.001 bus1=p4udt4484.1.2.3 bus2=p4udt11851-p4udt4484xx.1.2.3 switch=y enabled=y phases=3 Linecode=padswitch_3_3_3_3

New Line.padswitch(r:p4udt11851-p4udt4484)p4u_78562 Units=km Length=0.001 bus1=p4udt11851-p4udt4484x.1.2.3 bus2=p4udt11851.1.2.3 switch=y enabled=y phases=3 Linecode=padswitch_3_3_3_3

New Line.padswitch(r:p4udt17697-p4udt4484)p4u_78563 Units=km Length=0.001 bus1=p4udt17697.1.2.3 bus2=p4udt17697-p4udt4484x.1.2.3 switch=y enabled=y phases=3 Linecode=padswitch_3_3_3_3

New Line.padswitch(r:p4udt17697-p4udt4484)p4u_78564 Units=km Length=0.001 bus1=p4udt17697-p4udt4484xx.1.2.3 bus2=p4udt4484.1.2.3 switch=y enabled=y phases=3 Linecode=padswitch_3_3_3_3

New Line.padswitch(r:p4udt17125-p4udt17697)p4u_78583 Units=km Length=0.001 bus1=p4udt17125.1.2.3 bus2=p4udt17125-p4udt17697x.1.2.3 switch=y enabled=y phases=3 Linecode=padswitch_3_3_3_3

New Line.padswitch(r:p4udt17125-p4udt17697)p4u_78584 Units=km Length=0.001 bus1=p4udt17125-p4udt17697xx.1.2.3 bus2=p4udt17697.1.2.3 switch=y enabled=y phases=3 Linecode=padswitch_3_3_3_3

New Line.padswitch(r:p4udt15443-p4udt9442)p4u_78577 Units=km Length=0.001 bus1=p4udt15443.1.2.3 bus2=p4udt15443-p4udt9442x.1.2.3 switch=y enabled=y phases=3 Linecode=padswitch_3_3_3_3

New Line.padswitch(r:p4udt15443-p4udt9442)p4u_78578 Units=km Length=0.001 bus1=p4udt15443-p4udt9442xx.1.2.3 bus2=p4udt9442.1.2.3 switch=y enabled=y phases=3 Linecode=padswitch_3_3_3_1_3_1_3_1

New Line.padswitch(r:p4udt15443-p4udt19078)p4u_78579 Units=km Length=0.001 bus1=p4udt19078.1.2.3 bus2=p4udt15443-p4udt19078xx.1.2.3 switch=y enabled=y phases=3 Linecode=padswitch_3_3_3_3

New Line.padswitch(r:p4udt15443-p4udt19078)p4u_78580 Units=km Length=0.001 bus1=p4udt15443-p4udt19078x.1.2.3 bus2=p4udt15443.1.2.3 switch=y enabled=y phases=3 Linecode=padswitch_3_3_3_3

New Line.padswitch(r:p4udt17697-p4udt19078)p4u_78581 Units=km Length=0.001 bus1=p4udt17697.1.2.3 bus2=p4udt17697-p4udt19078x.1.2.3 switch=y enabled=y phases=3 Linecode=padswitch_3_3_3_3

New Line.padswitch(r:p4udt17697-p4udt19078)p4u_78582 Units=km Length=0.001 bus1=p4udt17697-p4udt19078xx.1.2.3 bus2=p4udt19078.1.2.3 switch=y enabled=y phases=3 Linecode=padswitch_3_3_3_3

New Line.fuse(r:p4udt3069-p4udt6470)p4u_80240 Units=km Length=0.001 bus1=p4udt6470.2 bus2=p4udt3069-p4udt6470xxx.2 switch=n enabled=y phases=1 Linecode=fuse_1_1_1_1

New Fuse.Fuse_fuse(r:p4udt3069-p4udt6470)p4u_80240 monitoredobj=Line.fuse(r:p4udt3069-p4udt6470)p4u_80240 enabled=y ratedcurrent=100.0

New Line.fuse(r:p4udt6470-p4udt8017)p4u_80241 Units=km Length=0.001 bus1=p4udt6470.1 bus2=p4udt6470-p4udt8017x.1 switch=n enabled=y phases=1 Linecode=fuse_1_6_1_1_1

New Fuse.Fuse_fuse(r:p4udt6470-p4udt8017)p4u_80241 monitoredobj=Line.fuse(r:p4udt6470-p4udt8017)p4u_80241 enabled=y ratedcurrent=100.0

New Line.fuse(r:p4udt23580-p4udt9442)p4u_80539 Units=km Length=0.001 bus1=p4udt9442.3 bus2=p4udt23580-p4udt9442xxx.3 switch=n enabled=y phases=1 Linecode=fuse_1_6_1_1_1

New Fuse.Fuse_fuse(r:p4udt23580-p4udt9442)p4u_80539 monitoredobj=Line.fuse(r:p4udt23580-p4udt9442)p4u_80539 enabled=y ratedcurrent=100.0

New Line.fuse(r:p4udt13062-p4udt17505)p4u_81306 Units=km Length=0.001 bus1=p4udt17505.1 bus2=p4udt13062-p4udt17505x.1 switch=n enabled=y phases=1 Linecode=fuse_1_6_1_1_1

New Fuse.Fuse_fuse(r:p4udt13062-p4udt17505)p4u_81306 monitoredobj=Line.fuse(r:p4udt13062-p4udt17505)p4u_81306 enabled=y ratedcurrent=100.0

New Line.fuse(r:p4udt10541-p4udt17697)p4u_81320 Units=km Length=0.001 bus1=p4udt17697.3 bus2=p4udt10541-p4udt17697xxx.3 switch=n enabled=y phases=1 Linecode=fuse_1_1_1_1

New Fuse.Fuse_fuse(r:p4udt10541-p4udt17697)p4u_81320 monitoredobj=Line.fuse(r:p4udt10541-p4udt17697)p4u_81320 enabled=y ratedcurrent=100.0

New Line.fuse(r:p4udt19882-p4udt3068)p4u_81520 Units=km Length=0.001 bus1=p4udt19882.3 bus2=p4udt19882-p4udt3068x.3 switch=n enabled=y phases=1 Linecode=fuse_1_6_1_3_1_1

New Fuse.Fuse_fuse(r:p4udt19882-p4udt3068)p4u_81520 monitoredobj=Line.fuse(r:p4udt19882-p4udt3068)p4u_81520 enabled=y ratedcurrent=100.0

New Line.fuse(r:p4udt19882-p4udt22421)p4u_81521 Units=km Length=0.001 bus1=p4udt19882.2 bus2=p4udt19882-p4udt22421x.2 switch=n enabled=y phases=1 Linecode=fuse_1_6_1_3_1_3_1

New Fuse.Fuse_fuse(r:p4udt19882-p4udt22421)p4u_81521 monitoredobj=Line.fuse(r:p4udt19882-p4udt22421)p4u_81521 enabled=y ratedcurrent=100.0

New Line.l(r:p4udt7428-p4uhs20_1247)_disconnect Units=km Length=0.001 bus1=p4udt7428-p4uhs20_1247x_b1_1.1.2.3 bus2=p4udt7428-p4uhs20_1247x_b2_1.1.2.3 switch=y enabled=y phases=3 Linecode=3P_OH_AL_ACSR_1033kcmil_Curlew_12.47_1_3_3_3_3

New Line.l(r:p4udt7428-p4uhs20_1247)_cont Units=km Length=8.353368 bus1=p4udt7428-p4uhs20_1247x_b2_1.1.2.3 bus2=p4udt7428.1.2.3 switch=n enabled=y phases=3 Linecode=3P_OH_AL_ACSR_1033kcmil_Curlew_12.47_1_3_3_3_3
