New Capacitor.p4uc127 Bus1=p4udt9177 phases=3 Kv=12.47 conn=Wye Kvar=300.0

New CapControl.p4uc127 Capacitor=p4uc127 Element=Line.padswitch(r:p4udt7128-p4udt9177)p4u_78883 Terminal=1 delay=100.0 Type=voltage Vmin=120.5 Vmax=125.0 Ptratio=59.99631547328862 Ctratio=100.0
