Clear

New Circuit.substation_p4uhs2_69 bus1=p4uhs2_69 pu=1.0 basekV=69.0 R1=1e-05 X1=1e-05 R0=1e-05 X0=1e-05

Redirect Transformers.dss
Redirect p4uhs2_1247--p4udt19190/Transformers.dss
Redirect p4uhs2_1247--p4udt15941/Transformers.dss
Redirect p4uhs2_1247--p4udt19679/Transformers.dss
Redirect p4uhs2_1247--p4udt22231/Transformers.dss
Redirect Regulators.dss
Redirect p4uhs2_1247--p4udt19190/Loads.dss
Redirect p4uhs2_1247--p4udt15941/Loads.dss
Redirect p4uhs2_1247--p4udt19679/Loads.dss
Redirect p4uhs2_1247--p4udt22231/Loads.dss
Redirect LineCodes.dss
Redirect p4uhs2_1247--p4udt19190/LineCodes.dss
Redirect p4uhs2_1247--p4udt15941/LineCodes.dss
Redirect p4uhs2_1247--p4udt19679/LineCodes.dss
Redirect p4uhs2_1247--p4udt22231/LineCodes.dss
Redirect Lines.dss
Redirect p4uhs2_1247--p4udt19190/Lines.dss
Redirect p4uhs2_1247--p4udt15941/Lines.dss
Redirect p4uhs2_1247--p4udt19679/Lines.dss
Redirect p4uhs2_1247--p4udt22231/Lines.dss
Redirect p4uhs2_1247--p4udt15941/Capacitors.dss
Redirect p4uhs2_1247--p4udt19679/Capacitors.dss
Redirect p4uhs2_1247--p4udt22231/Capacitors.dss

Set Voltagebases=[0.2080002494301389, 0.48, 7.199560000000001, 12.47, 69.0]

Calcvoltagebases

Buscoords Buscoords.dss

Solve
