New Line.l(r:p4udt19190-p4uhs2_1247) Units=km Length=0.15554900000000002 bus1=p4udt19190-p4uhs2_1247x.1.2.3 bus2=p4udt19190.1.2.3 switch=n enabled=y phases=3 Linecode=3P_OH_AL_ACSR_4/0_Penguin_12_47_0_3_3_3_3

New Line.l(r:p4udt19190lv-p4ulv31207) Units=km Length=0.001 bus1=p4udt19190lv.1.2.3 bus2=p4ulv31207.1.2.3 switch=n enabled=y phases=3 Linecode=3P_UG_AL_4/0_15_0_416_0_3_3_3_3
