New Capacitor.p4uc16 Bus1=p4udt22285 phases=3 Kv=12.47 conn=Wye Kvar=300.0

New CapControl.p4uc16 Capacitor=p4uc16 Element=Line.l(r:p4udt14377-p4udt22285) Terminal=1 delay=100.0 Type=voltage Vmin=120.5 Vmax=125.0 Ptratio=59.99631547328862 Ctratio=100.0

New Capacitor.p4uc19 Bus1=p4udt3666 phases=3 Kv=12.47 conn=Wye Kvar=300.0

New CapControl.p4uc19 Capacitor=p4uc19 Element=Line.l(r:p4udt3666-p4udt9889) Terminal=1 delay=100.0 Type=voltage Vmin=120.5 Vmax=125.0 Ptratio=59.99631547328862 Ctratio=100.0
