New Capacitor.p4uc17 Bus1=p4udt2923 phases=3 Kv=12.47 conn=Wye Kvar=300.0

New CapControl.p4uc17 Capacitor=p4uc17 Element=Line.l(r:p4udt14546-p4udt2923) Terminal=1 delay=100.0 Type=voltage Vmin=120.5 Vmax=125.0 Ptratio=59.99631547328862 Ctratio=100.0

New Capacitor.p4uc18 Bus1=p4udt7605 phases=3 Kv=12.47 conn=Wye Kvar=300.0

New CapControl.p4uc18 Capacitor=p4uc18 Element=Line.l(r:p4udt13214-p4udt7605) Terminal=1 delay=100.0 Type=voltage Vmin=120.5 Vmax=125.0 Ptratio=59.99631547328862 Ctratio=100.0
