New Capacitor.p4uc23 Bus1=p4udt20104 phases=3 Kv=12.47 conn=Wye Kvar=300.0

New CapControl.p4uc23 Capacitor=p4uc23 Element=Line.l(r:p4udt16249-p4udt20104) Terminal=1 delay=100.0 Type=voltage Vmin=120.5 Vmax=125.0 Ptratio=59.99631547328862 Ctratio=100.0

New Capacitor.p4uc25 Bus1=p4udt18434 phases=3 Kv=12.47 conn=Wye Kvar=300.0

New CapControl.p4uc25 Capacitor=p4uc25 Element=Line.l(r:p4udt18434-p4udt22046) Terminal=1 delay=100.0 Type=voltage Vmin=120.5 Vmax=125.0 Ptratio=59.99631547328862 Ctratio=100.0
