New Capacitor.p4uc21 Bus1=p4udt12420 phases=3 Kv=12.47 conn=Wye Kvar=300.0

New CapControl.p4uc21 Capacitor=p4uc21 Element=Line.l(r:p4udt12420-p4udt13136) Terminal=1 delay=100.0 Type=voltage Vmin=120.5 Vmax=125.0 Ptratio=59.99631547328862 Ctratio=100.0

New Capacitor.p4uc26 Bus1=p4udt19613 phases=3 Kv=12.47 conn=Wye Kvar=300.0

New CapControl.p4uc26 Capacitor=p4uc26 Element=Line.l(r:p4udt16430-p4udt19613)_s1 Terminal=1 delay=100.0 Type=voltage Vmin=120.5 Vmax=125.0 Ptratio=59.99631547328862 Ctratio=100.0
