New Capacitor.p4uc27 Bus1=p4udt17903 phases=3 Kv=12.47 conn=Wye Kvar=600.0

New CapControl.p4uc27 Capacitor=p4uc27 Element=Line.l(r:p4udt17903-p4uhs3_1247) Terminal=1 delay=100.0 Type=voltage Vmin=120.5 Vmax=125.0 Ptratio=59.99631547328862 Ctratio=100.0
