New Capacitor.p4uc22 Bus1=p4udt13368 phases=3 Kv=12.47 conn=Wye Kvar=300.0

New CapControl.p4uc22 Capacitor=p4uc22 Element=Line.padswitch(r:p4udt13368-p4udt14878)p4u_66855 Terminal=1 delay=100.0 Type=voltage Vmin=120.5 Vmax=125.0 Ptratio=59.99631547328862 Ctratio=100.0
