New Capacitor.p4uc31 Bus1=p4udt1251 phases=3 Kv=12.47 conn=Wye Kvar=300.0

New CapControl.p4uc31 Capacitor=p4uc31 Element=Line.l(r:p4udt1251-p4udt16043) Terminal=1 delay=100.0 Type=voltage Vmin=120.5 Vmax=125.0 Ptratio=59.99631547328862 Ctratio=100.0
