New Capacitor.p4uc28 Bus1=p4udt2781 phases=3 Kv=12.47 conn=Wye Kvar=300.0

New CapControl.p4uc28 Capacitor=p4uc28 Element=Line.l(r:p4udt16034-p4udt2781) Terminal=1 delay=100.0 Type=voltage Vmin=120.5 Vmax=125.0 Ptratio=59.99631547328862 Ctratio=100.0

New Capacitor.p4uc33 Bus1=p4udt18990 phases=3 Kv=12.47 conn=Wye Kvar=300.0

New CapControl.p4uc33 Capacitor=p4uc33 Element=Line.l(r:p4udt18990-p4udt6940)_s1 Terminal=1 delay=100.0 Type=voltage Vmin=120.5 Vmax=125.0 Ptratio=59.99631547328862 Ctratio=100.0
