New Capacitor.p4uc30 Bus1=p4udt516 phases=3 Kv=12.47 conn=Wye Kvar=300.0

New CapControl.p4uc30 Capacitor=p4uc30 Element=Line.padswitch(r:p4udt18816-p4udt516)p4u_67167 Terminal=1 delay=100.0 Type=voltage Vmin=120.5 Vmax=125.0 Ptratio=59.99631547328862 Ctratio=100.0
