Clear

New Circuit.substation_p4uhs5_69 bus1=p4uhs5_69 pu=1.0 basekV=69.0 R1=1e-05 X1=1e-05 R0=1e-05 X0=1e-05

Redirect Transformers.dss
Redirect p4uhs5_1247--p4udt10630/Transformers.dss
Redirect p4uhs5_1247--p4udt15124/Transformers.dss
Redirect p4uhs5_1247--p4udt20411/Transformers.dss
Redirect p4uhs5_1247--p4udt3570/Transformers.dss
Redirect Regulators.dss
Redirect p4uhs5_1247--p4udt10630/Loads.dss
Redirect p4uhs5_1247--p4udt20411/Loads.dss
Redirect p4uhs5_1247--p4udt3570/Loads.dss
Redirect p4uhs5_1247--p4udt15124/Loads.dss
Redirect LineCodes.dss
Redirect p4uhs5_1247--p4udt10630/LineCodes.dss
Redirect p4uhs5_1247--p4udt15124/LineCodes.dss
Redirect p4uhs5_1247--p4udt20411/LineCodes.dss
Redirect p4uhs5_1247--p4udt3570/LineCodes.dss
Redirect Lines.dss
Redirect p4uhs5_1247--p4udt10630/Lines.dss
Redirect p4uhs5_1247--p4udt15124/Lines.dss
Redirect p4uhs5_1247--p4udt20411/Lines.dss
Redirect p4uhs5_1247--p4udt3570/Lines.dss
Redirect p4uhs5_1247--p4udt10630/Capacitors.dss
Redirect p4uhs5_1247--p4udt15124/Capacitors.dss
Redirect p4uhs5_1247--p4udt3570/Capacitors.dss
Redirect p4uhs5_1247--p4udt20411/Capacitors.dss

Set Voltagebases=[0.2080002494301389, 0.48, 7.199560000000001, 12.47, 69.0]

Calcvoltagebases

Buscoords Buscoords.dss

Solve
