New Capacitor.p4uc37 Bus1=p4udt21450 phases=3 Kv=12.47 conn=Wye Kvar=450.0

New CapControl.p4uc37 Capacitor=p4uc37 Element=Line.l(r:p4udt11197-p4udt21450) Terminal=1 delay=100.0 Type=voltage Vmin=120.5 Vmax=125.0 Ptratio=59.99631547328862 Ctratio=100.0
