New Capacitor.p4uc35 Bus1=p4udt18656 phases=3 Kv=12.47 conn=Wye Kvar=300.0

New CapControl.p4uc35 Capacitor=p4uc35 Element=Line.l(r:p4udt18656-p4udt3636) Terminal=1 delay=100.0 Type=voltage Vmin=120.5 Vmax=125.0 Ptratio=59.99631547328862 Ctratio=100.0

New Capacitor.p4uc39 Bus1=p4udt1365 phases=3 Kv=12.47 conn=Wye Kvar=300.0

New CapControl.p4uc39 Capacitor=p4uc39 Element=Line.l(r:p4udt1365-p4udt6972) Terminal=1 delay=100.0 Type=voltage Vmin=120.5 Vmax=125.0 Ptratio=59.99631547328862 Ctratio=100.0
