New Capacitor.p4uc36 Bus1=p4udt9516 phases=3 Kv=12.47 conn=Wye Kvar=300.0

New CapControl.p4uc36 Capacitor=p4uc36 Element=Line.l(r:p4udt17170-p4udt9516) Terminal=1 delay=100.0 Type=voltage Vmin=120.5 Vmax=125.0 Ptratio=59.99631547328862 Ctratio=100.0
