New Capacitor.p4uc41 Bus1=p4udt17553 phases=3 Kv=12.47 conn=Wye Kvar=300.0

New CapControl.p4uc41 Capacitor=p4uc41 Element=Line.l(r:p4udt17552-p4udt17553) Terminal=1 delay=100.0 Type=voltage Vmin=120.5 Vmax=125.0 Ptratio=59.99631547328862 Ctratio=100.0

New Capacitor.p4uc42 Bus1=p4udt22173 phases=3 Kv=12.47 conn=Wye Kvar=300.0

New CapControl.p4uc42 Capacitor=p4uc42 Element=Line.l(r:p4udt1675-p4udt22173)_s1 Terminal=1 delay=100.0 Type=voltage Vmin=120.5 Vmax=125.0 Ptratio=59.99631547328862 Ctratio=100.0
