New Capacitor.p4uc47 Bus1=p4udt23371 phases=3 Kv=12.47 conn=Wye Kvar=300.0

New CapControl.p4uc47 Capacitor=p4uc47 Element=Line.l(r:p4udt23371-p4udt6026) Terminal=1 delay=100.0 Type=voltage Vmin=120.5 Vmax=125.0 Ptratio=59.99631547328862 Ctratio=100.0

New Capacitor.p4uc50 Bus1=p4udt8188 phases=3 Kv=12.47 conn=Wye Kvar=300.0

New CapControl.p4uc50 Capacitor=p4uc50 Element=Line.l(r:p4udt20901-p4udt8188) Terminal=1 delay=100.0 Type=voltage Vmin=120.5 Vmax=125.0 Ptratio=59.99631547328862 Ctratio=100.0
