New Capacitor.p4uc49 Bus1=p4udt3263 phases=3 Kv=12.47 conn=Wye Kvar=300.0

New CapControl.p4uc49 Capacitor=p4uc49 Element=Line.l(r:p4udt3263-p4udt5361) Terminal=1 delay=100.0 Type=voltage Vmin=120.5 Vmax=125.0 Ptratio=59.99631547328862 Ctratio=100.0
