New Capacitor.p4uc51 Bus1=p4udt10374 phases=3 Kv=12.47 conn=Wye Kvar=450.0

New CapControl.p4uc51 Capacitor=p4uc51 Element=Line.padswitch(r:p4udt10102-p4udt10374)p4u_69043 Terminal=1 delay=100.0 Type=voltage Vmin=120.5 Vmax=125.0 Ptratio=59.99631547328862 Ctratio=100.0
