New Capacitor.p4uc55 Bus1=p4udt15427 phases=3 Kv=12.47 conn=Wye Kvar=300.0

New CapControl.p4uc55 Capacitor=p4uc55 Element=Line.l(r:p4udt15427-p4udt4131) Terminal=1 delay=100.0 Type=voltage Vmin=120.5 Vmax=125.0 Ptratio=59.99631547328862 Ctratio=100.0

New Capacitor.p4uc58 Bus1=p4udt17850 phases=3 Kv=12.47 conn=Wye Kvar=300.0

New CapControl.p4uc58 Capacitor=p4uc58 Element=Line.l(r:p4udt17850-p4udt8861) Terminal=1 delay=100.0 Type=voltage Vmin=120.5 Vmax=125.0 Ptratio=59.99631547328862 Ctratio=100.0
