New Capacitor.p5uc0 Bus1=p5umv19 phases=3 Kv=12.47 conn=Wye Kvar=600.0

New CapControl.p5uc0 Capacitor=p5uc0 Element=Line.padswitch(r:p5udt3400-p5umv19)p5u_117142 Terminal=1 delay=100.0 Type=voltage Vmin=120.5 Vmax=125.0 Ptratio=59.99631547328862 Ctratio=100.0

New Capacitor.p5uc1 Bus1=p5udt3400 phases=3 Kv=12.47 conn=Wye Kvar=600.0

New CapControl.p5uc1 Capacitor=p5uc1 Element=Line.padswitch(r:p5udt3400-p5udt4423)p5u_117144 Terminal=1 delay=100.0 Type=voltage Vmin=120.5 Vmax=125.0 Ptratio=59.99631547328862 Ctratio=100.0

New Capacitor.p5uc2 Bus1=p5udt4647 phases=3 Kv=12.47 conn=Wye Kvar=450.0

New CapControl.p5uc2 Capacitor=p5uc2 Element=Line.padswitch(r:p5udt4647-p5umv19)p5u_117140 Terminal=1 delay=100.0 Type=voltage Vmin=120.5 Vmax=125.0 Ptratio=59.99631547328862 Ctratio=100.0
