New Capacitor.p5uc57 Bus1=p5udt22793 phases=3 Kv=12.47 conn=Wye Kvar=300.0

New CapControl.p5uc57 Capacitor=p5uc57 Element=Line.l(r:p5udt18249-p5udt22793) Terminal=1 delay=100.0 Type=voltage Vmin=120.5 Vmax=125.0 Ptratio=59.99631547328862 Ctratio=100.0

New Capacitor.p5uc59 Bus1=p5udt28084 phases=3 Kv=12.47 conn=Wye Kvar=300.0

New CapControl.p5uc59 Capacitor=p5uc59 Element=Line.l(r:p5udt28084-p5umv91) Terminal=1 delay=100.0 Type=voltage Vmin=120.5 Vmax=125.0 Ptratio=59.99631547328862 Ctratio=100.0
