New Capacitor.p5uc56 Bus1=p5udt18442 phases=3 Kv=12.47 conn=Wye Kvar=300.0

New CapControl.p5uc56 Capacitor=p5uc56 Element=Line.l(r:p5udt18442-p5udt20010) Terminal=1 delay=100.0 Type=voltage Vmin=120.5 Vmax=125.0 Ptratio=59.99631547328862 Ctratio=100.0
