New Capacitor.p5uc54 Bus1=p5udt11651 phases=3 Kv=12.47 conn=Wye Kvar=450.0

New CapControl.p5uc54 Capacitor=p5uc54 Element=Line.l(r:p5udt11651-p5udt27380) Terminal=1 delay=100.0 Type=voltage Vmin=120.5 Vmax=125.0 Ptratio=59.99631547328862 Ctratio=100.0

New Capacitor.p5uc60 Bus1=p5udt24439 phases=3 Kv=12.47 conn=Wye Kvar=300.0

New CapControl.p5uc60 Capacitor=p5uc60 Element=Line.l(r:p5udt24439-p5udt29472) Terminal=1 delay=100.0 Type=voltage Vmin=120.5 Vmax=125.0 Ptratio=59.99631547328862 Ctratio=100.0
