New Line.l(r:p5udm26699-p5ulv21215) Units=km Length=0.015266 bus1=p5udm26699.1.2 bus2=p5ulv21215.1.2 switch=n enabled=y phases=2 Linecode=1P_OH_AL_2/0_Rucina_0_416_0_2_2_2_2

New Line.l(r:p5udm26699-p5ulv45732) Units=km Length=0.0152493 bus1=p5udm26699.1.2 bus2=p5ulv45732.1.2 switch=n enabled=y phases=2 Linecode=1P_OH_AL_2/0_Rucina_0_416_0_2_2_2_2

New Line.l(r:p5udm26699-p5ulv62033) Units=km Length=0.0165536 bus1=p5udm26699.1.2 bus2=p5ulv62033.1.2 switch=n enabled=y phases=2 Linecode=1P_OH_AL_2/0_Rucina_0_416_0_2_2_2_2

New Line.l(r:p5udm26699-p5udt9720lv) Units=km Length=0.01742 bus1=p5udt9720lv.1.2 bus2=p5udm26699.1.2 switch=n enabled=y phases=2 Linecode=1P_OH_AL_2/0_Rucina_0_416_0_2_1_2_2_2

New Line.l(r:p5udm26700-p5ulv31825) Units=km Length=0.0169385 bus1=p5udm26700.1.2 bus2=p5ulv31825.1.2 switch=n enabled=y phases=2 Linecode=1P_OH_AL_2/0_Rucina_0_416_0_2_2_2_2

New Line.l(r:p5udm26700-p5udt9720lv) Units=km Length=0.0357391 bus1=p5udt9720lv.1.2 bus2=p5udm26700.1.2 switch=n enabled=y phases=2 Linecode=1P_OH_AL_4/0_Zuzara_0_416_0_2_2_2_2

New Line.l(r:p5udt13877lv-p5ulv26251) Units=km Length=0.063482 bus1=p5udt13877lv.1.2 bus2=p5ulv26251.1.2 switch=n enabled=y phases=2 Linecode=1P_OH_AL_4/0_Zuzara_0_416_0_2_2_2_2

New Line.l(r:p5udt17305lv-p5ulv31306) Units=km Length=0.0367401 bus1=p5udt17305lv.1.2 bus2=p5ulv31306.1.2 switch=n enabled=y phases=2 Linecode=1P_OH_AL_4/0_Zuzara_0_416_0_2_2_2_2

New Line.l(r:p5udm49113-p5ulv38505) Units=km Length=0.0379696 bus1=p5udm49113.1.2 bus2=p5ulv38505.1.2 switch=n enabled=y phases=2 Linecode=1P_OH_AL_4/0_Zuzara_0_416_0_2_2_2_2

New Line.l(r:p5udm49113-p5udt17305lv) Units=km Length=0.0593623 bus1=p5udt17305lv.1.2 bus2=p5udm49113.1.2 switch=n enabled=y phases=2 Linecode=1P_OH_AL_4/0_Zuzara_0_416_0_2_2_2_2

New Line.l(r:p5udm49114-p5ulv73744) Units=km Length=0.0272716 bus1=p5udm49114.1.2 bus2=p5ulv73744.1.2 switch=n enabled=y phases=2 Linecode=1P_OH_AL_4/0_Zuzara_0_416_0_2_2_2_2

New Line.l(r:p5udm49114-p5udt17305lv) Units=km Length=0.0311589 bus1=p5udt17305lv.1.2 bus2=p5udm49114.1.2 switch=n enabled=y phases=2 Linecode=1P_OH_AL_4/0_Zuzara_0_416_0_2_2_2_2

New Line.l(r:p5udt18574lv-p5ulv33444) Units=km Length=0.0134702 bus1=p5udt18574lv.1.2 bus2=p5ulv33444.1.2 switch=n enabled=y phases=2 Linecode=1P_OH_AL_2/0_Rucina_0_416_0_2_2_2_2

New Line.l(r:p5udm57421-p5ulv37386) Units=km Length=0.00741062 bus1=p5udm57421.1.2 bus2=p5ulv37386.1.2 switch=n enabled=y phases=2 Linecode=1P_OH_AL_2/0_Rucina_0_416_0_2_2_2_2

New Line.l(r:p5udm57421-p5udt20726lv) Units=km Length=0.0155165 bus1=p5udt20726lv.1.2 bus2=p5udm57421.1.2 switch=n enabled=y phases=2 Linecode=1P_OH_AL_2/0_Rucina_0_416_0_2_2_2_2

New Line.l(r:p5udm57422-p5ulv54096) Units=km Length=0.0242625 bus1=p5udm57422.1.2 bus2=p5ulv54096.1.2 switch=n enabled=y phases=2 Linecode=1P_OH_AL_2/0_Rucina_0_416_0_2_2_2_2

New Line.l(r:p5udm57422-p5udt20726lv) Units=km Length=0.07358400000000001 bus1=p5udt20726lv.1.2 bus2=p5udm57422.1.2 switch=n enabled=y phases=2 Linecode=1P_OH_AL_4/0_Zuzara_0_416_0_2_2_2_2

New Line.l(r:p5udt22535lv-p5ulv41220) Units=km Length=0.0505757 bus1=p5udt22535lv.1.2 bus2=p5ulv41220.1.2 switch=n enabled=y phases=2 Linecode=1P_OH_AL_4/0_Zuzara_0_416_0_2_2_2_2

New Line.l(r:p5udt14706-p5udt20726) Units=km Length=0.417099 bus1=p5udt14706-p5udt20726x.1 bus2=p5udt20726.1 switch=n enabled=y phases=1 Linecode=1P_OH_AL_ACSR_#2_Sparrow_12_47_0_1_1_1_1

New Line.l(r:p5udt13877-p5udt22535) Units=km Length=0.001 bus1=p5udt13877.3 bus2=p5udt22535.3 switch=n enabled=y phases=1 Linecode=1P_OH_AL_ACSR_#2_Sparrow_12_47_0_1_1_1_1

New Line.l(r:p5udt13877-p5udt27781) Units=km Length=0.0576596 bus1=p5udt13877-p5udt27781x.3 bus2=p5udt13877.3 switch=n enabled=y phases=1 Linecode=1P_OH_AL_ACSR_#2_Sparrow_12_47_0_1_1_1_1

New Line.l(r:p5udt26068-p5udt29471) Units=km Length=0.0956073 bus1=p5udt26068.1.2.3 bus2=p5udt29471.1.2.3 switch=n enabled=y phases=3 Linecode=3P_OH_AL_ACSR_4/0_Penguin_12_47_0_3_3_3_3

New Line.l(r:p5udt26068-p5umv109) Units=km Length=0.178708 bus1=p5umv109.1.2.3 bus2=p5udt26068.1.2.3 switch=n enabled=y phases=3 Linecode=3P_OH_AL_ACSR_4/0_Penguin_12_47_0_3_3_3_3

New Line.l(r:p5udt9720-p5umv109)_s0 Units=km Length=0.001 bus1=p5udt9720.1.2.3 bus2=p5udt9720-p5umv109x.1.2.3 switch=n enabled=y phases=3 Linecode=3P_OH_AL_ACSR_4/0_Penguin_12_47_0_3_3_3_3

New Line.l(r:p5udt9720-p5umv109)_s1 Units=km Length=0.001 bus1=p5udt9720-p5umv109x.1.2.3 bus2=p5udt9720-p5umv109xx.1.2.3 switch=n enabled=y phases=3 Linecode=3P_OH_AL_ACSR_4/0_Penguin_12_47_0_3_3_3_3

New Line.l(r:p5udt9720-p5umv109)_s2 Units=km Length=0.170934 bus1=p5udt9720-p5umv109xx.1.2.3 bus2=p5umv109.1.2.3 switch=n enabled=y phases=3 Linecode=3P_OH_AL_ACSR_4/0_Penguin_12_47_0_3_3_3_3

New Line.l(r:p5udt14706-p5udt18574) Units=km Length=0.0557594 bus1=p5udt18574.1.2.3 bus2=p5udt14706.1.2.3 switch=n enabled=y phases=3 Linecode=3P_OH_AL_ACSR_4/0_Penguin_12_47_0_3_3_3_3

New Line.l(r:p5udt18574-p5udt29477) Units=km Length=0.019069400000000004 bus1=p5udt29477.1.2.3 bus2=p5udt18574.1.2.3 switch=n enabled=y phases=3 Linecode=3P_OH_AL_ACSR_4/0_Penguin_12_47_0_3_3_3_3

New Line.l(r:p5udt10197-p5udt29477) Units=km Length=0.221937 bus1=p5udt10197.1.2.3 bus2=p5udt29477.1.2.3 switch=n enabled=y phases=3 Linecode=3P_OH_AL_ACSR_4/0_Penguin_12_47_0_3_3_3_3

New Line.l(r:p5udt10197-p5udt20426) Units=km Length=0.185385 bus1=p5udt20426.1.2.3 bus2=p5udt10197.1.2.3 switch=n enabled=y phases=3 Linecode=3P_OH_AL_ACSR_4/0_Penguin_12_47_0_3_3_3_3

New Line.l(r:p5udt17305-p5udt20426) Units=km Length=0.102975 bus1=p5udt17305.1.2.3 bus2=p5udt20426.1.2.3 switch=n enabled=y phases=3 Linecode=3P_OH_AL_ACSR_4/0_Penguin_12_47_0_3_3_3_3

New Line.l(r:p5udt17305-p5udt19204) Units=km Length=0.0999223 bus1=p5udt19204.1.2.3 bus2=p5udt17305.1.2.3 switch=n enabled=y phases=3 Linecode=3P_OH_AL_ACSR_4/0_Penguin_12_47_0_3_3_3_3

New Line.l(r:p5udt19204-p5udt8172) Units=km Length=0.101953 bus1=p5udt8172.1.2.3 bus2=p5udt19204.1.2.3 switch=n enabled=y phases=3 Linecode=3P_OH_AL_ACSR_4/0_Penguin_12_47_0_3_3_3_3

New Line.l(r:p5udt30648-p5udt8172) Units=km Length=0.123239 bus1=p5udt30648.1.2.3 bus2=p5udt8172.1.2.3 switch=n enabled=y phases=3 Linecode=3P_OH_AL_ACSR_4/0_Penguin_12_47_0_3_3_3_3

New Line.l(r:p5udt23503-p5udt30648) Units=km Length=0.0183395 bus1=p5udt23503.1.2.3 bus2=p5udt30648.1.2.3 switch=n enabled=y phases=3 Linecode=3P_OH_AL_ACSR_4/0_Penguin_12_47_0_3_3_3_3

New Line.l(r:p5udt23503-p5udt23970) Units=km Length=0.181284 bus1=p5udt23970.1.2.3 bus2=p5udt23503.1.2.3 switch=n enabled=y phases=3 Linecode=3P_OH_AL_ACSR_4/0_Penguin_12_47_0_3_3_3_3

New Line.l(r:p5udt23970-p5udt33081) Units=km Length=0.430321 bus1=p5udt33081.1.2.3 bus2=p5udt23970.1.2.3 switch=n enabled=y phases=3 Linecode=3P_OH_AL_ACSR_4/0_Penguin_12_47_0_3_3_3_3

New Line.l(r:p5udt33081-p5udt9720)_s0 Units=km Length=0.001 bus1=p5udt9720.1.2.3 bus2=p5udt33081-p5udt9720xx.1.2.3 switch=n enabled=y phases=3 Linecode=3P_OH_AL_ACSR_4/0_Penguin_12_47_0_3_3_3_3

New Line.l(r:p5udt33081-p5udt9720)_s1 Units=km Length=0.001 bus1=p5udt33081-p5udt9720xx.1.2.3 bus2=p5udt33081-p5udt9720x.1.2.3 switch=n enabled=y phases=3 Linecode=3P_OH_AL_ACSR_4/0_Penguin_12_47_0_3_3_3_3

New Line.l(r:p5udt33081-p5udt9720)_s2 Units=km Length=0.220255 bus1=p5udt33081-p5udt9720x.1.2.3 bus2=p5udt33081.1.2.3 switch=n enabled=y phases=3 Linecode=3P_OH_AL_ACSR_4/0_Penguin_12_47_0_3_3_3_3

New Line.l(r:p5udt9720-p5uhs11_1247)_s2 Units=km Length=0.112257 bus1=p5udt9720-p5uhs11_1247x.1.2.3 bus2=p5udt9720.1.2.3 switch=n enabled=y phases=3 Linecode=3P_OH_AL_ACSR_4/0_Penguin_12_47_0_3_3_3_3

New Line.l(r:p5udt26068lv-p5ulv50167) Units=km Length=0.0147227 bus1=p5udt26068lv.1.2.3 bus2=p5ulv50167.1.2.3 switch=n enabled=y phases=3 Linecode=3P_UG_AL_750kcmil_25_0_416_0_3_3_3_3

New Line.l(r:p5udt29471lv-p5ulv60927) Units=km Length=0.014867400000000001 bus1=p5udt29471lv.1.2.3 bus2=p5ulv60927.1.2.3 switch=n enabled=y phases=3 Linecode=3P_UG_AL_750kcmil_25_0_416_0_3_3_3_3

New Line.l(r:p5udt33220lv-p5ulv75979) Units=km Length=0.0132967 bus1=p5udt33220lv.1.2.3 bus2=p5ulv75979.1.2.3 switch=n enabled=y phases=3 Linecode=3P_UG_AL_750kcmil_25_0_416_0_3_3_3_3

New Line.l(r:p5udt29471-p5udt33220) Units=km Length=0.144795 bus1=p5udt29471.1.2.3 bus2=p5udt33220.1.2.3 switch=n enabled=y phases=3 Linecode=3P_OH_AL_ACSR_4/0_Penguin_12_47_0_3_3_3_3

New Line.l(r:p5udt33081lv-p5ulv75432) Units=km Length=0.0124661 bus1=p5udt33081lv.1.2.3 bus2=p5ulv75432.1.2.3 switch=n enabled=y phases=3 Linecode=3P_UG_AL_750kcmil_25_0_416_0_3_3_3_3

New Line.l(r:p5udt23970lv-p5ulv44568) Units=km Length=0.00470558 bus1=p5udt23970lv.1.2.3 bus2=p5ulv44568.1.2.3 switch=n enabled=y phases=3 Linecode=3P_UG_AL_750kcmil_25_0_416_0_3_3_3_3

New Line.l(r:p5udt23275lv-p5ulv42896) Units=km Length=0.0069898 bus1=p5udt23275lv.1.2.3 bus2=p5ulv42896.1.2.3 switch=n enabled=y phases=3 Linecode=3P_UG_AL_350kcmil_15_0_416_0_3_3_3_3

New Line.l(r:p5udt23275-p5udt23970) Units=km Length=0.37512 bus1=p5udt23970.1.2.3 bus2=p5udt23275.1.2.3 switch=n enabled=y phases=3 Linecode=3P_OH_AL_ACSR_4/0_Penguin_12_47_0_3_3_3_3

New Line.l(r:p5udt23503lv-p5ulv43456) Units=km Length=0.0158886 bus1=p5udt23503lv.1.2.3 bus2=p5ulv43456.1.2.3 switch=n enabled=y phases=3 Linecode=3P_UG_AL_350kcmil_15_0_416_0_3_3_3_3

New Line.l(r:p5udt30648lv-p5ulv65415) Units=km Length=0.0150824 bus1=p5udt30648lv.1.2.3 bus2=p5ulv65415.1.2.3 switch=n enabled=y phases=3 Linecode=3P_UG_AL_350kcmil_15_0_416_0_3_3_3_3

New Line.l(r:p5udt8172lv-p5ulv19572) Units=km Length=0.017433600000000004 bus1=p5udt8172lv.1.2.3 bus2=p5ulv19572.1.2.3 switch=n enabled=y phases=3 Linecode=3P_UG_AL_350kcmil_15_0_416_0_3_3_3_3

New Line.l(r:p5udt19204lv-p5ulv34571) Units=km Length=0.0130869 bus1=p5udt19204lv.1.2.3 bus2=p5ulv34571.1.2.3 switch=n enabled=y phases=3 Linecode=3P_UG_AL_350kcmil_15_0_416_0_3_3_3_3

New Line.l(r:p5udm56751-p5ulv36818) Units=km Length=0.0115065 bus1=p5udm56751.1.2.3 bus2=p5ulv36818.1.2.3 switch=n enabled=y phases=3 Linecode=3P_UG_AL_350kcmil_15_0_416_0_3_3_3_3

New Line.l(r:p5udm56752-p5ulv50171) Units=km Length=0.013781500000000002 bus1=p5udm56752.1.2.3 bus2=p5ulv50171.1.2.3 switch=n enabled=y phases=3 Linecode=3P_UG_AL_350kcmil_15_0_416_0_3_3_3_3

New Line.l(r:p5udm56751-p5udm56752) Units=km Length=0.0155662 bus1=p5udm56751.1.2.3 bus2=p5udm56752.1.2.3 switch=n enabled=y phases=3 Linecode=3P_UG_AL_350kcmil_15_0_416_0_3_3_3_3

New Line.l(r:p5udm56751-p5udt20426lv) Units=km Length=0.0366493 bus1=p5udt20426lv.1.2.3 bus2=p5udm56751.1.2.3 switch=n enabled=y phases=3 Linecode=3P_UG_AL_750kcmil_25_0_416_0_3_3_3_3

New Line.l(r:p5udm56753-p5ulv73173) Units=km Length=0.00621007 bus1=p5udm56753.1.2.3 bus2=p5ulv73173.1.2.3 switch=n enabled=y phases=3 Linecode=3P_UG_AL_350kcmil_15_0_416_0_3_3_3_3

New Line.l(r:p5udm56753-p5udt20426lv) Units=km Length=0.0436112 bus1=p5udt20426lv.1.2.3 bus2=p5udm56753.1.2.3 switch=n enabled=y phases=3 Linecode=3P_UG_AL_350kcmil_15_0_416_0_3_3_3_3

New Line.l(r:p5udm28251-p5ulv42363) Units=km Length=0.0158401 bus1=p5udm28251.1.2.3 bus2=p5ulv42363.1.2.3 switch=n enabled=y phases=3 Linecode=3P_UG_AL_750kcmil_25_0_416_0_3_3_3_3

New Line.l(r:p5udm28250-p5ulv21745) Units=km Length=0.0174381 bus1=p5udm28250.1.2.3 bus2=p5ulv21745.1.2.3 switch=n enabled=y phases=3 Linecode=3P_UG_AL_350kcmil_15_0_416_0_3_3_3_3

New Line.l(r:p5udm28250-p5udm28251) Units=km Length=0.0461435 bus1=p5udm28251.1.2.3 bus2=p5udm28250.1.2.3 switch=n enabled=y phases=3 Linecode=3P_UG_AL_350kcmil_15_0_416_0_3_3_3_3

New Line.l(r:p5udm28251-p5udt10197lv) Units=km Length=0.0193231 bus1=p5udt10197lv.1.2.3 bus2=p5udm28251.1.2.3 switch=n enabled=y phases=3 Linecode=3P_UG_AL_750kcmil_25_0_416_0_3_3_3_3

New Line.l(r:p5udm28252-p5ulv73178) Units=km Length=0.0167187 bus1=p5udm28252.1.2.3 bus2=p5ulv73178.1.2.3 switch=n enabled=y phases=3 Linecode=3P_UG_AL_350kcmil_15_0_416_0_3_3_3_3

New Line.l(r:p5udm28252-p5udt10197lv) Units=km Length=0.0293515 bus1=p5udt10197lv.1.2.3 bus2=p5udm28252.1.2.3 switch=n enabled=y phases=3 Linecode=3P_UG_AL_350kcmil_15_0_416_0_3_3_3_3

New Line.l(r:p5udt29477lv-p5ulv60936) Units=km Length=0.0136241 bus1=p5udt29477lv.1.2.3 bus2=p5ulv60936.1.2.3 switch=n enabled=y phases=3 Linecode=3P_UG_AL_350kcmil_15_0_416_0_3_3_3_3

New Line.l(r:p5udt14706lv-p5ulv27386) Units=km Length=0.00437824 bus1=p5udt14706lv.1.2.3 bus2=p5ulv27386.1.2.3 switch=n enabled=y phases=3 Linecode=3P_UG_AL_750kcmil_25_0_416_0_3_3_3_3

New Line.l(r:p5udt14706-p5umv67) Units=km Length=0.282102 bus1=p5udt14706.1.2.3 bus2=p5umv67.1.2.3 switch=n enabled=y phases=3 Linecode=3P_OH_AL_ACSR_4/0_Penguin_12_47_0_3_3_3_3

New Line.l(r:p5udt27781lv-p5ulv55233) Units=km Length=0.0129333 bus1=p5udt27781lv.1.2.3 bus2=p5ulv55233.1.2.3 switch=n enabled=y phases=3 Linecode=3P_UG_AL_350kcmil_15_0_416_0_3_3_3_3

New Line.l(r:p5udt27781-p5udt30648) Units=km Length=0.13455100000000003 bus1=p5udt30648.1.2.3 bus2=p5udt27781.1.2.3 switch=n enabled=y phases=3 Linecode=3P_OH_AL_ACSR_4/0_Penguin_12_47_0_3_3_3_3

New Line.l(r:p5udt26665lv-p5ulv51890) Units=km Length=0.026093900000000003 bus1=p5udt26665lv.1.2.3 bus2=p5ulv51890.1.2.3 switch=n enabled=y phases=3 Linecode=3P_UG_AL_750kcmil_25_0_416_0_3_3_3_3

New Line.l(r:p5udt32820lv-p5ulv74285) Units=km Length=0.0139793 bus1=p5udt32820lv.1.2.3 bus2=p5ulv74285.1.2.3 switch=n enabled=y phases=3 Linecode=3P_UG_AL_350kcmil_15_0_416_0_3_3_3_3

New Line.l(r:p5udt26665-p5udt32820) Units=km Length=0.163471 bus1=p5udt26665.1.2.3 bus2=p5udt32820.1.2.3 switch=n enabled=y phases=3 Linecode=3P_OH_AL_ACSR_4/0_Penguin_12_47_0_3_3_3_3

New Line.l(r:p5udt23970-p5udt26665) Units=km Length=0.149681 bus1=p5udt23970.1.2.3 bus2=p5udt26665.1.2.3 switch=n enabled=y phases=3 Linecode=3P_OH_AL_ACSR_4/0_Penguin_12_47_0_3_3_3_3

New Line.l(r:p5udt11189-p5udt9720) Units=km Length=0.0502201 bus1=p5udt11189-p5udt9720x.1.2.3 bus2=p5udt9720.1.2.3 switch=n enabled=y phases=3 Linecode=3P_OH_AL_ACSR_1033kcmil_Curlew_12.47_1_3_3_3_3

New Line.l(r:p5udt17304-p5udt23275) Units=km Length=0.189368 bus1=p5udt17304-p5udt23275x.1.2.3 bus2=p5udt17304.1.2.3 switch=n enabled=y phases=3 Linecode=3P_OH_AL_ACSR_1033kcmil_Curlew_12.47_1_3_3_3_3

New Line.l(r:p5udt27781-p5udt32820) Units=km Length=0.0945729 bus1=p5udt27781-p5udt32820x.1.2.3 bus2=p5udt32820.1.2.3 switch=n enabled=y phases=3 Linecode=3P_OH_AL_ACSR_1033kcmil_Curlew_12.47_1_3_3_3_3

New Line.l(r:p5udt13028-p5udt20426) Units=km Length=0.352827 bus1=p5udt13028-p5udt20426x.1.2.3 bus2=p5udt13028.1.2.3 switch=n enabled=y phases=3 Linecode=3P_OH_AL_ACSR_1033kcmil_Curlew_12.47_1_3_3_3_3

New Line.elbswitch(r:p5udt17304-p5udt23275)p5u_151300 Units=km Length=0.001 bus1=p5udt23275.1.2.3 bus2=p5udt17304-p5udt23275x.1.2.3 switch=y enabled=n phases=3 Linecode=elbswitch_3_3_3_3

New Line.elbswitch(r:p5udt27781-p5udt32820)p5u_151325 Units=km Length=0.001 bus1=p5udt27781.1.2.3 bus2=p5udt27781-p5udt32820x.1.2.3 switch=y enabled=n phases=3 Linecode=elbswitch_3_6_3_3_3

New Line.elbswitch(r:p5udt13028-p5udt20426)p5u_151424 Units=km Length=0.001 bus1=p5udt20426.1.2.3 bus2=p5udt13028-p5udt20426x.1.2.3 switch=y enabled=n phases=3 Linecode=elbswitch_3_6_3_3_3

New Line.fuse(r:p5udt14706-p5udt20726)p5u_153444 Units=km Length=0.001 bus1=p5udt14706.1 bus2=p5udt14706-p5udt20726x.1 switch=n enabled=y phases=1 Linecode=fuse_1_1_1_1

New Fuse.Fuse_fuse(r:p5udt14706-p5udt20726)p5u_153444 monitoredobj=Line.fuse(r:p5udt14706-p5udt20726)p5u_153444 enabled=y ratedcurrent=100.0

New Line.fuse(r:p5udt13877-p5udt27781)p5u_154889 Units=km Length=0.001 bus1=p5udt27781.3 bus2=p5udt13877-p5udt27781x.3 switch=n enabled=y phases=1 Linecode=fuse_1_7_1_1_1

New Fuse.Fuse_fuse(r:p5udt13877-p5udt27781)p5u_154889 monitoredobj=Line.fuse(r:p5udt13877-p5udt27781)p5u_154889 enabled=y ratedcurrent=100.0
