New Load.load_p5ulv19572 conn=wye bus1=p5ulv19572.1.2.3 kV=0.48 Vminpu=0.8 Vmaxpu=1.2 model=1 kW=45.7505 kvar=9.290035253336013 Phases=3

New Load.load_p5ulv21215 conn=wye bus1=p5ulv21215.1.2 kV=0.2080002494301389 Vminpu=0.8 Vmaxpu=1.2 model=1 kW=7.83008 kvar=1.5899655574571043 Phases=2

New Load.load_p5ulv21745 conn=wye bus1=p5ulv21745.1.2.3 kV=0.48 Vminpu=0.8 Vmaxpu=1.2 model=1 kW=44.0004 kvar=8.934662291360443 Phases=3

New Load.load_p5ulv26251 conn=wye bus1=p5ulv26251.1.2 kV=0.2080002494301389 Vminpu=0.8 Vmaxpu=1.2 model=1 kW=7.7500800000000005 kvar=1.5696611031833951 Phases=2

New Load.load_p5umv67 conn=wye bus1=p5umv67.1.2.3 kV=12.47 Vminpu=0.8 Vmaxpu=1.2 model=1 kW=866.689 kvar=175.98870752622452 Phases=3

New Load.load_p5ulv27386 conn=wye bus1=p5ulv27386.1.2.3 kV=0.48 Vminpu=0.8 Vmaxpu=1.2 model=1 kW=213.122 kvar=43.27626787164026 Phases=3

New Load.load_p5ulv31306 conn=wye bus1=p5ulv31306.1.2 kV=0.2080002494301389 Vminpu=0.8 Vmaxpu=1.2 model=1 kW=13.1401 kvar=2.66821110659688 Phases=2

New Load.load_p5ulv31825 conn=wye bus1=p5ulv31825.1.2 kV=0.2080002494301389 Vminpu=0.8 Vmaxpu=1.2 model=1 kW=5.87006 kvar=1.1888915798743651 Phases=2

New Load.load_p5ulv33444 conn=wye bus1=p5ulv33444.1.2 kV=0.2080002494301389 Vminpu=0.8 Vmaxpu=1.2 model=1 kW=9.17009 kvar=1.8620661932932765 Phases=2

New Load.load_p5ulv34571 conn=wye bus1=p5ulv34571.1.2.3 kV=0.48 Vminpu=0.8 Vmaxpu=1.2 model=1 kW=33.740300000000005 kvar=6.851260127389495 Phases=3

New Load.load_p5ulv36818 conn=wye bus1=p5ulv36818.1.2.3 kV=0.48 Vminpu=0.8 Vmaxpu=1.2 model=1 kW=34.1803 kvar=6.940605938068456 Phases=3

New Load.load_p5ulv37386 conn=wye bus1=p5ulv37386.1.2 kV=0.2080002494301389 Vminpu=0.8 Vmaxpu=1.2 model=1 kW=6.29006 kvar=1.280538637790892 Phases=2

New Load.load_p5ulv38505 conn=wye bus1=p5ulv38505.1.2 kV=0.2080002494301389 Vminpu=0.8 Vmaxpu=1.2 model=1 kW=3.56004 kvar=0.7191629458284491 Phases=2

New Load.load_p5ulv41220 conn=wye bus1=p5ulv41220.1.2 kV=0.2080002494301389 Vminpu=0.8 Vmaxpu=1.2 model=1 kW=6.25006 kvar=1.269128812482165 Phases=2

New Load.load_p5ulv42363 conn=wye bus1=p5ulv42363.1.2.3 kV=0.48 Vminpu=0.8 Vmaxpu=1.2 model=1 kW=165.332 kvar=33.5720944799412 Phases=3

New Load.load_p5ulv42896 conn=wye bus1=p5ulv42896.1.2.3 kV=0.48 Vminpu=0.8 Vmaxpu=1.2 model=1 kW=21.3702 kvar=4.3394041894808 Phases=3

New Load.load_p5ulv43456 conn=wye bus1=p5ulv43456.1.2.3 kV=0.48 Vminpu=0.8 Vmaxpu=1.2 model=1 kW=49.38049999999999 kvar=10.027138191437448 Phases=3

New Load.load_p5ulv44568 conn=wye bus1=p5ulv44568.1.2.3 kV=0.48 Vminpu=0.8 Vmaxpu=1.2 model=1 kW=76.7308 kvar=15.580853477375657 Phases=3

New Load.load_p5ulv45732 conn=wye bus1=p5ulv45732.1.2 kV=0.2080002494301389 Vminpu=0.8 Vmaxpu=1.2 model=1 kW=7.630080000000001 kvar=1.5493538253303036 Phases=2

New Load.load_p5ulv50167 conn=wye bus1=p5ulv50167.1.2.3 kV=0.48 Vminpu=0.8 Vmaxpu=1.2 model=1 kW=197.342 kvar=40.07200220683568 Phases=3

New Load.load_p5ulv50171 conn=wye bus1=p5ulv50171.1.2.3 kV=0.48 Vminpu=0.8 Vmaxpu=1.2 model=1 kW=52.1505 kvar=10.58961068139364 Phases=3

New Load.load_p5ulv51890 conn=wye bus1=p5ulv51890.1.2.3 kV=0.48 Vminpu=0.8 Vmaxpu=1.2 model=1 kW=138.621 kvar=28.14819459574631 Phases=3

New Load.load_p5ulv54096 conn=wye bus1=p5ulv54096.1.2 kV=0.2080002494301389 Vminpu=0.8 Vmaxpu=1.2 model=1 kW=15.3302 kvar=3.1129298792514124 Phases=2

New Load.load_p5ulv55233 conn=wye bus1=p5ulv55233.1.2.3 kV=0.48 Vminpu=0.8 Vmaxpu=1.2 model=1 kW=27.260300000000004 kvar=5.535440006481149 Phases=3

New Load.load_p5ulv60927 conn=wye bus1=p5ulv60927.1.2.3 kV=0.48 Vminpu=0.8 Vmaxpu=1.2 model=1 kW=243.11200000000002 kvar=49.36599710405405 Phases=3

New Load.load_p5ulv60936 conn=wye bus1=p5ulv60936.1.2.3 kV=0.48 Vminpu=0.8 Vmaxpu=1.2 model=1 kW=34.8603 kvar=7.078685827299581 Phases=3

New Load.load_p5ulv62033 conn=wye bus1=p5ulv62033.1.2 kV=0.2080002494301389 Vminpu=0.8 Vmaxpu=1.2 model=1 kW=9.31009 kvar=1.890494405782037 Phases=2

New Load.load_p5ulv65415 conn=wye bus1=p5ulv65415.1.2.3 kV=0.48 Vminpu=0.8 Vmaxpu=1.2 model=1 kW=30.420300000000005 kvar=6.177105374084602 Phases=3

New Load.load_p5ulv73173 conn=wye bus1=p5ulv73173.1.2.3 kV=0.48 Vminpu=0.8 Vmaxpu=1.2 model=1 kW=40.0804 kvar=8.138672341675145 Phases=3

New Load.load_p5ulv73178 conn=wye bus1=p5ulv73178.1.2.3 kV=0.48 Vminpu=0.8 Vmaxpu=1.2 model=1 kW=30.530300000000004 kvar=6.199441826754342 Phases=3

New Load.load_p5ulv73744 conn=wye bus1=p5ulv73744.1.2 kV=0.2080002494301389 Vminpu=0.8 Vmaxpu=1.2 model=1 kW=5.90006 kvar=1.2011419279441737 Phases=2

New Load.load_p5ulv74285 conn=wye bus1=p5ulv74285.1.2.3 kV=0.48 Vminpu=0.8 Vmaxpu=1.2 model=1 kW=46.7605 kvar=9.495124500576356 Phases=3

New Load.load_p5ulv75432 conn=wye bus1=p5ulv75432.1.2.3 kV=0.48 Vminpu=0.8 Vmaxpu=1.2 model=1 kW=125.251 kvar=25.43330030306967 Phases=3

New Load.load_p5umv109 conn=wye bus1=p5umv109.1.2.3 kV=12.47 Vminpu=0.8 Vmaxpu=1.2 model=1 kW=872.399 kvar=177.14817247844474 Phases=3

New Load.load_p5ulv75979 conn=wye bus1=p5ulv75979.1.2.3 kV=0.48 Vminpu=0.8 Vmaxpu=1.2 model=1 kW=263.153 kvar=53.43549572182013 Phases=3
