New Capacitor.p5uc63 Bus1=p5udt29781 phases=3 Kv=12.47 conn=Wye Kvar=450.0

New CapControl.p5uc63 Capacitor=p5uc63 Element=Line.l(r:p5udt29781-p5udt9237) Terminal=1 delay=100.0 Type=voltage Vmin=120.5 Vmax=125.0 Ptratio=59.99631547328862 Ctratio=100.0

New Capacitor.p5uc66 Bus1=p5udt15128 phases=3 Kv=12.47 conn=Wye Kvar=300.0

New CapControl.p5uc66 Capacitor=p5uc66 Element=Line.l(r:p5udt15128-p5udt19829) Terminal=1 delay=100.0 Type=voltage Vmin=120.5 Vmax=125.0 Ptratio=59.99631547328862 Ctratio=100.0
