New Capacitor.p5uc64 Bus1=p5udt22502 phases=3 Kv=12.47 conn=Wye Kvar=300.0

New CapControl.p5uc64 Capacitor=p5uc64 Element=Line.padswitch(r:p5udt21242-p5udt22502)p5u_127982 Terminal=1 delay=100.0 Type=voltage Vmin=120.5 Vmax=125.0 Ptratio=59.99631547328862 Ctratio=100.0
