New Capacitor.p5uc67 Bus1=p5udt9624 phases=3 Kv=12.47 conn=Wye Kvar=300.0

New CapControl.p5uc67 Capacitor=p5uc67 Element=Line.l(r:p5udt10094-p5udt9624) Terminal=1 delay=100.0 Type=voltage Vmin=120.5 Vmax=125.0 Ptratio=59.99631547328862 Ctratio=100.0

New Capacitor.p5uc68 Bus1=p5udt15824 phases=3 Kv=12.47 conn=Wye Kvar=450.0

New CapControl.p5uc68 Capacitor=p5uc68 Element=Line.l(r:p5udt15824-p5udt22737) Terminal=1 delay=100.0 Type=voltage Vmin=120.5 Vmax=125.0 Ptratio=59.99631547328862 Ctratio=100.0
