New Capacitor.p5uc69 Bus1=p5udt22474 phases=3 Kv=12.47 conn=Wye Kvar=450.0

New CapControl.p5uc69 Capacitor=p5uc69 Element=Line.l(r:p5udt13370-p5udt22474) Terminal=1 delay=100.0 Type=voltage Vmin=120.5 Vmax=125.0 Ptratio=59.99631547328862 Ctratio=100.0

New Capacitor.p5uc71 Bus1=p5udt22973 phases=3 Kv=12.47 conn=Wye Kvar=450.0

New CapControl.p5uc71 Capacitor=p5uc71 Element=Line.l(r:p5udt22973-p5udt27338) Terminal=1 delay=100.0 Type=voltage Vmin=120.5 Vmax=125.0 Ptratio=59.99631547328862 Ctratio=100.0
