Clear

New Circuit.substation_p5uhs15_69 bus1=p5uhs15_69 pu=1.0 basekV=69.0 R1=1e-05 X1=1e-05 R0=1e-05 X0=1e-05

Redirect Transformers.dss
Redirect p5uhs15_1247--p5udt31571/Transformers.dss
Redirect p5uhs15_1247--p5udt17500/Transformers.dss
Redirect Regulators.dss
Redirect p5uhs15_1247--p5udt31571/Loads.dss
Redirect p5uhs15_1247--p5udt17500/Loads.dss
Redirect LineCodes.dss
Redirect p5uhs15_1247--p5udt31571/LineCodes.dss
Redirect p5uhs15_1247--p5udt17500/LineCodes.dss
Redirect Lines.dss
Redirect p5uhs15_1247--p5udt31571/Lines.dss
Redirect p5uhs15_1247--p5udt17500/Lines.dss
Redirect p5uhs15_1247--p5udt31571/Capacitors.dss
Redirect p5uhs15_1247--p5udt17500/Capacitors.dss

Set Voltagebases=[0.2080002494301389, 0.48, 7.199560000000001, 12.47, 69.0]

Calcvoltagebases

Buscoords Buscoords.dss

Solve
