New Capacitor.p5uc74 Bus1=p5umv108 phases=3 Kv=12.47 conn=Wye Kvar=450.0

New CapControl.p5uc74 Capacitor=p5uc74 Element=Line.l(r:p5umv108-p5umv72) Terminal=1 delay=100.0 Type=voltage Vmin=120.5 Vmax=125.0 Ptratio=59.99631547328862 Ctratio=100.0
