New Capacitor.p5uc75 Bus1=p5udt9215 phases=3 Kv=12.47 conn=Wye Kvar=300.0

New CapControl.p5uc75 Capacitor=p5uc75 Element=Line.l(r:p5udt28659-p5udt9215) Terminal=1 delay=100.0 Type=voltage Vmin=120.5 Vmax=125.0 Ptratio=59.99631547328862 Ctratio=100.0

New Capacitor.p5uc77 Bus1=p5udt5266 phases=3 Kv=12.47 conn=Wye Kvar=450.0

New CapControl.p5uc77 Capacitor=p5uc77 Element=Line.padswitch(r:p5udt5266-p5udt5537)p5u_131700 Terminal=1 delay=100.0 Type=voltage Vmin=120.5 Vmax=125.0 Ptratio=59.99631547328862 Ctratio=100.0
