New Capacitor.p5uc76 Bus1=p5udt6443 phases=3 Kv=12.47 conn=Wye Kvar=450.0

New CapControl.p5uc76 Capacitor=p5uc76 Element=Line.padswitch(r:p5udt6443-p5udt6543)p5u_132597 Terminal=1 delay=100.0 Type=voltage Vmin=120.5 Vmax=125.0 Ptratio=59.99631547328862 Ctratio=100.0
