Clear

New Circuit.substation_p5uhs18_69 bus1=p5uhs18_69 pu=1.0 basekV=69.0 R1=1e-05 X1=1e-05 R0=1e-05 X0=1e-05

Redirect p5uhs18_1247--p5udt13853/Transformers.dss
Redirect p5uhs18_1247--p5udt9682/Transformers.dss
Redirect p5uhs18_1247--p5udt29300/Transformers.dss
Redirect Transformers.dss
Redirect Regulators.dss
Redirect p5uhs18_1247--p5udt13853/Loads.dss
Redirect p5uhs18_1247--p5udt9682/Loads.dss
Redirect p5uhs18_1247--p5udt29300/Loads.dss
Redirect p5uhs18_1247--p5udt13853/LineCodes.dss
Redirect p5uhs18_1247--p5udt9682/LineCodes.dss
Redirect p5uhs18_1247--p5udt29300/LineCodes.dss
Redirect LineCodes.dss
Redirect p5uhs18_1247--p5udt13853/Lines.dss
Redirect p5uhs18_1247--p5udt9682/Lines.dss
Redirect p5uhs18_1247--p5udt29300/Lines.dss
Redirect Lines.dss
Redirect p5uhs18_1247--p5udt13853/Capacitors.dss
Redirect p5uhs18_1247--p5udt9682/Capacitors.dss
Redirect p5uhs18_1247--p5udt29300/Capacitors.dss

Set Voltagebases=[0.2080002494301389, 0.48, 7.199560000000001, 12.47, 69.0]

Calcvoltagebases

Buscoords Buscoords.dss

Solve
