New Capacitor.p5uc87 Bus1=p5udt10335 phases=3 Kv=12.47 conn=Wye Kvar=450.0

New CapControl.p5uc87 Capacitor=p5uc87 Element=Line.l(r:p5udt10335-p5udt10643) Terminal=1 delay=100.0 Type=voltage Vmin=120.5 Vmax=125.0 Ptratio=59.99631547328862 Ctratio=100.0

New Capacitor.p5uc88 Bus1=p5umv82 phases=3 Kv=12.47 conn=Wye Kvar=300.0

New CapControl.p5uc88 Capacitor=p5uc88 Element=Line.l(r:p5udt12136-p5umv82) Terminal=1 delay=100.0 Type=voltage Vmin=120.5 Vmax=125.0 Ptratio=59.99631547328862 Ctratio=100.0
