New Capacitor.p5uc86 Bus1=p5udt16242 phases=3 Kv=12.47 conn=Wye Kvar=450.0

New CapControl.p5uc86 Capacitor=p5uc86 Element=Line.l(r:p5udt16242-p5udt23493) Terminal=1 delay=100.0 Type=voltage Vmin=120.5 Vmax=125.0 Ptratio=59.99631547328862 Ctratio=100.0
