New Capacitor.p5uc94 Bus1=p5udt17420 phases=3 Kv=12.47 conn=Wye Kvar=300.0

New CapControl.p5uc94 Capacitor=p5uc94 Element=Line.l(r:p5udt11357-p5udt17420) Terminal=1 delay=100.0 Type=voltage Vmin=120.5 Vmax=125.0 Ptratio=59.99631547328862 Ctratio=100.0
