New Capacitor.p5uc90 Bus1=p5udt32219 phases=3 Kv=12.47 conn=Wye Kvar=450.0

New CapControl.p5uc90 Capacitor=p5uc90 Element=Line.l(r:p5udt24062-p5udt32219) Terminal=1 delay=100.0 Type=voltage Vmin=120.5 Vmax=125.0 Ptratio=59.99631547328862 Ctratio=100.0

New Capacitor.p5uc92 Bus1=p5udt28368 phases=3 Kv=12.47 conn=Wye Kvar=450.0

New CapControl.p5uc92 Capacitor=p5uc92 Element=Line.padswitch(r:p5udt28368-p5udt28369)p5u_137189 Terminal=1 delay=100.0 Type=voltage Vmin=120.5 Vmax=125.0 Ptratio=59.99631547328862 Ctratio=100.0
