New Capacitor.p5uc7 Bus1=p5udt5287 phases=3 Kv=12.47 conn=Wye Kvar=450.0

New CapControl.p5uc7 Capacitor=p5uc7 Element=Line.padswitch(r:p5udt3061-p5udt5287)p5u_117324 Terminal=1 delay=100.0 Type=voltage Vmin=120.5 Vmax=125.0 Ptratio=59.99631547328862 Ctratio=100.0
