New Line.l(r:p5udt63lv-p5ulv2862) Units=km Length=0.0502416 bus1=p5udt63lv.1.2 bus2=p5ulv2862.1.2 switch=n enabled=y phases=2 Linecode=1P_UG_AL_1/0_Brenau_0_416_0_2_2_2_2

New Line.l(r:p5udt63lv-p5ulv8236) Units=km Length=0.0401907 bus1=p5udt63lv.1.2 bus2=p5ulv8236.1.2 switch=n enabled=y phases=2 Linecode=1P_UG_AL_1/0_Brenau_0_416_0_2_2_2_2

New Line.l(r:p5udm224-p5ulv64) Units=km Length=0.0190184 bus1=p5udm224.1.2 bus2=p5ulv64.1.2 switch=n enabled=y phases=2 Linecode=1P_UG_AL_4/0_Sweetbriar_0_416_0_2_2_2_2

New Line.l(r:p5udm224-p5udt63lv) Units=km Length=0.00968141 bus1=p5udt63lv.1.2 bus2=p5udm224.1.2 switch=n enabled=y phases=2 Linecode=1P_UG_AL_4/0_Sweetbriar_0_416_0_2_2_2_2

New Line.l(r:p5udt64lv-p5ulv65) Units=km Length=0.00829888 bus1=p5udt64lv.1.2 bus2=p5ulv65.1.2 switch=n enabled=y phases=2 Linecode=1P_OH_AL_2/0_Rucina_0_416_0_2_2_2_2

New Line.l(r:p5udt64lv-p5ulv8995) Units=km Length=0.0180098 bus1=p5udt64lv.1.2 bus2=p5ulv8995.1.2 switch=n enabled=y phases=2 Linecode=1P_OH_AL_2/0_Rucina_0_416_0_2_2_2_2

New Line.l(r:p5udt630lv-p5ulv13908) Units=km Length=0.0022435700000000003 bus1=p5udt630lv.1.2 bus2=p5ulv13908.1.2 switch=n enabled=y phases=2 Linecode=1P_OH_AL_4_Periwinkle_0_416_0_2_2_2_2

New Line.l(r:p5udt630lv-p5ulv16396) Units=km Length=0.021429 bus1=p5udt630lv.1.2 bus2=p5ulv16396.1.2 switch=n enabled=y phases=2 Linecode=1P_OH_AL_2/0_Rucina_0_416_0_2_2_2_2

New Line.l(r:p5udm2429-p5ulv672) Units=km Length=0.00324557 bus1=p5udm2429.1.2 bus2=p5ulv672.1.2 switch=n enabled=y phases=2 Linecode=1P_OH_AL_4_Periwinkle_0_416_0_2_2_2_2

New Line.l(r:p5udm2429-p5udt630lv) Units=km Length=0.019323300000000005 bus1=p5udt630lv.1.2 bus2=p5udm2429.1.2 switch=n enabled=y phases=2 Linecode=1P_OH_AL_2/0_Rucina_0_416_0_2_2_2_2

New Line.l(r:p5udm2432-p5ulv673) Units=km Length=0.0138527 bus1=p5udm2432.1.2 bus2=p5ulv673.1.2 switch=n enabled=y phases=2 Linecode=1P_UG_AL_1/0_Brenau_0_416_0_2_2_2_2

New Line.l(r:p5udm2432-p5udt631lv) Units=km Length=0.0666362 bus1=p5udt631lv.1.2 bus2=p5udm2432.1.2 switch=n enabled=y phases=2 Linecode=1P_UG_AL_1/0_Brenau_0_416_0_2_2_2_2

New Line.l(r:p5udm2433-p5ulv9189) Units=km Length=0.01765 bus1=p5udm2433.1.2 bus2=p5ulv9189.1.2 switch=n enabled=y phases=2 Linecode=1P_UG_AL_4/0_Sweetbriar_0_416_0_2_2_2_2

New Line.l(r:p5udm2433-p5udt631lv) Units=km Length=0.0199809 bus1=p5udt631lv.1.2 bus2=p5udm2433.1.2 switch=n enabled=y phases=2 Linecode=1P_UG_AL_4/0_Sweetbriar_0_416_0_2_2_2_2

New Line.l(r:p5udt928lv-p5ulv16047) Units=km Length=0.0156535 bus1=p5udt928lv.1.2 bus2=p5ulv16047.1.2 switch=n enabled=y phases=2 Linecode=1P_UG_AL_1/0_Brenau_0_416_0_2_2_2_2

New Line.l(r:p5udm3509-p5ulv1013) Units=km Length=0.0159751 bus1=p5udm3509.1.2 bus2=p5ulv1013.1.2 switch=n enabled=y phases=2 Linecode=1P_UG_AL_1/0_Brenau_0_416_0_2_2_2_2

New Line.l(r:p5udm3511-p5ulv9379) Units=km Length=0.0156453 bus1=p5udm3511.1.2 bus2=p5ulv9379.1.2 switch=n enabled=y phases=2 Linecode=1P_UG_AL_4/0_Sweetbriar_0_416_0_2_2_2_2

New Line.l(r:p5udm3509-p5udm3511) Units=km Length=0.00934679 bus1=p5udm3509.1.2 bus2=p5udm3511.1.2 switch=n enabled=y phases=2 Linecode=1P_UG_AL_4/0_Sweetbriar_0_416_0_2_2_2_2

New Line.l(r:p5udm3509-p5udt928lv) Units=km Length=0.00933724 bus1=p5udt928lv.1.2 bus2=p5udm3509.1.2 switch=n enabled=y phases=2 Linecode=1P_UG_AL_4/0_Sweetbriar_0_416_0_2_2_2_2

New Line.l(r:p5udm3510-p5ulv6390) Units=km Length=0.0171237 bus1=p5udm3510.1.2 bus2=p5ulv6390.1.2 switch=n enabled=y phases=2 Linecode=1P_UG_AL_2/0_Converse_0_416_0_2_2_2_2

New Line.l(r:p5udm3510-p5udt928lv) Units=km Length=0.00934679 bus1=p5udt928lv.1.2 bus2=p5udm3510.1.2 switch=n enabled=y phases=2 Linecode=1P_UG_AL_2/0_Converse_0_416_0_2_2_2_2

New Line.l(r:p5udt929lv-p5ulv1014) Units=km Length=0.00895389 bus1=p5udt929lv.1.2 bus2=p5ulv1014.1.2 switch=n enabled=y phases=2 Linecode=1P_OH_AL_2/0_Rucina_0_416_0_2_2_2_2

New Line.l(r:p5udm3514-p5ulv78083) Units=km Length=0.0153984 bus1=p5udm3514.1.2 bus2=p5ulv78083.1.2 switch=n enabled=y phases=2 Linecode=1P_OH_AL_2/0_Rucina_0_416_0_2_2_2_2

New Line.l(r:p5udm3514-p5udt929lv) Units=km Length=0.0177952 bus1=p5udt929lv.1.2 bus2=p5udm3514.1.2 switch=n enabled=y phases=2 Linecode=1P_OH_AL_2/0_Rucina_0_416_0_2_2_2_2

New Line.l(r:p5udm4106-p5ulv1197) Units=km Length=0.040319400000000005 bus1=p5udm4106.1.2 bus2=p5ulv1197.1.2 switch=n enabled=y phases=2 Linecode=1P_OH_AL_4/0_Zuzara_0_416_0_2_2_2_2

New Line.l(r:p5udm4106-p5ulv8051) Units=km Length=0.00799145 bus1=p5udm4106.1.2 bus2=p5ulv8051.1.2 switch=n enabled=y phases=2 Linecode=1P_OH_AL_2/0_Rucina_0_416_0_2_2_2_2

New Line.l(r:p5udm4106-p5udt1088lv) Units=km Length=0.031394 bus1=p5udt1088lv.1.2 bus2=p5udm4106.1.2 switch=n enabled=y phases=2 Linecode=1P_OH_AL_4/0_Zuzara_0_416_0_2_2_2_2

New Line.l(r:p5udm4108-p5ulv19055) Units=km Length=0.0318581 bus1=p5udm4108.1.2 bus2=p5ulv19055.1.2 switch=n enabled=y phases=2 Linecode=1P_OH_AL_4/0_Zuzara_0_416_0_2_2_2_2

New Line.l(r:p5udm4108-p5udt1088lv) Units=km Length=0.047362800000000004 bus1=p5udt1088lv.1.2 bus2=p5udm4108.1.2 switch=n enabled=y phases=2 Linecode=1P_OH_AL_4/0_Zuzara_0_416_0_2_2_2_2

New Line.l(r:p5udm4694-p5ulv1385) Units=km Length=0.00798889 bus1=p5udm4694.1.2 bus2=p5ulv1385.1.2 switch=n enabled=y phases=2 Linecode=1P_OH_AL_2/0_Rucina_0_416_0_2_2_2_2

New Line.l(r:p5udm4694-p5udt1254lv) Units=km Length=0.0199404 bus1=p5udt1254lv.1.2 bus2=p5udm4694.1.2 switch=n enabled=y phases=2 Linecode=1P_OH_AL_2/0_Rucina_0_416_0_2_2_2_2

New Line.l(r:p5udm4695-p5ulv21255) Units=km Length=0.005995540000000001 bus1=p5udm4695.1.2 bus2=p5ulv21255.1.2 switch=n enabled=y phases=2 Linecode=1P_OH_AL_2/0_Rucina_0_416_0_2_2_2_2

New Line.l(r:p5udm4695-p5udt1254lv) Units=km Length=0.0364779 bus1=p5udt1254lv.1.2 bus2=p5udm4695.1.2 switch=n enabled=y phases=2 Linecode=1P_OH_AL_4/0_Zuzara_0_416_0_2_2_2_2

New Line.l(r:p5udm4696-p5ulv58672) Units=km Length=0.0179177 bus1=p5udm4696.1.2 bus2=p5ulv58672.1.2 switch=n enabled=y phases=2 Linecode=1P_UG_AL_1/0_Brenau_0_416_0_2_2_2_2

New Line.l(r:p5udm4696-p5udt1254lv) Units=km Length=0.0180554 bus1=p5udt1254lv.1.2 bus2=p5udm4696.1.2 switch=n enabled=y phases=2 Linecode=1P_UG_AL_1/0_Brenau_0_416_0_2_2_2_2

New Line.l(r:p5udt1255lv-p5ulv1386) Units=km Length=0.00614964 bus1=p5udt1255lv.1.2 bus2=p5ulv1386.1.2 switch=n enabled=y phases=2 Linecode=1P_OH_AL_2/0_Rucina_0_416_0_2_2_2_2

New Line.l(r:p5udt1255lv-p5ulv13909) Units=km Length=0.00600631 bus1=p5udt1255lv.1.2 bus2=p5ulv13909.1.2 switch=n enabled=y phases=2 Linecode=1P_OH_AL_2/0_Rucina_0_416_0_2_2_2_2

New Line.l(r:p5udt1667lv-p5ulv1910) Units=km Length=0.010625 bus1=p5udt1667lv.1.2 bus2=p5ulv1910.1.2 switch=n enabled=y phases=2 Linecode=1P_OH_AL_2/0_Rucina_0_416_0_2_2_2_2

New Line.l(r:p5udt1668lv-p5ulv1911) Units=km Length=0.0145971 bus1=p5udt1668lv.1.2 bus2=p5ulv1911.1.2 switch=n enabled=y phases=2 Linecode=1P_UG_AL_1/0_Brenau_0_416_0_2_2_2_2

New Line.l(r:p5udm6183-p5ulv6025) Units=km Length=0.013638000000000003 bus1=p5udm6183.1.2 bus2=p5ulv6025.1.2 switch=n enabled=y phases=2 Linecode=1P_UG_AL_1/0_Brenau_0_416_0_2_2_2_2

New Line.l(r:p5udm6184-p5ulv8045) Units=km Length=0.0142566 bus1=p5udm6184.1.2 bus2=p5ulv8045.1.2 switch=n enabled=y phases=2 Linecode=1P_UG_AL_1/0_Brenau_0_416_0_2_2_2_2

New Line.l(r:p5udm6183-p5udm6184) Units=km Length=0.0462328 bus1=p5udm6183.1.2 bus2=p5udm6184.1.2 switch=n enabled=y phases=2 Linecode=1P_UG_AL_1/0_Brenau_0_416_0_2_2_2_2

New Line.l(r:p5udm6183-p5udt1668lv) Units=km Length=0.00931518 bus1=p5udt1668lv.1.2 bus2=p5udm6183.1.2 switch=n enabled=y phases=2 Linecode=1P_UG_AL_4/0_Sweetbriar_0_416_0_2_2_2_2

New Line.l(r:p5udm6185-p5ulv78088) Units=km Length=0.0171379 bus1=p5udm6185.1.2 bus2=p5ulv78088.1.2 switch=n enabled=y phases=2 Linecode=1P_UG_AL_1/0_Brenau_0_416_0_2_2_2_2

New Line.l(r:p5udm6185-p5udt1668lv) Units=km Length=0.01814 bus1=p5udt1668lv.1.2 bus2=p5udm6185.1.2 switch=n enabled=y phases=2 Linecode=1P_UG_AL_1/0_Brenau_0_416_0_2_2_2_2

New Line.l(r:p5udt2346lv-p5ulv2859) Units=km Length=0.0124834 bus1=p5udt2346lv.1.2 bus2=p5ulv2859.1.2 switch=n enabled=y phases=2 Linecode=1P_UG_AL_4/0_Sweetbriar_0_416_0_2_2_2_2

New Line.l(r:p5udm8493-p5ulv2860) Units=km Length=0.0108355 bus1=p5udm8493.1.2 bus2=p5ulv2860.1.2 switch=n enabled=y phases=2 Linecode=1P_UG_AL_1/0_Brenau_0_416_0_2_2_2_2

New Line.l(r:p5udm8493-p5udt2347lv) Units=km Length=0.03349570000000001 bus1=p5udt2347lv.1.2 bus2=p5udm8493.1.2 switch=n enabled=y phases=2 Linecode=1P_UG_AL_1/0_Brenau_0_416_0_2_2_2_2

New Line.l(r:p5udm8494-p5ulv13346) Units=km Length=0.0197 bus1=p5udm8494.1.2 bus2=p5ulv13346.1.2 switch=n enabled=y phases=2 Linecode=1P_UG_AL_4/0_Sweetbriar_0_416_0_2_2_2_2

New Line.l(r:p5udm8494-p5udt2347lv) Units=km Length=0.0124467 bus1=p5udt2347lv.1.2 bus2=p5udm8494.1.2 switch=n enabled=y phases=2 Linecode=1P_UG_AL_4/0_Sweetbriar_0_416_0_2_2_2_2

New Line.l(r:p5udt2348lv-p5ulv2863) Units=km Length=0.0095348 bus1=p5udt2348lv.1.2 bus2=p5ulv2863.1.2 switch=n enabled=y phases=2 Linecode=1P_OH_AL_2/0_Rucina_0_416_0_2_2_2_2

New Line.l(r:p5udt2348lv-p5ulv5072) Units=km Length=0.00265437 bus1=p5udt2348lv.1.2 bus2=p5ulv5072.1.2 switch=n enabled=y phases=2 Linecode=1P_OH_AL_4_Periwinkle_0_416_0_2_2_2_2

New Line.l(r:p5udt2471lv-p5ulv8785) Units=km Length=0.015154400000000002 bus1=p5udt2471lv.1.2 bus2=p5ulv8785.1.2 switch=n enabled=y phases=2 Linecode=1P_OH_AL_2/0_Rucina_0_416_0_2_2_2_2

New Line.l(r:p5udm8902-p5ulv3061) Units=km Length=0.0102142 bus1=p5udm8902.1.2 bus2=p5ulv3061.1.2 switch=n enabled=y phases=2 Linecode=1P_OH_AL_2/0_Rucina_0_416_0_2_2_2_2

New Line.l(r:p5udm8902-p5udt2471lv) Units=km Length=0.0195967 bus1=p5udt2471lv.1.2 bus2=p5udm8902.1.2 switch=n enabled=y phases=2 Linecode=1P_OH_AL_2/0_Rucina_0_416_0_2_2_2_2

New Line.l(r:p5udm8903-p5ulv8784) Units=km Length=0.012893500000000002 bus1=p5udm8903.1.2 bus2=p5ulv8784.1.2 switch=n enabled=y phases=2 Linecode=1P_OH_AL_4/0_Zuzara_0_416_0_2_0_2_2_2

New Line.l(r:p5udm8903-p5udt2471lv) Units=km Length=0.0195967 bus1=p5udt2471lv.1.2 bus2=p5udm8903.1.2 switch=n enabled=y phases=2 Linecode=1P_OH_AL_4/0_Zuzara_0_416_0_2_0_2_2_2

New Line.l(r:p5udt2472lv-p5ulv3062) Units=km Length=0.00395471 bus1=p5udt2472lv.1.2 bus2=p5ulv3062.1.2 switch=n enabled=y phases=2 Linecode=1P_OH_AL_4_Periwinkle_0_416_0_2_2_2_2

New Line.l(r:p5udt2472lv-p5ulv16048) Units=km Length=0.008916980000000001 bus1=p5udt2472lv.1.2 bus2=p5ulv16048.1.2 switch=n enabled=y phases=2 Linecode=1P_OH_AL_2/0_Rucina_0_416_0_2_2_2_2

New Line.l(r:p5udt3153lv-p5ulv4132) Units=km Length=0.03219620000000001 bus1=p5udt3153lv.1.2 bus2=p5ulv4132.1.2 switch=n enabled=y phases=2 Linecode=1P_UG_AL_4/0_Sweetbriar_0_416_0_2_2_2_2

New Line.l(r:p5udm11119-p5ulv4136) Units=km Length=0.0138891 bus1=p5udm11119.1.2 bus2=p5ulv4136.1.2 switch=n enabled=y phases=2 Linecode=1P_UG_AL_1/0_Brenau_0_416_0_2_2_2_2

New Line.l(r:p5udm11119-p5udt3155lv) Units=km Length=0.07183330000000002 bus1=p5udt3155lv.1.2 bus2=p5udm11119.1.2 switch=n enabled=y phases=2 Linecode=1P_OH_AL_4/0_Zuzara_0_416_0_2_2_2_2

New Line.l(r:p5udm11120-p5ulv19226) Units=km Length=0.0188001 bus1=p5udm11120.1.2 bus2=p5ulv19226.1.2 switch=n enabled=y phases=2 Linecode=1P_OH_AL_2/0_Rucina_0_416_0_2_2_2_2

New Line.l(r:p5udm11120-p5udt3155lv) Units=km Length=0.0181084 bus1=p5udt3155lv.1.2 bus2=p5udm11120.1.2 switch=n enabled=y phases=2 Linecode=1P_OH_AL_2/0_Rucina_0_416_0_2_2_2_2

New Line.l(r:p5udt3274lv-p5ulv4335) Units=km Length=0.0187406 bus1=p5udt3274lv.1.2 bus2=p5ulv4335.1.2 switch=n enabled=y phases=2 Linecode=1P_OH_AL_2/0_Rucina_0_416_0_2_2_2_2

New Line.l(r:p5udt3274lv-p5ulv16208) Units=km Length=0.00659537 bus1=p5udt3274lv.1.2 bus2=p5ulv16208.1.2 switch=n enabled=y phases=2 Linecode=1P_OH_AL_2/0_Rucina_0_416_0_2_2_2_2

New Line.l(r:p5udt3567lv-p5ulv4875) Units=km Length=0.0341943 bus1=p5udt3567lv.1.2 bus2=p5ulv4875.1.2 switch=n enabled=y phases=2 Linecode=1P_OH_AL_4/0_Zuzara_0_416_0_2_2_2_2

New Line.l(r:p5udm12294-p5ulv14787) Units=km Length=0.0346227 bus1=p5udm12294.1.2 bus2=p5ulv14787.1.2 switch=n enabled=y phases=2 Linecode=1P_OH_AL_4/0_Zuzara_0_416_0_2_2_2_2

New Line.l(r:p5udm12294-p5udt3567lv) Units=km Length=0.0372802 bus1=p5udt3567lv.1.2 bus2=p5udm12294.1.2 switch=n enabled=y phases=2 Linecode=1P_OH_AL_4/0_Zuzara_0_416_0_2_2_2_2

New Line.l(r:p5udm12295-p5ulv77706) Units=km Length=0.013802 bus1=p5udm12295.1.2 bus2=p5ulv77706.1.2 switch=n enabled=y phases=2 Linecode=1P_OH_AL_2/0_Rucina_0_416_0_2_2_2_2

New Line.l(r:p5udm12295-p5udt3567lv) Units=km Length=0.0372833 bus1=p5udt3567lv.1.2 bus2=p5udm12295.1.2 switch=n enabled=y phases=2 Linecode=1P_OH_AL_4/0_Zuzara_0_416_0_2_2_2_2

New Line.l(r:p5udm13823-p5ulv6026) Units=km Length=0.0153847 bus1=p5udm13823.1.2 bus2=p5ulv6026.1.2 switch=n enabled=y phases=2 Linecode=1P_UG_AL_1/0_Brenau_0_416_0_2_2_2_2

New Line.l(r:p5udm13826-p5ulv15701) Units=km Length=0.0149649 bus1=p5udm13826.1.2 bus2=p5ulv15701.1.2 switch=n enabled=y phases=2 Linecode=1P_UG_AL_1/0_Brenau_0_416_0_2_2_2_2

New Line.l(r:p5udm13823-p5udm13826) Units=km Length=0.00994389 bus1=p5udm13823.1.2 bus2=p5udm13826.1.2 switch=n enabled=y phases=2 Linecode=1P_UG_AL_1/0_Brenau_0_416_0_2_2_2_2

New Line.l(r:p5udm13823-p5udt4131lv) Units=km Length=0.0640924 bus1=p5udt4131lv.1.2 bus2=p5udm13823.1.2 switch=n enabled=y phases=2 Linecode=1P_UG_AL_2/0_Converse_0_416_0_2_2_2_2

New Line.l(r:p5udm13824-p5ulv7299) Units=km Length=0.0152754 bus1=p5udm13824.1.2 bus2=p5ulv7299.1.2 switch=n enabled=y phases=2 Linecode=1P_UG_AL_2/0_Converse_0_416_0_2_2_2_2

New Line.l(r:p5udm13824-p5ulv10892) Units=km Length=0.0165406 bus1=p5udm13824.1.2 bus2=p5ulv10892.1.2 switch=n enabled=y phases=2 Linecode=1P_UG_AL_4/0_Sweetbriar_0_416_0_2_2_2_2

New Line.l(r:p5udm13824-p5udt4131lv) Units=km Length=0.00919133 bus1=p5udt4131lv.1.2 bus2=p5udm13824.1.2 switch=n enabled=y phases=2 Linecode=1P_UG_AL_4/0_Sweetbriar_0_416_0_2_2_2_2

New Line.l(r:p5udt4298lv-p5ulv10666) Units=km Length=0.00441779 bus1=p5udt4298lv.1.2 bus2=p5ulv10666.1.2 switch=n enabled=y phases=2 Linecode=1P_OH_AL_2/0_Rucina_0_416_0_2_2_2_2

New Line.l(r:p5udm14238-p5ulv15295) Units=km Length=0.00315228 bus1=p5udm14238.1.2 bus2=p5ulv15295.1.2 switch=n enabled=y phases=2 Linecode=1P_OH_AL_4_Periwinkle_0_416_0_2_2_2_2

New Line.l(r:p5udm14238-p5udt4298lv) Units=km Length=0.0529649 bus1=p5udt4298lv.1.2 bus2=p5udm14238.1.2 switch=n enabled=y phases=2 Linecode=1P_OH_AL_4/0_Zuzara_0_416_0_2_2_2_2

New Line.l(r:p5udm14239-p5ulv38531) Units=km Length=0.0029274600000000002 bus1=p5udm14239.1.2 bus2=p5ulv38531.1.2 switch=n enabled=y phases=2 Linecode=1P_OH_AL_4_Periwinkle_0_416_0_2_2_2_2

New Line.l(r:p5udm14236-p5ulv6388) Units=km Length=0.00242539 bus1=p5udm14236.1.2 bus2=p5ulv6388.1.2 switch=n enabled=y phases=2 Linecode=1P_OH_AL_4_Periwinkle_0_416_0_2_2_2_2

New Line.l(r:p5udm14236-p5udm14239) Units=km Length=0.017649600000000005 bus1=p5udm14239.1.2 bus2=p5udm14236.1.2 switch=n enabled=y phases=2 Linecode=1P_OH_AL_2/0_Rucina_0_416_0_2_2_2_2

New Line.l(r:p5udm14239-p5udt4298lv) Units=km Length=0.017659100000000004 bus1=p5udt4298lv.1.2 bus2=p5udm14239.1.2 switch=n enabled=y phases=2 Linecode=1P_OH_AL_2/0_Rucina_0_416_0_2_2_2_2

New Line.l(r:p5udt4561lv-p5ulv78082) Units=km Length=0.00426175 bus1=p5udt4561lv.1.2 bus2=p5ulv78082.1.2 switch=n enabled=y phases=2 Linecode=1P_OH_AL_2/0_Rucina_0_416_0_2_2_2_2

New Line.l(r:p5udm14892-p5ulv6932) Units=km Length=0.0127529 bus1=p5udm14892.1.2 bus2=p5ulv6932.1.2 switch=n enabled=y phases=2 Linecode=1P_UG_AL_1/0_Brenau_0_416_0_2_2_2_2

New Line.l(r:p5udm14892-p5udt4561lv) Units=km Length=0.020694 bus1=p5udt4561lv.1.2 bus2=p5udm14892.1.2 switch=n enabled=y phases=2 Linecode=1P_OH_AL_2/0_Rucina_0_416_0_2_2_2_2

New Line.l(r:p5udm14893-p5ulv19051) Units=km Length=0.00363056 bus1=p5udm14893.1.2 bus2=p5ulv19051.1.2 switch=n enabled=y phases=2 Linecode=1P_OH_AL_4_Periwinkle_0_416_0_2_2_2_2

New Line.l(r:p5udm14893-p5udt4561lv) Units=km Length=0.0181084 bus1=p5udt4561lv.1.2 bus2=p5udm14893.1.2 switch=n enabled=y phases=2 Linecode=1P_OH_AL_2/0_Rucina_0_416_0_2_2_2_2

New Line.l(r:p5udm15250-p5ulv7307) Units=km Length=0.0389584 bus1=p5udm15250.1.2 bus2=p5ulv7307.1.2 switch=n enabled=y phases=2 Linecode=1P_UG_AL_1/0_Brenau_0_416_0_2_2_2_2

New Line.l(r:p5udm15250-p5udt4710lv) Units=km Length=0.0367357 bus1=p5udt4710lv.1.2 bus2=p5udm15250.1.2 switch=n enabled=y phases=2 Linecode=1P_UG_AL_1/0_Brenau_0_416_0_2_2_2_2

New Line.l(r:p5udm15252-p5ulv13358) Units=km Length=0.011574500000000001 bus1=p5udm15252.1.2 bus2=p5ulv13358.1.2 switch=n enabled=y phases=2 Linecode=1P_OH_AL_2/0_Rucina_0_416_0_2_2_2_2

New Line.l(r:p5udm15251-p5ulv11847) Units=km Length=0.0103648 bus1=p5udm15251.1.2 bus2=p5ulv11847.1.2 switch=n enabled=y phases=2 Linecode=1P_OH_AL_2/0_Rucina_0_416_0_2_2_2_2

New Line.l(r:p5udm15251-p5udm15252) Units=km Length=0.0174588 bus1=p5udm15252.1.2 bus2=p5udm15251.1.2 switch=n enabled=y phases=2 Linecode=1P_OH_AL_2/0_Rucina_0_416_0_2_2_2_2

New Line.l(r:p5udm15252-p5udt4710lv) Units=km Length=0.0185803 bus1=p5udt4710lv.1.2 bus2=p5udm15252.1.2 switch=n enabled=y phases=2 Linecode=1P_OH_AL_2/0_Rucina_0_416_0_2_2_2_2

New Line.l(r:p5udt4869lv-p5ulv7696) Units=km Length=0.0148535 bus1=p5udt4869lv.1.2 bus2=p5ulv7696.1.2 switch=n enabled=y phases=2 Linecode=1P_UG_AL_4/0_Sweetbriar_0_416_0_2_2_2_2

New Line.l(r:p5udt4941lv-p5ulv7858) Units=km Length=0.00919663 bus1=p5udt4941lv.1.2 bus2=p5ulv7858.1.2 switch=n enabled=y phases=2 Linecode=1P_UG_AL_2/0_Converse_0_416_0_2_2_2_2

New Line.l(r:p5udt5210lv-p5ulv8575) Units=km Length=0.0164379 bus1=p5udt5210lv.1.2 bus2=p5ulv8575.1.2 switch=n enabled=y phases=2 Linecode=1P_UG_AL_4/0_Sweetbriar_0_416_0_2_2_2_2

New Line.l(r:p5udt5210lv-p5ulv17524) Units=km Length=0.0226222 bus1=p5udt5210lv.1.2 bus2=p5ulv17524.1.2 switch=n enabled=y phases=2 Linecode=1P_UG_AL_4/0_Sweetbriar_0_416_0_2_2_2_2

New Line.l(r:p5udm16414-p5ulv12016) Units=km Length=0.0121578 bus1=p5udm16414.1.2 bus2=p5ulv12016.1.2 switch=n enabled=y phases=2 Linecode=1P_UG_AL_1/0_Brenau_0_416_0_2_2_2_2

New Line.l(r:p5udm16414-p5udt5210lv) Units=km Length=0.00993435 bus1=p5udt5210lv.1.2 bus2=p5udm16414.1.2 switch=n enabled=y phases=2 Linecode=1P_UG_AL_1/0_Brenau_0_416_0_2_2_2_2

New Line.l(r:p5udm16614-p5ulv8782) Units=km Length=0.00919966 bus1=p5udm16614.1.2 bus2=p5ulv8782.1.2 switch=n enabled=y phases=2 Linecode=1P_UG_AL_4/0_Sweetbriar_0_416_0_2_2_2_2

New Line.l(r:p5udm16614-p5udt5288lv) Units=km Length=0.0660015 bus1=p5udt5288lv.1.2 bus2=p5udm16614.1.2 switch=n enabled=y phases=2 Linecode=1P_OH_AL_4/0_Zuzara_0_416_0_2_2_2_2

New Line.l(r:p5udm16615-p5ulv25164) Units=km Length=0.0115966 bus1=p5udm16615.1.2 bus2=p5ulv25164.1.2 switch=n enabled=y phases=2 Linecode=1P_OH_AL_2/0_Rucina_0_416_0_2_2_2_2

New Line.l(r:p5udm16615-p5udt5288lv) Units=km Length=0.017482 bus1=p5udt5288lv.1.2 bus2=p5udm16615.1.2 switch=n enabled=y phases=2 Linecode=1P_OH_AL_2/0_Rucina_0_416_0_2_2_2_2

New Line.l(r:p5udt5290lv-p5ulv8786) Units=km Length=0.0139798 bus1=p5udt5290lv.1.2 bus2=p5ulv8786.1.2 switch=n enabled=y phases=2 Linecode=1P_UG_AL_2/0_Converse_0_416_0_2_2_2_2

New Line.l(r:p5udm16620-p5ulv8787) Units=km Length=0.0171435 bus1=p5udm16620.1.2 bus2=p5ulv8787.1.2 switch=n enabled=y phases=2 Linecode=1P_UG_AL_2/0_Converse_0_416_0_2_2_2_2

New Line.l(r:p5udm16620-p5udt5291lv) Units=km Length=0.0556719 bus1=p5udt5291lv.1.2 bus2=p5udm16620.1.2 switch=n enabled=y phases=2 Linecode=1P_UG_AL_2/0_Converse_0_416_0_2_2_2_2

New Line.l(r:p5udm16621-p5ulv13150) Units=km Length=0.0155704 bus1=p5udm16621.1.2 bus2=p5ulv13150.1.2 switch=n enabled=y phases=2 Linecode=1P_UG_AL_4/0_Sweetbriar_0_416_0_2_2_2_2

New Line.l(r:p5udm16621-p5udt5291lv) Units=km Length=0.0186965 bus1=p5udt5291lv.1.2 bus2=p5udm16621.1.2 switch=n enabled=y phases=2 Linecode=1P_UG_AL_4/0_Sweetbriar_0_416_0_2_2_2_2

New Line.l(r:p5udt5496lv-p5ulv9378) Units=km Length=0.0149647 bus1=p5udt5496lv.1.2 bus2=p5ulv9378.1.2 switch=n enabled=y phases=2 Linecode=1P_UG_AL_2/0_Converse_0_416_0_2_2_2_2

New Line.l(r:p5udt5561lv-p5ulv9565) Units=km Length=0.0795291 bus1=p5udt5561lv.1.2 bus2=p5ulv9565.1.2 switch=n enabled=y phases=2 Linecode=1P_UG_AL_1/0_Brenau_0_416_0_2_2_2_2

New Line.l(r:p5udt5561lv-p5ulv10469) Units=km Length=0.0132606 bus1=p5udt5561lv.1.2 bus2=p5ulv10469.1.2 switch=n enabled=y phases=2 Linecode=1P_UG_AL_1/0_Brenau_0_416_0_2_2_2_2

New Line.l(r:p5udt5561lv-p5ulv77955) Units=km Length=0.024999800000000003 bus1=p5udt5561lv.1.2 bus2=p5ulv77955.1.2 switch=n enabled=y phases=2 Linecode=1P_UG_AL_1/0_Brenau_0_416_0_2_2_2_2

New Line.l(r:p5udt5745lv-p5ulv16050) Units=km Length=0.00550502 bus1=p5udt5745lv.1.2 bus2=p5ulv16050.1.2 switch=n enabled=y phases=2 Linecode=1P_OH_AL_2/0_Rucina_0_416_0_2_2_2_2

New Line.l(r:p5udm17547-p5ulv10105) Units=km Length=0.00556925 bus1=p5udm17547.1.2 bus2=p5ulv10105.1.2 switch=n enabled=y phases=2 Linecode=1P_OH_AL_2/0_Rucina_0_416_0_2_2_2_2

New Line.l(r:p5udm17547-p5udt5745lv) Units=km Length=0.019323300000000005 bus1=p5udt5745lv.1.2 bus2=p5udm17547.1.2 switch=n enabled=y phases=2 Linecode=1P_OH_AL_2/0_Rucina_0_416_0_2_2_2_2

New Line.l(r:p5udt5940lv-p5ulv10670) Units=km Length=0.012502300000000001 bus1=p5udt5940lv.1.2 bus2=p5ulv10670.1.2 switch=n enabled=y phases=2 Linecode=1P_OH_AL_2/0_Rucina_0_416_0_2_2_2_2

New Line.l(r:p5udt6062lv-p5ulv15113) Units=km Length=0.00353112 bus1=p5udt6062lv.1.2 bus2=p5ulv15113.1.2 switch=n enabled=y phases=2 Linecode=1P_OH_AL_4_Periwinkle_0_416_0_2_2_2_2

New Line.l(r:p5udm18181-p5ulv11070) Units=km Length=0.00676191 bus1=p5udm18181.1.2 bus2=p5ulv11070.1.2 switch=n enabled=y phases=2 Linecode=1P_OH_AL_2/0_Rucina_0_416_0_2_2_2_2

New Line.l(r:p5udm18181-p5udt6062lv) Units=km Length=0.0176824 bus1=p5udt6062lv.1.2 bus2=p5udm18181.1.2 switch=n enabled=y phases=2 Linecode=1P_OH_AL_2/0_Rucina_0_416_0_2_2_2_2

New Line.l(r:p5udt6402lv-p5ulv12194) Units=km Length=0.0157124 bus1=p5udt6402lv.1.2 bus2=p5ulv12194.1.2 switch=n enabled=y phases=2 Linecode=1P_OH_AL_2/0_Rucina_0_416_0_2_2_2_2

New Line.l(r:p5udt6653lv-p5ulv13149) Units=km Length=0.0146285 bus1=p5udt6653lv.1.2 bus2=p5ulv13149.1.2 switch=n enabled=y phases=2 Linecode=1P_UG_AL_4/0_Sweetbriar_0_416_0_2_2_2_2

New Line.l(r:p5udt6655lv-p5ulv78374) Units=km Length=0.0291631 bus1=p5udt6655lv.1.2 bus2=p5ulv78374.1.2 switch=n enabled=y phases=2 Linecode=1P_UG_AL_1/0_Brenau_0_416_0_2_2_2_2

New Line.l(r:p5udm19183-p5ulv13155) Units=km Length=0.023573300000000002 bus1=p5udm19183.1.2 bus2=p5ulv13155.1.2 switch=n enabled=y phases=2 Linecode=1P_UG_AL_1/0_Brenau_0_416_0_2_2_2_2

New Line.l(r:p5udm19183-p5udt6655lv) Units=km Length=0.00757683 bus1=p5udt6655lv.1.2 bus2=p5udm19183.1.2 switch=n enabled=y phases=2 Linecode=1P_UG_AL_1/0_Brenau_0_416_0_2_2_2_2

New Line.l(r:p5udt6707lv-p5ulv14411) Units=km Length=0.0106217 bus1=p5udt6707lv.1.2 bus2=p5ulv14411.1.2 switch=n enabled=y phases=2 Linecode=1P_OH_AL_2/0_Rucina_0_416_0_2_2_2_2

New Line.l(r:p5udt6707lv-p5ulv19225) Units=km Length=0.0050577600000000006 bus1=p5udt6707lv.1.2 bus2=p5ulv19225.1.2 switch=n enabled=y phases=2 Linecode=1P_OH_AL_2/0_Rucina_0_416_0_2_2_2_2

New Line.l(r:p5udm19265-p5ulv13348) Units=km Length=0.00451586 bus1=p5udm19265.1.2 bus2=p5ulv13348.1.2 switch=n enabled=y phases=2 Linecode=1P_OH_AL_2/0_Rucina_0_416_0_2_2_2_2

New Line.l(r:p5udm19265-p5udt6707lv) Units=km Length=0.0162574 bus1=p5udt6707lv.1.2 bus2=p5udm19265.1.2 switch=n enabled=y phases=2 Linecode=1P_OH_AL_2/0_Rucina_0_416_0_2_2_2_2

New Line.l(r:p5udt7351lv-p5ulv16207) Units=km Length=0.0106438 bus1=p5udt7351lv.1.2 bus2=p5ulv16207.1.2 switch=n enabled=y phases=2 Linecode=1P_UG_AL_1/0_Brenau_0_416_0_2_2_2_2

New Line.l(r:p5udt7450lv-p5ulv16778) Units=km Length=0.0157948 bus1=p5udt7450lv.1.2 bus2=p5ulv16778.1.2 switch=n enabled=y phases=2 Linecode=1P_UG_AL_4/0_Sweetbriar_0_416_0_2_2_2_2

New Line.l(r:p5udt7488lv-p5ulv16959) Units=km Length=0.011142 bus1=p5udt7488lv.1.2 bus2=p5ulv16959.1.2 switch=n enabled=y phases=2 Linecode=1P_UG_AL_1/0_Brenau_0_416_0_2_2_2_2

New Line.l(r:p5udt7584lv-p5ulv17523) Units=km Length=0.0287997 bus1=p5udt7584lv.1.2 bus2=p5ulv17523.1.2 switch=n enabled=y phases=2 Linecode=1P_UG_AL_1/0_Brenau_0_416_0_2_2_2_2

New Line.l(r:p5udt7915lv-p5ulv19224) Units=km Length=0.0105715 bus1=p5udt7915lv.1.2 bus2=p5ulv19224.1.2 switch=n enabled=y phases=2 Linecode=1P_OH_AL_2/0_Rucina_0_416_0_2_2_2_2

New Line.l(r:p5udt22558lv-p5ulv41257) Units=km Length=0.0209139 bus1=p5udt22558lv.1.2 bus2=p5ulv41257.1.2 switch=n enabled=y phases=2 Linecode=1P_UG_AL_1/0_Brenau_0_416_0_2_2_2_2

New Line.l(r:p5udt33614lv-p5ulv77957) Units=km Length=0.0109984 bus1=p5udt33614lv.1.2 bus2=p5ulv77957.1.2 switch=n enabled=y phases=2 Linecode=1P_UG_AL_1/0_Brenau_0_416_0_2_2_2_2

New Line.l(r:p5udt33615lv-p5ulv77958) Units=km Length=0.0144375 bus1=p5udt33615lv.1.2 bus2=p5ulv77958.1.2 switch=n enabled=y phases=2 Linecode=1P_OH_AL_2/0_Rucina_0_416_0_2_2_2_2

New Line.l(r:p5udm77360-p5ulv77959) Units=km Length=0.0142326 bus1=p5udm77360.1.2 bus2=p5ulv77959.1.2 switch=n enabled=y phases=2 Linecode=1P_OH_AL_2/0_Rucina_0_416_0_2_2_2_2

New Line.l(r:p5udm77360-p5udt33615lv) Units=km Length=0.0187377 bus1=p5udt33615lv.1.2 bus2=p5udm77360.1.2 switch=n enabled=y phases=2 Linecode=1P_OH_AL_2/0_Rucina_0_416_0_2_2_2_2

New Line.l(r:p5udt33661lv-p5ulv78267) Units=km Length=0.0131546 bus1=p5udt33661lv.1.2 bus2=p5ulv78267.1.2 switch=n enabled=y phases=2 Linecode=1P_OH_AL_2/0_Rucina_0_416_0_2_2_2_2

New Line.l(r:p5udt33675lv-p5ulv78375) Units=km Length=0.0345051 bus1=p5udt33675lv.1.2 bus2=p5ulv78375.1.2 switch=n enabled=y phases=2 Linecode=1P_OH_AL_4/0_Zuzara_0_416_0_2_2_2_2

New Line.l(r:p5udt6707-p5udt7915) Units=km Length=0.0353166 bus1=p5udt6707.3 bus2=p5udt7915.3 switch=n enabled=y phases=1 Linecode=1P_OH_AL_ACSR_#2_Sparrow_12_47_0_1_1_1_1

New Line.l(r:p5udt628-p5udt6707) Units=km Length=0.0376439 bus1=p5udt628-p5udt6707x.3 bus2=p5udt6707.3 switch=n enabled=y phases=1 Linecode=1P_OH_AL_ACSR_#2_Sparrow_12_47_0_1_1_1_1

New Line.l(r:p5udt2348-p5udt3274) Units=km Length=0.0596945 bus1=p5udt2348.1 bus2=p5udt3274.1 switch=n enabled=y phases=1 Linecode=1P_OH_AL_ACSR_#2_Sparrow_12_47_0_1_1_1_1

New Line.l(r:p5udt2348-p5udt929) Units=km Length=0.0576542 bus1=p5udt929.1 bus2=p5udt2348.1 switch=n enabled=y phases=1 Linecode=1P_OH_AL_ACSR_#2_Sparrow_12_47_0_1_1_1_1

New Line.l(r:p5udt3155-p5udt929) Units=km Length=0.0177952 bus1=p5udt3155.1 bus2=p5udt929.1 switch=n enabled=y phases=1 Linecode=1P_OH_AL_ACSR_#2_Sparrow_12_47_0_1_1_1_1

New Line.l(r:p5udt3155-p5udt4561) Units=km Length=0.05432250000000001 bus1=p5udt3155-p5udt4561x.1 bus2=p5udt3155.1 switch=n enabled=y phases=1 Linecode=1P_OH_AL_ACSR_#2_Sparrow_12_47_0_1_1_1_1

New Line.l(r:p5udt1255-p5udt630) Units=km Length=0.0386597 bus1=p5udt630.2 bus2=p5udt1255.2 switch=n enabled=y phases=1 Linecode=1P_OH_AL_ACSR_#2_Sparrow_12_47_0_1_1_1_1

New Line.l(r:p5udt5745-p5udt630) Units=km Length=0.001 bus1=p5udt630.2 bus2=p5udt5745.2 switch=n enabled=y phases=1 Linecode=1P_OH_AL_ACSR_#2_Sparrow_12_47_0_1_1_1_1

New Line.l(r:p5udt630-p5udt6402) Units=km Length=0.0874403 bus1=p5udt630-p5udt6402x.2 bus2=p5udt630.2 switch=n enabled=y phases=1 Linecode=1P_OH_AL_ACSR_#2_Sparrow_12_47_0_1_1_1_1

New Line.l(r:p5udt2201-p5udt3153) Units=km Length=0.0517871 bus1=p5udt2201-p5udt3153xx.1 bus2=p5udt2201-p5udt3153xxx.1 switch=n enabled=y phases=1 Linecode=1P_UG_AL_#2_15_12_47_0_1_1_1_1

New Line.l(r:p5udt2472-p5udt5940) Units=km Length=0.0382725 bus1=p5udt5940.3 bus2=p5udt2472.3 switch=n enabled=y phases=1 Linecode=1P_OH_AL_ACSR_#2_Sparrow_12_47_0_1_1_1_1

New Line.l(r:p5udt5940-p5udt6706) Units=km Length=0.0746958 bus1=p5udt5940-p5udt6706x.3 bus2=p5udt5940.3 switch=n enabled=y phases=1 Linecode=1P_OH_AL_ACSR_#2_Sparrow_12_47_0_1_1_1_1

New Line.l(r:p5udt1088-p5udt3567) Units=km Length=0.103291 bus1=p5udt1088.3 bus2=p5udt3567.3 switch=n enabled=y phases=1 Linecode=1P_OH_AL_ACSR_#2_Sparrow_12_47_0_1_1_1_1

New Line.l(r:p5udt1088-p5udt33675) Units=km Length=0.118164 bus1=p5udt1088.3 bus2=p5udt33675.3 switch=n enabled=y phases=1 Linecode=1P_OH_AL_ACSR_#2_Sparrow_12_47_0_1_1_1_1

New Line.l(r:p5udt1088-p5umv2) Units=km Length=0.07676640000000001 bus1=p5udt1088-p5umv2x.3 bus2=p5udt1088.3 switch=n enabled=y phases=1 Linecode=1P_OH_AL_ACSR_#2_Sparrow_12_47_0_1_1_1_1

New Line.l(r:p5udt6655-p5umv2) Units=km Length=0.10511400000000001 bus1=p5udt6655-p5umv2x.2 bus2=p5udt6655.2 switch=n enabled=y phases=1 Linecode=1P_OH_AL_ACSR_#2_Sparrow_12_47_0_1_1_1_1

New Line.l(r:p5udt33661-p5udt3858) Units=km Length=0.132199 bus1=p5udt33661-p5udt3858x.1 bus2=p5udt33661.1 switch=n enabled=y phases=1 Linecode=1P_OH_AL_ACSR_#2_Sparrow_12_47_0_1_1_1_1

New Line.l(r:p5udt4298-p5udt6837) Units=km Length=0.035308700000000005 bus1=p5udt4298-p5udt6837x.2 bus2=p5udt4298.2 switch=n enabled=y phases=1 Linecode=1P_OH_AL_ACSR_#2_Sparrow_12_47_0_1_1_1_1

New Line.l(r:p5udt5561-p5udt629) Units=km Length=0.001 bus1=p5udt5561-p5udt629xx.3 bus2=p5udt5561-p5udt629x.3 switch=n enabled=y phases=1 Linecode=1P_UG_AL_#2_15_12_47_0_1_1_1_1

New Line.l(r:p5udt2346-p5umv3) Units=km Length=0.0319447 bus1=p5udt2346-p5umv3x.1.2.3 bus2=p5udt2346-p5umv3xx.1.2.3 switch=n enabled=y phases=3 Linecode=3P_UG_AL_4/0_25_12_47_0_3_3_3_3

New Line.l(r:p5udt2346-p5udt6795) Units=km Length=0.0447867 bus1=p5udt2346-p5udt6795xx.1.2.3 bus2=p5udt2346-p5udt6795x.1.2.3 switch=n enabled=y phases=3 Linecode=3P_UG_AL_4/0_25_12_47_0_3_3_3_3

New Line.l(r:p5udt5560-p5udt6795) Units=km Length=0.046610500000000006 bus1=p5udt5560-p5udt6795x.1.2.3 bus2=p5udt5560-p5udt6795xx.1.2.3 switch=n enabled=y phases=3 Linecode=3P_UG_AL_4/0_25_12_47_0_3_3_3_3

New Line.l(r:p5udt5560-p5udt62) Units=km Length=0.0823092 bus1=p5udt5560-p5udt62xx.1.2.3 bus2=p5udt5560-p5udt62x.1.2.3 switch=n enabled=y phases=3 Linecode=3P_UG_AL_4/0_25_12_47_0_3_3_3_3

New Line.l(r:p5udt1667-p5udt5289) Units=km Length=0.0347067 bus1=p5udt1667-p5udt5289x.2 bus2=p5udt1667.2 switch=n enabled=y phases=1 Linecode=1P_OH_AL_ACSR_#2_Sparrow_12_47_0_1_1_1_1

New Line.l(r:p5udt33615-p5udt4212) Units=km Length=0.0187377 bus1=p5udt33615-p5udt4212x.1 bus2=p5udt33615.1 switch=n enabled=y phases=1 Linecode=1P_OH_AL_ACSR_#2_Sparrow_12_47_0_1_1_1_1

New Line.l(r:p5udt22558-p5udt62) Units=km Length=0.0178493 bus1=p5udt22558-p5udt62x.1.2.3 bus2=p5udt22558-p5udt62xx.1.2.3 switch=n enabled=y phases=3 Linecode=3P_UG_AL_4/0_25_12_47_0_3_3_3_3

New Line.l(r:p5udt22558-p5udt2347) Units=km Length=0.0416285 bus1=p5udt22558-p5udt2347xx.1.2.3 bus2=p5udt22558-p5udt2347x.1.2.3 switch=n enabled=y phases=3 Linecode=3P_UG_AL_4/0_25_12_47_0_3_3_3_3

New Line.l(r:p5udt2347-p5udt4869) Units=km Length=0.03870730000000001 bus1=p5udt2347-p5udt4869xx.1.2.3 bus2=p5udt2347-p5udt4869x.1.2.3 switch=n enabled=y phases=3 Linecode=3P_UG_AL_4/0_25_12_47_0_3_3_3_3

New Line.l(r:p5udt4131-p5udt7351) Units=km Length=0.00919133 bus1=p5udt4131-p5udt7351x.1 bus2=p5udt4131-p5udt7351xx.1 switch=n enabled=y phases=1 Linecode=1P_UG_AL_#2_15_12_47_0_1_1_1_1

New Line.l(r:p5udt4131-p5udt4941) Units=km Length=0.0510058 bus1=p5udt4131-p5udt4941xx.1 bus2=p5udt4131-p5udt4941x.1 switch=n enabled=y phases=1 Linecode=1P_UG_AL_#2_15_12_47_0_1_1_1_1

New Line.l(r:p5udt4869-p5udt4941) Units=km Length=0.0364987 bus1=p5udt4869-p5udt4941xx.1 bus2=p5udt4869-p5udt4941xxx.1 switch=n enabled=y phases=1 Linecode=1P_UG_AL_#2_15_12_47_0_1_1_1_1

New Line.l(r:p5udt4869-p5udt7450) Units=km Length=0.0219496 bus1=p5udt4869-p5udt7450xx.1.2.3 bus2=p5udt4869-p5udt7450x.1.2.3 switch=n enabled=y phases=3 Linecode=3P_UG_AL_350kcmil_15_12_47_0_3_3_3_3

New Line.l(r:p5udt1820-p5udt6653) Units=km Length=0.001 bus1=p5udt1820-p5udt6653xx.2 bus2=p5udt1820-p5udt6653xxx.2 switch=n enabled=y phases=1 Linecode=1P_UG_AL_#2_15_12_47_0_1_1_1_1

New Line.l(r:p5udt1820-p5udt928) Units=km Length=0.0356852 bus1=p5udt1820-p5udt928xx.1.2.3 bus2=p5udt1820-p5udt928x.1.2.3 switch=n enabled=y phases=3 Linecode=3P_UG_AL_750kcmil_15_12_47_0_3_3_3_3

New Line.l(r:p5udt5291-p5udt928) Units=km Length=0.0186965 bus1=p5udt5291-p5udt928x.1.2.3 bus2=p5udt5291-p5udt928xx.1.2.3 switch=n enabled=y phases=3 Linecode=3P_UG_AL_750kcmil_15_12_47_0_3_3_3_3

New Line.l(r:p5udt4561-p5udt5291) Units=km Length=0.0858017 bus1=p5udt4561.1.2.3 bus2=p5udt5291.1.2.3 switch=n enabled=y phases=3 Linecode=3P_OH_AL_ACSR_336kcmil_Merlin_12_47_0_3_3_3_3

New Line.l(r:p5udt4561-p5udt64) Units=km Length=0.0347943 bus1=p5udt64.1.2.3 bus2=p5udt4561.1.2.3 switch=n enabled=y phases=3 Linecode=3P_OH_AL_ACSR_477kcmil_Hawk_12_47_0_3_3_3_3

New Line.l(r:p5udt4788-p5udt64) Units=km Length=0.0353839 bus1=p5udt4788.1.2.3 bus2=p5udt64.1.2.3 switch=n enabled=y phases=3 Linecode=3P_OH_AL_ACSR_477kcmil_Hawk_12_47_0_3_3_3_3

New Line.l(r:p5udt4788-p5udt6062) Units=km Length=0.001 bus1=p5udt4788-p5udt6062x.2 bus2=p5udt6062.2 switch=n enabled=y phases=1 Linecode=1P_OH_AL_ACSR_#2_Sparrow_12_47_0_1_1_1_1

New Line.l(r:p5udt4788-p5uhs1_1247) Units=km Length=0.476756 bus1=p5udt4788-p5uhs1_1247x.1.2.3 bus2=p5udt4788.1.2.3 switch=n enabled=y phases=3 Linecode=3P_OH_AL_ACSR_477kcmil_Hawk_12_47_0_3_3_3_3

New Line.l(r:p5udt2343-p5udt7176) Units=km Length=0.33331500000000003 bus1=p5udt2343.1.2.3 bus2=p5udt7176.1.2.3 switch=n enabled=y phases=3 Linecode=3P_OH_AL_ACSR_4/0_Penguin_12_47_0_3_3_3_3

New Line.l(r:p5udt2343-p5udt2344) Units=km Length=0.122849 bus1=p5udt2343-p5udt2344xx.1.2.3 bus2=p5udt2343-p5udt2344x.1.2.3 switch=n enabled=y phases=3 Linecode=3P_UG_AL_4/0_25_12_47_0_3_3_3_3

New Line.l(r:p5udt2344-p5umv7) Units=km Length=0.198684 bus1=p5umv7.1.2.3 bus2=p5udt2344.1.2.3 switch=n enabled=y phases=3 Linecode=3P_OH_AL_ACSR_4/0_Penguin_12_47_0_3_3_3_3

New Line.l(r:p5udt7383-p5umv7) Units=km Length=0.380199 bus1=p5udt7383.1.2.3 bus2=p5umv7.1.2.3 switch=n enabled=y phases=3 Linecode=3P_OH_AL_ACSR_4/0_Penguin_12_47_0_3_3_3_3

New Line.l(r:p5udt2473-p5udt7383) Units=km Length=0.106327 bus1=p5udt2473-p5udt7383x.1.2.3 bus2=p5udt2473-p5udt7383xx.1.2.3 switch=n enabled=y phases=3 Linecode=3P_UG_AL_4/0_25_12_47_0_3_3_3_3

New Line.l(r:p5udt2473-p5udt7451) Units=km Length=0.0595183 bus1=p5udt2473-p5udt7451xx.1.2.3 bus2=p5udt2473-p5udt7451x.1.2.3 switch=n enabled=y phases=3 Linecode=3P_UG_AL_4/0_25_12_47_0_3_3_3_3

New Line.l(r:p5udt7451-p5udt7584) Units=km Length=0.242428 bus1=p5udt7451-p5udt7584xx.1.2.3 bus2=p5udt7451-p5udt7584x.1.2.3 switch=n enabled=y phases=3 Linecode=3P_UG_AL_4/0_25_12_47_0_3_3_3_3

New Line.l(r:p5udt7225-p5udt7584) Units=km Length=0.0190002 bus1=p5udt7225-p5udt7584x.1.2.3 bus2=p5udt7225-p5udt7584xx.1.2.3 switch=n enabled=y phases=3 Linecode=3P_UG_AL_4/0_25_12_47_0_3_3_3_3

New Line.l(r:p5udt7225-p5udt7488) Units=km Length=0.0484639 bus1=p5udt7225-p5udt7488xx.1.2.3 bus2=p5udt7225-p5udt7488x.1.2.3 switch=n enabled=y phases=3 Linecode=3P_UG_AL_4/0_25_12_47_0_3_3_3_3

New Line.l(r:p5udt5290-p5udt7488) Units=km Length=0.0399648 bus1=p5udt5290-p5udt7488x.1.2.3 bus2=p5udt5290-p5udt7488xx.1.2.3 switch=n enabled=y phases=3 Linecode=3P_UG_AL_4/0_25_12_47_0_3_3_3_3

New Line.l(r:p5udt5290-p5udt631) Units=km Length=0.00998569 bus1=p5udt5290-p5udt631xx.1.2.3 bus2=p5udt5290-p5udt631x.1.2.3 switch=n enabled=y phases=3 Linecode=3P_UG_AL_4/0_25_12_47_0_3_3_3_3

New Line.l(r:p5udt2080-p5udt631) Units=km Length=0.0199839 bus1=p5udt2080-p5udt631x.1.2.3 bus2=p5udt2080-p5udt631xx.1.2.3 switch=n enabled=y phases=3 Linecode=3P_UG_AL_4/0_25_12_47_0_3_3_3_3

New Line.l(r:p5udt1820-p5udt2080) Units=km Length=0.0454812 bus1=p5udt1820-p5udt2080x.1.2.3 bus2=p5udt1820-p5udt2080xx.1.2.3 switch=n enabled=y phases=3 Linecode=3P_UG_AL_4/0_25_12_47_0_3_3_3_3

New Line.l(r:p5udt3061-p5udt4710) Units=km Length=0.202483 bus1=p5udt3061-p5udt4710x.1.2.3 bus2=p5udt3061-p5udt4710xx.1.2.3 switch=n enabled=y phases=3 Linecode=3P_UG_AL_4/0_25_12_47_0_3_3_3_3

New Line.l(r:p5udt3061-p5udt5287) Units=km Length=0.243551 bus1=p5udt3061-p5udt5287x.1.2.3 bus2=p5udt3061-p5udt5287xx.1.2.3 switch=n enabled=y phases=3 Linecode=3P_UG_AL_4/0_25_12_47_0_3_3_3_3

New Line.l(r:p5udt3061-p5udt6837) Units=km Length=0.143241 bus1=p5udt6837.1.2.3 bus2=p5udt3061.1.2.3 switch=n enabled=y phases=3 Linecode=3P_OH_AL_ACSR_4/0_Penguin_12_47_0_3_3_3_3

New Line.l(r:p5udt6837-p5udt7844) Units=km Length=0.0752979 bus1=p5udt7844.1.2.3 bus2=p5udt6837.1.2.3 switch=n enabled=y phases=3 Linecode=3P_OH_AL_ACSR_4/0_Penguin_12_47_0_3_3_3_3

New Line.l(r:p5udt7844-p5umv3) Units=km Length=0.08961030000000002 bus1=p5umv3.1.2.3 bus2=p5udt7844.1.2.3 switch=n enabled=y phases=3 Linecode=3P_OH_AL_ACSR_4/0_Penguin_12_47_0_3_3_3_3

New Line.l(r:p5udt4212-p5udt6503) Units=km Length=0.11014600000000001 bus1=p5udt6503.1.2.3 bus2=p5udt4212.1.2.3 switch=n enabled=y phases=3 Linecode=3P_OH_AL_ACSR_4/0_Penguin_12_47_0_3_3_3_3

New Line.l(r:p5udt62-p5udt6503) Units=km Length=0.11077 bus1=p5udt62.1.2.3 bus2=p5udt6503.1.2.3 switch=n enabled=y phases=3 Linecode=3P_OH_AL_ACSR_4/0_Penguin_12_47_0_3_3_3_3

New Line.l(r:p5udt4214-p5udt7450) Units=km Length=0.0177065 bus1=p5udt4214.1.2.3 bus2=p5udt7450.1.2.3 switch=n enabled=y phases=3 Linecode=3P_OH_AL_ACSR_4/0_Penguin_12_47_0_3_3_3_3

New Line.l(r:p5udt1820-p5udt4214) Units=km Length=0.0786486 bus1=p5udt1820.1.2.3 bus2=p5udt4214.1.2.3 switch=n enabled=y phases=3 Linecode=3P_OH_AL_ACSR_4/0_Penguin_12_47_0_3_3_3_3

New Line.l(r:p5udt4788lv-p5ulv7498) Units=km Length=0.00263797 bus1=p5udt4788lv.1.2.3 bus2=p5ulv7498.1.2.3 switch=n enabled=y phases=3 Linecode=3P_UG_AL_350kcmil_15_0_416_0_3_3_3_3

New Line.l(r:p5udt628lv-p5ulv670) Units=km Length=0.00625212 bus1=p5udt628lv.1.2.3 bus2=p5ulv670.1.2.3 switch=n enabled=y phases=3 Linecode=3P_UG_AL_350kcmil_15_0_416_0_3_3_3_3

New Line.l(r:p5udm2427-p5ulv2861) Units=km Length=0.00764477 bus1=p5udm2427.1.2.3 bus2=p5ulv2861.1.2.3 switch=n enabled=y phases=3 Linecode=3P_UG_AL_350kcmil_15_0_416_0_3_3_3_3

New Line.l(r:p5udm2427-p5udt628lv) Units=km Length=0.0160075 bus1=p5udt628lv.1.2.3 bus2=p5udm2427.1.2.3 switch=n enabled=y phases=3 Linecode=3P_UG_AL_350kcmil_15_0_416_0_3_3_3_3

New Line.l(r:p5udt1254-p5udt628) Units=km Length=0.0364779 bus1=p5udt1254.1.2.3 bus2=p5udt628.1.2.3 switch=n enabled=y phases=3 Linecode=3P_OH_AL_ACSR_4/0_Penguin_12_47_0_3_3_3_3

New Line.l(r:p5udt1254-p5udt1668) Units=km Length=0.0921828 bus1=p5udt1254-p5udt1668xx.1.2.3 bus2=p5udt1254-p5udt1668x.1.2.3 switch=n enabled=y phases=3 Linecode=3P_UG_AL_4/0_25_12_47_0_3_3_3_3

New Line.l(r:p5udt1668-p5udt4561) Units=km Length=0.08572300000000001 bus1=p5udt4561.1.2.3 bus2=p5udt1668.1.2.3 switch=n enabled=y phases=3 Linecode=3P_OH_AL_ACSR_4/0_Penguin_12_47_0_3_3_3_3

New Line.l(r:p5udt1820lv-p5ulv2119) Units=km Length=0.0126088 bus1=p5udt1820lv.1.2.3 bus2=p5ulv2119.1.2.3 switch=n enabled=y phases=3 Linecode=3P_UG_AL_350kcmil_15_0_416_0_3_3_3_3

New Line.l(r:p5udt2080lv-p5ulv2485) Units=km Length=0.0149317 bus1=p5udt2080lv.1.2.3 bus2=p5ulv2485.1.2.3 switch=n enabled=y phases=3 Linecode=3P_UG_AL_350kcmil_15_0_416_0_3_3_3_3

New Line.l(r:p5udt2834lv-p5ulv3620) Units=km Length=0.0405186 bus1=p5udt2834lv.1.2.3 bus2=p5ulv3620.1.2.3 switch=n enabled=y phases=3 Linecode=3P_UG_AL_350kcmil_15_0_416_0_3_3_3_3

New Line.l(r:p5udt4052lv-p5ulv5846) Units=km Length=0.0184745 bus1=p5udt4052lv.1.2.3 bus2=p5ulv5846.1.2.3 switch=n enabled=y phases=3 Linecode=3P_UG_AL_350kcmil_15_0_416_0_3_3_3_3

New Line.l(r:p5udt33616lv-p5ulv77960) Units=km Length=0.0152656 bus1=p5udt33616lv.1.2.3 bus2=p5ulv77960.1.2.3 switch=n enabled=y phases=3 Linecode=3P_UG_AL_350kcmil_15_0_416_0_3_3_3_3

New Line.l(r:p5udt6652lv-p5ulv13148) Units=km Length=0.0191068 bus1=p5udt6652lv.1.2.3 bus2=p5ulv13148.1.2.3 switch=n enabled=y phases=3 Linecode=3P_UG_AL_350kcmil_15_0_416_0_3_3_3_3

New Line.l(r:p5udt33616-p5udt6652) Units=km Length=0.00968141 bus1=p5udt33616-p5udt6652x.1.2.3 bus2=p5udt33616-p5udt6652xx.1.2.3 switch=n enabled=y phases=3 Linecode=3P_UG_AL_4/0_25_12_47_0_3_3_3_3

New Line.l(r:p5udt33616-p5udt4052) Units=km Length=0.009687980000000002 bus1=p5udt33616-p5udt4052xx.1.2.3 bus2=p5udt33616-p5udt4052x.1.2.3 switch=n enabled=y phases=3 Linecode=3P_UG_AL_4/0_25_12_47_0_3_3_3_3

New Line.l(r:p5udt4052-p5udt63) Units=km Length=0.00968141 bus1=p5udt4052-p5udt63xx.1.2.3 bus2=p5udt4052-p5udt63x.1.2.3 switch=n enabled=y phases=3 Linecode=3P_UG_AL_4/0_25_12_47_0_3_3_3_3

New Line.l(r:p5udt2834-p5udt63) Units=km Length=0.0392476 bus1=p5udt2834-p5udt63x.1.2.3 bus2=p5udt2834-p5udt63xx.1.2.3 switch=n enabled=y phases=3 Linecode=3P_UG_AL_4/0_25_12_47_0_3_3_3_3

New Line.l(r:p5udt2834-p5udt5210) Units=km Length=0.0496944 bus1=p5udt2834-p5udt5210xx.1.2.3 bus2=p5udt2834-p5udt5210x.1.2.3 switch=n enabled=y phases=3 Linecode=3P_UG_AL_4/0_25_12_47_0_3_3_3_3

New Line.l(r:p5udt5210-p5udt7488) Units=km Length=0.0597315 bus1=p5udt5210-p5udt7488xx.1.2.3 bus2=p5udt5210-p5udt7488x.1.2.3 switch=n enabled=y phases=3 Linecode=3P_UG_AL_4/0_25_12_47_0_3_3_3_3

New Line.l(r:p5udt7225lv-p5ulv15702) Units=km Length=0.0113554 bus1=p5udt7225lv.1.2.3 bus2=p5ulv15702.1.2.3 switch=n enabled=y phases=3 Linecode=3P_UG_AL_350kcmil_15_0_416_0_3_3_3_3

New Line.l(r:p5udm20355-p5ulv16780) Units=km Length=0.00924927 bus1=p5udm20355.1.2.3 bus2=p5ulv16780.1.2.3 switch=n enabled=y phases=3 Linecode=3P_UG_AL_350kcmil_15_0_416_0_3_3_3_3

New Line.l(r:p5udm20355-p5udt7451lv) Units=km Length=0.00990855 bus1=p5udt7451lv.1.2.3 bus2=p5udm20355.1.2.3 switch=n enabled=y phases=3 Linecode=3P_UG_AL_350kcmil_15_0_416_0_3_3_3_3

New Line.l(r:p5udm20356-p5ulv16960) Units=km Length=0.0117409 bus1=p5udm20356.1.2.3 bus2=p5ulv16960.1.2.3 switch=n enabled=y phases=3 Linecode=3P_UG_AL_350kcmil_15_0_416_0_3_3_3_3

New Line.l(r:p5udm20356-p5udt7451lv) Units=km Length=0.00990855 bus1=p5udt7451lv.1.2.3 bus2=p5udm20356.1.2.3 switch=n enabled=y phases=3 Linecode=3P_UG_AL_350kcmil_15_0_416_0_3_3_3_3

New Line.l(r:p5udt2473lv-p5ulv3063) Units=km Length=0.0128024 bus1=p5udt2473lv.1.2.3 bus2=p5ulv3063.1.2.3 switch=n enabled=y phases=3 Linecode=3P_UG_AL_350kcmil_15_0_416_0_3_3_3_3

New Line.l(r:p5udt7182lv-p5ulv15489) Units=km Length=0.014633500000000002 bus1=p5udt7182lv.1.2.3 bus2=p5ulv15489.1.2.3 switch=n enabled=y phases=3 Linecode=3P_UG_AL_350kcmil_15_0_416_0_3_3_3_3

New Line.l(r:p5udt6402-p5udt7182) Units=km Length=0.0760138 bus1=p5udt6402.1.2.3 bus2=p5udt7182.1.2.3 switch=n enabled=y phases=3 Linecode=3P_OH_AL_ACSR_4/0_Penguin_12_47_0_3_3_3_3

New Line.l(r:p5udt2473-p5udt6402) Units=km Length=0.163777 bus1=p5udt2473.1.2.3 bus2=p5udt6402.1.2.3 switch=n enabled=y phases=3 Linecode=3P_OH_AL_ACSR_4/0_Penguin_12_47_0_3_3_3_3

New Line.l(r:p5udt7383lv-p5ulv16395) Units=km Length=0.0102062 bus1=p5udt7383lv.1.2.3 bus2=p5ulv16395.1.2.3 switch=n enabled=y phases=3 Linecode=3P_UG_AL_350kcmil_15_0_416_0_3_3_3_3

New Line.l(r:p5udt2344lv-p5ulv2857) Units=km Length=0.00622101 bus1=p5udt2344lv.1.2.3 bus2=p5ulv2857.1.2.3 switch=n enabled=y phases=3 Linecode=3P_UG_AL_350kcmil_15_0_416_0_3_3_3_3

New Line.l(r:p5udt2343lv-p5ulv2856) Units=km Length=0.00450973 bus1=p5udt2343lv.1.2.3 bus2=p5ulv2856.1.2.3 switch=n enabled=y phases=3 Linecode=3P_UG_AL_350kcmil_15_0_416_0_3_3_3_3

New Line.l(r:p5udt7176lv-p5ulv15475) Units=km Length=0.00807961 bus1=p5udt7176lv.1.2.3 bus2=p5ulv15475.1.2.3 switch=n enabled=y phases=3 Linecode=3P_UG_AL_750kcmil_25_0_416_0_3_3_3_3

New Line.l(r:p5udt6121lv-p5ulv11250) Units=km Length=0.0290809 bus1=p5udt6121lv.1.2.3 bus2=p5ulv11250.1.2.3 switch=n enabled=y phases=3 Linecode=3P_UG_AL_350kcmil_15_0_416_0_3_3_3_3

New Line.l(r:p5udm8030-p5ulv2662) Units=km Length=0.008672190000000001 bus1=p5udm8030.1.2.3 bus2=p5ulv2662.1.2.3 switch=n enabled=y phases=3 Linecode=3P_UG_AL_350kcmil_15_0_416_0_3_3_3_3

New Line.l(r:p5udm8030-p5udt2201lv) Units=km Length=0.0611489 bus1=p5udt2201lv.1.2.3 bus2=p5udm8030.1.2.3 switch=n enabled=y phases=3 Linecode=3P_UG_AL_350kcmil_15_0_416_0_3_3_3_3

New Line.l(r:p5udm8032-p5ulv53028) Units=km Length=0.0116991 bus1=p5udm8032.1.2.3 bus2=p5ulv53028.1.2.3 switch=n enabled=y phases=3 Linecode=3P_UG_AL_350kcmil_15_0_416_0_3_3_3_3

New Line.l(r:p5udm8031-p5ulv11251) Units=km Length=0.00955005 bus1=p5udm8031.1.2.3 bus2=p5ulv11251.1.2.3 switch=n enabled=y phases=3 Linecode=3P_UG_AL_350kcmil_15_0_416_0_3_3_3_3

New Line.l(r:p5udm8031-p5udm8032) Units=km Length=0.00871394 bus1=p5udm8032.1.2.3 bus2=p5udm8031.1.2.3 switch=n enabled=y phases=3 Linecode=3P_UG_AL_350kcmil_15_0_416_0_3_3_3_3

New Line.l(r:p5udm8032-p5udt2201lv) Units=km Length=0.00872299 bus1=p5udt2201lv.1.2.3 bus2=p5udm8032.1.2.3 switch=n enabled=y phases=3 Linecode=3P_UG_AL_350kcmil_15_0_416_0_3_3_3_3

New Line.l(r:p5udt2201-p5udt6121) Units=km Length=0.0914185 bus1=p5udt2201-p5udt6121xx.1.2.3 bus2=p5udt2201-p5udt6121x.1.2.3 switch=n enabled=y phases=3 Linecode=3P_UG_AL_4/0_25_12_47_0_3_3_3_3

New Line.l(r:p5udt6121-p5udt7176) Units=km Length=0.241639 bus1=p5udt7176.1.2.3 bus2=p5udt6121.1.2.3 switch=n enabled=y phases=3 Linecode=3P_OH_AL_ACSR_4/0_Penguin_12_47_0_3_3_3_3

New Line.l(r:p5udt7318lv-p5ulv16040) Units=km Length=0.00539608 bus1=p5udt7318lv.1.2.3 bus2=p5ulv16040.1.2.3 switch=n enabled=y phases=3 Linecode=3P_UG_AL_350kcmil_15_0_416_0_3_3_3_3

New Line.l(r:p5udt2343-p5udt7318) Units=km Length=0.298965 bus1=p5udt2343.1.2.3 bus2=p5udt7318.1.2.3 switch=n enabled=y phases=3 Linecode=3P_OH_AL_ACSR_4/0_Penguin_12_47_0_3_3_3_3

New Line.l(r:p5udt6953lv-p5ulv14410) Units=km Length=0.004823000000000001 bus1=p5udt6953lv.1.2.3 bus2=p5ulv14410.1.2.3 switch=n enabled=y phases=3 Linecode=3P_UG_AL_350kcmil_15_0_416_0_3_3_3_3

New Line.l(r:p5udt2344-p5udt6953) Units=km Length=0.0537653 bus1=p5udt2344-p5udt6953x.1.2.3 bus2=p5udt2344-p5udt6953xx.1.2.3 switch=n enabled=y phases=3 Linecode=3P_UG_AL_4/0_25_12_47_0_3_3_3_3

New Line.l(r:p5udt29945lv-p5ulv62648) Units=km Length=0.0100961 bus1=p5udt29945lv.1.2.3 bus2=p5ulv62648.1.2.3 switch=n enabled=y phases=3 Linecode=3P_UG_AL_750kcmil_25_0_416_0_3_3_3_3

New Line.l(r:p5udm73263-p5ulv77956) Units=km Length=0.0132654 bus1=p5udm73263.1.2.3 bus2=p5ulv77956.1.2.3 switch=n enabled=y phases=3 Linecode=3P_UG_AL_350kcmil_15_0_416_0_3_3_3_3

New Line.l(r:p5udm73263-p5udt29945lv) Units=km Length=0.0282132 bus1=p5udt29945lv.1.2.3 bus2=p5udm73263.1.2.3 switch=n enabled=y phases=3 Linecode=3P_UG_AL_350kcmil_15_0_416_0_3_3_3_3

New Line.l(r:p5udt29945-p5umv7) Units=km Length=0.15978 bus1=p5umv7.1.2.3 bus2=p5udt29945.1.2.3 switch=n enabled=y phases=3 Linecode=3P_OH_AL_ACSR_4/0_Penguin_12_47_0_3_3_3_3

New Line.l(r:p5udm16610-p5ulv8779) Units=km Length=0.011931100000000002 bus1=p5udm16610.1.2.3 bus2=p5ulv8779.1.2.3 switch=n enabled=y phases=3 Linecode=3P_UG_AL_350kcmil_15_0_416_0_3_3_3_3

New Line.l(r:p5udm16612-p5ulv14409) Units=km Length=0.0117022 bus1=p5udm16612.1.2.3 bus2=p5ulv14409.1.2.3 switch=n enabled=y phases=3 Linecode=3P_UG_AL_350kcmil_15_0_416_0_3_3_3_3

New Line.l(r:p5udm16610-p5udm16612) Units=km Length=0.00883577 bus1=p5udm16610.1.2.3 bus2=p5udm16612.1.2.3 switch=n enabled=y phases=3 Linecode=3P_UG_AL_350kcmil_15_0_416_0_3_3_3_3

New Line.l(r:p5udm16610-p5udt5286lv) Units=km Length=0.00884494 bus1=p5udt5286lv.1.2.3 bus2=p5udm16610.1.2.3 switch=n enabled=y phases=3 Linecode=3P_UG_AL_350kcmil_15_0_416_0_3_3_3_3

New Line.l(r:p5udm16611-p5ulv14408) Units=km Length=0.0121836 bus1=p5udm16611.1.2.3 bus2=p5ulv14408.1.2.3 switch=n enabled=y phases=3 Linecode=3P_UG_AL_350kcmil_15_0_416_0_3_3_3_3

New Line.l(r:p5udm16611-p5udt5286lv) Units=km Length=0.0633849 bus1=p5udt5286lv.1.2.3 bus2=p5udm16611.1.2.3 switch=n enabled=y phases=3 Linecode=3P_UG_AL_350kcmil_15_0_416_0_3_3_3_3

New Line.l(r:p5udt33614-p5udt5286) Units=km Length=0.0265165 bus1=p5udt33614-p5udt5286x.1.2.3 bus2=p5udt33614-p5udt5286xx.1.2.3 switch=n enabled=y phases=3 Linecode=3P_UG_AL_4/0_25_12_47_0_3_3_3_3

New Line.l(r:p5udt33614-p5umv7) Units=km Length=0.20294600000000002 bus1=p5umv7.1.2.3 bus2=p5udt33614.1.2.3 switch=n enabled=y phases=3 Linecode=3P_OH_AL_ACSR_4/0_Penguin_12_47_0_3_3_3_3

New Line.l(r:p5udm19263-p5ulv13347) Units=km Length=0.0106446 bus1=p5udm19263.1.2.3 bus2=p5ulv13347.1.2.3 switch=n enabled=y phases=3 Linecode=3P_UG_AL_750kcmil_25_0_416_0_3_3_3_3

New Line.l(r:p5udm19263-p5udt6706lv) Units=km Length=0.032621 bus1=p5udt6706lv.1.2.3 bus2=p5udm19263.1.2.3 switch=n enabled=y phases=3 Linecode=3P_UG_AL_750kcmil_25_0_416_0_3_3_3_3

New Line.l(r:p5udm19264-p5ulv17910) Units=km Length=0.00927936 bus1=p5udm19264.1.2.3 bus2=p5ulv17910.1.2.3 switch=n enabled=y phases=3 Linecode=3P_UG_AL_350kcmil_15_0_416_0_3_3_3_3

New Line.l(r:p5udm19264-p5udt6706lv) Units=km Length=0.0555576 bus1=p5udt6706lv.1.2.3 bus2=p5udm19264.1.2.3 switch=n enabled=y phases=3 Linecode=3P_UG_AL_350kcmil_15_0_416_0_3_3_3_3

New Line.l(r:p5udt6706-p5udt7383) Units=km Length=0.278894 bus1=p5udt7383.1.2.3 bus2=p5udt6706.1.2.3 switch=n enabled=y phases=3 Linecode=3P_OH_AL_ACSR_4/0_Penguin_12_47_0_3_3_3_3

New Line.l(r:p5udt4214lv-p5ulv6223) Units=km Length=0.0164641 bus1=p5udt4214lv.1.2.3 bus2=p5ulv6223.1.2.3 switch=n enabled=y phases=3 Linecode=3P_UG_AL_350kcmil_15_0_416_0_3_3_3_3

New Line.l(r:p5udt62lv-p5ulv63) Units=km Length=0.0208372 bus1=p5udt62lv.1.2.3 bus2=p5ulv63.1.2.3 switch=n enabled=y phases=3 Linecode=3P_UG_AL_350kcmil_15_0_416_0_3_3_3_3

New Line.l(r:p5udm17172-p5ulv9564) Units=km Length=0.0196443 bus1=p5udm17172.1.2.3 bus2=p5ulv9564.1.2.3 switch=n enabled=y phases=3 Linecode=3P_UG_AL_350kcmil_15_0_416_0_3_3_3_3

New Line.l(r:p5udm17172-p5ulv60414) Units=km Length=0.0111267 bus1=p5udm17172.1.2.3 bus2=p5ulv60414.1.2.3 switch=n enabled=y phases=3 Linecode=3P_UG_AL_350kcmil_15_0_416_0_3_3_3_3

New Line.l(r:p5udm17172-p5udt5560lv) Units=km Length=0.009324730000000002 bus1=p5udt5560lv.1.2.3 bus2=p5udm17172.1.2.3 switch=n enabled=y phases=3 Linecode=3P_UG_AL_350kcmil_15_0_416_0_3_3_3_3

New Line.l(r:p5udm17173-p5ulv11839) Units=km Length=0.013561700000000001 bus1=p5udm17173.1.2.3 bus2=p5ulv11839.1.2.3 switch=n enabled=y phases=3 Linecode=3P_UG_AL_350kcmil_15_0_416_0_3_3_3_3

New Line.l(r:p5udm17173-p5udt5560lv) Units=km Length=0.00931813 bus1=p5udt5560lv.1.2.3 bus2=p5udm17173.1.2.3 switch=n enabled=y phases=3 Linecode=3P_UG_AL_350kcmil_15_0_416_0_3_3_3_3

New Line.l(r:p5udt6795lv-p5ulv13733) Units=km Length=0.0111356 bus1=p5udt6795lv.1.2.3 bus2=p5ulv13733.1.2.3 switch=n enabled=y phases=3 Linecode=3P_UG_AL_350kcmil_15_0_416_0_3_3_3_3

New Line.l(r:p5udt7844lv-p5ulv18850) Units=km Length=0.0121374 bus1=p5udt7844lv.1.2.3 bus2=p5ulv18850.1.2.3 switch=n enabled=y phases=3 Linecode=3P_UG_AL_350kcmil_15_0_416_0_3_3_3_3

New Line.l(r:p5udt3859lv-p5ulv11652) Units=km Length=0.00963282 bus1=p5udt3859lv.1.2.3 bus2=p5ulv11652.1.2.3 switch=n enabled=y phases=3 Linecode=3P_UG_AL_350kcmil_15_0_416_0_3_3_3_3

New Line.l(r:p5udm13114-p5ulv5451) Units=km Length=0.0130717 bus1=p5udm13114.1.2.3 bus2=p5ulv5451.1.2.3 switch=n enabled=y phases=3 Linecode=3P_UG_AL_350kcmil_15_0_416_0_3_3_3_3

New Line.l(r:p5udm13114-p5udt3859lv) Units=km Length=0.01912 bus1=p5udt3859lv.1.2.3 bus2=p5udm13114.1.2.3 switch=n enabled=y phases=3 Linecode=3P_UG_AL_350kcmil_15_0_416_0_3_3_3_3

New Line.l(r:p5udt3859-p5udt7844) Units=km Length=0.0917649 bus1=p5udt7844.1.2.3 bus2=p5udt3859.1.2.3 switch=n enabled=y phases=3 Linecode=3P_OH_AL_ACSR_4/0_Penguin_12_47_0_3_3_3_3

New Line.l(r:p5udt6837lv-p5ulv13907) Units=km Length=0.010224300000000002 bus1=p5udt6837lv.1.2.3 bus2=p5ulv13907.1.2.3 switch=n enabled=y phases=3 Linecode=3P_UG_AL_350kcmil_15_0_416_0_3_3_3_3

New Line.l(r:p5udm10806-p5ulv3983) Units=km Length=0.012297700000000002 bus1=p5udm10806.1.2.3 bus2=p5ulv3983.1.2.3 switch=n enabled=y phases=3 Linecode=3P_UG_AL_350kcmil_15_0_416_0_3_3_3_3

New Line.l(r:p5udm10806-p5udt3061lv) Units=km Length=0.0588347 bus1=p5udt3061lv.1.2.3 bus2=p5udm10806.1.2.3 switch=n enabled=y phases=3 Linecode=3P_UG_AL_350kcmil_15_0_416_0_3_3_3_3

New Line.l(r:p5udm10807-p5ulv7693) Units=km Length=0.0112079 bus1=p5udm10807.1.2.3 bus2=p5ulv7693.1.2.3 switch=n enabled=y phases=3 Linecode=3P_UG_AL_350kcmil_15_0_416_0_3_3_3_3

New Line.l(r:p5udm10807-p5udt3061lv) Units=km Length=0.058492 bus1=p5udt3061lv.1.2.3 bus2=p5udm10807.1.2.3 switch=n enabled=y phases=3 Linecode=3P_UG_AL_350kcmil_15_0_416_0_3_3_3_3

New Line.l(r:p5udt4710-p5umv2) Units=km Length=0.0607336 bus1=p5udt4710.1.2.3 bus2=p5umv2.1.2.3 switch=n enabled=y phases=3 Linecode=3P_OH_AL_ACSR_4/0_Penguin_12_47_0_3_3_3_3

New Line.l(r:p5udt5287-p5umv49) Units=km Length=0.178669 bus1=p5udt5287-p5umv49x.1.2.3 bus2=p5udt5287-p5umv49xx.1.2.3 switch=n enabled=y phases=3 Linecode=3P_UG_AL_4/0_25_12_47_0_3_3_3_3

New Line.l(r:p5udt2351lv-p5ulv2866) Units=km Length=0.0110693 bus1=p5udt2351lv.1.2.3 bus2=p5ulv2866.1.2.3 switch=n enabled=y phases=3 Linecode=3P_UG_AL_750kcmil_25_0_416_0_3_3_3_3

New Line.l(r:p5udt2351lv-p5ulv13156) Units=km Length=0.016059 bus1=p5udt2351lv.1.2.3 bus2=p5ulv13156.1.2.3 switch=n enabled=y phases=3 Linecode=3P_UG_AL_750kcmil_25_0_416_0_3_3_3_3

New Line.l(r:p5udt2351-p5udt5287) Units=km Length=0.463454 bus1=p5udt5287.1.2.3 bus2=p5udt2351.1.2.3 switch=n enabled=y phases=3 Linecode=3P_OH_AL_ACSR_4/0_Penguin_12_47_0_3_3_3_3

New Line.l(r:p5udt3858lv-p5ulv5450) Units=km Length=0.0166653 bus1=p5udt3858lv.1.2.3 bus2=p5ulv5450.1.2.3 switch=n enabled=y phases=3 Linecode=3P_UG_AL_750kcmil_25_0_416_0_3_3_3_3

New Line.l(r:p5udt7629lv-p5ulv17715) Units=km Length=0.00359138 bus1=p5udt7629lv.1.2.3 bus2=p5ulv17715.1.2.3 switch=n enabled=y phases=3 Linecode=3P_UG_AL_750kcmil_25_0_416_0_3_3_3_3

New Line.l(r:p5udm20578-p5ulv77704) Units=km Length=0.00718585 bus1=p5udm20578.1.2.3 bus2=p5ulv77704.1.2.3 switch=n enabled=y phases=3 Linecode=3P_UG_AL_350kcmil_15_0_416_0_3_3_3_3

New Line.l(r:p5udm20578-p5udt7629lv) Units=km Length=0.0100445 bus1=p5udt7629lv.1.2.3 bus2=p5udm20578.1.2.3 switch=n enabled=y phases=3 Linecode=3P_UG_AL_350kcmil_15_0_416_0_3_3_3_3

New Line.l(r:p5udt4703lv-p5ulv7298) Units=km Length=0.005109720000000001 bus1=p5udt4703lv.1.2.3 bus2=p5ulv7298.1.2.3 switch=n enabled=y phases=3 Linecode=3P_UG_AL_750kcmil_25_0_416_0_3_3_3_3

New Line.l(r:p5udt4703-p5udt7629) Units=km Length=0.0743559 bus1=p5udt7629.1.2.3 bus2=p5udt4703.1.2.3 switch=n enabled=y phases=3 Linecode=3P_OH_AL_ACSR_4/0_Penguin_12_47_0_3_3_3_3

New Line.l(r:p5udt3858-p5udt7629) Units=km Length=0.07834260000000001 bus1=p5udt3858.1.2.3 bus2=p5udt7629.1.2.3 switch=n enabled=y phases=3 Linecode=3P_OH_AL_ACSR_4/0_Penguin_12_47_0_3_3_3_3

New Line.l(r:p5udt3858-p5udt6837) Units=km Length=0.137146 bus1=p5udt6837.1.2.3 bus2=p5udt3858.1.2.3 switch=n enabled=y phases=3 Linecode=3P_OH_AL_ACSR_4/0_Penguin_12_47_0_3_3_3_3

New Line.l(r:p5udt7728lv-p5ulv18274) Units=km Length=0.0153309 bus1=p5udt7728lv.1.2.3 bus2=p5ulv18274.1.2.3 switch=n enabled=y phases=3 Linecode=3P_UG_AL_350kcmil_15_0_416_0_3_3_3_3

New Line.l(r:p5udt629lv-p5ulv671) Units=km Length=0.06592670000000002 bus1=p5udt629lv.1.2.3 bus2=p5ulv671.1.2.3 switch=n enabled=y phases=3 Linecode=3P_UG_AL_350kcmil_15_0_416_0_3_3_3_3

New Line.l(r:p5udt5496-p5udt629) Units=km Length=0.0629118 bus1=p5udt5496-p5udt629x.1.2.3 bus2=p5udt5496-p5udt629xx.1.2.3 switch=n enabled=y phases=3 Linecode=3P_UG_AL_4/0_25_12_47_0_3_3_3_3

New Line.l(r:p5udt5496-p5udt7728) Units=km Length=0.176836 bus1=p5udt7728.1.2.3 bus2=p5udt5496.1.2.3 switch=n enabled=y phases=3 Linecode=3P_OH_AL_ACSR_4/0_Penguin_12_47_0_3_3_3_3

New Line.l(r:p5udt7728-p5udt7844) Units=km Length=0.028692000000000002 bus1=p5udt7844.1.2.3 bus2=p5udt7728.1.2.3 switch=n enabled=y phases=3 Linecode=3P_OH_AL_ACSR_4/0_Penguin_12_47_0_3_3_3_3

New Line.l(r:p5udt6503lv-p5ulv12576) Units=km Length=0.00266811 bus1=p5udt6503lv.1.2.3 bus2=p5ulv12576.1.2.3 switch=n enabled=y phases=3 Linecode=3P_UG_AL_750kcmil_25_0_416_0_3_3_3_3

New Line.l(r:p5udt6503lv-p5ulv14772) Units=km Length=0.00504223 bus1=p5udt6503lv.1.2.3 bus2=p5ulv14772.1.2.3 switch=n enabled=y phases=3 Linecode=3P_UG_AL_350kcmil_15_0_416_0_3_3_3_3

New Line.l(r:p5udm18908-p5ulv14771) Units=km Length=0.010453000000000002 bus1=p5udm18908.1.2.3 bus2=p5ulv14771.1.2.3 switch=n enabled=y phases=3 Linecode=3P_UG_AL_350kcmil_15_0_416_0_3_3_3_3

New Line.l(r:p5udm18908-p5udt6503lv) Units=km Length=0.0173871 bus1=p5udt6503lv.1.2.3 bus2=p5udm18908.1.2.3 switch=n enabled=y phases=3 Linecode=3P_UG_AL_350kcmil_15_0_416_0_3_3_3_3

New Line.l(r:p5udt4212lv-p5ulv6219) Units=km Length=0.015147300000000002 bus1=p5udt4212lv.1.2.3 bus2=p5ulv6219.1.2.3 switch=n enabled=y phases=3 Linecode=3P_UG_AL_350kcmil_15_0_416_0_3_3_3_3

New Line.l(r:p5udm11443-p5ulv4333) Units=km Length=0.0192406 bus1=p5udm11443.1.2.3 bus2=p5ulv4333.1.2.3 switch=n enabled=y phases=3 Linecode=3P_UG_AL_350kcmil_15_0_416_0_3_3_3_3

New Line.l(r:p5udm11443-p5ulv8781) Units=km Length=0.00919966 bus1=p5udm11443.1.2.3 bus2=p5ulv8781.1.2.3 switch=n enabled=y phases=3 Linecode=3P_UG_AL_350kcmil_15_0_416_0_3_3_3_3

New Line.l(r:p5udm11443-p5udt3272lv) Units=km Length=0.00905504 bus1=p5udt3272lv.1.2.3 bus2=p5udm11443.1.2.3 switch=n enabled=y phases=3 Linecode=3P_UG_AL_350kcmil_15_0_416_0_3_3_3_3

New Line.l(r:p5udm11445-p5ulv10667) Units=km Length=0.00722117 bus1=p5udm11445.1.2.3 bus2=p5ulv10667.1.2.3 switch=n enabled=y phases=3 Linecode=3P_UG_AL_750kcmil_25_0_416_0_3_3_3_3

New Line.l(r:p5udm11445-p5udt3272lv) Units=km Length=0.0474223 bus1=p5udt3272lv.1.2.3 bus2=p5udm11445.1.2.3 switch=n enabled=y phases=3 Linecode=3P_UG_AL_750kcmil_25_0_416_0_3_3_3_3

New Line.l(r:p5udt5289lv-p5ulv14407) Units=km Length=0.00412753 bus1=p5udt5289lv.1.2.3 bus2=p5ulv14407.1.2.3 switch=n enabled=y phases=3 Linecode=3P_UG_AL_750kcmil_25_0_416_0_3_3_3_3

New Line.l(r:p5udt5289lv-p5ulv78080) Units=km Length=0.00457832 bus1=p5udt5289lv.1.2.3 bus2=p5ulv78080.1.2.3 switch=n enabled=y phases=3 Linecode=3P_UG_AL_350kcmil_15_0_416_0_3_3_3_3

New Line.l(r:p5udm16616-p5ulv8783) Units=km Length=0.0116284 bus1=p5udm16616.1.2.3 bus2=p5ulv8783.1.2.3 switch=n enabled=y phases=3 Linecode=3P_UG_AL_350kcmil_15_0_416_0_3_3_3_3

New Line.l(r:p5udm16616-p5udt5289lv) Units=km Length=0.056893400000000004 bus1=p5udt5289lv.1.2.3 bus2=p5udm16616.1.2.3 switch=n enabled=y phases=3 Linecode=3P_UG_AL_350kcmil_15_0_416_0_3_3_3_3

New Line.l(r:p5udt4130lv-p5ulv6024) Units=km Length=0.011623300000000001 bus1=p5udt4130lv.1.2.3 bus2=p5ulv6024.1.2.3 switch=n enabled=y phases=3 Linecode=3P_UG_AL_750kcmil_25_0_416_0_3_3_3_3

New Line.l(r:p5udt4130-p5udt5289) Units=km Length=0.128893 bus1=p5udt5289.1.2.3 bus2=p5udt4130.1.2.3 switch=n enabled=y phases=3 Linecode=3P_OH_AL_ACSR_4/0_Penguin_12_47_0_3_3_3_3

New Line.l(r:p5udt3272-p5udt5289) Units=km Length=0.0389298 bus1=p5udt3272.1.2.3 bus2=p5udt5289.1.2.3 switch=n enabled=y phases=3 Linecode=3P_OH_AL_ACSR_4/0_Penguin_12_47_0_3_3_3_3

New Line.l(r:p5udt3272-p5udt4212) Units=km Length=0.064492 bus1=p5udt4212.1.2.3 bus2=p5udt3272.1.2.3 switch=n enabled=y phases=3 Linecode=3P_OH_AL_ACSR_4/0_Penguin_12_47_0_3_3_3_3

New Line.l(r:p5udt4213lv-p5ulv6222) Units=km Length=0.0043628700000000005 bus1=p5udt4213lv.1.2.3 bus2=p5ulv6222.1.2.3 switch=n enabled=y phases=3 Linecode=3P_UG_AL_350kcmil_15_0_416_0_3_3_3_3

New Line.l(r:p5udm14032-p5ulv6220) Units=km Length=0.00564981 bus1=p5udm14032.1.2.3 bus2=p5ulv6220.1.2.3 switch=n enabled=y phases=3 Linecode=3P_UG_AL_350kcmil_15_0_416_0_3_3_3_3

New Line.l(r:p5udm14032-p5udt4213lv) Units=km Length=0.017659100000000004 bus1=p5udt4213lv.1.2.3 bus2=p5udm14032.1.2.3 switch=n enabled=y phases=3 Linecode=3P_UG_AL_350kcmil_15_0_416_0_3_3_3_3

New Line.l(r:p5udm14033-p5ulv6221) Units=km Length=0.00469018 bus1=p5udm14033.1.2.3 bus2=p5ulv6221.1.2.3 switch=n enabled=y phases=3 Linecode=3P_UG_AL_350kcmil_15_0_416_0_3_3_3_3

New Line.l(r:p5udm14033-p5udt4213lv) Units=km Length=0.017659100000000004 bus1=p5udt4213lv.1.2.3 bus2=p5udm14033.1.2.3 switch=n enabled=y phases=3 Linecode=3P_UG_AL_350kcmil_15_0_416_0_3_3_3_3

New Line.l(r:p5udt4213-p5udt6503) Units=km Length=0.0903139 bus1=p5udt6503.1.2.3 bus2=p5udt4213.1.2.3 switch=n enabled=y phases=3 Linecode=3P_OH_AL_ACSR_4/0_Penguin_12_47_0_3_3_3_3

New Line.l(r:p5udt2342lv-p5ulv2855) Units=km Length=0.0118878 bus1=p5udt2342lv.1.2.3 bus2=p5ulv2855.1.2.3 switch=n enabled=y phases=3 Linecode=3P_UG_AL_350kcmil_15_0_416_0_3_3_3_3

New Line.l(r:p5udt2342-p5udt5288) Units=km Length=0.0349705 bus1=p5udt5288.1.2.3 bus2=p5udt2342.1.2.3 switch=n enabled=y phases=3 Linecode=3P_OH_AL_ACSR_4/0_Penguin_12_47_0_3_3_3_3

New Line.l(r:p5udt5288-p5udt6503) Units=km Length=0.124876 bus1=p5udt6503.1.2.3 bus2=p5udt5288.1.2.3 switch=n enabled=y phases=3 Linecode=3P_OH_AL_ACSR_4/0_Penguin_12_47_0_3_3_3_3

New Line.l(r:p5udt4393lv-p5ulv12015) Units=km Length=0.0121971 bus1=p5udt4393lv.1.2.3 bus2=p5ulv12015.1.2.3 switch=n enabled=y phases=3 Linecode=3P_UG_AL_350kcmil_15_0_416_0_3_3_3_3

New Line.l(r:p5udt4393lv-p5ulv15488) Units=km Length=0.0102591 bus1=p5udt4393lv.1.2.3 bus2=p5ulv15488.1.2.3 switch=n enabled=y phases=3 Linecode=3P_UG_AL_350kcmil_15_0_416_0_3_3_3_3

New Line.l(r:p5udm14476-p5ulv6573) Units=km Length=0.0120067 bus1=p5udm14476.1.2.3 bus2=p5ulv6573.1.2.3 switch=n enabled=y phases=3 Linecode=3P_UG_AL_350kcmil_15_0_416_0_3_3_3_3

New Line.l(r:p5udm14476-p5udt4393lv) Units=km Length=0.0391904 bus1=p5udt4393lv.1.2.3 bus2=p5udm14476.1.2.3 switch=n enabled=y phases=3 Linecode=3P_UG_AL_350kcmil_15_0_416_0_3_3_3_3

New Line.l(r:p5udm14479-p5ulv78266) Units=km Length=0.0141102 bus1=p5udm14479.1.2.3 bus2=p5ulv78266.1.2.3 switch=n enabled=y phases=3 Linecode=3P_UG_AL_350kcmil_15_0_416_0_3_3_3_3

New Line.l(r:p5udm14479-p5udt4393lv) Units=km Length=0.0195967 bus1=p5udt4393lv.1.2.3 bus2=p5udm14479.1.2.3 switch=n enabled=y phases=3 Linecode=3P_UG_AL_350kcmil_15_0_416_0_3_3_3_3

New Line.l(r:p5udt2471-p5udt4393) Units=km Length=0.001 bus1=p5udt2471.1.2.3 bus2=p5udt4393.1.2.3 switch=n enabled=y phases=3 Linecode=3P_OH_AL_ACSR_4/0_Penguin_12_47_0_3_3_3_3

New Line.l(r:p5udt22558-p5udt2471) Units=km Length=0.0686391 bus1=p5udt22558.1.2.3 bus2=p5udt2471.1.2.3 switch=n enabled=y phases=3 Linecode=3P_OH_AL_ACSR_4/0_Penguin_12_47_0_3_3_3_3

New Line.l(r:p5udt6503-p5udt6504) Units=km Length=0.0347647 bus1=p5udt6503-p5udt6504x.1.2.3 bus2=p5udt6503.1.2.3 switch=n enabled=y phases=3 Linecode=3P_OH_AL_ACSR_1033kcmil_Curlew_12.47_1_3_3_3_3

New Line.l(r:p5udt1256-p5udt7182) Units=km Length=0.12531 bus1=p5udt1256-p5udt7182x.1.2.3 bus2=p5udt7182.1.2.3 switch=n enabled=y phases=3 Linecode=3P_OH_AL_ACSR_1033kcmil_Curlew_12.47_1_3_3_3_3

New Line.l(r:p5udt2344-p5udt4705) Units=km Length=0.159275 bus1=p5udt2344-p5udt4705x.1.2.3 bus2=p5udt2344.1.2.3 switch=n enabled=y phases=3 Linecode=3P_OH_AL_ACSR_1033kcmil_Curlew_12.47_1_3_3_3_3

New Line.l(r:p5udt1254-p5umv11) Units=km Length=0.0812765 bus1=p5udt1254-p5umv11x.1.2.3 bus2=p5udt1254.1.2.3 switch=n enabled=y phases=3 Linecode=3P_OH_AL_ACSR_1033kcmil_Curlew_12.47_1_3_3_3_3

New Line.l(r:p5udt5287lv-p5ulv8780)p5ud1 Units=km Length=0.00856711 bus1=p5udt5287lv.1.2.3 bus2=p5ulv8780.1.2.3 switch=n enabled=y phases=3 Linecode=3P_UG_AL_750kcmil_25_0_416_0_3_3_3_3

New Line.padswitch(r:p5udt2201-p5udt3153)p5u_117291 Units=km Length=0.001 bus1=p5udt2201-p5udt3153x.1 bus2=p5udt2201-p5udt3153xx.1 switch=y enabled=y phases=1 Linecode=padswitch_1_1_1_1

New Line.padswitch(r:p5udt2201-p5udt3153)p5u_117292 Units=km Length=0.001 bus1=p5udt2201-p5udt3153xxx.1 bus2=p5udt3153.1 switch=y enabled=y phases=1 Linecode=padswitch_1_3_1_1_1

New Line.padswitch(r:p5udt5561-p5udt629)p5u_117325 Units=km Length=0.001 bus1=p5udt5561-p5udt629xxx.3 bus2=p5udt5561-p5udt629xx.3 switch=y enabled=y phases=1 Linecode=padswitch_1_1_1_1

New Line.padswitch(r:p5udt5561-p5udt629)p5u_117326 Units=km Length=0.001 bus1=p5udt5561-p5udt629x.3 bus2=p5udt5561.3 switch=y enabled=y phases=1 Linecode=padswitch_1_3_1_1_1

New Line.padswitch(r:p5udt2346-p5umv3)p5u_117329 Units=km Length=0.001 bus1=p5udt2346.1.2.3 bus2=p5udt2346-p5umv3x.1.2.3 switch=y enabled=y phases=3 Linecode=padswitch_3_3_3_3

New Line.padswitch(r:p5udt2346-p5umv3)p5u_117330 Units=km Length=0.001 bus1=p5udt2346-p5umv3xx.1.2.3 bus2=p5umv3.1.2.3 switch=y enabled=y phases=3 Linecode=padswitch_3_4_3_3_3

New Line.padswitch(r:p5udt2346-p5udt6795)p5u_117331 Units=km Length=0.001 bus1=p5udt6795.1.2.3 bus2=p5udt2346-p5udt6795xx.1.2.3 switch=y enabled=y phases=3 Linecode=padswitch_3_4_3_3_3

New Line.padswitch(r:p5udt2346-p5udt6795)p5u_117332 Units=km Length=0.001 bus1=p5udt2346-p5udt6795x.1.2.3 bus2=p5udt2346.1.2.3 switch=y enabled=y phases=3 Linecode=padswitch_3_4_3_2_3_3

New Line.padswitch(r:p5udt5560-p5udt6795)p5u_117333 Units=km Length=0.001 bus1=p5udt5560.1.2.3 bus2=p5udt5560-p5udt6795x.1.2.3 switch=y enabled=y phases=3 Linecode=padswitch_3_4_3_3_3

New Line.padswitch(r:p5udt5560-p5udt6795)p5u_117334 Units=km Length=0.001 bus1=p5udt5560-p5udt6795xx.1.2.3 bus2=p5udt6795.1.2.3 switch=y enabled=y phases=3 Linecode=padswitch_3_4_3_3_3

New Line.padswitch(r:p5udt5560-p5udt62)p5u_117335 Units=km Length=0.001 bus1=p5udt62.1.2.3 bus2=p5udt5560-p5udt62xx.1.2.3 switch=y enabled=y phases=3 Linecode=padswitch_3_4_3_2_3_1_3

New Line.padswitch(r:p5udt5560-p5udt62)p5u_117336 Units=km Length=0.001 bus1=p5udt5560-p5udt62x.1.2.3 bus2=p5udt5560.1.2.3 switch=y enabled=y phases=3 Linecode=padswitch_3_4_3_3_3

New Line.padswitch(r:p5udt22558-p5udt62)p5u_117337 Units=km Length=0.001 bus1=p5udt22558.1.2.3 bus2=p5udt22558-p5udt62x.1.2.3 switch=y enabled=y phases=3 Linecode=padswitch_3_4_3_2_3_1_3_1

New Line.padswitch(r:p5udt22558-p5udt62)p5u_117338 Units=km Length=0.001 bus1=p5udt22558-p5udt62xx.1.2.3 bus2=p5udt62.1.2.3 switch=y enabled=y phases=3 Linecode=padswitch_3_4_3_2_3_1_3_1

New Line.padswitch(r:p5udt22558-p5udt2347)p5u_117339 Units=km Length=0.001 bus1=p5udt2347.1.2.3 bus2=p5udt22558-p5udt2347xx.1.2.3 switch=y enabled=y phases=3 Linecode=padswitch_3_4_3_2_3_1_3_1

New Line.padswitch(r:p5udt22558-p5udt2347)p5u_117340 Units=km Length=0.001 bus1=p5udt22558-p5udt2347x.1.2.3 bus2=p5udt22558.1.2.3 switch=y enabled=y phases=3 Linecode=padswitch_3_4_3_2_3_1_3_1

New Line.padswitch(r:p5udt2347-p5udt4869)p5u_117341 Units=km Length=0.001 bus1=p5udt4869.1.2.3 bus2=p5udt2347-p5udt4869xx.1.2.3 switch=y enabled=y phases=3 Linecode=padswitch_3_4_3_2_3_1_3_1

New Line.padswitch(r:p5udt2347-p5udt4869)p5u_117342 Units=km Length=0.001 bus1=p5udt2347-p5udt4869x.1.2.3 bus2=p5udt2347.1.2.3 switch=y enabled=y phases=3 Linecode=padswitch_3_4_3_2_3_1_3_1

New Line.padswitch(r:p5udt4131-p5udt7351)p5u_117343 Units=km Length=0.001 bus1=p5udt4131.1 bus2=p5udt4131-p5udt7351x.1 switch=y enabled=y phases=1 Linecode=padswitch_1_3_1_1_1

New Line.padswitch(r:p5udt4131-p5udt7351)p5u_117344 Units=km Length=0.001 bus1=p5udt4131-p5udt7351xx.1 bus2=p5udt7351.1 switch=y enabled=y phases=1 Linecode=padswitch_1_3_1_1_1

New Line.padswitch(r:p5udt4131-p5udt4941)p5u_117345 Units=km Length=0.001 bus1=p5udt4941.1 bus2=p5udt4131-p5udt4941xx.1 switch=y enabled=y phases=1 Linecode=padswitch_1_1_1_1

New Line.padswitch(r:p5udt4131-p5udt4941)p5u_117346 Units=km Length=0.001 bus1=p5udt4131-p5udt4941x.1 bus2=p5udt4131.1 switch=y enabled=y phases=1 Linecode=padswitch_1_3_1_1_1

New Line.padswitch(r:p5udt4869-p5udt4941)p5u_117347 Units=km Length=0.001 bus1=p5udt4869-p5udt4941x.1 bus2=p5udt4869-p5udt4941xx.1 switch=y enabled=y phases=1 Linecode=padswitch_1_1_1_1

New Line.padswitch(r:p5udt4869-p5udt4941)p5u_117348 Units=km Length=0.001 bus1=p5udt4869-p5udt4941xxx.1 bus2=p5udt4941.1 switch=y enabled=y phases=1 Linecode=padswitch_1_1_1_1

New Line.padswitch(r:p5udt4869-p5udt7450)p5u_117349 Units=km Length=0.001 bus1=p5udt7450.1.2.3 bus2=p5udt4869-p5udt7450xx.1.2.3 switch=y enabled=y phases=3 Linecode=padswitch_3_4_3_2_3_1_3_1

New Line.padswitch(r:p5udt4869-p5udt7450)p5u_117350 Units=km Length=0.001 bus1=p5udt4869-p5udt7450x.1.2.3 bus2=p5udt4869.1.2.3 switch=y enabled=y phases=3 Linecode=padswitch_3_4_3_2_3_1_3_1

New Line.padswitch(r:p5udt1820-p5udt6653)p5u_117351 Units=km Length=0.001 bus1=p5udt1820-p5udt6653x.2 bus2=p5udt1820-p5udt6653xx.2 switch=y enabled=y phases=1 Linecode=padswitch_1_1_1_1

New Line.padswitch(r:p5udt1820-p5udt6653)p5u_117352 Units=km Length=0.001 bus1=p5udt1820-p5udt6653xxx.2 bus2=p5udt6653.2 switch=y enabled=y phases=1 Linecode=padswitch_1_3_1_1_1_1

New Line.padswitch(r:p5udt1820-p5udt928)p5u_117353 Units=km Length=0.001 bus1=p5udt928.1.2.3 bus2=p5udt1820-p5udt928xx.1.2.3 switch=y enabled=y phases=3 Linecode=padswitch_3_4_3_2_3_1_3_1

New Line.padswitch(r:p5udt1820-p5udt928)p5u_117354 Units=km Length=0.001 bus1=p5udt1820-p5udt928x.1.2.3 bus2=p5udt1820.1.2.3 switch=y enabled=y phases=3 Linecode=padswitch_3_3_3_3

New Line.padswitch(r:p5udt5291-p5udt928)p5u_117355 Units=km Length=0.001 bus1=p5udt5291.1.2.3 bus2=p5udt5291-p5udt928x.1.2.3 switch=y enabled=y phases=3 Linecode=padswitch_3_4_3_2_3_1_3_1

New Line.padswitch(r:p5udt5291-p5udt928)p5u_117356 Units=km Length=0.001 bus1=p5udt5291-p5udt928xx.1.2.3 bus2=p5udt928.1.2.3 switch=y enabled=y phases=3 Linecode=padswitch_3_4_3_2_3_1_3_1

New Line.padswitch(r:p5udt2343-p5udt2344)p5u_117295 Units=km Length=0.001 bus1=p5udt2344.1.2.3 bus2=p5udt2343-p5udt2344xx.1.2.3 switch=y enabled=y phases=3 Linecode=padswitch_3_4_3_2_3_1_3_1

New Line.padswitch(r:p5udt2343-p5udt2344)p5u_117296 Units=km Length=0.001 bus1=p5udt2343-p5udt2344x.1.2.3 bus2=p5udt2343.1.2.3 switch=y enabled=y phases=3 Linecode=padswitch_3_4_3_2_3_1_3_1

New Line.padswitch(r:p5udt2473-p5udt7383)p5u_117301 Units=km Length=0.001 bus1=p5udt2473.1.2.3 bus2=p5udt2473-p5udt7383x.1.2.3 switch=y enabled=y phases=3 Linecode=padswitch_3_4_3_2_3_1_3_1

New Line.padswitch(r:p5udt2473-p5udt7383)p5u_117302 Units=km Length=0.001 bus1=p5udt2473-p5udt7383xx.1.2.3 bus2=p5udt7383.1.2.3 switch=y enabled=y phases=3 Linecode=padswitch_3_4_3_2_3_1_3_1

New Line.padswitch(r:p5udt2473-p5udt7451)p5u_117303 Units=km Length=0.001 bus1=p5udt7451.1.2.3 bus2=p5udt2473-p5udt7451xx.1.2.3 switch=y enabled=y phases=3 Linecode=padswitch_3_4_3_2_3_1_3_1

New Line.padswitch(r:p5udt2473-p5udt7451)p5u_117304 Units=km Length=0.001 bus1=p5udt2473-p5udt7451x.1.2.3 bus2=p5udt2473.1.2.3 switch=y enabled=y phases=3 Linecode=padswitch_3_4_3_2_3_1_3_1

New Line.padswitch(r:p5udt7451-p5udt7584)p5u_117305 Units=km Length=0.001 bus1=p5udt7584.1.2.3 bus2=p5udt7451-p5udt7584xx.1.2.3 switch=y enabled=y phases=3 Linecode=padswitch_3_4_3_3_3

New Line.padswitch(r:p5udt7451-p5udt7584)p5u_117306 Units=km Length=0.001 bus1=p5udt7451-p5udt7584x.1.2.3 bus2=p5udt7451.1.2.3 switch=y enabled=y phases=3 Linecode=padswitch_3_4_3_2_3_1_3_1

New Line.padswitch(r:p5udt7225-p5udt7584)p5u_117307 Units=km Length=0.001 bus1=p5udt7225.1.2.3 bus2=p5udt7225-p5udt7584x.1.2.3 switch=y enabled=y phases=3 Linecode=padswitch_3_4_3_2_3_1_3_1

New Line.padswitch(r:p5udt7225-p5udt7584)p5u_117308 Units=km Length=0.001 bus1=p5udt7225-p5udt7584xx.1.2.3 bus2=p5udt7584.1.2.3 switch=y enabled=y phases=3 Linecode=padswitch_3_4_3_3_3

New Line.padswitch(r:p5udt7225-p5udt7488)p5u_117309 Units=km Length=0.001 bus1=p5udt7488.1.2.3 bus2=p5udt7225-p5udt7488xx.1.2.3 switch=y enabled=y phases=3 Linecode=padswitch_3_4_3_3_3

New Line.padswitch(r:p5udt7225-p5udt7488)p5u_117310 Units=km Length=0.001 bus1=p5udt7225-p5udt7488x.1.2.3 bus2=p5udt7225.1.2.3 switch=y enabled=y phases=3 Linecode=padswitch_3_4_3_2_3_1_3_1

New Line.padswitch(r:p5udt5290-p5udt7488)p5u_117311 Units=km Length=0.001 bus1=p5udt5290.1.2.3 bus2=p5udt5290-p5udt7488x.1.2.3 switch=y enabled=y phases=3 Linecode=padswitch_3_4_3_2_3_3

New Line.padswitch(r:p5udt5290-p5udt7488)p5u_117312 Units=km Length=0.001 bus1=p5udt5290-p5udt7488xx.1.2.3 bus2=p5udt7488.1.2.3 switch=y enabled=y phases=3 Linecode=padswitch_3_4_3_3_3

New Line.padswitch(r:p5udt5290-p5udt631)p5u_117313 Units=km Length=0.001 bus1=p5udt631.1.2.3 bus2=p5udt5290-p5udt631xx.1.2.3 switch=y enabled=y phases=3 Linecode=padswitch_3_4_3_3_3

New Line.padswitch(r:p5udt5290-p5udt631)p5u_117314 Units=km Length=0.001 bus1=p5udt5290-p5udt631x.1.2.3 bus2=p5udt5290.1.2.3 switch=y enabled=y phases=3 Linecode=padswitch_3_4_3_3_3

New Line.padswitch(r:p5udt2080-p5udt631)p5u_117315 Units=km Length=0.001 bus1=p5udt2080.1.2.3 bus2=p5udt2080-p5udt631x.1.2.3 switch=y enabled=y phases=3 Linecode=padswitch_3_4_3_3_3

New Line.padswitch(r:p5udt2080-p5udt631)p5u_117316 Units=km Length=0.001 bus1=p5udt2080-p5udt631xx.1.2.3 bus2=p5udt631.1.2.3 switch=y enabled=y phases=3 Linecode=padswitch_3_4_3_3_3

New Line.padswitch(r:p5udt1820-p5udt2080)p5u_117317 Units=km Length=0.001 bus1=p5udt1820.1.2.3 bus2=p5udt1820-p5udt2080x.1.2.3 switch=y enabled=y phases=3 Linecode=padswitch_3_4_3_2_3_1_3_1

New Line.padswitch(r:p5udt1820-p5udt2080)p5u_117318 Units=km Length=0.001 bus1=p5udt1820-p5udt2080xx.1.2.3 bus2=p5udt2080.1.2.3 switch=y enabled=y phases=3 Linecode=padswitch_3_4_3_3_3

New Line.padswitch(r:p5udt3061-p5udt4710)p5u_117319 Units=km Length=0.001 bus1=p5udt3061.1.2.3 bus2=p5udt3061-p5udt4710x.1.2.3 switch=y enabled=y phases=3 Linecode=padswitch_3_4_3_3_3

New Line.padswitch(r:p5udt3061-p5udt4710)p5u_117320 Units=km Length=0.001 bus1=p5udt3061-p5udt4710xx.1.2.3 bus2=p5udt4710.1.2.3 switch=y enabled=y phases=3 Linecode=padswitch_3_4_3_2_3_1_3_1

New Line.padswitch(r:p5udt3061-p5udt5287)p5u_117323 Units=km Length=0.001 bus1=p5udt3061.1.2.3 bus2=p5udt3061-p5udt5287x.1.2.3 switch=y enabled=y phases=3 Linecode=padswitch_3_4_3_3_3

New Line.padswitch(r:p5udt3061-p5udt5287)p5u_117324 Units=km Length=0.001 bus1=p5udt3061-p5udt5287xx.1.2.3 bus2=p5udt5287.1.2.3 switch=y enabled=y phases=3 Linecode=padswitch_3_4_3_2_3_1_3_1

New Line.padswitch(r:p5udt1254-p5udt1668)p5u_117277 Units=km Length=0.001 bus1=p5udt1668.1.2.3 bus2=p5udt1254-p5udt1668xx.1.2.3 switch=y enabled=y phases=3 Linecode=padswitch_3_4_3_2_3_1_3_1

New Line.padswitch(r:p5udt1254-p5udt1668)p5u_117278 Units=km Length=0.001 bus1=p5udt1254-p5udt1668x.1.2.3 bus2=p5udt1254.1.2.3 switch=y enabled=y phases=3 Linecode=padswitch_3_4_3_2_3_1_3_1

New Line.padswitch(r:p5udt33616-p5udt6652)p5u_117279 Units=km Length=0.001 bus1=p5udt33616.1.2.3 bus2=p5udt33616-p5udt6652x.1.2.3 switch=y enabled=y phases=3 Linecode=padswitch_3_4_3_3_3

New Line.padswitch(r:p5udt33616-p5udt6652)p5u_117280 Units=km Length=0.001 bus1=p5udt33616-p5udt6652xx.1.2.3 bus2=p5udt6652.1.2.3 switch=y enabled=y phases=3 Linecode=padswitch_3_4_3_3_3

New Line.padswitch(r:p5udt33616-p5udt4052)p5u_117281 Units=km Length=0.001 bus1=p5udt4052.1.2.3 bus2=p5udt33616-p5udt4052xx.1.2.3 switch=y enabled=y phases=3 Linecode=padswitch_3_4_3_2_3_1_3_1

New Line.padswitch(r:p5udt33616-p5udt4052)p5u_117282 Units=km Length=0.001 bus1=p5udt33616-p5udt4052x.1.2.3 bus2=p5udt33616.1.2.3 switch=y enabled=y phases=3 Linecode=padswitch_3_4_3_3_3

New Line.padswitch(r:p5udt4052-p5udt63)p5u_117283 Units=km Length=0.001 bus1=p5udt63.1.2.3 bus2=p5udt4052-p5udt63xx.1.2.3 switch=y enabled=y phases=3 Linecode=padswitch_3_4_3_3_3

New Line.padswitch(r:p5udt4052-p5udt63)p5u_117284 Units=km Length=0.001 bus1=p5udt4052-p5udt63x.1.2.3 bus2=p5udt4052.1.2.3 switch=y enabled=y phases=3 Linecode=padswitch_3_4_3_3_3

New Line.padswitch(r:p5udt2834-p5udt63)p5u_117285 Units=km Length=0.001 bus1=p5udt2834.1.2.3 bus2=p5udt2834-p5udt63x.1.2.3 switch=y enabled=y phases=3 Linecode=padswitch_3_3_3_3

New Line.padswitch(r:p5udt2834-p5udt63)p5u_117286 Units=km Length=0.001 bus1=p5udt2834-p5udt63xx.1.2.3 bus2=p5udt63.1.2.3 switch=y enabled=y phases=3 Linecode=padswitch_3_4_3_3_3

New Line.padswitch(r:p5udt2834-p5udt5210)p5u_117287 Units=km Length=0.001 bus1=p5udt5210.1.2.3 bus2=p5udt2834-p5udt5210xx.1.2.3 switch=y enabled=y phases=3 Linecode=padswitch_3_4_3_3_3

New Line.padswitch(r:p5udt2834-p5udt5210)p5u_117288 Units=km Length=0.001 bus1=p5udt2834-p5udt5210x.1.2.3 bus2=p5udt2834.1.2.3 switch=y enabled=y phases=3 Linecode=padswitch_3_4_3_3_3

New Line.padswitch(r:p5udt5210-p5udt7488)p5u_117289 Units=km Length=0.001 bus1=p5udt7488.1.2.3 bus2=p5udt5210-p5udt7488xx.1.2.3 switch=y enabled=y phases=3 Linecode=padswitch_3_4_3_3_3

New Line.padswitch(r:p5udt5210-p5udt7488)p5u_117290 Units=km Length=0.001 bus1=p5udt5210-p5udt7488x.1.2.3 bus2=p5udt5210.1.2.3 switch=y enabled=y phases=3 Linecode=padswitch_3_4_3_3_3

New Line.padswitch(r:p5udt2201-p5udt6121)p5u_117293 Units=km Length=0.001 bus1=p5udt6121.1.2.3 bus2=p5udt2201-p5udt6121xx.1.2.3 switch=y enabled=y phases=3 Linecode=padswitch_3_4_3_2_3_1_3_1

New Line.padswitch(r:p5udt2201-p5udt6121)p5u_117294 Units=km Length=0.001 bus1=p5udt2201-p5udt6121x.1.2.3 bus2=p5udt2201.1.2.3 switch=y enabled=y phases=3 Linecode=padswitch_3_4_3_3_3

New Line.padswitch(r:p5udt2344-p5udt6953)p5u_117297 Units=km Length=0.001 bus1=p5udt2344.1.2.3 bus2=p5udt2344-p5udt6953x.1.2.3 switch=y enabled=y phases=3 Linecode=padswitch_3_4_3_3_3

New Line.padswitch(r:p5udt2344-p5udt6953)p5u_117298 Units=km Length=0.001 bus1=p5udt2344-p5udt6953xx.1.2.3 bus2=p5udt6953.1.2.3 switch=y enabled=y phases=3 Linecode=padswitch_3_4_3_2_3_1_3_1

New Line.padswitch(r:p5udt33614-p5udt5286)p5u_117299 Units=km Length=0.001 bus1=p5udt33614.1.2.3 bus2=p5udt33614-p5udt5286x.1.2.3 switch=y enabled=y phases=3 Linecode=padswitch_3_4_3_2_3_1_3_1

New Line.padswitch(r:p5udt33614-p5udt5286)p5u_117300 Units=km Length=0.001 bus1=p5udt33614-p5udt5286xx.1.2.3 bus2=p5udt5286.1.2.3 switch=y enabled=y phases=3 Linecode=padswitch_3_4_3_2_3_1_3_1

New Line.padswitch(r:p5udt5287-p5umv49)p5u_117321 Units=km Length=0.001 bus1=p5udt5287.1.2.3 bus2=p5udt5287-p5umv49x.1.2.3 switch=y enabled=y phases=3 Linecode=padswitch_3_4_3_2_3_1_3_1

New Line.padswitch(r:p5udt5287-p5umv49)p5u_117322 Units=km Length=0.001 bus1=p5udt5287-p5umv49xx.1.2.3 bus2=p5umv49.1.2.3 switch=y enabled=y phases=3 Linecode=padswitch_3_4_3_3_3

New Line.padswitch(r:p5udt5496-p5udt629)p5u_117327 Units=km Length=0.001 bus1=p5udt5496.1.2.3 bus2=p5udt5496-p5udt629x.1.2.3 switch=y enabled=y phases=3 Linecode=padswitch_3_4_3_3_3

New Line.padswitch(r:p5udt5496-p5udt629)p5u_117328 Units=km Length=0.001 bus1=p5udt5496-p5udt629xx.1.2.3 bus2=p5udt629.1.2.3 switch=y enabled=y phases=3 Linecode=padswitch_3_4_3_2_3_1_3_1

New Line.elbswitch(r:p5udt2351-p5udt7033)p5u_151229 Units=km Length=0.001 bus1=p5udt2351.1.2.3 bus2=p5udt2351-p5udt7033x.1.2.3 switch=y enabled=n phases=3 Linecode=elbswitch_3_3_3_3

New Line.fuse(r:p5udt1088-p5umv2)p5u_151477 Units=km Length=0.001 bus1=p5umv2.3 bus2=p5udt1088-p5umv2x.3 switch=n enabled=y phases=1 Linecode=fuse_1_1_1_1

New Fuse.Fuse_fuse(r:p5udt1088-p5umv2)p5u_151477 monitoredobj=Line.fuse(r:p5udt1088-p5umv2)p5u_151477 enabled=y ratedcurrent=100.0

New Line.fuse(r:p5udt6655-p5umv2)p5u_151478 Units=km Length=0.001 bus1=p5umv2.2 bus2=p5udt6655-p5umv2x.2 switch=n enabled=y phases=1 Linecode=fuse_1_1_1_1

New Fuse.Fuse_fuse(r:p5udt6655-p5umv2)p5u_151478 monitoredobj=Line.fuse(r:p5udt6655-p5umv2)p5u_151478 enabled=y ratedcurrent=100.0

New Line.fuse(r:p5udt628-p5udt6707)p5u_151575 Units=km Length=0.001 bus1=p5udt628.3 bus2=p5udt628-p5udt6707x.3 switch=n enabled=y phases=1 Linecode=fuse_1_1_1_1

New Fuse.Fuse_fuse(r:p5udt628-p5udt6707)p5u_151575 monitoredobj=Line.fuse(r:p5udt628-p5udt6707)p5u_151575 enabled=y ratedcurrent=100.0

New Line.fuse(r:p5udt5561-p5udt629)p5u_151576 Units=km Length=0.001 bus1=p5udt629.3 bus2=p5udt5561-p5udt629xxx.3 switch=n enabled=y phases=1 Linecode=fuse_1_7_1_1_1

New Fuse.Fuse_fuse(r:p5udt5561-p5udt629)p5u_151576 monitoredobj=Line.fuse(r:p5udt5561-p5udt629)p5u_151576 enabled=y ratedcurrent=100.0

New Line.fuse(r:p5udt1820-p5udt6653)p5u_151731 Units=km Length=0.001 bus1=p5udt1820.2 bus2=p5udt1820-p5udt6653x.2 switch=n enabled=y phases=1 Linecode=fuse_1_7_1_1_1

New Fuse.Fuse_fuse(r:p5udt1820-p5udt6653)p5u_151731 monitoredobj=Line.fuse(r:p5udt1820-p5udt6653)p5u_151731 enabled=y ratedcurrent=100.0

New Line.fuse(r:p5udt2201-p5udt3153)p5u_151785 Units=km Length=0.001 bus1=p5udt2201.1 bus2=p5udt2201-p5udt3153x.1 switch=n enabled=y phases=1 Linecode=fuse_1_7_1_5_1_1

New Fuse.Fuse_fuse(r:p5udt2201-p5udt3153)p5u_151785 monitoredobj=Line.fuse(r:p5udt2201-p5udt3153)p5u_151785 enabled=y ratedcurrent=100.0

New Line.fuse(r:p5udt33661-p5udt3858)p5u_152046 Units=km Length=0.001 bus1=p5udt3858.1 bus2=p5udt33661-p5udt3858x.1 switch=n enabled=y phases=1 Linecode=fuse_1_7_1_1_1

New Fuse.Fuse_fuse(r:p5udt33661-p5udt3858)p5u_152046 monitoredobj=Line.fuse(r:p5udt33661-p5udt3858)p5u_152046 enabled=y ratedcurrent=100.0

New Line.fuse(r:p5udt33615-p5udt4212)p5u_152105 Units=km Length=0.001 bus1=p5udt4212.1 bus2=p5udt33615-p5udt4212x.1 switch=n enabled=y phases=1 Linecode=fuse_1_1_1_1

New Fuse.Fuse_fuse(r:p5udt33615-p5udt4212)p5u_152105 monitoredobj=Line.fuse(r:p5udt33615-p5udt4212)p5u_152105 enabled=y ratedcurrent=100.0

New Line.fuse(r:p5udt3155-p5udt4561)p5u_152154 Units=km Length=0.001 bus1=p5udt4561.1 bus2=p5udt3155-p5udt4561x.1 switch=n enabled=y phases=1 Linecode=fuse_1_7_1_5_1_4_1

New Fuse.Fuse_fuse(r:p5udt3155-p5udt4561)p5u_152154 monitoredobj=Line.fuse(r:p5udt3155-p5udt4561)p5u_152154 enabled=y ratedcurrent=100.0

New Line.fuse(r:p5udt4788-p5udt6062)p5u_152186 Units=km Length=0.001 bus1=p5udt4788.2 bus2=p5udt4788-p5udt6062x.2 switch=n enabled=y phases=1 Linecode=fuse_1_7_1_5_1_4_1_3

New Fuse.Fuse_fuse(r:p5udt4788-p5udt6062)p5u_152186 monitoredobj=Line.fuse(r:p5udt4788-p5udt6062)p5u_152186 enabled=y ratedcurrent=100.0

New Line.fuse(r:p5udt4869-p5udt4941)p5u_152204 Units=km Length=0.001 bus1=p5udt4869.1 bus2=p5udt4869-p5udt4941x.1 switch=n enabled=y phases=1 Linecode=fuse_1_7_1_1_1

New Fuse.Fuse_fuse(r:p5udt4869-p5udt4941)p5u_152204 monitoredobj=Line.fuse(r:p5udt4869-p5udt4941)p5u_152204 enabled=y ratedcurrent=100.0

New Line.fuse(r:p5udt1667-p5udt5289)p5u_152275 Units=km Length=0.001 bus1=p5udt5289.2 bus2=p5udt1667-p5udt5289x.2 switch=n enabled=y phases=1 Linecode=fuse_1_7_1_1_1

New Fuse.Fuse_fuse(r:p5udt1667-p5udt5289)p5u_152275 monitoredobj=Line.fuse(r:p5udt1667-p5udt5289)p5u_152275 enabled=y ratedcurrent=100.0

New Line.fuse(r:p5udt630-p5udt6402)p5u_152468 Units=km Length=0.001 bus1=p5udt6402.2 bus2=p5udt630-p5udt6402x.2 switch=n enabled=y phases=1 Linecode=fuse_1_7_1_1_1

New Fuse.Fuse_fuse(r:p5udt630-p5udt6402)p5u_152468 monitoredobj=Line.fuse(r:p5udt630-p5udt6402)p5u_152468 enabled=y ratedcurrent=100.0

New Line.fuse(r:p5udt5940-p5udt6706)p5u_152525 Units=km Length=0.001 bus1=p5udt6706.3 bus2=p5udt5940-p5udt6706x.3 switch=n enabled=y phases=1 Linecode=fuse_1_7_1_1_1

New Fuse.Fuse_fuse(r:p5udt5940-p5udt6706)p5u_152525 monitoredobj=Line.fuse(r:p5udt5940-p5udt6706)p5u_152525 enabled=y ratedcurrent=100.0

New Line.fuse(r:p5udt4298-p5udt6837)p5u_152538 Units=km Length=0.001 bus1=p5udt6837.2 bus2=p5udt4298-p5udt6837x.2 switch=n enabled=y phases=1 Linecode=fuse_1_7_1_1_1

New Fuse.Fuse_fuse(r:p5udt4298-p5udt6837)p5u_152538 monitoredobj=Line.fuse(r:p5udt4298-p5udt6837)p5u_152538 enabled=y ratedcurrent=100.0
