New Capacitor.p5uc5 Bus1=p5udt3264 phases=3 Kv=12.47 conn=Wye Kvar=600.0

New CapControl.p5uc5 Capacitor=p5uc5 Element=Line.l(r:p5udt3264-p5udt5864) Terminal=1 delay=100.0 Type=voltage Vmin=120.5 Vmax=125.0 Ptratio=59.99631547328862 Ctratio=100.0
