New Line.l(r:p5udt70lv-p5ulv71) Units=km Length=0.0127032 bus1=p5udt70lv.1.2 bus2=p5ulv71.1.2 switch=n enabled=y phases=2 Linecode=1P_UG_AL_4/0_Sweetbriar_0_416_0_2_2_2_2

New Line.l(r:p5udt70lv-p5ulv5074) Units=km Length=0.0144113 bus1=p5udt70lv.1.2 bus2=p5ulv5074.1.2 switch=n enabled=y phases=2 Linecode=1P_UG_AL_4/0_Sweetbriar_0_416_0_2_2_2_2

New Line.l(r:p5udt244lv-p5ulv255) Units=km Length=0.00982381 bus1=p5udt244lv.1.2 bus2=p5ulv255.1.2 switch=n enabled=y phases=2 Linecode=1P_UG_AL_4/0_Sweetbriar_0_416_0_2_2_2_2

New Line.l(r:p5udt249lv-p5ulv260) Units=km Length=0.00260192 bus1=p5udt249lv.1.2 bus2=p5ulv260.1.2 switch=n enabled=y phases=2 Linecode=1P_OH_AL_4_Periwinkle_0_416_0_2_2_2_2

New Line.l(r:p5udt249lv-p5ulv13539) Units=km Length=0.00630623 bus1=p5udt249lv.1.2 bus2=p5ulv13539.1.2 switch=n enabled=y phases=2 Linecode=1P_OH_AL_2/0_Rucina_0_416_0_2_2_2_2

New Line.l(r:p5udt772lv-p5ulv831) Units=km Length=0.023063700000000003 bus1=p5udt772lv.1.2 bus2=p5ulv831.1.2 switch=n enabled=y phases=2 Linecode=1P_UG_AL_4/0_Sweetbriar_0_416_0_2_2_2_2

New Line.l(r:p5udm2956-p5ulv6226) Units=km Length=0.0189808 bus1=p5udm2956.1.2 bus2=p5ulv6226.1.2 switch=n enabled=y phases=2 Linecode=1P_UG_AL_1/0_Brenau_0_416_0_2_2_2_2

New Line.l(r:p5udm2956-p5udt772lv) Units=km Length=0.00865 bus1=p5udt772lv.1.2 bus2=p5udm2956.1.2 switch=n enabled=y phases=2 Linecode=1P_UG_AL_1/0_Brenau_0_416_0_2_2_2_2

New Line.l(r:p5udm2957-p5ulv77951) Units=km Length=0.0186463 bus1=p5udm2957.1.2 bus2=p5ulv77951.1.2 switch=n enabled=y phases=2 Linecode=1P_UG_AL_1/0_Brenau_0_416_0_2_2_2_2

New Line.l(r:p5udm2957-p5udt772lv) Units=km Length=0.017306 bus1=p5udt772lv.1.2 bus2=p5udm2957.1.2 switch=n enabled=y phases=2 Linecode=1P_UG_AL_1/0_Brenau_0_416_0_2_2_2_2

New Line.l(r:p5udt774lv-p5ulv4139) Units=km Length=0.00464725 bus1=p5udt774lv.1.2 bus2=p5ulv4139.1.2 switch=n enabled=y phases=2 Linecode=1P_OH_AL_2/0_Rucina_0_416_0_2_2_2_2

New Line.l(r:p5udm2959-p5ulv835) Units=km Length=0.00765813 bus1=p5udm2959.1.2 bus2=p5ulv835.1.2 switch=n enabled=y phases=2 Linecode=1P_OH_AL_2/0_Rucina_0_416_0_2_2_2_2

New Line.l(r:p5udm2959-p5udt774lv) Units=km Length=0.0501136 bus1=p5udt774lv.1.2 bus2=p5udm2959.1.2 switch=n enabled=y phases=2 Linecode=1P_OH_AL_4/0_Zuzara_0_416_0_2_2_2_2

New Line.l(r:p5udm2960-p5ulv1565) Units=km Length=0.009043660000000002 bus1=p5udm2960.1.2 bus2=p5ulv1565.1.2 switch=n enabled=y phases=2 Linecode=1P_OH_AL_2/0_Rucina_0_416_0_2_2_2_2

New Line.l(r:p5udm2960-p5udt774lv) Units=km Length=0.0352013 bus1=p5udt774lv.1.2 bus2=p5udm2960.1.2 switch=n enabled=y phases=2 Linecode=1P_OH_AL_4/0_Zuzara_0_416_0_2_2_2_2

New Line.l(r:p5udt1392lv-p5ulv1559) Units=km Length=0.00801974 bus1=p5udt1392lv.1.2 bus2=p5ulv1559.1.2 switch=n enabled=y phases=2 Linecode=1P_OH_AL_2/0_Rucina_0_416_0_2_2_2_2

New Line.l(r:p5udt1396lv-p5ulv1564) Units=km Length=0.00372839 bus1=p5udt1396lv.1.2 bus2=p5ulv1564.1.2 switch=n enabled=y phases=2 Linecode=1P_OH_AL_4_Periwinkle_0_416_0_2_2_2_2

New Line.l(r:p5udt1670lv-p5ulv1913) Units=km Length=0.012261700000000002 bus1=p5udt1670lv.1.2 bus2=p5ulv1913.1.2 switch=n enabled=y phases=2 Linecode=1P_UG_AL_4/0_Sweetbriar_0_416_0_2_2_2_2

New Line.l(r:p5udt1673lv-p5ulv1918) Units=km Length=0.012227 bus1=p5udt1673lv.1.2 bus2=p5ulv1918.1.2 switch=n enabled=y phases=2 Linecode=1P_UG_AL_4/0_Sweetbriar_0_416_0_2_2_2_2

New Line.l(r:p5udt1673lv-p5ulv11447) Units=km Length=0.0222863 bus1=p5udt1673lv.1.2 bus2=p5ulv11447.1.2 switch=n enabled=y phases=2 Linecode=1P_UG_AL_4/0_Sweetbriar_0_416_0_2_2_2_2

New Line.l(r:p5udt2083lv-p5ulv18278) Units=km Length=0.0100068 bus1=p5udt2083lv.1.2 bus2=p5ulv18278.1.2 switch=n enabled=y phases=2 Linecode=1P_OH_AL_2/0_Rucina_0_416_0_2_2_2_2

New Line.l(r:p5udm7616-p5ulv2489) Units=km Length=0.005205 bus1=p5udm7616.1.2 bus2=p5ulv2489.1.2 switch=n enabled=y phases=2 Linecode=1P_OH_AL_2/0_Rucina_0_416_0_2_2_2_2

New Line.l(r:p5udm7616-p5udt2083lv) Units=km Length=0.0180187 bus1=p5udt2083lv.1.2 bus2=p5udm7616.1.2 switch=n enabled=y phases=2 Linecode=1P_OH_AL_2/0_Rucina_0_416_0_2_2_2_2

New Line.l(r:p5udt2822lv-p5ulv3603) Units=km Length=0.00295941 bus1=p5udt2822lv.1.2 bus2=p5ulv3603.1.2 switch=n enabled=y phases=2 Linecode=1P_OH_AL_4_Periwinkle_0_416_0_2_2_2_2

New Line.l(r:p5udt2822lv-p5ulv7088) Units=km Length=0.014058500000000002 bus1=p5udt2822lv.1.2 bus2=p5ulv7088.1.2 switch=n enabled=y phases=2 Linecode=1P_OH_AL_2/0_Rucina_0_416_0_2_2_2_2

New Line.l(r:p5udm10054-p5ulv8049) Units=km Length=0.014825300000000001 bus1=p5udm10054.1.2 bus2=p5ulv8049.1.2 switch=n enabled=y phases=2 Linecode=1P_UG_AL_2/0_Converse_0_416_0_2_2_2_2

New Line.l(r:p5udm10054-p5udt2822lv) Units=km Length=0.0556476 bus1=p5udt2822lv.1.2 bus2=p5udm10054.1.2 switch=n enabled=y phases=2 Linecode=1P_OH_AL_4/0_Zuzara_0_416_0_2_2_2_2

New Line.l(r:p5udt3765lv-p5ulv5260) Units=km Length=0.0152542 bus1=p5udt3765lv.1.2 bus2=p5ulv5260.1.2 switch=n enabled=y phases=2 Linecode=1P_UG_AL_4/0_Sweetbriar_0_416_0_2_2_2_2

New Line.l(r:p5udt3860lv-p5ulv5453) Units=km Length=0.0155053 bus1=p5udt3860lv.1.2 bus2=p5ulv5453.1.2 switch=n enabled=y phases=2 Linecode=1P_UG_AL_4/0_Sweetbriar_0_416_0_2_2_2_2

New Line.l(r:p5udm13124-p5ulv5458) Units=km Length=0.0129878 bus1=p5udm13124.1.2 bus2=p5ulv5458.1.2 switch=n enabled=y phases=2 Linecode=1P_UG_AL_2/0_Converse_0_416_0_2_2_2_2

New Line.l(r:p5udm13124-p5udt3864lv) Units=km Length=0.0196132 bus1=p5udt3864lv.1.2 bus2=p5udm13124.1.2 switch=n enabled=y phases=2 Linecode=1P_UG_AL_2/0_Converse_0_416_0_2_2_2_2

New Line.l(r:p5udm13125-p5ulv17724) Units=km Length=0.0139377 bus1=p5udm13125.1.2 bus2=p5ulv17724.1.2 switch=n enabled=y phases=2 Linecode=1P_UG_AL_4/0_Sweetbriar_0_416_0_2_2_2_2

New Line.l(r:p5udm13125-p5udt3864lv) Units=km Length=0.056597 bus1=p5udt3864lv.1.2 bus2=p5udm13125.1.2 switch=n enabled=y phases=2 Linecode=1P_UG_AL_4/0_Sweetbriar_0_416_0_2_2_2_2

New Line.l(r:p5udt3953lv-p5ulv5643) Units=km Length=0.00583652 bus1=p5udt3953lv.1.2 bus2=p5ulv5643.1.2 switch=n enabled=y phases=2 Linecode=1P_OH_AL_2/0_Rucina_0_416_0_2_2_2_2

New Line.l(r:p5udt3953lv-p5ulv15491) Units=km Length=0.00899605 bus1=p5udt3953lv.1.2 bus2=p5ulv15491.1.2 switch=n enabled=y phases=2 Linecode=1P_OH_AL_2/0_Rucina_0_416_0_2_2_2_2

New Line.l(r:p5udt3955lv-p5ulv5645) Units=km Length=0.00551763 bus1=p5udt3955lv.1.2 bus2=p5ulv5645.1.2 switch=n enabled=y phases=2 Linecode=1P_OH_AL_2/0_Rucina_0_416_0_2_2_2_2

New Line.l(r:p5udt3955lv-p5ulv13351) Units=km Length=0.00465843 bus1=p5udt3955lv.1.2 bus2=p5ulv13351.1.2 switch=n enabled=y phases=2 Linecode=1P_OH_AL_2/0_Rucina_0_416_0_2_2_2_2

New Line.l(r:p5udm13358-p5ulv8048) Units=km Length=0.00627536 bus1=p5udm13358.1.2 bus2=p5ulv8048.1.2 switch=n enabled=y phases=2 Linecode=1P_OH_AL_2/0_Rucina_0_416_0_2_2_2_2

New Line.l(r:p5udm13358-p5ulv8791) Units=km Length=0.0198222 bus1=p5udm13358.1.2 bus2=p5ulv8791.1.2 switch=n enabled=y phases=2 Linecode=1P_OH_AL_2/0_Rucina_0_416_0_2_2_2_2

New Line.l(r:p5udm13358-p5udt3955lv) Units=km Length=0.017478 bus1=p5udt3955lv.1.2 bus2=p5udm13358.1.2 switch=n enabled=y phases=2 Linecode=1P_OH_AL_2/0_Rucina_0_416_0_2_2_2_2

New Line.l(r:p5udm13361-p5ulv13352) Units=km Length=0.0167665 bus1=p5udm13361.1.2 bus2=p5ulv13352.1.2 switch=n enabled=y phases=2 Linecode=1P_UG_AL_1/0_Brenau_0_416_0_2_2_2_2

New Line.l(r:p5udm13361-p5udt3955lv) Units=km Length=0.0582689 bus1=p5udt3955lv.1.2 bus2=p5udm13361.1.2 switch=n enabled=y phases=2 Linecode=1P_OH_AL_4/0_Zuzara_0_416_0_2_2_2_2

New Line.l(r:p5udm13362-p5ulv5647) Units=km Length=0.00916264 bus1=p5udm13362.1.2 bus2=p5ulv5647.1.2 switch=n enabled=y phases=2 Linecode=1P_OH_AL_2/0_Rucina_0_416_0_2_2_2_2

New Line.l(r:p5udm13362-p5udt3956lv) Units=km Length=0.0162607 bus1=p5udt3956lv.1.2 bus2=p5udm13362.1.2 switch=n enabled=y phases=2 Linecode=1P_OH_AL_2/0_Rucina_0_416_0_2_2_2_2

New Line.l(r:p5udm13363-p5ulv12582) Units=km Length=0.0155876 bus1=p5udm13363.1.2 bus2=p5ulv12582.1.2 switch=n enabled=y phases=2 Linecode=1P_UG_AL_1/0_Brenau_0_416_0_2_2_2_2

New Line.l(r:p5udm13363-p5udt3956lv) Units=km Length=0.0596748 bus1=p5udt3956lv.1.2 bus2=p5udm13363.1.2 switch=n enabled=y phases=2 Linecode=1P_OH_AL_4/0_Zuzara_0_416_0_2_2_2_2

New Line.l(r:p5udt4057lv-p5ulv5851) Units=km Length=0.0191649 bus1=p5udt4057lv.1.2 bus2=p5ulv5851.1.2 switch=n enabled=y phases=2 Linecode=1P_UG_AL_2/0_Converse_0_416_0_2_2_2_2

New Line.l(r:p5udt4301lv-p5ulv6394) Units=km Length=0.0128408 bus1=p5udt4301lv.1.2 bus2=p5ulv6394.1.2 switch=n enabled=y phases=2 Linecode=1P_UG_AL_4/0_Sweetbriar_0_416_0_2_2_2_2

New Line.l(r:p5udt4302lv-p5ulv6395) Units=km Length=0.016642700000000003 bus1=p5udt4302lv.1.2 bus2=p5ulv6395.1.2 switch=n enabled=y phases=2 Linecode=1P_OH_AL_2/0_Rucina_0_416_0_2_2_2_2

New Line.l(r:p5udt4304lv-p5ulv6397) Units=km Length=0.0180198 bus1=p5udt4304lv.1.2 bus2=p5ulv6397.1.2 switch=n enabled=y phases=2 Linecode=1P_OH_AL_2/0_Rucina_0_416_0_2_2_2_2

New Line.l(r:p5udt4306lv-p5ulv6399) Units=km Length=0.0152121 bus1=p5udt4306lv.1.2 bus2=p5ulv6399.1.2 switch=n enabled=y phases=2 Linecode=1P_UG_AL_4/0_Sweetbriar_0_416_0_2_2_2_2

New Line.l(r:p5udm14249-p5ulv17915) Units=km Length=0.013802 bus1=p5udm14249.1.2 bus2=p5ulv17915.1.2 switch=n enabled=y phases=2 Linecode=1P_UG_AL_2/0_Converse_0_416_0_2_2_2_2

New Line.l(r:p5udm14249-p5udt4306lv) Units=km Length=0.00982102 bus1=p5udt4306lv.1.2 bus2=p5udm14249.1.2 switch=n enabled=y phases=2 Linecode=1P_UG_AL_2/0_Converse_0_416_0_2_2_2_2

New Line.l(r:p5udm14694-p5ulv6754) Units=km Length=0.0578308 bus1=p5udm14694.1.2 bus2=p5ulv6754.1.2 switch=n enabled=y phases=2 Linecode=1P_UG_AL_4/0_Sweetbriar_0_416_0_2_2_2_2

New Line.l(r:p5udm14694-p5udt4478lv) Units=km Length=0.00973156 bus1=p5udt4478lv.1.2 bus2=p5udm14694.1.2 switch=n enabled=y phases=2 Linecode=1P_UG_AL_4/0_Sweetbriar_0_416_0_2_2_2_2

New Line.l(r:p5udm14695-p5ulv18259) Units=km Length=0.0201735 bus1=p5udm14695.1.2 bus2=p5ulv18259.1.2 switch=n enabled=y phases=2 Linecode=1P_UG_AL_1/0_Brenau_0_416_0_2_2_2_2

New Line.l(r:p5udm14695-p5udt4478lv) Units=km Length=0.00972203 bus1=p5udt4478lv.1.2 bus2=p5udm14695.1.2 switch=n enabled=y phases=2 Linecode=1P_UG_AL_1/0_Brenau_0_416_0_2_2_2_2

New Line.l(r:p5udt5351lv-p5ulv8997) Units=km Length=0.0331569 bus1=p5udt5351lv.1.2 bus2=p5ulv8997.1.2 switch=n enabled=y phases=2 Linecode=1P_OH_AL_4/0_Zuzara_0_416_0_2_2_2_2

New Line.l(r:p5udt5351lv-p5ulv15115) Units=km Length=0.00618712 bus1=p5udt5351lv.1.2 bus2=p5ulv15115.1.2 switch=n enabled=y phases=2 Linecode=1P_OH_AL_2/0_Rucina_0_416_0_2_2_2_2

New Line.l(r:p5udm16750-p5ulv11072) Units=km Length=0.00818426 bus1=p5udm16750.1.2 bus2=p5ulv11072.1.2 switch=n enabled=y phases=2 Linecode=1P_OH_AL_2/0_Rucina_0_416_0_2_2_2_2

New Line.l(r:p5udm16750-p5udt5351lv) Units=km Length=0.0179779 bus1=p5udt5351lv.1.2 bus2=p5udm16750.1.2 switch=n enabled=y phases=2 Linecode=1P_OH_AL_2/0_Rucina_0_416_0_2_2_2_2

New Line.l(r:p5udt5752lv-p5ulv10115) Units=km Length=0.013818400000000002 bus1=p5udt5752lv.1.2 bus2=p5ulv10115.1.2 switch=n enabled=y phases=2 Linecode=1P_UG_AL_4/0_Sweetbriar_0_416_0_2_2_2_2

New Line.l(r:p5udt5881lv-p5ulv10475) Units=km Length=0.0142226 bus1=p5udt5881lv.1.2 bus2=p5ulv10475.1.2 switch=n enabled=y phases=2 Linecode=1P_UG_AL_4/0_Sweetbriar_0_416_0_2_2_2_2

New Line.l(r:p5udt6063lv-p5ulv11071) Units=km Length=0.0257527 bus1=p5udt6063lv.1.2 bus2=p5ulv11071.1.2 switch=n enabled=y phases=2 Linecode=1P_OH_AL_2/0_Rucina_0_416_0_2_2_2_2

New Line.l(r:p5udt6237lv-p5ulv18276) Units=km Length=0.0128749 bus1=p5udt6237lv.1.2 bus2=p5ulv18276.1.2 switch=n enabled=y phases=2 Linecode=1P_OH_AL_2/0_Rucina_0_416_0_2_2_2_2

New Line.l(r:p5udm18501-p5ulv11655) Units=km Length=0.012843 bus1=p5udm18501.1.2 bus2=p5ulv11655.1.2 switch=n enabled=y phases=2 Linecode=1P_OH_AL_2/0_Rucina_0_416_0_2_2_2_2

New Line.l(r:p5udm18501-p5udt6237lv) Units=km Length=0.0179371 bus1=p5udt6237lv.1.2 bus2=p5udm18501.1.2 switch=n enabled=y phases=2 Linecode=1P_OH_AL_2/0_Rucina_0_416_0_2_2_2_2

New Line.l(r:p5udm18505-p5ulv11659) Units=km Length=0.010611700000000002 bus1=p5udm18505.1.2 bus2=p5ulv11659.1.2 switch=n enabled=y phases=2 Linecode=1P_OH_AL_2/0_Rucina_0_416_0_2_2_2_2

New Line.l(r:p5udm18505-p5udt6240lv) Units=km Length=0.0347342 bus1=p5udt6240lv.1.2 bus2=p5udm18505.1.2 switch=n enabled=y phases=2 Linecode=1P_OH_AL_4/0_Zuzara_0_416_0_2_2_2_2

New Line.l(r:p5udm18506-p5ulv12787) Units=km Length=0.00346192 bus1=p5udm18506.1.2 bus2=p5ulv12787.1.2 switch=n enabled=y phases=2 Linecode=1P_OH_AL_4_Periwinkle_0_416_0_2_2_2_2

New Line.l(r:p5udm18506-p5udt6240lv) Units=km Length=0.0173593 bus1=p5udt6240lv.1.2 bus2=p5udm18506.1.2 switch=n enabled=y phases=2 Linecode=1P_OH_AL_2/0_Rucina_0_416_0_2_2_2_2

New Line.l(r:p5udt6301lv-p5ulv11844) Units=km Length=0.0175316 bus1=p5udt6301lv.1.2 bus2=p5ulv11844.1.2 switch=n enabled=y phases=2 Linecode=1P_UG_AL_4/0_Sweetbriar_0_416_0_2_2_2_2

New Line.l(r:p5udt6506lv-p5ulv16585) Units=km Length=0.0209093 bus1=p5udt6506lv.1.2 bus2=p5ulv16585.1.2 switch=n enabled=y phases=2 Linecode=1P_UG_AL_2/0_Converse_0_416_0_2_2_2_2

New Line.l(r:p5udm18913-p5ulv12581) Units=km Length=0.0218535 bus1=p5udm18913.1.2 bus2=p5ulv12581.1.2 switch=n enabled=y phases=2 Linecode=1P_UG_AL_4/0_Sweetbriar_0_416_0_2_2_2_2

New Line.l(r:p5udm18913-p5udt6506lv) Units=km Length=0.00968713 bus1=p5udt6506lv.1.2 bus2=p5udm18913.1.2 switch=n enabled=y phases=2 Linecode=1P_UG_AL_4/0_Sweetbriar_0_416_0_2_2_2_2

New Line.l(r:p5udt6569lv-p5ulv12789) Units=km Length=0.00507734 bus1=p5udt6569lv.1.2 bus2=p5ulv12789.1.2 switch=n enabled=y phases=2 Linecode=1P_OH_AL_2/0_Rucina_0_416_0_2_2_2_2

New Line.l(r:p5udm19034-p5ulv18282) Units=km Length=0.016654100000000005 bus1=p5udm19034.1.2 bus2=p5ulv18282.1.2 switch=n enabled=y phases=2 Linecode=1P_UG_AL_4/0_Sweetbriar_0_416_0_2_2_2_2

New Line.l(r:p5udm19034-p5udt6569lv) Units=km Length=0.05942050000000001 bus1=p5udt6569lv.1.2 bus2=p5udm19034.1.2 switch=n enabled=y phases=2 Linecode=1P_OH_AL_4/0_Zuzara_0_416_0_2_2_2_2

New Line.l(r:p5udm19035-p5ulv77978) Units=km Length=0.004342 bus1=p5udm19035.1.2 bus2=p5ulv77978.1.2 switch=n enabled=y phases=2 Linecode=1P_OH_AL_2/0_Rucina_0_416_0_2_2_2_2

New Line.l(r:p5udm19035-p5udt6569lv) Units=km Length=0.035248100000000004 bus1=p5udt6569lv.1.2 bus2=p5udm19035.1.2 switch=n enabled=y phases=2 Linecode=1P_OH_AL_4/0_Zuzara_0_416_0_2_2_2_2

New Line.l(r:p5udt6614lv-p5ulv12975) Units=km Length=0.0087808 bus1=p5udt6614lv.1.2 bus2=p5ulv12975.1.2 switch=n enabled=y phases=2 Linecode=1P_UG_AL_4/0_Sweetbriar_0_416_0_2_2_2_2

New Line.l(r:p5udt6754lv-p5ulv13538) Units=km Length=0.0149861 bus1=p5udt6754lv.1.2 bus2=p5ulv13538.1.2 switch=n enabled=y phases=2 Linecode=1P_OH_AL_2/0_Rucina_0_416_0_2_2_2_2

New Line.l(r:p5udt6797lv-p5ulv13736) Units=km Length=0.0176372 bus1=p5udt6797lv.1.2 bus2=p5ulv13736.1.2 switch=n enabled=y phases=2 Linecode=1P_OH_AL_2/0_Rucina_0_416_0_2_2_2_2

New Line.l(r:p5udt7227lv-p5ulv15706) Units=km Length=0.0136671 bus1=p5udt7227lv.1.2 bus2=p5ulv15706.1.2 switch=n enabled=y phases=2 Linecode=1P_UG_AL_4/0_Sweetbriar_0_416_0_2_2_2_2

New Line.l(r:p5udt7229lv-p5ulv15708) Units=km Length=0.011561 bus1=p5udt7229lv.1.2 bus2=p5ulv15708.1.2 switch=n enabled=y phases=2 Linecode=1P_UG_AL_4/0_Sweetbriar_0_416_0_2_2_2_2

New Line.l(r:p5udm20051-p5ulv16785) Units=km Length=0.0188458 bus1=p5udm20051.1.2 bus2=p5ulv16785.1.2 switch=n enabled=y phases=2 Linecode=1P_UG_AL_2/0_Converse_0_416_0_2_2_2_2

New Line.l(r:p5udm20051-p5udt7229lv) Units=km Length=0.009188720000000001 bus1=p5udt7229lv.1.2 bus2=p5udm20051.1.2 switch=n enabled=y phases=2 Linecode=1P_UG_AL_2/0_Converse_0_416_0_2_2_2_2

New Line.l(r:p5udm20581-p5ulv17720) Units=km Length=0.0186209 bus1=p5udm20581.1.2 bus2=p5ulv17720.1.2 switch=n enabled=y phases=2 Linecode=1P_UG_AL_1/0_Brenau_0_416_0_2_2_2_2

New Line.l(r:p5udm20581-p5udt7632lv) Units=km Length=0.0487354 bus1=p5udt7632lv.1.2 bus2=p5udm20581.1.2 switch=n enabled=y phases=2 Linecode=1P_UG_AL_1/0_Brenau_0_416_0_2_2_2_2

New Line.l(r:p5udm20582-p5ulv78268) Units=km Length=0.0147932 bus1=p5udm20582.1.2 bus2=p5ulv78268.1.2 switch=n enabled=y phases=2 Linecode=1P_UG_AL_4/0_Sweetbriar_0_416_0_2_2_2_2

New Line.l(r:p5udm20582-p5udt7632lv) Units=km Length=0.0423897 bus1=p5udt7632lv.1.2 bus2=p5udm20582.1.2 switch=n enabled=y phases=2 Linecode=1P_UG_AL_4/0_Sweetbriar_0_416_0_2_2_2_2

New Line.l(r:p5udt7688lv-p5ulv18080) Units=km Length=0.0133959 bus1=p5udt7688lv.1.2 bus2=p5ulv18080.1.2 switch=n enabled=y phases=2 Linecode=1P_OH_AL_2/0_Rucina_0_416_0_2_2_2_2

New Line.l(r:p5udt7804lv-p5ulv18661) Units=km Length=0.012407100000000003 bus1=p5udt7804lv.1.2 bus2=p5ulv18661.1.2 switch=n enabled=y phases=2 Linecode=1P_UG_AL_2/0_Converse_0_416_0_2_2_2_2

New Line.l(r:p5udt7848lv-p5ulv18859) Units=km Length=0.00568951 bus1=p5udt7848lv.1.2 bus2=p5ulv18859.1.2 switch=n enabled=y phases=2 Linecode=1P_OH_AL_2/0_Rucina_0_416_0_2_2_2_2

New Line.l(r:p5udt33578lv-p5ulv77694) Units=km Length=0.00655689 bus1=p5udt33578lv.1.2 bus2=p5ulv77694.1.2 switch=n enabled=y phases=2 Linecode=1P_OH_AL_2/0_Rucina_0_416_0_2_2_2_2

New Line.l(r:p5udt1670-p5udt3860) Units=km Length=0.0185942 bus1=p5udt1670-p5udt3860x.1 bus2=p5udt1670-p5udt3860xx.1 switch=n enabled=y phases=1 Linecode=1P_UG_AL_#2_15_12_47_0_1_1_1_1

New Line.l(r:p5udt1670-p5udt6239) Units=km Length=0.0298624 bus1=p5udt1670-p5udt6239x.1 bus2=p5udt1670.1 switch=n enabled=y phases=1 Linecode=1P_OH_AL_ACSR_#2_Sparrow_12_47_0_1_1_1_1

New Line.l(r:p5udt4304-p5udt6237) Units=km Length=0.0301237 bus1=p5udt4304.3 bus2=p5udt6237.3 switch=n enabled=y phases=1 Linecode=1P_OH_AL_ACSR_#2_Sparrow_12_47_0_1_1_1_1

New Line.l(r:p5udt4302-p5udt4304) Units=km Length=0.0178812 bus1=p5udt4302-p5udt4304x.3 bus2=p5udt4304.3 switch=n enabled=y phases=1 Linecode=1P_OH_AL_ACSR_#2_Sparrow_12_47_0_1_1_1_1

New Line.l(r:p5udt4306-p5udt7804) Units=km Length=0.019642 bus1=p5udt4306-p5udt7804xx.2 bus2=p5udt4306-p5udt7804x.2 switch=n enabled=y phases=1 Linecode=1P_UG_AL_#2_15_12_47_0_1_1_1_1

New Line.l(r:p5udt70-p5udt7804) Units=km Length=0.0760668 bus1=p5udt70-p5udt7804x.2 bus2=p5udt70-p5udt7804xx.2 switch=n enabled=y phases=1 Linecode=1P_UG_AL_#2_15_12_47_0_1_1_1_1

New Line.l(r:p5udt5881-p5udt70) Units=km Length=0.05918180000000001 bus1=p5udt5881-p5udt70xx.2 bus2=p5udt5881-p5udt70xxx.2 switch=n enabled=y phases=1 Linecode=1P_UG_AL_#2_15_12_47_0_1_1_1_1

New Line.l(r:p5udt2188-p5udt33578) Units=km Length=0.0180353 bus1=p5udt2188-p5udt33578x.3 bus2=p5udt33578.3 switch=n enabled=y phases=1 Linecode=1P_OH_AL_ACSR_#2_Sparrow_12_47_0_1_1_1_1

New Line.l(r:p5udt1680-p5udt4057) Units=km Length=0.00987835 bus1=p5udt1680-p5udt4057xx.3 bus2=p5udt1680-p5udt4057xxx.3 switch=n enabled=y phases=1 Linecode=1P_UG_AL_#2_15_12_47_0_1_1_1_1

New Line.l(r:p5udt6797-p5udt7848) Units=km Length=0.0478768 bus1=p5udt6797-p5udt7848x.1 bus2=p5udt6797.1 switch=n enabled=y phases=1 Linecode=1P_OH_AL_ACSR_#2_Sparrow_12_47_0_1_1_1_1

New Line.l(r:p5udt5747-p5udt6754) Units=km Length=0.017478 bus1=p5udt5747-p5udt6754x.3 bus2=p5udt6754.3 switch=n enabled=y phases=1 Linecode=1P_OH_AL_ACSR_#2_Sparrow_12_47_0_1_1_1_1

New Line.l(r:p5udt3748-p5udt7688) Units=km Length=0.0472317 bus1=p5udt3748-p5udt7688x.2 bus2=p5udt7688.2 switch=n enabled=y phases=1 Linecode=1P_OH_AL_ACSR_#2_Sparrow_12_47_0_1_1_1_1

New Line.l(r:p5udt5881-p5udt6301) Units=km Length=0.0623138 bus1=p5udt5881-p5udt6301xx.1.2.3 bus2=p5udt5881-p5udt6301x.1.2.3 switch=n enabled=y phases=3 Linecode=3P_UG_AL_4/0_25_12_47_0_3_3_3_3

New Line.l(r:p5udt6301-p5udt7227) Units=km Length=0.0183745 bus1=p5udt6301-p5udt7227xx.1.2.3 bus2=p5udt6301-p5udt7227x.1.2.3 switch=n enabled=y phases=3 Linecode=3P_UG_AL_4/0_25_12_47_0_3_3_3_3

New Line.l(r:p5udt7227-p5udt7228) Units=km Length=0.009188720000000001 bus1=p5udt7227-p5udt7228xx.1.2.3 bus2=p5udt7227-p5udt7228x.1.2.3 switch=n enabled=y phases=3 Linecode=3P_UG_AL_4/0_25_12_47_0_3_3_3_3

New Line.l(r:p5udt7228-p5udt7229) Units=km Length=0.0183649 bus1=p5udt7228-p5udt7229xx.1.2.3 bus2=p5udt7228-p5udt7229x.1.2.3 switch=n enabled=y phases=3 Linecode=3P_UG_AL_4/0_25_12_47_0_3_3_3_3

New Line.l(r:p5udt6239-p5udt7229) Units=km Length=0.0931365 bus1=p5udt6239.1.2.3 bus2=p5udt7229.1.2.3 switch=n enabled=y phases=3 Linecode=3P_OH_AL_ACSR_4/0_Penguin_12_47_0_3_3_3_3

New Line.l(r:p5udt1392-p5udt6239) Units=km Length=0.0180589 bus1=p5udt1392.1.2.3 bus2=p5udt6239.1.2.3 switch=n enabled=y phases=3 Linecode=3P_OH_AL_ACSR_4/0_Penguin_12_47_0_3_3_3_3

New Line.l(r:p5udt1392-p5udt1679) Units=km Length=0.0361149 bus1=p5udt1679.1.2.3 bus2=p5udt1392.1.2.3 switch=n enabled=y phases=3 Linecode=3P_OH_AL_ACSR_4/0_Penguin_12_47_0_3_3_3_3

New Line.l(r:p5udt1679-p5umv4) Units=km Length=0.0246676 bus1=p5umv4.1.2.3 bus2=p5udt1679.1.2.3 switch=n enabled=y phases=3 Linecode=3P_OH_AL_ACSR_4/0_Penguin_12_47_0_3_3_3_3

New Line.l(r:p5udt6569-p5umv4) Units=km Length=0.0632435 bus1=p5udt6569.1.2.3 bus2=p5umv4.1.2.3 switch=n enabled=y phases=3 Linecode=3P_OH_AL_ACSR_4/0_Penguin_12_47_0_3_3_3_3

New Line.l(r:p5udt7104-p5udt7848) Units=km Length=0.035268900000000006 bus1=p5udt7104.1.2.3 bus2=p5udt7848.1.2.3 switch=n enabled=y phases=3 Linecode=3P_OH_AL_ACSR_4/0_Penguin_12_47_0_3_3_3_3

New Line.l(r:p5udt249-p5udt7104) Units=km Length=0.03525930000000001 bus1=p5udt249.1.2.3 bus2=p5udt7104.1.2.3 switch=n enabled=y phases=3 Linecode=3P_OH_AL_ACSR_4/0_Penguin_12_47_0_3_3_3_3

New Line.l(r:p5udt249-p5udt5086) Units=km Length=0.0525935 bus1=p5udt5086.1.2.3 bus2=p5udt249.1.2.3 switch=n enabled=y phases=3 Linecode=3P_OH_AL_ACSR_4/0_Penguin_12_47_0_3_3_3_3

New Line.l(r:p5udt5086-p5udt5752) Units=km Length=0.103109 bus1=p5udt5752.1.2.3 bus2=p5udt5086.1.2.3 switch=n enabled=y phases=3 Linecode=3P_OH_AL_ACSR_4/0_Penguin_12_47_0_3_3_3_3

New Line.l(r:p5udt5752-p5udt6569) Units=km Length=0.119244 bus1=p5udt6569.1.2.3 bus2=p5udt5752.1.2.3 switch=n enabled=y phases=3 Linecode=3P_OH_AL_ACSR_4/0_Penguin_12_47_0_3_3_3_3

New Line.l(r:p5udt3863-p5udt6569) Units=km Length=0.017624000000000004 bus1=p5udt3863.1.2.3 bus2=p5udt6569.1.2.3 switch=n enabled=y phases=3 Linecode=3P_OH_AL_ACSR_4/0_Penguin_12_47_0_3_3_3_3

New Line.l(r:p5udt3863-p5udt6240) Units=km Length=0.109277 bus1=p5udt6240.1.2.3 bus2=p5udt3863.1.2.3 switch=n enabled=y phases=3 Linecode=3P_OH_AL_ACSR_4/0_Penguin_12_47_0_3_3_3_3

New Line.l(r:p5udt6240-p5uhs1_1247) Units=km Length=0.261412 bus1=p5udt6240-p5uhs1_1247x.1.2.3 bus2=p5udt6240.1.2.3 switch=n enabled=y phases=3 Linecode=3P_OH_AL_ACSR_4/0_Penguin_12_47_0_3_3_3_3

New Line.l(r:p5udt1957lv-p5ulv2310) Units=km Length=0.00643187 bus1=p5udt1957lv.1.2.3 bus2=p5ulv2310.1.2.3 switch=n enabled=y phases=3 Linecode=3P_UG_AL_350kcmil_15_0_416_0_3_3_3_3

New Line.l(r:p5udm7171-p5ulv16401) Units=km Length=0.0112492 bus1=p5udm7171.1.2.3 bus2=p5ulv16401.1.2.3 switch=n enabled=y phases=3 Linecode=3P_UG_AL_750kcmil_25_0_416_0_3_3_3_3

New Line.l(r:p5udm7171-p5udt1957lv) Units=km Length=0.0173593 bus1=p5udt1957lv.1.2.3 bus2=p5udm7171.1.2.3 switch=n enabled=y phases=3 Linecode=3P_UG_AL_750kcmil_25_0_416_0_3_3_3_3

New Line.l(r:p5udt1957-p5udt6240) Units=km Length=0.0173593 bus1=p5udt6240.1.2.3 bus2=p5udt1957.1.2.3 switch=n enabled=y phases=3 Linecode=3P_OH_AL_ACSR_4/0_Penguin_12_47_0_3_3_3_3

New Line.l(r:p5udm13121-p5ulv5457) Units=km Length=0.00803995 bus1=p5udm13121.1.2.3 bus2=p5ulv5457.1.2.3 switch=n enabled=y phases=3 Linecode=3P_UG_AL_350kcmil_15_0_416_0_3_3_3_3

New Line.l(r:p5udm13121-p5ulv12788) Units=km Length=0.00302605 bus1=p5udm13121.1.2.3 bus2=p5ulv12788.1.2.3 switch=n enabled=y phases=3 Linecode=3P_UG_AL_750kcmil_25_0_416_0_3_3_3_3

New Line.l(r:p5udm13121-p5udt3863lv) Units=km Length=0.017624000000000004 bus1=p5udt3863lv.1.2.3 bus2=p5udm13121.1.2.3 switch=n enabled=y phases=3 Linecode=3P_UG_AL_750kcmil_25_0_416_0_3_3_3_3

New Line.l(r:p5udm13122-p5ulv11660) Units=km Length=0.00376524 bus1=p5udm13122.1.2.3 bus2=p5ulv11660.1.2.3 switch=n enabled=y phases=3 Linecode=3P_UG_AL_750kcmil_25_0_416_0_3_3_3_3

New Line.l(r:p5udm13122-p5udt3863lv) Units=km Length=0.017624000000000004 bus1=p5udt3863lv.1.2.3 bus2=p5udm13122.1.2.3 switch=n enabled=y phases=3 Linecode=3P_UG_AL_750kcmil_25_0_416_0_3_3_3_3

New Line.l(r:p5udt1679lv-p5ulv18281) Units=km Length=0.00649059 bus1=p5udt1679lv.1.2.3 bus2=p5ulv18281.1.2.3 switch=n enabled=y phases=3 Linecode=3P_UG_AL_350kcmil_15_0_416_0_3_3_3_3

New Line.l(r:p5udm6212-p5ulv1927) Units=km Length=0.0102856 bus1=p5udm6212.1.2.3 bus2=p5ulv1927.1.2.3 switch=n enabled=y phases=3 Linecode=3P_UG_AL_350kcmil_15_0_416_0_3_3_3_3

New Line.l(r:p5udm6212-p5udt1679lv) Units=km Length=0.018056 bus1=p5udt1679lv.1.2.3 bus2=p5udm6212.1.2.3 switch=n enabled=y phases=3 Linecode=3P_UG_AL_350kcmil_15_0_416_0_3_3_3_3

New Line.l(r:p5udt6239lv-p5ulv11657) Units=km Length=0.0135573 bus1=p5udt6239lv.1.2.3 bus2=p5ulv11657.1.2.3 switch=n enabled=y phases=3 Linecode=3P_UG_AL_350kcmil_15_0_416_0_3_3_3_3

New Line.l(r:p5udm11454-p5ulv4338) Units=km Length=0.00533001 bus1=p5udm11454.1.2.3 bus2=p5ulv4338.1.2.3 switch=n enabled=y phases=3 Linecode=3P_UG_AL_350kcmil_15_0_416_0_3_3_3_3

New Line.l(r:p5udm11454-p5udt3277lv) Units=km Length=0.004108 bus1=p5udt3277lv.1.2.3 bus2=p5udm11454.1.2.3 switch=n enabled=y phases=3 Linecode=3P_UG_AL_350kcmil_15_0_416_0_3_3_3_3

New Line.l(r:p5udm11455-p5ulv15709) Units=km Length=0.0053051 bus1=p5udm11455.1.2.3 bus2=p5ulv15709.1.2.3 switch=n enabled=y phases=3 Linecode=3P_UG_AL_350kcmil_15_0_416_0_3_3_3_3

New Line.l(r:p5udm11455-p5udt3277lv) Units=km Length=0.0166688 bus1=p5udt3277lv.1.2.3 bus2=p5udm11455.1.2.3 switch=n enabled=y phases=3 Linecode=3P_UG_AL_350kcmil_15_0_416_0_3_3_3_3

New Line.l(r:p5udt4303lv-p5ulv6396) Units=km Length=0.0165945 bus1=p5udt4303lv.1.2.3 bus2=p5ulv6396.1.2.3 switch=n enabled=y phases=3 Linecode=3P_UG_AL_4/0_15_0_416_0_3_3_3_3

New Line.l(r:p5udt4302-p5udt4303) Units=km Length=0.001 bus1=p5udt4302.1.2.3 bus2=p5udt4303.1.2.3 switch=n enabled=y phases=3 Linecode=3P_OH_AL_ACSR_4/0_Penguin_12_47_0_3_3_3_3

New Line.l(r:p5udt4301-p5udt4302) Units=km Length=0.0545748 bus1=p5udt4301.1.2.3 bus2=p5udt4302.1.2.3 switch=n enabled=y phases=3 Linecode=3P_OH_AL_ACSR_4/0_Penguin_12_47_0_3_3_3_3

New Line.l(r:p5udt6238lv-p5ulv11656) Units=km Length=0.00939638 bus1=p5udt6238lv.1.2.3 bus2=p5ulv11656.1.2.3 switch=n enabled=y phases=3 Linecode=3P_UG_AL_350kcmil_15_0_416_0_3_3_3_3

New Line.l(r:p5udt4301-p5udt6238) Units=km Length=0.0403536 bus1=p5udt4301-p5udt6238x.1.2.3 bus2=p5udt4301-p5udt6238xx.1.2.3 switch=n enabled=y phases=3 Linecode=3P_UG_AL_4/0_25_12_47_0_3_3_3_3

New Line.l(r:p5udt3277-p5udt4301) Units=km Length=0.061375 bus1=p5udt3277.1.2.3 bus2=p5udt4301.1.2.3 switch=n enabled=y phases=3 Linecode=3P_OH_AL_ACSR_4/0_Penguin_12_47_0_3_3_3_3

New Line.l(r:p5udt3277-p5udt6063) Units=km Length=0.0500001 bus1=p5udt6063.1.2.3 bus2=p5udt3277.1.2.3 switch=n enabled=y phases=3 Linecode=3P_OH_AL_ACSR_4/0_Penguin_12_47_0_3_3_3_3

New Line.l(r:p5udt3953-p5udt6063) Units=km Length=0.0166657 bus1=p5udt3953.1.2.3 bus2=p5udt6063.1.2.3 switch=n enabled=y phases=3 Linecode=3P_OH_AL_ACSR_4/0_Penguin_12_47_0_3_3_3_3

New Line.l(r:p5udt3953-p5udt6239) Units=km Length=0.0358298 bus1=p5udt6239.1.2.3 bus2=p5udt3953.1.2.3 switch=n enabled=y phases=3 Linecode=3P_OH_AL_ACSR_4/0_Penguin_12_47_0_3_3_3_3

New Line.l(r:p5udt7228lv-p5ulv15707) Units=km Length=0.0214315 bus1=p5udt7228lv.1.2.3 bus2=p5ulv15707.1.2.3 switch=n enabled=y phases=3 Linecode=3P_UG_AL_350kcmil_15_0_416_0_3_3_3_3

New Line.l(r:p5udt2331lv-p5ulv2842) Units=km Length=0.026301 bus1=p5udt2331lv.1.2.3 bus2=p5ulv2842.1.2.3 switch=n enabled=y phases=3 Linecode=3P_UG_AL_350kcmil_15_0_416_0_3_3_3_3

New Line.l(r:p5udt2188lv-p5ulv12560) Units=km Length=0.0134486 bus1=p5udt2188lv.1.2.3 bus2=p5ulv12560.1.2.3 switch=n enabled=y phases=3 Linecode=3P_UG_AL_350kcmil_15_0_416_0_3_3_3_3

New Line.l(r:p5udm7994-p5ulv2645) Units=km Length=0.0155291 bus1=p5udm7994.1.2.3 bus2=p5ulv2645.1.2.3 switch=n enabled=y phases=3 Linecode=3P_UG_AL_350kcmil_15_0_416_0_3_3_3_3

New Line.l(r:p5udm7993-p5ulv2644) Units=km Length=0.00650158 bus1=p5udm7993.1.2.3 bus2=p5ulv2644.1.2.3 switch=n enabled=y phases=3 Linecode=3P_UG_AL_350kcmil_15_0_416_0_3_3_3_3

New Line.l(r:p5udm7993-p5udm7994) Units=km Length=0.0180231 bus1=p5udm7994.1.2.3 bus2=p5udm7993.1.2.3 switch=n enabled=y phases=3 Linecode=3P_UG_AL_350kcmil_15_0_416_0_3_3_3_3

New Line.l(r:p5udm7994-p5udt2188lv) Units=km Length=0.0180353 bus1=p5udt2188lv.1.2.3 bus2=p5udm7994.1.2.3 switch=n enabled=y phases=3 Linecode=3P_UG_AL_350kcmil_15_0_416_0_3_3_3_3

New Line.l(r:p5udm7995-p5ulv11045) Units=km Length=0.0145626 bus1=p5udm7995.1.2.3 bus2=p5ulv11045.1.2.3 switch=n enabled=y phases=3 Linecode=3P_UG_AL_350kcmil_15_0_416_0_3_3_3_3

New Line.l(r:p5udm7995-p5udt2188lv) Units=km Length=0.0580686 bus1=p5udt2188lv.1.2.3 bus2=p5udm7995.1.2.3 switch=n enabled=y phases=3 Linecode=3P_UG_AL_350kcmil_15_0_416_0_3_3_3_3

New Line.l(r:p5udt2188-p5udt2331) Units=km Length=0.0301821 bus1=p5udt2331.1.2.3 bus2=p5udt2188.1.2.3 switch=n enabled=y phases=3 Linecode=3P_OH_AL_ACSR_4/0_Penguin_12_47_0_3_3_3_3

New Line.l(r:p5udt2331-p5udt4478) Units=km Length=0.0291852 bus1=p5udt2331-p5udt4478xx.1.2.3 bus2=p5udt2331-p5udt4478x.1.2.3 switch=n enabled=y phases=3 Linecode=3P_UG_AL_4/0_25_12_47_0_3_3_3_3

New Line.l(r:p5udt1673-p5udt4478) Units=km Length=0.0357266 bus1=p5udt1673-p5udt4478x.1.2.3 bus2=p5udt1673-p5udt4478xx.1.2.3 switch=n enabled=y phases=3 Linecode=3P_UG_AL_4/0_25_12_47_0_3_3_3_3

New Line.l(r:p5udt1673-p5udt6614) Units=km Length=0.0443707 bus1=p5udt1673-p5udt6614xx.1.2.3 bus2=p5udt1673-p5udt6614x.1.2.3 switch=n enabled=y phases=3 Linecode=3P_UG_AL_4/0_25_12_47_0_3_3_3_3

New Line.l(r:p5udt244-p5udt6614) Units=km Length=0.0581845 bus1=p5udt244-p5udt6614x.1.2.3 bus2=p5udt244-p5udt6614xx.1.2.3 switch=n enabled=y phases=3 Linecode=3P_UG_AL_4/0_25_12_47_0_3_3_3_3

New Line.l(r:p5udt244-p5udt5881) Units=km Length=0.0627942 bus1=p5udt244-p5udt5881xx.1.2.3 bus2=p5udt244-p5udt5881x.1.2.3 switch=n enabled=y phases=3 Linecode=3P_UG_AL_4/0_25_12_47_0_3_3_3_3

New Line.l(r:p5udm16417-p5ulv8577) Units=km Length=0.0163564 bus1=p5udm16417.1.2.3 bus2=p5ulv8577.1.2.3 switch=n enabled=y phases=3 Linecode=3P_UG_AL_350kcmil_15_0_416_0_3_3_3_3

New Line.l(r:p5udm16417-p5udt5212lv) Units=km Length=0.0483332 bus1=p5udt5212lv.1.2.3 bus2=p5udm16417.1.2.3 switch=n enabled=y phases=3 Linecode=3P_UG_AL_750kcmil_25_0_416_0_3_3_3_3

New Line.l(r:p5udm16418-p5ulv14254) Units=km Length=0.00680454 bus1=p5udm16418.1.2.3 bus2=p5ulv14254.1.2.3 switch=n enabled=y phases=3 Linecode=3P_UG_AL_350kcmil_15_0_416_0_3_3_3_3

New Line.l(r:p5udm16418-p5udt5212lv) Units=km Length=0.0441162 bus1=p5udt5212lv.1.2.3 bus2=p5udm16418.1.2.3 switch=n enabled=y phases=3 Linecode=3P_UG_AL_350kcmil_15_0_416_0_3_3_3_3

New Line.l(r:p5udt2214lv-p5ulv2678) Units=km Length=0.0108929 bus1=p5udt2214lv.1.2.3 bus2=p5ulv2678.1.2.3 switch=n enabled=y phases=3 Linecode=3P_UG_AL_350kcmil_15_0_416_0_3_3_3_3

New Line.l(r:p5udt2214-p5udt3956) Units=km Length=0.0587485 bus1=p5udt3956.1.2.3 bus2=p5udt2214.1.2.3 switch=n enabled=y phases=3 Linecode=3P_OH_AL_ACSR_4/0_Penguin_12_47_0_3_3_3_3

New Line.l(r:p5udt3956-p5udt5212) Units=km Length=0.0113416 bus1=p5udt5212.1.2.3 bus2=p5udt3956.1.2.3 switch=n enabled=y phases=3 Linecode=3P_OH_AL_ACSR_4/0_Penguin_12_47_0_3_3_3_3

New Line.l(r:p5udt7226lv-p5ulv15704) Units=km Length=0.024218400000000005 bus1=p5udt7226lv.1.2.3 bus2=p5ulv15704.1.2.3 switch=n enabled=y phases=3 Linecode=3P_UG_AL_350kcmil_15_0_416_0_3_3_3_3

New Line.l(r:p5udt7226-p5udt772) Units=km Length=0.116081 bus1=p5udt772.1.2.3 bus2=p5udt7226.1.2.3 switch=n enabled=y phases=3 Linecode=3P_OH_AL_ACSR_4/0_Penguin_12_47_0_3_3_3_3

New Line.l(r:p5udt6506-p5udt772) Units=km Length=0.034606 bus1=p5udt6506-p5udt772x.1.2.3 bus2=p5udt6506-p5udt772xx.1.2.3 switch=n enabled=y phases=3 Linecode=3P_UG_AL_4/0_25_12_47_0_3_3_3_3

New Line.l(r:p5udt5212-p5udt6506) Units=km Length=0.0773972 bus1=p5udt5212.1.2.3 bus2=p5udt6506.1.2.3 switch=n enabled=y phases=3 Linecode=3P_OH_AL_ACSR_4/0_Penguin_12_47_0_3_3_3_3

New Line.l(r:p5udt5212-p5udt5351) Units=km Length=0.0703875 bus1=p5udt5351.1.2.3 bus2=p5udt5212.1.2.3 switch=n enabled=y phases=3 Linecode=3P_OH_AL_ACSR_4/0_Penguin_12_47_0_3_3_3_3

New Line.l(r:p5udt5351-p5udt5881) Units=km Length=0.0724406 bus1=p5udt5881.1.2.3 bus2=p5udt5351.1.2.3 switch=n enabled=y phases=3 Linecode=3P_OH_AL_ACSR_4/0_Penguin_12_47_0_3_3_3_3

New Line.l(r:p5udt1680lv-p5ulv1928) Units=km Length=0.0166965 bus1=p5udt1680lv.1.2.3 bus2=p5ulv1928.1.2.3 switch=n enabled=y phases=3 Linecode=3P_UG_AL_350kcmil_15_0_416_0_3_3_3_3

New Line.l(r:p5udt1680-p5udt5752) Units=km Length=0.07900180000000001 bus1=p5udt1680-p5udt5752xx.1.2.3 bus2=p5udt1680-p5udt5752x.1.2.3 switch=n enabled=y phases=3 Linecode=3P_UG_AL_4/0_25_12_47_0_3_3_3_3

New Line.l(r:p5udt5751lv-p5ulv10114) Units=km Length=0.0133781 bus1=p5udt5751lv.1.2.3 bus2=p5ulv10114.1.2.3 switch=n enabled=y phases=3 Linecode=3P_UG_AL_350kcmil_15_0_416_0_3_3_3_3

New Line.l(r:p5udt3765-p5udt5751) Units=km Length=0.0197155 bus1=p5udt3765-p5udt5751x.1.2.3 bus2=p5udt3765-p5udt5751xx.1.2.3 switch=n enabled=y phases=3 Linecode=3P_UG_AL_4/0_25_12_47_0_3_3_3_3

New Line.l(r:p5udt3765-p5udt5752) Units=km Length=0.0295593 bus1=p5udt3765-p5udt5752xx.1.2.3 bus2=p5udt3765-p5udt5752x.1.2.3 switch=n enabled=y phases=3 Linecode=3P_UG_AL_4/0_25_12_47_0_3_3_3_3

New Line.l(r:p5udt5086lv-p5ulv14786) Units=km Length=0.007771650000000001 bus1=p5udt5086lv.1.2.3 bus2=p5ulv14786.1.2.3 switch=n enabled=y phases=3 Linecode=3P_UG_AL_350kcmil_15_0_416_0_3_3_3_3

New Line.l(r:p5udm16159-p5ulv8240) Units=km Length=0.0090416 bus1=p5udm16159.1.2.3 bus2=p5ulv8240.1.2.3 switch=n enabled=y phases=3 Linecode=3P_UG_AL_350kcmil_15_0_416_0_3_3_3_3

New Line.l(r:p5udm16159-p5udt5086lv) Units=km Length=0.0180155 bus1=p5udt5086lv.1.2.3 bus2=p5udm16159.1.2.3 switch=n enabled=y phases=3 Linecode=3P_UG_AL_350kcmil_15_0_416_0_3_3_3_3

New Line.l(r:p5udt7104lv-p5ulv15118) Units=km Length=0.0029617700000000003 bus1=p5udt7104lv.1.2.3 bus2=p5ulv15118.1.2.3 switch=n enabled=y phases=3 Linecode=3P_UG_AL_750kcmil_25_0_416_0_3_3_3_3

New Line.l(r:p5udt7847lv-p5ulv18858) Units=km Length=0.00657979 bus1=p5udt7847lv.1.2.3 bus2=p5ulv18858.1.2.3 switch=n enabled=y phases=3 Linecode=3P_UG_AL_350kcmil_15_0_416_0_3_3_3_3

New Line.l(r:p5udt773lv-p5ulv834) Units=km Length=0.007331340000000001 bus1=p5udt773lv.1.2.3 bus2=p5ulv834.1.2.3 switch=n enabled=y phases=3 Linecode=3P_UG_AL_350kcmil_15_0_416_0_3_3_3_3

New Line.l(r:p5udm2963-p5ulv18857) Units=km Length=0.00315995 bus1=p5udm2963.1.2.3 bus2=p5ulv18857.1.2.3 switch=n enabled=y phases=3 Linecode=3P_UG_AL_750kcmil_25_0_416_0_3_3_3_3

New Line.l(r:p5udm2962-p5ulv836) Units=km Length=0.0080409 bus1=p5udm2962.1.2.3 bus2=p5ulv836.1.2.3 switch=n enabled=y phases=3 Linecode=3P_UG_AL_350kcmil_15_0_416_0_3_3_3_3

New Line.l(r:p5udm2962-p5udm2963) Units=km Length=0.0944423 bus1=p5udm2963.1.2.3 bus2=p5udm2962.1.2.3 switch=n enabled=y phases=3 Linecode=3P_UG_AL_350kcmil_15_0_416_0_3_3_3_3

New Line.l(r:p5udm2963-p5udt775lv) Units=km Length=0.0327752 bus1=p5udt775lv.1.2.3 bus2=p5udm2963.1.2.3 switch=n enabled=y phases=3 Linecode=3P_UG_AL_750kcmil_25_0_416_0_3_3_3_3

New Line.l(r:p5udt773-p5udt775) Units=km Length=0.001 bus1=p5udt773.1.2.3 bus2=p5udt775.1.2.3 switch=n enabled=y phases=3 Linecode=3P_OH_AL_ACSR_4/0_Penguin_12_47_0_3_3_3_3

New Line.l(r:p5udt773-p5udt774) Units=km Length=0.0327752 bus1=p5udt774.1.2.3 bus2=p5udt773.1.2.3 switch=n enabled=y phases=3 Linecode=3P_OH_AL_ACSR_4/0_Penguin_12_47_0_3_3_3_3

New Line.l(r:p5udt7385lv-p5ulv16402) Units=km Length=0.00365005 bus1=p5udt7385lv.1.2.3 bus2=p5ulv16402.1.2.3 switch=n enabled=y phases=3 Linecode=3P_UG_AL_750kcmil_25_0_416_0_3_3_3_3

New Line.l(r:p5udt7385-p5udt774) Units=km Length=0.0677395 bus1=p5udt774.1.2.3 bus2=p5udt7385.1.2.3 switch=n enabled=y phases=3 Linecode=3P_OH_AL_ACSR_4/0_Penguin_12_47_0_3_3_3_3

New Line.l(r:p5udt774-p5udt7847) Units=km Length=0.0352013 bus1=p5udt7847.1.2.3 bus2=p5udt774.1.2.3 switch=n enabled=y phases=3 Linecode=3P_OH_AL_ACSR_4/0_Penguin_12_47_0_3_3_3_3

New Line.l(r:p5udt1396-p5udt7847) Units=km Length=0.0351887 bus1=p5udt1396.1.2.3 bus2=p5udt7847.1.2.3 switch=n enabled=y phases=3 Linecode=3P_OH_AL_ACSR_4/0_Penguin_12_47_0_3_3_3_3

New Line.l(r:p5udt1396-p5udt7848) Units=km Length=0.0386915 bus1=p5udt7848.1.2.3 bus2=p5udt1396.1.2.3 switch=n enabled=y phases=3 Linecode=3P_OH_AL_ACSR_4/0_Penguin_12_47_0_3_3_3_3

New Line.l(r:p5udt5747lv-p5ulv10107) Units=km Length=0.018215 bus1=p5udt5747lv.1.2.3 bus2=p5ulv10107.1.2.3 switch=n enabled=y phases=3 Linecode=3P_UG_AL_350kcmil_15_0_416_0_3_3_3_3

New Line.l(r:p5udt3955-p5udt5747) Units=km Length=0.017478 bus1=p5udt3955.1.2.3 bus2=p5udt5747.1.2.3 switch=n enabled=y phases=3 Linecode=3P_OH_AL_ACSR_4/0_Penguin_12_47_0_3_3_3_3

New Line.l(r:p5udt2083-p5udt3955) Units=km Length=0.0580122 bus1=p5udt2083.1.2.3 bus2=p5udt3955.1.2.3 switch=n enabled=y phases=3 Linecode=3P_OH_AL_ACSR_4/0_Penguin_12_47_0_3_3_3_3

New Line.l(r:p5udt6001lv-p5ulv10894) Units=km Length=0.00829154 bus1=p5udt6001lv.1.2.3 bus2=p5ulv10894.1.2.3 switch=n enabled=y phases=3 Linecode=3P_UG_AL_350kcmil_15_0_416_0_3_3_3_3

New Line.l(r:p5udt2083-p5udt6001) Units=km Length=0.001 bus1=p5udt2083.1.2.3 bus2=p5udt6001.1.2.3 switch=n enabled=y phases=3 Linecode=3P_OH_AL_ACSR_4/0_Penguin_12_47_0_3_3_3_3

New Line.l(r:p5udt905lv-p5ulv983) Units=km Length=0.00736492 bus1=p5udt905lv.1.2.3 bus2=p5ulv983.1.2.3 switch=n enabled=y phases=3 Linecode=3P_UG_AL_350kcmil_15_0_416_0_3_3_3_3

New Line.l(r:p5udt905lv-p5ulv18662) Units=km Length=0.0080227 bus1=p5udt905lv.1.2.3 bus2=p5ulv18662.1.2.3 switch=n enabled=y phases=3 Linecode=3P_UG_AL_350kcmil_15_0_416_0_3_3_3_3

New Line.l(r:p5udt3748lv-p5ulv5238) Units=km Length=0.0132701 bus1=p5udt3748lv.1.2.3 bus2=p5ulv5238.1.2.3 switch=n enabled=y phases=3 Linecode=3P_UG_AL_350kcmil_15_0_416_0_3_3_3_3

New Line.l(r:p5udt2822-p5udt3748) Units=km Length=0.121356 bus1=p5udt2822.1.2.3 bus2=p5udt3748.1.2.3 switch=n enabled=y phases=3 Linecode=3P_OH_AL_ACSR_4/0_Penguin_12_47_0_3_3_3_3

New Line.l(r:p5udt7171lv-p5ulv15464) Units=km Length=0.013312 bus1=p5udt7171lv.1.2.3 bus2=p5ulv15464.1.2.3 switch=n enabled=y phases=3 Linecode=3P_UG_AL_350kcmil_15_0_416_0_3_3_3_3

New Line.l(r:p5udt2822-p5udt7171) Units=km Length=0.121481 bus1=p5udt2822.1.2.3 bus2=p5udt7171.1.2.3 switch=n enabled=y phases=3 Linecode=3P_OH_AL_ACSR_4/0_Penguin_12_47_0_3_3_3_3

New Line.l(r:p5udt2822-p5udt905) Units=km Length=0.052352 bus1=p5udt905.1.2.3 bus2=p5udt2822.1.2.3 switch=n enabled=y phases=3 Linecode=3P_OH_AL_ACSR_4/0_Penguin_12_47_0_3_3_3_3

New Line.l(r:p5udt7632-p5udt905) Units=km Length=0.10171 bus1=p5udt7632.1.2.3 bus2=p5udt905.1.2.3 switch=n enabled=y phases=3 Linecode=3P_OH_AL_ACSR_4/0_Penguin_12_47_0_3_3_3_3

New Line.l(r:p5udt7763lv-p5ulv18453) Units=km Length=0.0175912 bus1=p5udt7763lv.1.2.3 bus2=p5ulv18453.1.2.3 switch=n enabled=y phases=3 Linecode=3P_UG_AL_350kcmil_15_0_416_0_3_3_3_3

New Line.l(r:p5udt3864-p5udt7763) Units=km Length=0.001 bus1=p5udt3864-p5udt7763x.1.2.3 bus2=p5udt3864-p5udt7763xx.1.2.3 switch=n enabled=y phases=3 Linecode=3P_UG_AL_4/0_25_12_47_0_3_3_3_3

New Line.l(r:p5udt3864-p5udt7632) Units=km Length=0.0423897 bus1=p5udt3864-p5udt7632xx.1.2.3 bus2=p5udt3864-p5udt7632x.1.2.3 switch=n enabled=y phases=3 Linecode=3P_UG_AL_4/0_25_12_47_0_3_3_3_3

New Line.l(r:p5udt6954lv-p5ulv14415) Units=km Length=0.0137285 bus1=p5udt6954lv.1.2.3 bus2=p5ulv14415.1.2.3 switch=n enabled=y phases=3 Linecode=3P_UG_AL_350kcmil_15_0_416_0_3_3_3_3

New Line.l(r:p5udt6954-p5udt7632) Units=km Length=0.088644 bus1=p5udt6954-p5udt7632xx.1.2.3 bus2=p5udt6954-p5udt7632x.1.2.3 switch=n enabled=y phases=3 Linecode=3P_UG_AL_4/0_25_12_47_0_3_3_3_3

New Line.l(r:p5udt2083-p5udt7632) Units=km Length=0.0655655 bus1=p5udt2083.1.2.3 bus2=p5udt7632.1.2.3 switch=n enabled=y phases=3 Linecode=3P_OH_AL_ACSR_4/0_Penguin_12_47_0_3_3_3_3

New Line.l(r:p5udt2083-p5udt5086) Units=km Length=0.0540434 bus1=p5udt5086.1.2.3 bus2=p5udt2083.1.2.3 switch=n enabled=y phases=3 Linecode=3P_OH_AL_ACSR_4/0_Penguin_12_47_0_3_3_3_3

New Line.padswitch(r:p5udt1670-p5udt3860)p5u_117525 Units=km Length=0.001 bus1=p5udt1670.1 bus2=p5udt1670-p5udt3860x.1 switch=y enabled=y phases=1 Linecode=padswitch_1_1_1_1

New Line.padswitch(r:p5udt1670-p5udt3860)p5u_117526 Units=km Length=0.001 bus1=p5udt1670-p5udt3860xx.1 bus2=p5udt3860.1 switch=y enabled=y phases=1 Linecode=padswitch_1_1_1_1

New Line.padswitch(r:p5udt4306-p5udt7804)p5u_117529 Units=km Length=0.001 bus1=p5udt7804.2 bus2=p5udt4306-p5udt7804xx.2 switch=y enabled=y phases=1 Linecode=padswitch_1_1_1_1

New Line.padswitch(r:p5udt4306-p5udt7804)p5u_117530 Units=km Length=0.001 bus1=p5udt4306-p5udt7804x.2 bus2=p5udt4306.2 switch=y enabled=y phases=1 Linecode=padswitch_1_3_1_1_1

New Line.padswitch(r:p5udt70-p5udt7804)p5u_117531 Units=km Length=0.001 bus1=p5udt70.2 bus2=p5udt70-p5udt7804x.2 switch=y enabled=y phases=1 Linecode=padswitch_1_1_1_1

New Line.padswitch(r:p5udt70-p5udt7804)p5u_117532 Units=km Length=0.001 bus1=p5udt70-p5udt7804xx.2 bus2=p5udt7804.2 switch=y enabled=y phases=1 Linecode=padswitch_1_1_1_1

New Line.padswitch(r:p5udt5881-p5udt70)p5u_117533 Units=km Length=0.001 bus1=p5udt5881-p5udt70x.2 bus2=p5udt5881-p5udt70xx.2 switch=y enabled=y phases=1 Linecode=padswitch_1_1_1_1

New Line.padswitch(r:p5udt5881-p5udt70)p5u_117534 Units=km Length=0.001 bus1=p5udt5881-p5udt70xxx.2 bus2=p5udt70.2 switch=y enabled=y phases=1 Linecode=padswitch_1_1_1_1

New Line.padswitch(r:p5udt1680-p5udt4057)p5u_117555 Units=km Length=0.001 bus1=p5udt1680-p5udt4057x.3 bus2=p5udt1680-p5udt4057xx.3 switch=y enabled=y phases=1 Linecode=padswitch_1_1_1_1

New Line.padswitch(r:p5udt1680-p5udt4057)p5u_117556 Units=km Length=0.001 bus1=p5udt1680-p5udt4057xxx.3 bus2=p5udt4057.3 switch=y enabled=y phases=1 Linecode=padswitch_1_3_1_1_1_1

New Line.padswitch(r:p5udt5881-p5udt6301)p5u_117547 Units=km Length=0.001 bus1=p5udt6301.1.2.3 bus2=p5udt5881-p5udt6301xx.1.2.3 switch=y enabled=y phases=3 Linecode=padswitch_3_3_3_3

New Line.padswitch(r:p5udt5881-p5udt6301)p5u_117548 Units=km Length=0.001 bus1=p5udt5881-p5udt6301x.1.2.3 bus2=p5udt5881.1.2.3 switch=y enabled=y phases=3 Linecode=padswitch_3_4_3_3_3

New Line.padswitch(r:p5udt6301-p5udt7227)p5u_117549 Units=km Length=0.001 bus1=p5udt7227.1.2.3 bus2=p5udt6301-p5udt7227xx.1.2.3 switch=y enabled=y phases=3 Linecode=padswitch_3_4_3_3_3

New Line.padswitch(r:p5udt6301-p5udt7227)p5u_117550 Units=km Length=0.001 bus1=p5udt6301-p5udt7227x.1.2.3 bus2=p5udt6301.1.2.3 switch=y enabled=y phases=3 Linecode=padswitch_3_4_3_3_3

New Line.padswitch(r:p5udt7227-p5udt7228)p5u_117551 Units=km Length=0.001 bus1=p5udt7228.1.2.3 bus2=p5udt7227-p5udt7228xx.1.2.3 switch=y enabled=y phases=3 Linecode=padswitch_3_4_3_3_3

New Line.padswitch(r:p5udt7227-p5udt7228)p5u_117552 Units=km Length=0.001 bus1=p5udt7227-p5udt7228x.1.2.3 bus2=p5udt7227.1.2.3 switch=y enabled=y phases=3 Linecode=padswitch_3_4_3_3_3

New Line.padswitch(r:p5udt7228-p5udt7229)p5u_117553 Units=km Length=0.001 bus1=p5udt7229.1.2.3 bus2=p5udt7228-p5udt7229xx.1.2.3 switch=y enabled=y phases=3 Linecode=padswitch_3_4_3_3_3

New Line.padswitch(r:p5udt7228-p5udt7229)p5u_117554 Units=km Length=0.001 bus1=p5udt7228-p5udt7229x.1.2.3 bus2=p5udt7228.1.2.3 switch=y enabled=y phases=3 Linecode=padswitch_3_4_3_3_3

New Line.padswitch(r:p5udt4301-p5udt6238)p5u_117527 Units=km Length=0.001 bus1=p5udt4301.1.2.3 bus2=p5udt4301-p5udt6238x.1.2.3 switch=y enabled=y phases=3 Linecode=padswitch_3_4_3_2_3_3

New Line.padswitch(r:p5udt4301-p5udt6238)p5u_117528 Units=km Length=0.001 bus1=p5udt4301-p5udt6238xx.1.2.3 bus2=p5udt6238.1.2.3 switch=y enabled=y phases=3 Linecode=padswitch_3_4_3_2_3_1_3

New Line.padswitch(r:p5udt2331-p5udt4478)p5u_117535 Units=km Length=0.001 bus1=p5udt4478.1.2.3 bus2=p5udt2331-p5udt4478xx.1.2.3 switch=y enabled=y phases=3 Linecode=padswitch_3_4_3_3_3

New Line.padswitch(r:p5udt2331-p5udt4478)p5u_117536 Units=km Length=0.001 bus1=p5udt2331-p5udt4478x.1.2.3 bus2=p5udt2331.1.2.3 switch=y enabled=y phases=3 Linecode=padswitch_3_4_3_2_3_1_3_1

New Line.padswitch(r:p5udt1673-p5udt4478)p5u_117537 Units=km Length=0.001 bus1=p5udt1673.1.2.3 bus2=p5udt1673-p5udt4478x.1.2.3 switch=y enabled=y phases=3 Linecode=padswitch_3_3_3_3

New Line.padswitch(r:p5udt1673-p5udt4478)p5u_117538 Units=km Length=0.001 bus1=p5udt1673-p5udt4478xx.1.2.3 bus2=p5udt4478.1.2.3 switch=y enabled=y phases=3 Linecode=padswitch_3_4_3_3_3

New Line.padswitch(r:p5udt1673-p5udt6614)p5u_117539 Units=km Length=0.001 bus1=p5udt6614.1.2.3 bus2=p5udt1673-p5udt6614xx.1.2.3 switch=y enabled=y phases=3 Linecode=padswitch_3_4_3_3_3

New Line.padswitch(r:p5udt1673-p5udt6614)p5u_117540 Units=km Length=0.001 bus1=p5udt1673-p5udt6614x.1.2.3 bus2=p5udt1673.1.2.3 switch=y enabled=y phases=3 Linecode=padswitch_3_4_3_3_3

New Line.padswitch(r:p5udt244-p5udt6614)p5u_117541 Units=km Length=0.001 bus1=p5udt244.1.2.3 bus2=p5udt244-p5udt6614x.1.2.3 switch=y enabled=y phases=3 Linecode=padswitch_3_4_3_3_3

New Line.padswitch(r:p5udt244-p5udt6614)p5u_117542 Units=km Length=0.001 bus1=p5udt244-p5udt6614xx.1.2.3 bus2=p5udt6614.1.2.3 switch=y enabled=y phases=3 Linecode=padswitch_3_4_3_3_3

New Line.padswitch(r:p5udt244-p5udt5881)p5u_117543 Units=km Length=0.001 bus1=p5udt5881.1.2.3 bus2=p5udt244-p5udt5881xx.1.2.3 switch=y enabled=y phases=3 Linecode=padswitch_3_4_3_2_3_1_3_1

New Line.padswitch(r:p5udt244-p5udt5881)p5u_117544 Units=km Length=0.001 bus1=p5udt244-p5udt5881x.1.2.3 bus2=p5udt244.1.2.3 switch=y enabled=y phases=3 Linecode=padswitch_3_4_3_3_3

New Line.padswitch(r:p5udt6506-p5udt772)p5u_117545 Units=km Length=0.001 bus1=p5udt6506.1.2.3 bus2=p5udt6506-p5udt772x.1.2.3 switch=y enabled=y phases=3 Linecode=padswitch_3_4_3_2_3_1_3_1

New Line.padswitch(r:p5udt6506-p5udt772)p5u_117546 Units=km Length=0.001 bus1=p5udt6506-p5udt772xx.1.2.3 bus2=p5udt772.1.2.3 switch=y enabled=y phases=3 Linecode=padswitch_3_4_3_2_3_1_3_1

New Line.padswitch(r:p5udt1680-p5udt5752)p5u_117557 Units=km Length=0.001 bus1=p5udt5752.1.2.3 bus2=p5udt1680-p5udt5752xx.1.2.3 switch=y enabled=y phases=3 Linecode=padswitch_3_4_3_2_3_1_3_1

New Line.padswitch(r:p5udt1680-p5udt5752)p5u_117558 Units=km Length=0.001 bus1=p5udt1680-p5udt5752x.1.2.3 bus2=p5udt1680.1.2.3 switch=y enabled=y phases=3 Linecode=padswitch_3_4_3_2_3_1_3_1

New Line.padswitch(r:p5udt3765-p5udt5751)p5u_117559 Units=km Length=0.001 bus1=p5udt3765.1.2.3 bus2=p5udt3765-p5udt5751x.1.2.3 switch=y enabled=y phases=3 Linecode=padswitch_3_4_3_3_3

New Line.padswitch(r:p5udt3765-p5udt5751)p5u_117560 Units=km Length=0.001 bus1=p5udt3765-p5udt5751xx.1.2.3 bus2=p5udt5751.1.2.3 switch=y enabled=y phases=3 Linecode=padswitch_3_4_3_2_3_1_3_1

New Line.padswitch(r:p5udt3765-p5udt5752)p5u_117561 Units=km Length=0.001 bus1=p5udt5752.1.2.3 bus2=p5udt3765-p5udt5752xx.1.2.3 switch=y enabled=y phases=3 Linecode=padswitch_3_4_3_2_3_1_3_1

New Line.padswitch(r:p5udt3765-p5udt5752)p5u_117562 Units=km Length=0.001 bus1=p5udt3765-p5udt5752x.1.2.3 bus2=p5udt3765.1.2.3 switch=y enabled=y phases=3 Linecode=padswitch_3_4_3_3_3

New Line.padswitch(r:p5udt3864-p5udt7763)p5u_117563 Units=km Length=0.001 bus1=p5udt3864.1.2.3 bus2=p5udt3864-p5udt7763x.1.2.3 switch=y enabled=y phases=3 Linecode=padswitch_3_4_3_3_3

New Line.padswitch(r:p5udt3864-p5udt7763)p5u_117564 Units=km Length=0.001 bus1=p5udt3864-p5udt7763xx.1.2.3 bus2=p5udt7763.1.2.3 switch=y enabled=y phases=3 Linecode=padswitch_3_4_3_2_3_1_3_1

New Line.padswitch(r:p5udt3864-p5udt7632)p5u_117565 Units=km Length=0.001 bus1=p5udt7632.1.2.3 bus2=p5udt3864-p5udt7632xx.1.2.3 switch=y enabled=y phases=3 Linecode=padswitch_3_4_3_2_3_1_3_1

New Line.padswitch(r:p5udt3864-p5udt7632)p5u_117566 Units=km Length=0.001 bus1=p5udt3864-p5udt7632x.1.2.3 bus2=p5udt3864.1.2.3 switch=y enabled=y phases=3 Linecode=padswitch_3_4_3_3_3

New Line.padswitch(r:p5udt6954-p5udt7632)p5u_117567 Units=km Length=0.001 bus1=p5udt7632.1.2.3 bus2=p5udt6954-p5udt7632xx.1.2.3 switch=y enabled=y phases=3 Linecode=padswitch_3_4_3_2_3_1_3_1

New Line.padswitch(r:p5udt6954-p5udt7632)p5u_117568 Units=km Length=0.001 bus1=p5udt6954-p5udt7632x.1.2.3 bus2=p5udt6954.1.2.3 switch=y enabled=y phases=3 Linecode=padswitch_3_4_3_2_3_1_3_1

New Line.fuse(r:p5udt1680-p5udt4057)p5u_151712 Units=km Length=0.001 bus1=p5udt1680.3 bus2=p5udt1680-p5udt4057x.3 switch=n enabled=y phases=1 Linecode=fuse_1_1_1_1

New Fuse.Fuse_fuse(r:p5udt1680-p5udt4057)p5u_151712 monitoredobj=Line.fuse(r:p5udt1680-p5udt4057)p5u_151712 enabled=y ratedcurrent=100.0

New Line.fuse(r:p5udt2188-p5udt33578)p5u_151781 Units=km Length=0.001 bus1=p5udt2188.3 bus2=p5udt2188-p5udt33578x.3 switch=n enabled=y phases=1 Linecode=fuse_1_7_1_1_1

New Fuse.Fuse_fuse(r:p5udt2188-p5udt33578)p5u_151781 monitoredobj=Line.fuse(r:p5udt2188-p5udt33578)p5u_151781 enabled=y ratedcurrent=100.0

New Line.fuse(r:p5udt3748-p5udt7688)p5u_152028 Units=km Length=0.001 bus1=p5udt3748.2 bus2=p5udt3748-p5udt7688x.2 switch=n enabled=y phases=1 Linecode=fuse_1_7_1_5_1_1

New Fuse.Fuse_fuse(r:p5udt3748-p5udt7688)p5u_152028 monitoredobj=Line.fuse(r:p5udt3748-p5udt7688)p5u_152028 enabled=y ratedcurrent=100.0

New Line.fuse(r:p5udt4302-p5udt4304)p5u_152112 Units=km Length=0.001 bus1=p5udt4302.3 bus2=p5udt4302-p5udt4304x.3 switch=n enabled=y phases=1 Linecode=fuse_1_7_1_1_1

New Fuse.Fuse_fuse(r:p5udt4302-p5udt4304)p5u_152112 monitoredobj=Line.fuse(r:p5udt4302-p5udt4304)p5u_152112 enabled=y ratedcurrent=100.0

New Line.fuse(r:p5udt5747-p5udt6754)p5u_152338 Units=km Length=0.001 bus1=p5udt5747.3 bus2=p5udt5747-p5udt6754x.3 switch=n enabled=y phases=1 Linecode=fuse_1_1_1_1

New Fuse.Fuse_fuse(r:p5udt5747-p5udt6754)p5u_152338 monitoredobj=Line.fuse(r:p5udt5747-p5udt6754)p5u_152338 enabled=y ratedcurrent=100.0

New Line.fuse(r:p5udt5881-p5udt70)p5u_152363 Units=km Length=0.001 bus1=p5udt5881.2 bus2=p5udt5881-p5udt70x.2 switch=n enabled=y phases=1 Linecode=fuse_1_7_1_1_1

New Fuse.Fuse_fuse(r:p5udt5881-p5udt70)p5u_152363 monitoredobj=Line.fuse(r:p5udt5881-p5udt70)p5u_152363 enabled=y ratedcurrent=100.0

New Line.fuse(r:p5udt1670-p5udt6239)p5u_152436 Units=km Length=0.001 bus1=p5udt6239.1 bus2=p5udt1670-p5udt6239x.1 switch=n enabled=y phases=1 Linecode=fuse_1_7_1_1_1

New Fuse.Fuse_fuse(r:p5udt1670-p5udt6239)p5u_152436 monitoredobj=Line.fuse(r:p5udt1670-p5udt6239)p5u_152436 enabled=y ratedcurrent=100.0

New Line.fuse(r:p5udt6797-p5udt7848)p5u_152680 Units=km Length=0.001 bus1=p5udt7848.1 bus2=p5udt6797-p5udt7848x.1 switch=n enabled=y phases=1 Linecode=fuse_1_1_1_1

New Fuse.Fuse_fuse(r:p5udt6797-p5udt7848)p5u_152680 monitoredobj=Line.fuse(r:p5udt6797-p5udt7848)p5u_152680 enabled=y ratedcurrent=100.0
