New Capacitor.p5uc97 Bus1=p5udt18899 phases=3 Kv=12.47 conn=Wye Kvar=300.0

New CapControl.p5uc97 Capacitor=p5uc97 Element=Line.padswitch(r:p5udt18899-p5udt19817)p5u_138697 Terminal=1 delay=100.0 Type=voltage Vmin=120.5 Vmax=125.0 Ptratio=59.99631547328862 Ctratio=100.0
