New Capacitor.p5uc101 Bus1=p5udt12206 phases=3 Kv=12.47 conn=Wye Kvar=450.0

New CapControl.p5uc101 Capacitor=p5uc101 Element=Line.l(r:p5udt10263-p5udt12206) Terminal=1 delay=100.0 Type=voltage Vmin=120.5 Vmax=125.0 Ptratio=59.99631547328862 Ctratio=100.0
