New Capacitor.p5uc102 Bus1=p5umv92 phases=3 Kv=12.47 conn=Wye Kvar=450.0

New CapControl.p5uc102 Capacitor=p5uc102 Element=Line.l(r:p5udt15230-p5umv92) Terminal=1 delay=100.0 Type=voltage Vmin=120.5 Vmax=125.0 Ptratio=59.99631547328862 Ctratio=100.0
