New Capacitor.p5uc98 Bus1=p5udt18000 phases=3 Kv=12.47 conn=Wye Kvar=450.0

New CapControl.p5uc98 Capacitor=p5uc98 Element=Line.l(r:p5udt18000-p5udt30811) Terminal=1 delay=100.0 Type=voltage Vmin=120.5 Vmax=125.0 Ptratio=59.99631547328862 Ctratio=100.0

New Capacitor.p5uc100 Bus1=p5udt18942 phases=3 Kv=12.47 conn=Wye Kvar=450.0

New CapControl.p5uc100 Capacitor=p5uc100 Element=Line.padswitch(r:p5udt18942-p5udt33096)p5u_140624 Terminal=1 delay=100.0 Type=voltage Vmin=120.5 Vmax=125.0 Ptratio=59.99631547328862 Ctratio=100.0
