Clear

New Circuit.substation_p5uhs22_69 bus1=p5uhs22_69 pu=1.0 basekV=69.0 R1=1e-05 X1=1e-05 R0=1e-05 X0=1e-05

Redirect Transformers.dss
Redirect p5uhs22_1247--p5udt24944/Transformers.dss
Redirect p5uhs22_1247--p5udt12342/Transformers.dss
Redirect p5uhs22_1247--p5udt18713/Transformers.dss
Redirect p5uhs22_1247--p5udt12343/Transformers.dss
Redirect Regulators.dss
Redirect p5uhs22_1247--p5udt12342/Loads.dss
Redirect p5uhs22_1247--p5udt18713/Loads.dss
Redirect p5uhs22_1247--p5udt24944/Loads.dss
Redirect p5uhs22_1247--p5udt12343/Loads.dss
Redirect LineCodes.dss
Redirect p5uhs22_1247--p5udt24944/LineCodes.dss
Redirect p5uhs22_1247--p5udt12342/LineCodes.dss
Redirect p5uhs22_1247--p5udt18713/LineCodes.dss
Redirect p5uhs22_1247--p5udt12343/LineCodes.dss
Redirect Lines.dss
Redirect p5uhs22_1247--p5udt24944/Lines.dss
Redirect p5uhs22_1247--p5udt12342/Lines.dss
Redirect p5uhs22_1247--p5udt18713/Lines.dss
Redirect p5uhs22_1247--p5udt12343/Lines.dss
Redirect p5uhs22_1247--p5udt18713/Capacitors.dss
Redirect p5uhs22_1247--p5udt12343/Capacitors.dss
Redirect p5uhs22_1247--p5udt24944/Capacitors.dss

Set Voltagebases=[0.2080002494301389, 0.48, 7.199560000000001, 12.47, 69.0]

Calcvoltagebases

Buscoords Buscoords.dss

Solve
