New Capacitor.p5uc106 Bus1=p5udt28543 phases=3 Kv=12.47 conn=Wye Kvar=450.0

New CapControl.p5uc106 Capacitor=p5uc106 Element=Line.padswitch(r:p5udt25139-p5udt28543)p5u_141446 Terminal=1 delay=100.0 Type=voltage Vmin=120.5 Vmax=125.0 Ptratio=59.99631547328862 Ctratio=100.0
