New Line.l(r:p5udt27071lv-p5ulv53131) Units=km Length=0.00916 bus1=p5udt27071lv.1.2.3 bus2=p5ulv53131.1.2.3 switch=n enabled=y phases=3 Linecode=3P_UG_AL_350kcmil_15_0_416_0_3_3_3_3

New Line.l(r:p5udt14798lv-p5ulv27515) Units=km Length=0.00941985 bus1=p5udt14798lv.1.2.3 bus2=p5ulv27515.1.2.3 switch=n enabled=y phases=3 Linecode=3P_UG_AL_350kcmil_15_0_416_0_3_3_3_3

New Line.l(r:p5udt14798-p5udt27071) Units=km Length=0.08277940000000002 bus1=p5udt27071.1.2.3 bus2=p5udt14798.1.2.3 switch=n enabled=y phases=3 Linecode=3P_OH_AL_ACSR_4/0_Penguin_12_47_0_3_3_3_3

New Line.l(r:p5udt20782lv-p5ulv37507) Units=km Length=0.0188518 bus1=p5udt20782lv.1.2.3 bus2=p5ulv37507.1.2.3 switch=n enabled=y phases=3 Linecode=3P_UG_AL_750kcmil_25_0_416_0_3_3_3_3

New Line.l(r:p5udt20782-p5udt27071) Units=km Length=0.234464 bus1=p5udt27071.1.2.3 bus2=p5udt20782.1.2.3 switch=n enabled=y phases=3 Linecode=3P_OH_AL_ACSR_4/0_Penguin_12_47_0_3_3_3_3

New Line.l(r:p5udt27071-p5uhs23_1247) Units=km Length=0.22305700000000003 bus1=p5udt27071-p5uhs23_1247x.1.2.3 bus2=p5udt27071.1.2.3 switch=n enabled=y phases=3 Linecode=3P_OH_AL_ACSR_4/0_Penguin_12_47_0_3_3_3_3
