New Load.load_p5ulv27515 conn=wye bus1=p5ulv27515.1.2.3 kV=0.48 Vminpu=0.8 Vmaxpu=1.2 model=1 kW=40.4004 kvar=13.278969322868143 Phases=3

New Load.load_p5ulv37507 conn=wye bus1=p5ulv37507.1.2.3 kV=0.48 Vminpu=0.8 Vmaxpu=1.2 model=1 kW=72.1107 kvar=23.701640903321444 Phases=3

New Load.load_p5ulv53131 conn=wye bus1=p5ulv53131.1.2.3 kV=0.48 Vminpu=0.8 Vmaxpu=1.2 model=1 kW=32.8803 kvar=10.807231983512573 Phases=3
