Clear

New Circuit.substation_p5uhs25_69 bus1=p5uhs25_69 pu=1.0 basekV=69.0 R1=1e-05 X1=1e-05 R0=1e-05 X0=1e-05

Redirect Transformers.dss
Redirect p5uhs25_1247--p5udt11223/Transformers.dss
Redirect p5uhs25_1247--p5udt33477/Transformers.dss
Redirect p5uhs25_1247--p5udt31077/Transformers.dss
Redirect p5uhs25_1247--p5udt26874/Transformers.dss
Redirect Regulators.dss
Redirect p5uhs25_1247--p5udt31077/Loads.dss
Redirect p5uhs25_1247--p5udt26874/Loads.dss
Redirect p5uhs25_1247--p5udt33477/Loads.dss
Redirect p5uhs25_1247--p5udt11223/Loads.dss
Redirect LineCodes.dss
Redirect p5uhs25_1247--p5udt11223/LineCodes.dss
Redirect p5uhs25_1247--p5udt33477/LineCodes.dss
Redirect p5uhs25_1247--p5udt31077/LineCodes.dss
Redirect p5uhs25_1247--p5udt26874/LineCodes.dss
Redirect Lines.dss
Redirect p5uhs25_1247--p5udt11223/Lines.dss
Redirect p5uhs25_1247--p5udt33477/Lines.dss
Redirect p5uhs25_1247--p5udt31077/Lines.dss
Redirect p5uhs25_1247--p5udt26874/Lines.dss
Redirect p5uhs25_1247--p5udt31077/Capacitors.dss
Redirect p5uhs25_1247--p5udt33477/Capacitors.dss

Set Voltagebases=[0.2080002494301389, 0.48, 7.199560000000001, 12.47, 69.0]

Calcvoltagebases

Buscoords Buscoords.dss

Solve
