New Line.l(r:p5udt1954lv-p5ulv16956) Units=km Length=0.0431773 bus1=p5udt1954lv.1.2 bus2=p5ulv16956.1.2 switch=n enabled=y phases=2 Linecode=1P_OH_AL_4/0_Zuzara_0_416_0_2_2_2_2

New Line.l(r:p5udm7162-p5ulv2306) Units=km Length=0.0773097 bus1=p5udm7162.1.2 bus2=p5ulv2306.1.2 switch=n enabled=y phases=2 Linecode=1P_OH_AL_4/0_Zuzara_0_416_0_2_2_2_2

New Line.l(r:p5udm7162-p5udt1954lv) Units=km Length=0.019824300000000003 bus1=p5udt1954lv.1.2 bus2=p5udm7162.1.2 switch=n enabled=y phases=2 Linecode=1P_OH_AL_2/0_Rucina_0_416_0_2_2_2_2

New Line.l(r:p5udt6609lv-p5ulv16957) Units=km Length=0.034544 bus1=p5udt6609lv.1.2 bus2=p5ulv16957.1.2 switch=n enabled=y phases=2 Linecode=1P_OH_AL_4/0_Zuzara_0_416_0_2_2_2_2

New Line.l(r:p5udm19100-p5ulv12966) Units=km Length=0.00816021 bus1=p5udm19100.1.2 bus2=p5ulv12966.1.2 switch=n enabled=y phases=2 Linecode=1P_OH_AL_2/0_Rucina_0_416_0_2_2_2_2

New Line.l(r:p5udm19100-p5udt6609lv) Units=km Length=0.0188342 bus1=p5udt6609lv.1.2 bus2=p5udm19100.1.2 switch=n enabled=y phases=2 Linecode=1P_OH_AL_2/0_Rucina_0_416_0_2_2_2_2

New Line.l(r:p5udm19539-p5ulv14079) Units=km Length=0.0388523 bus1=p5udm19539.1.2 bus2=p5ulv14079.1.2 switch=n enabled=y phases=2 Linecode=1P_OH_AL_4/0_Zuzara_0_416_0_2_2_2_2

New Line.l(r:p5udm19539-p5udt6876lv) Units=km Length=0.0237519 bus1=p5udt6876lv.1.2 bus2=p5udm19539.1.2 switch=n enabled=y phases=2 Linecode=1P_OH_AL_2/0_Rucina_0_416_0_2_2_2_2

New Line.l(r:p5udm19540-p5ulv77783) Units=km Length=0.0488638 bus1=p5udm19540.1.2 bus2=p5ulv77783.1.2 switch=n enabled=y phases=2 Linecode=1P_OH_AL_4/0_Zuzara_0_416_0_2_2_2_2

New Line.l(r:p5udm19540-p5udt6876lv) Units=km Length=0.0115061 bus1=p5udt6876lv.1.2 bus2=p5udm19540.1.2 switch=n enabled=y phases=2 Linecode=1P_OH_AL_2/0_Rucina_0_416_0_2_2_2_2

New Line.l(r:p5udt7069lv-p5ulv14945) Units=km Length=0.023106 bus1=p5udt7069lv.1.2 bus2=p5ulv14945.1.2 switch=n enabled=y phases=2 Linecode=1P_OH_AL_2/0_Rucina_0_416_0_2_2_2_2

New Line.l(r:p5udt8729lv-p5ulv20154) Units=km Length=0.00873538 bus1=p5udt8729lv.1.2 bus2=p5ulv20154.1.2 switch=n enabled=y phases=2 Linecode=1P_OH_AL_2/0_Rucina_0_416_0_2_2_2_2

New Line.l(r:p5udt11689lv-p5ulv73202) Units=km Length=0.0613919 bus1=p5udt11689lv.1.2 bus2=p5ulv73202.1.2 switch=n enabled=y phases=2 Linecode=1P_OH_AL_4/0_Zuzara_0_416_0_2_2_2_2

New Line.l(r:p5udt11689lv-p5ulv73781) Units=km Length=0.0353118 bus1=p5udt11689lv.1.2 bus2=p5ulv73781.1.2 switch=n enabled=y phases=2 Linecode=1P_OH_AL_4/0_Zuzara_0_416_0_2_2_2_2

New Line.l(r:p5udm32909-p5ulv23453) Units=km Length=0.0129488 bus1=p5udm32909.1.2 bus2=p5ulv23453.1.2 switch=n enabled=y phases=2 Linecode=1P_OH_AL_2/0_Rucina_0_416_0_2_2_2_2

New Line.l(r:p5udm32909-p5udt11689lv) Units=km Length=0.0515155 bus1=p5udt11689lv.1.2 bus2=p5udm32909.1.2 switch=n enabled=y phases=2 Linecode=1P_OH_AL_4/0_Zuzara_0_416_0_2_2_2_2

New Line.l(r:p5udt12178lv-p5ulv24053) Units=km Length=0.0321515 bus1=p5udt12178lv.1.2 bus2=p5ulv24053.1.2 switch=n enabled=y phases=2 Linecode=1P_OH_AL_4/0_Zuzara_0_416_0_2_2_2_2

New Line.l(r:p5udt14298lv-p5ulv26816) Units=km Length=0.00827943 bus1=p5udt14298lv.1.2 bus2=p5ulv26816.1.2 switch=n enabled=y phases=2 Linecode=1P_OH_AL_2/0_Rucina_0_416_0_2_2_2_2

New Line.l(r:p5udt15150lv-p5ulv27981) Units=km Length=0.0456835 bus1=p5udt15150lv.1.2 bus2=p5ulv27981.1.2 switch=n enabled=y phases=2 Linecode=1P_OH_AL_4/0_Zuzara_0_416_0_2_2_2_2

New Line.l(r:p5udt20747lv-p5ulv37423) Units=km Length=0.0525353 bus1=p5udt20747lv.1.2 bus2=p5ulv37423.1.2 switch=n enabled=y phases=2 Linecode=1P_OH_AL_4/0_Zuzara_0_416_0_2_2_2_2

New Line.l(r:p5udt22043lv-p5ulv40147) Units=km Length=0.09419860000000001 bus1=p5udt22043lv.1.2 bus2=p5ulv40147.1.2 switch=n enabled=y phases=2 Linecode=1P_OH_AL_4/0_Zuzara_0_416_0_2_2_2_2

New Line.l(r:p5udt22325lv-p5ulv40725) Units=km Length=0.0371981 bus1=p5udt22325lv.1.2 bus2=p5ulv40725.1.2 switch=n enabled=y phases=2 Linecode=1P_OH_AL_4/0_Zuzara_0_416_0_2_2_2_2

New Line.l(r:p5udt24464lv-p5ulv45783) Units=km Length=0.05036720000000001 bus1=p5udt24464lv.1.2 bus2=p5ulv45783.1.2 switch=n enabled=y phases=2 Linecode=1P_OH_AL_4/0_Zuzara_0_416_0_2_2_2_2

New Line.l(r:p5udt25079lv-p5ulv47376) Units=km Length=0.0113975 bus1=p5udt25079lv.1.2 bus2=p5ulv47376.1.2 switch=n enabled=y phases=2 Linecode=1P_OH_AL_2/0_Rucina_0_416_0_2_2_2_2

New Line.l(r:p5udt25079lv-p5ulv60410) Units=km Length=0.0158889 bus1=p5udt25079lv.1.2 bus2=p5ulv60410.1.2 switch=n enabled=y phases=2 Linecode=1P_OH_AL_2/0_Rucina_0_416_0_2_2_2_2

New Line.l(r:p5udt25693lv-p5ulv49074) Units=km Length=0.00874448 bus1=p5udt25693lv.1.2 bus2=p5ulv49074.1.2 switch=n enabled=y phases=2 Linecode=1P_OH_AL_2/0_Rucina_0_416_0_2_2_2_2

New Line.l(r:p5udt25892lv-p5ulv49639) Units=km Length=0.0583033 bus1=p5udt25892lv.1.2 bus2=p5ulv49639.1.2 switch=n enabled=y phases=2 Linecode=1P_OH_AL_4/0_Zuzara_0_416_0_2_2_2_2

New Line.l(r:p5udt28498lv-p5ulv57542) Units=km Length=0.048998 bus1=p5udt28498lv.1.2 bus2=p5ulv57542.1.2 switch=n enabled=y phases=2 Linecode=1P_OH_AL_4/0_Zuzara_0_416_0_2_2_2_2

New Line.l(r:p5udt29001lv-p5ulv59239) Units=km Length=0.0415976 bus1=p5udt29001lv.1.2 bus2=p5ulv59239.1.2 switch=n enabled=y phases=2 Linecode=1P_OH_AL_4/0_Zuzara_0_416_0_2_2_2_2

New Line.l(r:p5udt30802lv-p5ulv65958) Units=km Length=0.00730837 bus1=p5udt30802lv.1.2 bus2=p5ulv65958.1.2 switch=n enabled=y phases=2 Linecode=1P_OH_AL_2/0_Rucina_0_416_0_2_2_2_2

New Line.l(r:p5udt32051lv-p5ulv71005) Units=km Length=0.0291636 bus1=p5udt32051lv.1.2 bus2=p5ulv71005.1.2 switch=n enabled=y phases=2 Linecode=1P_OH_AL_4/0_Zuzara_0_416_0_2_2_2_2

New Line.l(r:p5udt32052lv-p5ulv71006) Units=km Length=0.038671 bus1=p5udt32052lv.1.2 bus2=p5ulv71006.1.2 switch=n enabled=y phases=2 Linecode=1P_OH_AL_4/0_Zuzara_0_416_0_2_2_2_2

New Line.l(r:p5udt33350lv-p5ulv76537) Units=km Length=0.0305577 bus1=p5udt33350lv.1.2 bus2=p5ulv76537.1.2 switch=n enabled=y phases=2 Linecode=1P_OH_AL_4/0_Zuzara_0_416_0_2_2_2_2

New Line.l(r:p5udt33588lv-p5ulv77782) Units=km Length=0.0933116 bus1=p5udt33588lv.1.2 bus2=p5ulv77782.1.2 switch=n enabled=y phases=2 Linecode=1P_OH_AL_4/0_Zuzara_0_416_0_2_2_2_2

New Line.l(r:p5udt33609lv-p5ulv77913) Units=km Length=0.0510522 bus1=p5udt33609lv.1.2 bus2=p5ulv77913.1.2 switch=n enabled=y phases=2 Linecode=1P_OH_AL_4/0_Zuzara_0_416_0_2_2_2_2

New Line.l(r:p5udt29001-p5udt6609) Units=km Length=0.288988 bus1=p5udt29001.3 bus2=p5udt6609.3 switch=n enabled=y phases=1 Linecode=1P_OH_AL_ACSR_#2_Sparrow_12_47_0_1_1_1_1

New Line.l(r:p5udt33588-p5udt6876) Units=km Length=0.10219 bus1=p5udt33588.3 bus2=p5udt6876.3 switch=n enabled=y phases=1 Linecode=1P_OH_AL_ACSR_#2_Sparrow_12_47_0_1_1_1_1

New Line.l(r:p5udt32051-p5udt33588) Units=km Length=0.172434 bus1=p5udt32051.3 bus2=p5udt33588.3 switch=n enabled=y phases=1 Linecode=1P_OH_AL_ACSR_#2_Sparrow_12_47_0_1_1_1_1

New Line.l(r:p5udt29001-p5udt32051) Units=km Length=0.40769 bus1=p5udt29001.3 bus2=p5udt32051.3 switch=n enabled=y phases=1 Linecode=1P_OH_AL_ACSR_#2_Sparrow_12_47_0_1_1_1_1

New Line.l(r:p5udt11689-p5udt29001) Units=km Length=0.039829 bus1=p5udt11689.3 bus2=p5udt29001.3 switch=n enabled=y phases=1 Linecode=1P_OH_AL_ACSR_#2_Sparrow_12_47_0_1_1_1_1

New Line.l(r:p5udt11689-p5udt8729) Units=km Length=0.266655 bus1=p5udt8729.3 bus2=p5udt11689.3 switch=n enabled=y phases=1 Linecode=1P_OH_AL_ACSR_#2_Sparrow_12_47_0_1_1_1_1

New Line.l(r:p5udt1954-p5udt7069) Units=km Length=0.0809743 bus1=p5udt7069.3 bus2=p5udt1954.3 switch=n enabled=y phases=1 Linecode=1P_OH_AL_ACSR_#2_Sparrow_12_47_0_1_1_1_1

New Line.l(r:p5udt12178-p5udt7069) Units=km Length=0.297328 bus1=p5udt12178.3 bus2=p5udt7069.3 switch=n enabled=y phases=1 Linecode=1P_OH_AL_ACSR_#2_Sparrow_12_47_0_1_1_1_1

New Line.l(r:p5udt12178-p5udt8729) Units=km Length=0.319703 bus1=p5udt8729.3 bus2=p5udt12178.3 switch=n enabled=y phases=1 Linecode=1P_OH_AL_ACSR_#2_Sparrow_12_47_0_1_1_1_1

New Line.l(r:p5udt14298-p5udt8729) Units=km Length=0.0486216 bus1=p5udt14298.3 bus2=p5udt8729.3 switch=n enabled=y phases=1 Linecode=1P_OH_AL_ACSR_#2_Sparrow_12_47_0_1_1_1_1

New Line.l(r:p5udt14298-p5udt33350) Units=km Length=0.696381 bus1=p5udt33350.3 bus2=p5udt14298.3 switch=n enabled=y phases=1 Linecode=1P_OH_AL_ACSR_#2_Sparrow_12_47_0_1_1_1_1

New Line.l(r:p5udt22325-p5udt25892) Units=km Length=0.5795330000000001 bus1=p5udt22325.3 bus2=p5udt25892.3 switch=n enabled=y phases=1 Linecode=1P_OH_AL_ACSR_#2_Sparrow_12_47_0_1_1_1_1

New Line.l(r:p5udt24464-p5udt33609) Units=km Length=0.24723000000000003 bus1=p5udt24464.3 bus2=p5udt33609.3 switch=n enabled=y phases=1 Linecode=1P_OH_AL_ACSR_#2_Sparrow_12_47_0_1_1_1_1

New Line.l(r:p5udt24464-p5udt28498) Units=km Length=0.0499916 bus1=p5udt28498.3 bus2=p5udt24464.3 switch=n enabled=y phases=1 Linecode=1P_OH_AL_ACSR_#2_Sparrow_12_47_0_1_1_1_1

New Line.l(r:p5udt22325-p5udt28498) Units=km Length=0.397674 bus1=p5udt22325.3 bus2=p5udt28498.3 switch=n enabled=y phases=1 Linecode=1P_OH_AL_ACSR_#2_Sparrow_12_47_0_1_1_1_1

New Line.l(r:p5udt15150-p5udt22325) Units=km Length=0.259512 bus1=p5udt15150.3 bus2=p5udt22325.3 switch=n enabled=y phases=1 Linecode=1P_OH_AL_ACSR_#2_Sparrow_12_47_0_1_1_1_1

New Line.l(r:p5udt20747-p5udt25079) Units=km Length=0.108483 bus1=p5udt20747.3 bus2=p5udt25079.3 switch=n enabled=y phases=1 Linecode=1P_OH_AL_ACSR_#2_Sparrow_12_47_0_1_1_1_1

New Line.l(r:p5udt20747-p5udt32052) Units=km Length=0.264391 bus1=p5udt32052.3 bus2=p5udt20747.3 switch=n enabled=y phases=1 Linecode=1P_OH_AL_ACSR_#2_Sparrow_12_47_0_1_1_1_1

New Line.l(r:p5udt15150-p5udt32052) Units=km Length=0.076927 bus1=p5udt15150.3 bus2=p5udt32052.3 switch=n enabled=y phases=1 Linecode=1P_OH_AL_ACSR_#2_Sparrow_12_47_0_1_1_1_1

New Line.l(r:p5udt15150-p5udt33350) Units=km Length=0.571329 bus1=p5udt33350.3 bus2=p5udt15150.3 switch=n enabled=y phases=1 Linecode=1P_OH_AL_ACSR_#2_Sparrow_12_47_0_1_1_1_1

New Line.l(r:p5udt25074-p5udt33350) Units=km Length=0.0612262 bus1=p5udt25074-p5udt33350x.3 bus2=p5udt33350.3 switch=n enabled=y phases=1 Linecode=1P_OH_AL_ACSR_#2_Sparrow_12_47_0_1_1_1_1

New Line.l(r:p5udt30802-p5udt33349) Units=km Length=0.0147535 bus1=p5udt30802-p5udt33349x.2 bus2=p5udt30802.2 switch=n enabled=y phases=1 Linecode=1P_OH_AL_ACSR_#2_Sparrow_12_47_0_1_1_1_1

New Line.l(r:p5udt20444-p5udt22043) Units=km Length=0.07542500000000002 bus1=p5udt20444.1.2.3 bus2=p5udt22043.1.2.3 switch=n enabled=y phases=3 Linecode=3P_OH_AL_ACSR_4/0_Penguin_12_47_0_3_3_3_3

New Line.l(r:p5udt20444-p5udt26086) Units=km Length=0.123373 bus1=p5udt26086.1.2.3 bus2=p5udt20444.1.2.3 switch=n enabled=y phases=3 Linecode=3P_OH_AL_ACSR_4/0_Penguin_12_47_0_3_3_3_3

New Line.l(r:p5udt26086-p5udt29149) Units=km Length=0.0522552 bus1=p5udt29149.1.2.3 bus2=p5udt26086.1.2.3 switch=n enabled=y phases=3 Linecode=3P_OH_AL_ACSR_4/0_Penguin_12_47_0_3_3_3_3

New Line.l(r:p5udt26087-p5udt29149) Units=km Length=0.149875 bus1=p5udt26087.1.2.3 bus2=p5udt29149.1.2.3 switch=n enabled=y phases=3 Linecode=3P_OH_AL_ACSR_4/0_Penguin_12_47_0_3_3_3_3

New Line.l(r:p5udt25693-p5udt26087) Units=km Length=0.120135 bus1=p5udt25693.1.2.3 bus2=p5udt26087.1.2.3 switch=n enabled=y phases=3 Linecode=3P_OH_AL_ACSR_4/0_Penguin_12_47_0_3_3_3_3

New Line.l(r:p5udt11223-p5udt25693) Units=km Length=0.086025 bus1=p5udt11223.1.2.3 bus2=p5udt25693.1.2.3 switch=n enabled=y phases=3 Linecode=3P_OH_AL_ACSR_4/0_Penguin_12_47_0_3_3_3_3

New Line.l(r:p5udt11223-p5uhs25_1247) Units=km Length=0.264175 bus1=p5udt11223-p5uhs25_1247x.1.2.3 bus2=p5udt11223.1.2.3 switch=n enabled=y phases=3 Linecode=3P_OH_AL_ACSR_4/0_Penguin_12_47_0_3_3_3_3

New Line.l(r:p5udm31434-p5ulv22910) Units=km Length=0.0115621 bus1=p5udm31434.1.2.3 bus2=p5ulv22910.1.2.3 switch=n enabled=y phases=3 Linecode=3P_UG_AL_350kcmil_15_0_416_0_3_3_3_3

New Line.l(r:p5udm31435-p5ulv22911) Units=km Length=0.00900169 bus1=p5udm31435.1.2.3 bus2=p5ulv22911.1.2.3 switch=n enabled=y phases=3 Linecode=3P_UG_AL_350kcmil_15_0_416_0_3_3_3_3

New Line.l(r:p5udm31434-p5udm31435) Units=km Length=0.0168469 bus1=p5udm31434.1.2.3 bus2=p5udm31435.1.2.3 switch=n enabled=y phases=3 Linecode=3P_UG_AL_350kcmil_15_0_416_0_3_3_3_3

New Line.l(r:p5udm31434-p5udt11223lv) Units=km Length=0.0101673 bus1=p5udt11223lv.1.2.3 bus2=p5udm31434.1.2.3 switch=n enabled=y phases=3 Linecode=3P_UG_AL_750kcmil_25_0_416_0_3_3_3_3

New Line.l(r:p5udm31436-p5ulv24596) Units=km Length=0.0120741 bus1=p5udm31436.1.2.3 bus2=p5ulv24596.1.2.3 switch=n enabled=y phases=3 Linecode=3P_UG_AL_350kcmil_15_0_416_0_3_3_3_3

New Line.l(r:p5udm31436-p5udt11223lv) Units=km Length=0.0244854 bus1=p5udt11223lv.1.2.3 bus2=p5udm31436.1.2.3 switch=n enabled=y phases=3 Linecode=3P_UG_AL_350kcmil_15_0_416_0_3_3_3_3

New Line.l(r:p5udt26087lv-p5ulv50200) Units=km Length=0.00396676 bus1=p5udt26087lv.1.2.3 bus2=p5ulv50200.1.2.3 switch=n enabled=y phases=3 Linecode=3P_UG_AL_350kcmil_15_0_416_0_3_3_3_3

New Line.l(r:p5udt9248lv-p5ulv64323) Units=km Length=0.0125602 bus1=p5udt9248lv.1.2.3 bus2=p5ulv64323.1.2.3 switch=n enabled=y phases=3 Linecode=3P_UG_AL_350kcmil_15_0_416_0_3_3_3_3

New Line.l(r:p5udm25102-p5ulv20702) Units=km Length=0.009687370000000002 bus1=p5udm25102.1.2.3 bus2=p5ulv20702.1.2.3 switch=n enabled=y phases=3 Linecode=3P_UG_AL_750kcmil_25_0_416_0_3_3_3_3

New Line.l(r:p5udm25102-p5udt9248lv) Units=km Length=0.010855100000000001 bus1=p5udt9248lv.1.2.3 bus2=p5udm25102.1.2.3 switch=n enabled=y phases=3 Linecode=3P_UG_AL_750kcmil_25_0_416_0_3_3_3_3

New Line.l(r:p5udt19847lv-p5ulv35701) Units=km Length=0.007174200000000001 bus1=p5udt19847lv.1.2.3 bus2=p5ulv35701.1.2.3 switch=n enabled=y phases=3 Linecode=3P_UG_AL_350kcmil_15_0_416_0_3_3_3_3

New Line.l(r:p5udt17328lv-p5ulv31336) Units=km Length=0.0131714 bus1=p5udt17328lv.1.2.3 bus2=p5ulv31336.1.2.3 switch=n enabled=y phases=3 Linecode=3P_UG_AL_350kcmil_15_0_416_0_3_3_3_3

New Line.l(r:p5udt17328-p5udt19847) Units=km Length=0.0600049 bus1=p5udt19847.1.2.3 bus2=p5udt17328.1.2.3 switch=n enabled=y phases=3 Linecode=3P_OH_AL_ACSR_4/0_Penguin_12_47_0_3_3_3_3

New Line.l(r:p5udt19847-p5udt9248) Units=km Length=0.0819978 bus1=p5udt9248.1.2.3 bus2=p5udt19847.1.2.3 switch=n enabled=y phases=3 Linecode=3P_OH_AL_ACSR_4/0_Penguin_12_47_0_3_3_3_3

New Line.l(r:p5udt26087-p5udt9248) Units=km Length=0.122182 bus1=p5udt26087.1.2.3 bus2=p5udt9248.1.2.3 switch=n enabled=y phases=3 Linecode=3P_OH_AL_ACSR_4/0_Penguin_12_47_0_3_3_3_3

New Line.l(r:p5udt29149lv-p5ulv59817) Units=km Length=0.0124258 bus1=p5udt29149lv.1.2.3 bus2=p5ulv59817.1.2.3 switch=n enabled=y phases=3 Linecode=3P_UG_AL_750kcmil_25_0_416_0_3_3_3_3

New Line.l(r:p5udt26086lv-p5ulv50199) Units=km Length=0.0198606 bus1=p5udt26086lv.1.2.3 bus2=p5ulv50199.1.2.3 switch=n enabled=y phases=3 Linecode=3P_UG_AL_750kcmil_25_0_416_0_3_3_3_3

New Line.l(r:p5udt20444lv-p5ulv36847) Units=km Length=0.00770188 bus1=p5udt20444lv.1.2.3 bus2=p5ulv36847.1.2.3 switch=n enabled=y phases=3 Linecode=3P_UG_AL_750kcmil_25_0_416_0_3_3_3_3

New Line.l(r:p5udt28848lv-p5ulv58660) Units=km Length=0.0182439 bus1=p5udt28848lv.1.2.3 bus2=p5ulv58660.1.2.3 switch=n enabled=y phases=3 Linecode=3P_UG_AL_750kcmil_25_0_416_0_3_3_3_3

New Line.l(r:p5udt8723lv-p5ulv45773) Units=km Length=0.0100867 bus1=p5udt8723lv.1.2.3 bus2=p5ulv45773.1.2.3 switch=n enabled=y phases=3 Linecode=3P_UG_AL_350kcmil_15_0_416_0_3_3_3_3

New Line.l(r:p5udm23455-p5ulv20144) Units=km Length=0.00867858 bus1=p5udm23455.1.2.3 bus2=p5ulv20144.1.2.3 switch=n enabled=y phases=3 Linecode=3P_UG_AL_350kcmil_15_0_416_0_3_3_3_3

New Line.l(r:p5udm23455-p5udt8723lv) Units=km Length=0.0170188 bus1=p5udt8723lv.1.2.3 bus2=p5udm23455.1.2.3 switch=n enabled=y phases=3 Linecode=3P_UG_AL_350kcmil_15_0_416_0_3_3_3_3

New Line.l(r:p5udt25074lv-p5ulv47366) Units=km Length=0.0185051 bus1=p5udt25074lv.1.2.3 bus2=p5ulv47366.1.2.3 switch=n enabled=y phases=3 Linecode=3P_UG_AL_350kcmil_15_0_416_0_3_3_3_3

New Line.l(r:p5udt25074-p5udt8723) Units=km Length=0.123216 bus1=p5udt8723.1.2.3 bus2=p5udt25074.1.2.3 switch=n enabled=y phases=3 Linecode=3P_OH_AL_ACSR_4/0_Penguin_12_47_0_3_3_3_3

New Line.l(r:p5udt28848-p5udt8723) Units=km Length=0.068049 bus1=p5udt28848.1.2.3 bus2=p5udt8723.1.2.3 switch=n enabled=y phases=3 Linecode=3P_OH_AL_ACSR_4/0_Penguin_12_47_0_3_3_3_3

New Line.l(r:p5udt22043-p5udt28848) Units=km Length=0.08931860000000001 bus1=p5udt22043.1.2.3 bus2=p5udt28848.1.2.3 switch=n enabled=y phases=3 Linecode=3P_OH_AL_ACSR_4/0_Penguin_12_47_0_3_3_3_3

New Line.l(r:p5udt32050lv-p5ulv70997) Units=km Length=0.00782341 bus1=p5udt32050lv.1.2.3 bus2=p5ulv70997.1.2.3 switch=n enabled=y phases=3 Linecode=3P_UG_AL_750kcmil_25_0_416_0_3_3_3_3

New Line.l(r:p5udt22043-p5udt32050) Units=km Length=0.01952 bus1=p5udt22043.1.2.3 bus2=p5udt32050.1.2.3 switch=n enabled=y phases=3 Linecode=3P_OH_AL_ACSR_4/0_Penguin_12_47_0_3_3_3_3

New Line.l(r:p5udt31380lv-p5ulv68165) Units=km Length=0.00665925 bus1=p5udt31380lv.1.2.3 bus2=p5ulv68165.1.2.3 switch=n enabled=y phases=3 Linecode=3P_UG_AL_750kcmil_25_0_416_0_3_3_3_3

New Line.l(r:p5udm74956-p5ulv75459) Units=km Length=0.00662193 bus1=p5udm74956.1.2.3 bus2=p5ulv75459.1.2.3 switch=n enabled=y phases=3 Linecode=3P_UG_AL_750kcmil_25_0_416_0_3_3_3_3

New Line.l(r:p5udm74956-p5udt31380lv) Units=km Length=0.00427908 bus1=p5udt31380lv.1.2.3 bus2=p5udm74956.1.2.3 switch=n enabled=y phases=3 Linecode=3P_UG_AL_750kcmil_25_0_416_0_3_3_3_3

New Line.l(r:p5udt29149-p5udt31380) Units=km Length=0.0507353 bus1=p5udt29149.1.2.3 bus2=p5udt31380.1.2.3 switch=n enabled=y phases=3 Linecode=3P_OH_AL_ACSR_4/0_Penguin_12_47_0_3_3_3_3

New Line.l(r:p5udt27212lv-p5ulv53558) Units=km Length=0.0090824 bus1=p5udt27212lv.1.2.3 bus2=p5ulv53558.1.2.3 switch=n enabled=y phases=3 Linecode=3P_UG_AL_350kcmil_15_0_416_0_3_3_3_3

New Line.l(r:p5udt33349lv-p5ulv76536) Units=km Length=0.014598 bus1=p5udt33349lv.1.2.3 bus2=p5ulv76536.1.2.3 switch=n enabled=y phases=3 Linecode=3P_UG_AL_350kcmil_15_0_416_0_3_3_3_3

New Line.l(r:p5udt13497lv-p5ulv25736) Units=km Length=0.0114628 bus1=p5udt13497lv.1.2.3 bus2=p5ulv25736.1.2.3 switch=n enabled=y phases=3 Linecode=3P_UG_AL_350kcmil_15_0_416_0_3_3_3_3

New Line.l(r:p5udt13497-p5udt33349) Units=km Length=0.0222332 bus1=p5udt33349.1.2.3 bus2=p5udt13497.1.2.3 switch=n enabled=y phases=3 Linecode=3P_OH_AL_ACSR_4/0_Penguin_12_47_0_3_3_3_3

New Line.l(r:p5udt27212-p5udt33349) Units=km Length=0.0720551 bus1=p5udt27212.1.2.3 bus2=p5udt33349.1.2.3 switch=n enabled=y phases=3 Linecode=3P_OH_AL_ACSR_4/0_Penguin_12_47_0_3_3_3_3

New Line.l(r:p5udt11223-p5udt27212) Units=km Length=0.200456 bus1=p5udt11223.1.2.3 bus2=p5udt27212.1.2.3 switch=n enabled=y phases=3 Linecode=3P_OH_AL_ACSR_4/0_Penguin_12_47_0_3_3_3_3

New Line.fuse(r:p5udt25074-p5udt33350)p5u_154592 Units=km Length=0.001 bus1=p5udt25074.3 bus2=p5udt25074-p5udt33350x.3 switch=n enabled=y phases=1 Linecode=fuse_1_1_1_1

New Fuse.Fuse_fuse(r:p5udt25074-p5udt33350)p5u_154592 monitoredobj=Line.fuse(r:p5udt25074-p5udt33350)p5u_154592 enabled=y ratedcurrent=100.0

New Line.fuse(r:p5udt30802-p5udt33349)p5u_155481 Units=km Length=0.001 bus1=p5udt33349.2 bus2=p5udt30802-p5udt33349x.2 switch=n enabled=y phases=1 Linecode=fuse_1_7_1_1_1

New Fuse.Fuse_fuse(r:p5udt30802-p5udt33349)p5u_155481 monitoredobj=Line.fuse(r:p5udt30802-p5udt33349)p5u_155481 enabled=y ratedcurrent=100.0
