New Capacitor.p5uc121 Bus1=p5umv100 phases=3 Kv=12.47 conn=Wye Kvar=300.0

New CapControl.p5uc121 Capacitor=p5uc121 Element=Line.l(r:p5udt25882-p5umv100) Terminal=1 delay=100.0 Type=voltage Vmin=120.5 Vmax=125.0 Ptratio=59.99631547328862 Ctratio=100.0

New Capacitor.p5uc123 Bus1=p5udt30107 phases=3 Kv=12.47 conn=Wye Kvar=300.0

New CapControl.p5uc123 Capacitor=p5uc123 Element=Line.padswitch(r:p5udt13050-p5udt30107)p5u_143810 Terminal=1 delay=100.0 Type=voltage Vmin=120.5 Vmax=125.0 Ptratio=59.99631547328862 Ctratio=100.0

New Capacitor.p5uc125 Bus1=p5udt25073 phases=3 Kv=12.47 conn=Wye Kvar=300.0

New CapControl.p5uc125 Capacitor=p5uc125 Element=Line.padswitch(r:p5udt25073-p5udt25692)p5u_144008 Terminal=1 delay=100.0 Type=voltage Vmin=120.5 Vmax=125.0 Ptratio=59.99631547328862 Ctratio=100.0
