Clear

New Circuit.substation_p5uhs26_69 bus1=p5uhs26_69 pu=1.0 basekV=69.0 R1=1e-05 X1=1e-05 R0=1e-05 X0=1e-05

Redirect Transformers.dss
Redirect p5uhs26_1247--p5udt22654/Transformers.dss
Redirect p5uhs26_1247--p5udt12371/Transformers.dss
Redirect Regulators.dss
Redirect p5uhs26_1247--p5udt22654/Loads.dss
Redirect p5uhs26_1247--p5udt12371/Loads.dss
Redirect LineCodes.dss
Redirect p5uhs26_1247--p5udt22654/LineCodes.dss
Redirect p5uhs26_1247--p5udt12371/LineCodes.dss
Redirect Lines.dss
Redirect p5uhs26_1247--p5udt22654/Lines.dss
Redirect p5uhs26_1247--p5udt12371/Lines.dss
Redirect p5uhs26_1247--p5udt22654/Capacitors.dss
Redirect p5uhs26_1247--p5udt12371/Capacitors.dss

Set Voltagebases=[0.2080002494301389, 0.48, 7.199560000000001, 12.47, 69.0]

Calcvoltagebases

Buscoords Buscoords.dss

Solve
