New Capacitor.p5uc126 Bus1=p5udt24553 phases=3 Kv=12.47 conn=Wye Kvar=450.0

New CapControl.p5uc126 Capacitor=p5uc126 Element=Line.l(r:p5udt22401-p5udt24553) Terminal=1 delay=100.0 Type=voltage Vmin=120.5 Vmax=125.0 Ptratio=59.99631547328862 Ctratio=100.0

New Capacitor.p5uc127 Bus1=p5udt24758 phases=3 Kv=12.47 conn=Wye Kvar=450.0

New CapControl.p5uc127 Capacitor=p5uc127 Element=Line.padswitch(r:p5udt15327-p5udt24758)p5u_144377 Terminal=1 delay=100.0 Type=voltage Vmin=120.5 Vmax=125.0 Ptratio=59.99631547328862 Ctratio=100.0
