New Capacitor.p5uc128 Bus1=p5udt24093 phases=3 Kv=12.47 conn=Wye Kvar=450.0

New CapControl.p5uc128 Capacitor=p5uc128 Element=Line.l(r:p5udt23857-p5udt24093) Terminal=1 delay=100.0 Type=voltage Vmin=120.5 Vmax=125.0 Ptratio=59.99631547328862 Ctratio=100.0
