New Line.l(r:p5udt26583-p5uhs27_1247) Units=km Length=0.43551799999999996 bus1=p5udt26583-p5uhs27_1247x.1.2.3 bus2=p5udt26583-p5uhs27_1247x_b1_1.1.2.3 switch=n enabled=y phases=3 Linecode=3P_OH_AL_ACSR_1033kcmil_Curlew_12.47_1_3_3_3_3

New Line.l(r:p5udt10534-p5udt28762) Units=km Length=0.382602 bus1=p5udt10534.1.2.3 bus2=p5udt28762.1.2.3 switch=n enabled=y phases=3 Linecode=3P_OH_AL_ACSR_4/0_Penguin_12_47_0_3_3_3_3

New Line.l(r:p5udt16842-p5udt31318) Units=km Length=0.297461 bus1=p5udt16842.1.2.3 bus2=p5udt31318.1.2.3 switch=n enabled=y phases=3 Linecode=3P_OH_AL_ACSR_4/0_Penguin_12_47_0_3_3_3_3

New Line.l(r:p5udt16842-p5udt21681) Units=km Length=0.334567 bus1=p5udt21681.1.2.3 bus2=p5udt16842.1.2.3 switch=n enabled=y phases=3 Linecode=3P_OH_AL_ACSR_4/0_Penguin_12_47_0_3_3_3_3

New Line.l(r:p5udt21681-p5udt32266) Units=km Length=0.0503545 bus1=p5udt32266.1.2.3 bus2=p5udt21681.1.2.3 switch=n enabled=y phases=3 Linecode=3P_OH_AL_ACSR_4/0_Penguin_12_47_0_3_3_3_3

New Line.l(r:p5udt10534-p5udt32266) Units=km Length=0.0821487 bus1=p5udt10534.1.2.3 bus2=p5udt32266.1.2.3 switch=n enabled=y phases=3 Linecode=3P_OH_AL_ACSR_4/0_Penguin_12_47_0_3_3_3_3

New Line.l(r:p5udt10534-p5udt26583) Units=km Length=0.415779 bus1=p5udt26583.1.2.3 bus2=p5udt10534.1.2.3 switch=n enabled=y phases=3 Linecode=3P_OH_AL_ACSR_4/0_Penguin_12_47_0_3_3_3_3

New Line.l(r:p5udm68554-p5ulv57898) Units=km Length=0.00996055 bus1=p5udm68554.1.2.3 bus2=p5ulv57898.1.2.3 switch=n enabled=y phases=3 Linecode=3P_UG_AL_350kcmil_15_0_416_0_3_3_3_3

New Line.l(r:p5udm68553-p5ulv51695) Units=km Length=0.00953656 bus1=p5udm68553.1.2.3 bus2=p5ulv51695.1.2.3 switch=n enabled=y phases=3 Linecode=3P_UG_AL_350kcmil_15_0_416_0_3_3_3_3

New Line.l(r:p5udm68553-p5udm68554) Units=km Length=0.0156891 bus1=p5udm68554.1.2.3 bus2=p5udm68553.1.2.3 switch=n enabled=y phases=3 Linecode=3P_UG_AL_350kcmil_15_0_416_0_3_3_3_3

New Line.l(r:p5udm68554-p5udt26583lv) Units=km Length=0.0157188 bus1=p5udt26583lv.1.2.3 bus2=p5udm68554.1.2.3 switch=n enabled=y phases=3 Linecode=3P_UG_AL_750kcmil_25_0_416_0_3_3_3_3

New Line.l(r:p5udm68555-p5ulv60745) Units=km Length=0.0158624 bus1=p5udm68555.1.2.3 bus2=p5ulv60745.1.2.3 switch=n enabled=y phases=3 Linecode=3P_UG_AL_350kcmil_15_0_416_0_3_3_3_3

New Line.l(r:p5udm68555-p5udt26583lv) Units=km Length=0.0661647 bus1=p5udt26583lv.1.2.3 bus2=p5udm68555.1.2.3 switch=n enabled=y phases=3 Linecode=3P_UG_AL_350kcmil_15_0_416_0_3_3_3_3

New Line.l(r:p5udt10534lv-p5ulv22126) Units=km Length=0.00662861 bus1=p5udt10534lv.1.2.3 bus2=p5ulv22126.1.2.3 switch=n enabled=y phases=3 Linecode=3P_UG_AL_750kcmil_25_0_416_0_3_3_3_3

New Line.l(r:p5udt28762lv-p5ulv58434) Units=km Length=0.005280250000000001 bus1=p5udt28762lv.1.2.3 bus2=p5ulv58434.1.2.3 switch=n enabled=y phases=3 Linecode=3P_UG_AL_750kcmil_25_0_416_0_3_3_3_3

New Line.l(r:p5udt13340lv-p5ulv25535) Units=km Length=0.00674199 bus1=p5udt13340lv.1.2.3 bus2=p5ulv25535.1.2.3 switch=n enabled=y phases=3 Linecode=3P_UG_AL_750kcmil_25_0_416_0_3_3_3_3

New Line.l(r:p5udt13340-p5udt28762) Units=km Length=0.059683700000000006 bus1=p5udt28762.1.2.3 bus2=p5udt13340.1.2.3 switch=n enabled=y phases=3 Linecode=3P_OH_AL_ACSR_4/0_Penguin_12_47_0_3_3_3_3

New Line.l(r:p5udt32266lv-p5ulv71899) Units=km Length=0.00915635 bus1=p5udt32266lv.1.2.3 bus2=p5ulv71899.1.2.3 switch=n enabled=y phases=3 Linecode=3P_UG_AL_750kcmil_25_0_416_0_3_3_3_3

New Line.l(r:p5udt21681lv-p5ulv61866) Units=km Length=0.00420975 bus1=p5udt21681lv.1.2.3 bus2=p5ulv61866.1.2.3 switch=n enabled=y phases=3 Linecode=3P_UG_AL_750kcmil_25_0_416_0_3_3_3_3

New Line.l(r:p5udm59465-p5ulv39409) Units=km Length=0.00714992 bus1=p5udm59465.1.2.3 bus2=p5ulv39409.1.2.3 switch=n enabled=y phases=3 Linecode=3P_UG_AL_750kcmil_25_0_416_0_3_3_3_3

New Line.l(r:p5udm59465-p5udt21681lv) Units=km Length=0.0155206 bus1=p5udt21681lv.1.2.3 bus2=p5udm59465.1.2.3 switch=n enabled=y phases=3 Linecode=3P_UG_AL_750kcmil_25_0_416_0_3_3_3_3

New Line.l(r:p5udt16842lv-p5ulv30564) Units=km Length=0.01526 bus1=p5udt16842lv.1.2.3 bus2=p5ulv30564.1.2.3 switch=n enabled=y phases=3 Linecode=3P_UG_AL_750kcmil_25_0_416_0_3_3_3_3

New Line.l(r:p5udt16842lv-p5ulv34917) Units=km Length=0.006904980000000001 bus1=p5udt16842lv.1.2.3 bus2=p5ulv34917.1.2.3 switch=n enabled=y phases=3 Linecode=3P_UG_AL_750kcmil_25_0_416_0_3_3_3_3

New Line.l(r:p5udt31318lv-p5ulv67968) Units=km Length=0.00758711 bus1=p5udt31318lv.1.2.3 bus2=p5ulv67968.1.2.3 switch=n enabled=y phases=3 Linecode=3P_UG_AL_750kcmil_25_0_416_0_3_3_3_3

New Line.l(r:p5udt22954lv-p5ulv42190) Units=km Length=0.0116521 bus1=p5udt22954lv.1.2.3 bus2=p5ulv42190.1.2.3 switch=n enabled=y phases=3 Linecode=3P_UG_AL_750kcmil_25_0_416_0_3_3_3_3

New Line.l(r:p5udt14967lv-p5ulv27739) Units=km Length=0.0123253 bus1=p5udt14967lv.1.2.3 bus2=p5ulv27739.1.2.3 switch=n enabled=y phases=3 Linecode=3P_UG_AL_750kcmil_25_0_416_0_3_3_3_3

New Line.l(r:p5udt14967lv-p5ulv65750) Units=km Length=0.00444708 bus1=p5udt14967lv.1.2.3 bus2=p5ulv65750.1.2.3 switch=n enabled=y phases=3 Linecode=3P_UG_AL_750kcmil_25_0_416_0_3_3_3_3

New Line.l(r:p5udt14967-p5udt22954) Units=km Length=0.143672 bus1=p5udt22954.1.2.3 bus2=p5udt14967.1.2.3 switch=n enabled=y phases=3 Linecode=3P_OH_AL_ACSR_4/0_Penguin_12_47_0_3_3_3_3

New Line.l(r:p5udt22954-p5udt31318) Units=km Length=0.098114 bus1=p5udt31318.1.2.3 bus2=p5udt22954.1.2.3 switch=n enabled=y phases=3 Linecode=3P_OH_AL_ACSR_4/0_Penguin_12_47_0_3_3_3_3

New Line.l(r:p5udt17849lv-p5ulv32195) Units=km Length=0.0161617 bus1=p5udt17849lv.1.2.3 bus2=p5ulv32195.1.2.3 switch=n enabled=y phases=3 Linecode=3P_UG_AL_350kcmil_15_0_416_0_3_3_3_3

New Line.l(r:p5udt20326lv-p5ulv36654) Units=km Length=0.017962200000000005 bus1=p5udt20326lv.1.2.3 bus2=p5ulv36654.1.2.3 switch=n enabled=y phases=3 Linecode=3P_UG_AL_350kcmil_15_0_416_0_3_3_3_3

New Line.l(r:p5udt17849-p5udt20326) Units=km Length=0.022398800000000003 bus1=p5udt17849.1.2.3 bus2=p5udt20326.1.2.3 switch=n enabled=y phases=3 Linecode=3P_OH_AL_ACSR_4/0_Penguin_12_47_0_3_3_3_3

New Line.l(r:p5udt17849-p5udt26583) Units=km Length=0.111318 bus1=p5udt26583.1.2.3 bus2=p5udt17849.1.2.3 switch=n enabled=y phases=3 Linecode=3P_OH_AL_ACSR_4/0_Penguin_12_47_0_3_3_3_3

New Line.l(r:p5udt26786lv-p5ulv52288) Units=km Length=0.00985147 bus1=p5udt26786lv.1.2.3 bus2=p5ulv52288.1.2.3 switch=n enabled=y phases=3 Linecode=3P_UG_AL_350kcmil_15_0_416_0_3_3_3_3

New Line.l(r:p5udt16848lv-p5ulv30570) Units=km Length=0.00579327 bus1=p5udt16848lv.1.2.3 bus2=p5ulv30570.1.2.3 switch=n enabled=y phases=3 Linecode=3P_UG_AL_350kcmil_15_0_416_0_3_3_3_3

New Line.l(r:p5udt16848-p5udt26786) Units=km Length=0.0451355 bus1=p5udt26786.1.2.3 bus2=p5udt16848.1.2.3 switch=n enabled=y phases=3 Linecode=3P_OH_AL_ACSR_4/0_Penguin_12_47_0_3_3_3_3

New Line.l(r:p5udt26583-p5udt26786) Units=km Length=0.24931400000000004 bus1=p5udt26583.1.2.3 bus2=p5udt26786.1.2.3 switch=n enabled=y phases=3 Linecode=3P_OH_AL_ACSR_4/0_Penguin_12_47_0_3_3_3_3

New Line.l(r:p5udt26583-p5udt7978) Units=km Length=0.389384 bus1=p5udt26583-p5udt7978x.1.2.3 bus2=p5udt7978.1.2.3 switch=n enabled=y phases=3 Linecode=3P_OH_AL_ACSR_1033kcmil_Curlew_12.47_1_3_3_3_3

New Line.l(r:p5udt16848-p5udt28763) Units=km Length=0.114709 bus1=p5udt16848-p5udt28763x.1.2.3 bus2=p5udt16848-p5udt28763x_b1_1.1.2.3 switch=n enabled=y phases=3 Linecode=3P_OH_AL_ACSR_1033kcmil_Curlew_12.47_1_3_3_3_3

New Line.elbswitch(r:p5udt26583-p5udt7978)p5u_151214 Units=km Length=0.001 bus1=p5udt26583.1.2.3 bus2=p5udt26583-p5udt7978x.1.2.3 switch=y enabled=n phases=3 Linecode=elbswitch_3_3_3_3

New Line.elbswitch(r:p5udt16848-p5udt28763)p5u_151360 Units=km Length=0.001 bus1=p5udt16848.1.2.3 bus2=p5udt16848-p5udt28763x.1.2.3 switch=y enabled=n phases=3 Linecode=elbswitch_3_3_3_3

New Line.l(r:p5udt26583-p5uhs27_1247)_disconnect Units=km Length=0.001 bus1=p5udt26583-p5uhs27_1247x_b1_1.1.2.3 bus2=p5udt26583-p5uhs27_1247x_b2_1.1.2.3 switch=y enabled=y phases=3 Linecode=3P_OH_AL_ACSR_1033kcmil_Curlew_12.47_1_3_3_3_3

New Line.l(r:p5udt26583-p5uhs27_1247)_cont Units=km Length=3.9286619999999997 bus1=p5udt26583-p5uhs27_1247x_b2_1.1.2.3 bus2=p5udt26583.1.2.3 switch=n enabled=y phases=3 Linecode=3P_OH_AL_ACSR_1033kcmil_Curlew_12.47_1_3_3_3_3

New Line.l(r:p5udt16848-p5udt28763)_disconnect Units=km Length=0.001 bus1=p5udt16848-p5udt28763x_b1_1.1.2.3 bus2=p5udt16848-p5udt28763x_b2_1.1.2.3 switch=y enabled=y phases=3 Linecode=3P_OH_AL_ACSR_1033kcmil_Curlew_12.47_1_3_3_3_3

New Line.l(r:p5udt16848-p5udt28763)_cont Units=km Length=1.041381 bus1=p5udt16848-p5udt28763x_b2_1.1.2.3 bus2=p5udt28763.1.2.3 switch=n enabled=y phases=3 Linecode=3P_OH_AL_ACSR_1033kcmil_Curlew_12.47_1_3_3_3_3
