New Load.load_p5ulv22126 conn=wye bus1=p5ulv22126.1.2.3 kV=0.48 Vminpu=0.8 Vmaxpu=1.2 model=1 kW=352.104 kvar=71.49776664387545 Phases=3

New Load.load_p5ulv25535 conn=wye bus1=p5ulv25535.1.2.3 kV=0.48 Vminpu=0.8 Vmaxpu=1.2 model=1 kW=374.05400000000003 kvar=75.95490424479183 Phases=3

New Load.load_p5ulv27739 conn=wye bus1=p5ulv27739.1.2.3 kV=0.48 Vminpu=0.8 Vmaxpu=1.2 model=1 kW=193.192 kvar=39.22930876520456 Phases=3

New Load.load_p5ulv30564 conn=wye bus1=p5ulv30564.1.2.3 kV=0.48 Vminpu=0.8 Vmaxpu=1.2 model=1 kW=89.84089999999999 kvar=18.242972824153515 Phases=3

New Load.load_p5ulv30570 conn=wye bus1=p5ulv30570.1.2.3 kV=0.48 Vminpu=0.8 Vmaxpu=1.2 model=1 kW=54.7805 kvar=11.123654958861072 Phases=3

New Load.load_p5ulv32195 conn=wye bus1=p5ulv32195.1.2.3 kV=0.48 Vminpu=0.8 Vmaxpu=1.2 model=1 kW=41.8804 kvar=8.504177930816354 Phases=3

New Load.load_p5ulv34917 conn=wye bus1=p5ulv34917.1.2.3 kV=0.48 Vminpu=0.8 Vmaxpu=1.2 model=1 kW=186.58199999999997 kvar=37.887091018413784 Phases=3

New Load.load_p5ulv36654 conn=wye bus1=p5ulv36654.1.2.3 kV=0.48 Vminpu=0.8 Vmaxpu=1.2 model=1 kW=49.8405 kvar=10.120545175329092 Phases=3

New Load.load_p5ulv39409 conn=wye bus1=p5ulv39409.1.2.3 kV=0.48 Vminpu=0.8 Vmaxpu=1.2 model=1 kW=238.752 kvar=48.48066134368979 Phases=3

New Load.load_p5ulv42190 conn=wye bus1=p5ulv42190.1.2.3 kV=0.48 Vminpu=0.8 Vmaxpu=1.2 model=1 kW=88.2209 kvar=17.914017793926433 Phases=3

New Load.load_p5ulv51695 conn=wye bus1=p5ulv51695.1.2.3 kV=0.48 Vminpu=0.8 Vmaxpu=1.2 model=1 kW=52.2105 kvar=10.60179420103168 Phases=3

New Load.load_p5ulv52288 conn=wye bus1=p5ulv52288.1.2.3 kV=0.48 Vminpu=0.8 Vmaxpu=1.2 model=1 kW=55.68059999999999 kvar=11.306428059297737 Phases=3

New Load.load_p5ulv57898 conn=wye bus1=p5ulv57898.1.2.3 kV=0.48 Vminpu=0.8 Vmaxpu=1.2 model=1 kW=37.23040000000001 kvar=7.5599551588682345 Phases=3

New Load.load_p5ulv58434 conn=wye bus1=p5ulv58434.1.2.3 kV=0.48 Vminpu=0.8 Vmaxpu=1.2 model=1 kW=367.61400000000003 kvar=74.64720647030886 Phases=3

New Load.load_p5ulv60745 conn=wye bus1=p5ulv60745.1.2.3 kV=0.48 Vminpu=0.8 Vmaxpu=1.2 model=1 kW=42.9204 kvar=8.715358937875717 Phases=3

New Load.load_p5ulv61866 conn=wye bus1=p5ulv61866.1.2.3 kV=0.48 Vminpu=0.8 Vmaxpu=1.2 model=1 kW=145.241 kvar=29.492442929143426 Phases=3

New Load.load_p5ulv65750 conn=wye bus1=p5ulv65750.1.2.3 kV=0.48 Vminpu=0.8 Vmaxpu=1.2 model=1 kW=184.642 kvar=37.49315721678383 Phases=3

New Load.load_p5ulv67968 conn=wye bus1=p5ulv67968.1.2.3 kV=0.48 Vminpu=0.8 Vmaxpu=1.2 model=1 kW=84.21080000000002 kvar=17.09973225891801 Phases=3

New Load.load_p5ulv71899 conn=wye bus1=p5ulv71899.1.2.3 kV=0.48 Vminpu=0.8 Vmaxpu=1.2 model=1 kW=127.001 kvar=25.788652959179178 Phases=3
