Clear

New Circuit.substation_p5uhs28_69 bus1=p5uhs28_69 pu=1.0 basekV=69.0 R1=1e-05 X1=1e-05 R0=1e-05 X0=1e-05

Redirect Transformers.dss
Redirect p5uhs28_1247--p5udt31165/Transformers.dss
Redirect p5uhs28_1247--p5udt9102/Transformers.dss
Redirect p5uhs28_1247--p5udt12928/Transformers.dss
Redirect p5uhs28_1247--p5udt30878/Transformers.dss
Redirect Regulators.dss
Redirect p5uhs28_1247--p5udt31165/Loads.dss
Redirect p5uhs28_1247--p5udt12928/Loads.dss
Redirect p5uhs28_1247--p5udt30878/Loads.dss
Redirect p5uhs28_1247--p5udt9102/Loads.dss
Redirect LineCodes.dss
Redirect p5uhs28_1247--p5udt31165/LineCodes.dss
Redirect p5uhs28_1247--p5udt9102/LineCodes.dss
Redirect p5uhs28_1247--p5udt12928/LineCodes.dss
Redirect p5uhs28_1247--p5udt30878/LineCodes.dss
Redirect Lines.dss
Redirect p5uhs28_1247--p5udt31165/Lines.dss
Redirect p5uhs28_1247--p5udt9102/Lines.dss
Redirect p5uhs28_1247--p5udt12928/Lines.dss
Redirect p5uhs28_1247--p5udt30878/Lines.dss
Redirect p5uhs28_1247--p5udt9102/Capacitors.dss
Redirect p5uhs28_1247--p5udt12928/Capacitors.dss

Set Voltagebases=[0.2080002494301389, 0.48, 7.199560000000001, 12.47, 69.0]

Calcvoltagebases

Buscoords Buscoords.dss

Solve
