New Capacitor.p5uc144 Bus1=p5udt19930 phases=3 Kv=12.47 conn=Wye Kvar=600.0

New CapControl.p5uc144 Capacitor=p5uc144 Element=Line.l(r:p5udt19930-p5udt28212) Terminal=1 delay=100.0 Type=voltage Vmin=120.5 Vmax=125.0 Ptratio=59.99631547328862 Ctratio=100.0

New Capacitor.p5uc145 Bus1=p5udt22141 phases=3 Kv=12.47 conn=Wye Kvar=600.0

New CapControl.p5uc145 Capacitor=p5uc145 Element=Line.l(r:p5udt22141-p5udt22896) Terminal=1 delay=100.0 Type=voltage Vmin=120.5 Vmax=125.0 Ptratio=59.99631547328862 Ctratio=100.0

New Capacitor.p5uc146 Bus1=p5udt27286 phases=3 Kv=12.47 conn=Wye Kvar=450.0

New CapControl.p5uc146 Capacitor=p5uc146 Element=Line.l(r:p5udt27286-p5udt30418) Terminal=1 delay=100.0 Type=voltage Vmin=120.5 Vmax=125.0 Ptratio=59.99631547328862 Ctratio=100.0
