New Line.l(r:p5udt2479lv-p5ulv3070) Units=km Length=0.012297 bus1=p5udt2479lv.1.2 bus2=p5ulv3070.1.2 switch=n enabled=y phases=2 Linecode=1P_OH_AL_2/0_Rucina_0_416_0_2_2_2_2

New Line.l(r:p5udm8917-p5ulv77549) Units=km Length=0.0119878 bus1=p5udm8917.1.2 bus2=p5ulv77549.1.2 switch=n enabled=y phases=2 Linecode=1P_OH_AL_2/0_Rucina_0_416_0_2_2_2_2

New Line.l(r:p5udm8917-p5udt2479lv) Units=km Length=0.0173382 bus1=p5udt2479lv.1.2 bus2=p5udm8917.1.2 switch=n enabled=y phases=2 Linecode=1P_OH_AL_2/0_Rucina_0_416_0_2_2_2_2

New Line.l(r:p5udm8918-p5ulv77550) Units=km Length=0.0127092 bus1=p5udm8918.1.2 bus2=p5ulv77550.1.2 switch=n enabled=y phases=2 Linecode=1P_OH_AL_2/0_Rucina_0_416_0_2_2_2_2

New Line.l(r:p5udm8918-p5udt2479lv) Units=km Length=0.0346829 bus1=p5udt2479lv.1.2 bus2=p5udm8918.1.2 switch=n enabled=y phases=2 Linecode=1P_OH_AL_4/0_Zuzara_0_416_0_2_2_2_2

New Line.l(r:p5udt6305lv-p5ulv11851) Units=km Length=0.0064895 bus1=p5udt6305lv.1.2 bus2=p5ulv11851.1.2 switch=n enabled=y phases=2 Linecode=1P_OH_AL_2/0_Rucina_0_416_0_2_2_2_2

New Line.l(r:p5udt6957lv-p5ulv14419) Units=km Length=0.00315514 bus1=p5udt6957lv.1.2 bus2=p5ulv14419.1.2 switch=n enabled=y phases=2 Linecode=1P_OH_AL_4_Periwinkle_0_416_0_2_2_2_2

New Line.l(r:p5udm19668-p5ulv14420) Units=km Length=0.0032112300000000002 bus1=p5udm19668.1.2 bus2=p5ulv14420.1.2 switch=n enabled=y phases=2 Linecode=1P_OH_AL_4_Periwinkle_0_416_0_2_2_2_2

New Line.l(r:p5udm19668-p5udt6957lv) Units=km Length=0.0175187 bus1=p5udt6957lv.1.2 bus2=p5udm19668.1.2 switch=n enabled=y phases=2 Linecode=1P_OH_AL_2/0_Rucina_0_416_0_2_2_2_2

New Line.l(r:p5udm19669-p5ulv77408) Units=km Length=0.00591156 bus1=p5udm19669.1.2 bus2=p5ulv77408.1.2 switch=n enabled=y phases=2 Linecode=1P_OH_AL_2/0_Rucina_0_416_0_2_2_2_2

New Line.l(r:p5udm19669-p5udt6957lv) Units=km Length=0.0175187 bus1=p5udt6957lv.1.2 bus2=p5udm19669.1.2 switch=n enabled=y phases=2 Linecode=1P_OH_AL_2/0_Rucina_0_416_0_2_2_2_2

New Line.l(r:p5udm77261-p5ulv77410) Units=km Length=0.0133028 bus1=p5udm77261.1.2 bus2=p5ulv77410.1.2 switch=n enabled=y phases=2 Linecode=1P_OH_AL_2/0_Rucina_0_416_0_2_2_2_2

New Line.l(r:p5udm77260-p5ulv77407) Units=km Length=0.0104454 bus1=p5udm77260.1.2 bus2=p5ulv77407.1.2 switch=n enabled=y phases=2 Linecode=1P_OH_AL_2/0_Rucina_0_416_0_2_2_2_2

New Line.l(r:p5udm77260-p5udm77261) Units=km Length=0.0171556 bus1=p5udm77261.1.2 bus2=p5udm77260.1.2 switch=n enabled=y phases=2 Linecode=1P_OH_AL_2/0_Rucina_0_416_0_2_2_2_2

New Line.l(r:p5udm77261-p5udt33535lv) Units=km Length=0.0171622 bus1=p5udt33535lv.1.2 bus2=p5udm77261.1.2 switch=n enabled=y phases=2 Linecode=1P_OH_AL_2/0_Rucina_0_416_0_2_2_2_2

New Line.l(r:p5udm77262-p5ulv77411) Units=km Length=0.010553400000000001 bus1=p5udm77262.1.2 bus2=p5ulv77411.1.2 switch=n enabled=y phases=2 Linecode=1P_UG_AL_4/0_Sweetbriar_0_416_0_2_2_2_2

New Line.l(r:p5udm77262-p5ulv77441) Units=km Length=0.013194 bus1=p5udm77262.1.2 bus2=p5ulv77441.1.2 switch=n enabled=y phases=2 Linecode=1P_UG_AL_1/0_Brenau_0_416_0_2_2_2_2

New Line.l(r:p5udm77262-p5udt33535lv) Units=km Length=0.039185 bus1=p5udt33535lv.1.2 bus2=p5udm77262.1.2 switch=n enabled=y phases=2 Linecode=1P_OH_AL_4/0_Zuzara_0_416_0_2_2_2_2

New Line.l(r:p5udt33536lv-p5ulv77414) Units=km Length=0.012957 bus1=p5udt33536lv.1.2 bus2=p5ulv77414.1.2 switch=n enabled=y phases=2 Linecode=1P_OH_AL_2/0_Rucina_0_416_0_2_2_2_2

New Line.l(r:p5udm77264-p5ulv77412) Units=km Length=0.0130072 bus1=p5udm77264.1.2 bus2=p5ulv77412.1.2 switch=n enabled=y phases=2 Linecode=1P_OH_AL_2/0_Rucina_0_416_0_2_2_2_2

New Line.l(r:p5udm77264-p5udt33536lv) Units=km Length=0.016602000000000002 bus1=p5udt33536lv.1.2 bus2=p5udm77264.1.2 switch=n enabled=y phases=2 Linecode=1P_OH_AL_2/0_Rucina_0_416_0_2_2_2_2

New Line.l(r:p5udm77266-p5ulv77551) Units=km Length=0.0123182 bus1=p5udm77266.1.2 bus2=p5ulv77551.1.2 switch=n enabled=y phases=2 Linecode=1P_OH_AL_2/0_Rucina_0_416_0_2_2_2_2

New Line.l(r:p5udm77266-p5udt33536lv) Units=km Length=0.0331944 bus1=p5udt33536lv.1.2 bus2=p5udm77266.1.2 switch=n enabled=y phases=2 Linecode=1P_OH_AL_4/0_Zuzara_0_416_0_2_2_2_2

New Line.l(r:p5udt33546lv-p5ulv77435) Units=km Length=0.004146950000000001 bus1=p5udt33546lv.1.2 bus2=p5ulv77435.1.2 switch=n enabled=y phases=2 Linecode=1P_OH_AL_2/0_Rucina_0_416_0_2_2_2_2

New Line.l(r:p5udt33547lv-p5ulv77437) Units=km Length=0.0152227 bus1=p5udt33547lv.1.2 bus2=p5ulv77437.1.2 switch=n enabled=y phases=2 Linecode=1P_UG_AL_2/0_Converse_0_416_0_2_2_2_2

New Line.l(r:p5udt33548lv-p5ulv77438) Units=km Length=0.00298211 bus1=p5udt33548lv.1.2 bus2=p5ulv77438.1.2 switch=n enabled=y phases=2 Linecode=1P_OH_AL_4_Periwinkle_0_416_0_2_2_2_2

New Line.l(r:p5udt33550lv-p5ulv77444) Units=km Length=0.0141699 bus1=p5udt33550lv.1.2 bus2=p5ulv77444.1.2 switch=n enabled=y phases=2 Linecode=1P_UG_AL_1/0_Brenau_0_416_0_2_2_2_2

New Line.l(r:p5udt33551lv-p5ulv77445) Units=km Length=0.00768647 bus1=p5udt33551lv.1.2 bus2=p5ulv77445.1.2 switch=n enabled=y phases=2 Linecode=1P_OH_AL_2/0_Rucina_0_416_0_2_2_2_2

New Line.l(r:p5udt2479-p5udt2480) Units=km Length=0.0946806 bus1=p5udt2479-p5udt2480x.2 bus2=p5udt2479.2 switch=n enabled=y phases=1 Linecode=1P_OH_AL_ACSR_#2_Sparrow_12_47_0_1_1_1_1

New Line.l(r:p5udt33550-p5udt643) Units=km Length=0.008694720000000001 bus1=p5udt33550-p5udt643xx.3 bus2=p5udt33550-p5udt643x.3 switch=n enabled=y phases=1 Linecode=1P_UG_AL_#2_15_12_47_0_1_1_1_1

New Line.l(r:p5udt1090-p5udt33551) Units=km Length=0.0171879 bus1=p5udt1090-p5udt33551x.1 bus2=p5udt33551.1 switch=n enabled=y phases=1 Linecode=1P_OH_AL_ACSR_#2_Sparrow_12_47_0_1_1_1_1

New Line.l(r:p5udt2949-p5umv110) Units=km Length=0.159157 bus1=p5udt2949.1.2.3 bus2=p5umv110.1.2.3 switch=n enabled=y phases=3 Linecode=3P_OH_AL_ACSR_336kcmil_Merlin_12_47_0_3_3_3_3

New Line.l(r:p5udt2949-p5udt33547) Units=km Length=0.0437725 bus1=p5udt33547.1.2.3 bus2=p5udt2949.1.2.3 switch=n enabled=y phases=3 Linecode=3P_OH_AL_ACSR_336kcmil_Merlin_12_47_0_3_3_3_3

New Line.l(r:p5udt33547-p5udt6958) Units=km Length=0.0996913 bus1=p5udt6958.1.2.3 bus2=p5udt33547.1.2.3 switch=n enabled=y phases=3 Linecode=3P_OH_AL_ACSR_336kcmil_Merlin_12_47_0_3_3_3_3

New Line.l(r:p5udt6957-p5udt6958) Units=km Length=0.0525465 bus1=p5udt6957.1.2.3 bus2=p5udt6958.1.2.3 switch=n enabled=y phases=3 Linecode=3P_OH_AL_ACSR_336kcmil_Merlin_12_47_0_3_3_3_3

New Line.l(r:p5udt6305-p5udt6957) Units=km Length=0.0175187 bus1=p5udt6305.1.2.3 bus2=p5udt6957.1.2.3 switch=n enabled=y phases=3 Linecode=3P_OH_AL_ACSR_336kcmil_Merlin_12_47_0_3_3_3_3

New Line.l(r:p5udt33537-p5udt6305) Units=km Length=0.0567499 bus1=p5udt33537.1.2.3 bus2=p5udt6305.1.2.3 switch=n enabled=y phases=3 Linecode=3P_OH_AL_ACSR_336kcmil_Merlin_12_47_0_3_3_3_3

New Line.l(r:p5udt33537-p5udt7456) Units=km Length=0.0307207 bus1=p5udt7456.1.2.3 bus2=p5udt33537.1.2.3 switch=n enabled=y phases=3 Linecode=3P_OH_AL_ACSR_336kcmil_Merlin_12_47_0_3_3_3_3

New Line.l(r:p5udt33536-p5udt7456) Units=km Length=0.0360845 bus1=p5udt33536.1.2.3 bus2=p5udt7456.1.2.3 switch=n enabled=y phases=3 Linecode=3P_OH_AL_ACSR_336kcmil_Merlin_12_47_0_3_3_3_3

New Line.l(r:p5udt2480-p5udt33536) Units=km Length=0.101702 bus1=p5udt2480.1.2.3 bus2=p5udt33536.1.2.3 switch=n enabled=y phases=3 Linecode=3P_OH_AL_ACSR_336kcmil_Merlin_12_47_0_3_3_3_3

New Line.l(r:p5udt2480-p5uhs3_1247) Units=km Length=0.0288325 bus1=p5udt2480-p5uhs3_1247x.1.2.3 bus2=p5udt2480.1.2.3 switch=n enabled=y phases=3 Linecode=3P_OH_AL_ACSR_336kcmil_Merlin_12_47_0_3_3_3_3

New Line.l(r:p5udt33535-p5udt643) Units=km Length=0.09634700000000002 bus1=p5udt33535.1.2.3 bus2=p5udt643.1.2.3 switch=n enabled=y phases=3 Linecode=3P_OH_AL_ACSR_4/0_Penguin_12_47_0_3_3_3_3

New Line.l(r:p5udt33535-p5udt7456) Units=km Length=0.0918137 bus1=p5udt7456.1.2.3 bus2=p5udt33535.1.2.3 switch=n enabled=y phases=3 Linecode=3P_OH_AL_ACSR_4/0_Penguin_12_47_0_3_3_3_3

New Line.l(r:p5udt1091-p5umv6) Units=km Length=0.0590722 bus1=p5umv6.1.2.3 bus2=p5udt1091.1.2.3 switch=n enabled=y phases=3 Linecode=3P_OH_AL_ACSR_4/0_Penguin_12_47_0_3_3_3_3

New Line.l(r:p5udt33548-p5umv6) Units=km Length=0.0262063 bus1=p5udt33548.1.2.3 bus2=p5umv6.1.2.3 switch=n enabled=y phases=3 Linecode=3P_OH_AL_ACSR_4/0_Penguin_12_47_0_3_3_3_3

New Line.l(r:p5udt33548-p5umv106) Units=km Length=0.0407521 bus1=p5umv106.1.2.3 bus2=p5udt33548.1.2.3 switch=n enabled=y phases=3 Linecode=3P_OH_AL_ACSR_4/0_Penguin_12_47_0_3_3_3_3

New Line.l(r:p5udt7416-p5umv106) Units=km Length=0.00561834 bus1=p5udt7416.1.2.3 bus2=p5umv106.1.2.3 switch=n enabled=y phases=3 Linecode=3P_OH_AL_ACSR_4/0_Penguin_12_47_0_3_3_3_3

New Line.l(r:p5udt7416-p5umv55) Units=km Length=0.021904400000000004 bus1=p5umv55.1.2.3 bus2=p5udt7416.1.2.3 switch=n enabled=y phases=3 Linecode=3P_OH_AL_ACSR_4/0_Penguin_12_47_0_3_3_3_3

New Line.l(r:p5umv110-p5umv55) Units=km Length=0.0443817 bus1=p5umv110.1.2.3 bus2=p5umv55.1.2.3 switch=n enabled=y phases=3 Linecode=3P_OH_AL_ACSR_4/0_Penguin_12_47_0_3_3_3_3

New Line.l(r:p5udt2480lv-p5ulv3072) Units=km Length=0.00742879 bus1=p5udt2480lv.1.2.3 bus2=p5ulv3072.1.2.3 switch=n enabled=y phases=3 Linecode=3P_UG_AL_350kcmil_15_0_416_0_3_3_3_3

New Line.l(r:p5udm8919-p5ulv3071) Units=km Length=0.0120906 bus1=p5udm8919.1.2.3 bus2=p5ulv3071.1.2.3 switch=n enabled=y phases=3 Linecode=3P_UG_AL_350kcmil_15_0_416_0_3_3_3_3

New Line.l(r:p5udm8919-p5udt2480lv) Units=km Length=0.0599977 bus1=p5udt2480lv.1.2.3 bus2=p5udm8919.1.2.3 switch=n enabled=y phases=3 Linecode=3P_UG_AL_350kcmil_15_0_416_0_3_3_3_3

New Line.l(r:p5udm8922-p5ulv16792) Units=km Length=0.00220735 bus1=p5udm8922.1.2.3 bus2=p5ulv16792.1.2.3 switch=n enabled=y phases=3 Linecode=3P_UG_AL_350kcmil_15_0_416_0_3_3_3_3

New Line.l(r:p5udm8921-p5ulv15714) Units=km Length=0.00326451 bus1=p5udm8921.1.2.3 bus2=p5ulv15714.1.2.3 switch=n enabled=y phases=3 Linecode=3P_UG_AL_350kcmil_15_0_416_0_3_3_3_3

New Line.l(r:p5udm8921-p5udm8922) Units=km Length=0.0185647 bus1=p5udm8922.1.2.3 bus2=p5udm8921.1.2.3 switch=n enabled=y phases=3 Linecode=3P_UG_AL_350kcmil_15_0_416_0_3_3_3_3

New Line.l(r:p5udm8922-p5udt2480lv) Units=km Length=0.018215100000000005 bus1=p5udt2480lv.1.2.3 bus2=p5udm8922.1.2.3 switch=n enabled=y phases=3 Linecode=3P_UG_AL_750kcmil_25_0_416_0_3_3_3_3

New Line.l(r:p5udt7456lv-p5ulv16796) Units=km Length=0.013367100000000002 bus1=p5udt7456lv.1.2.3 bus2=p5ulv16796.1.2.3 switch=n enabled=y phases=3 Linecode=3P_UG_AL_350kcmil_15_0_416_0_3_3_3_3

New Line.l(r:p5udt643lv-p5ulv686) Units=km Length=0.0154598 bus1=p5udt643lv.1.2.3 bus2=p5ulv686.1.2.3 switch=n enabled=y phases=3 Linecode=3P_UG_AL_350kcmil_15_0_416_0_3_3_3_3

New Line.l(r:p5udt6757lv-p5ulv13547) Units=km Length=0.00327452 bus1=p5udt6757lv.1.2.3 bus2=p5ulv13547.1.2.3 switch=n enabled=y phases=3 Linecode=3P_UG_AL_350kcmil_15_0_416_0_3_3_3_3

New Line.l(r:p5udm19353-p5ulv13548) Units=km Length=0.00296446 bus1=p5udm19353.1.2.3 bus2=p5ulv13548.1.2.3 switch=n enabled=y phases=3 Linecode=3P_UG_AL_750kcmil_25_0_416_0_3_3_3_3

New Line.l(r:p5udm19353-p5udt6757lv) Units=km Length=0.0168042 bus1=p5udt6757lv.1.2.3 bus2=p5udm19353.1.2.3 switch=n enabled=y phases=3 Linecode=3P_UG_AL_750kcmil_25_0_416_0_3_3_3_3

New Line.l(r:p5udm19354-p5ulv13549) Units=km Length=0.00393309 bus1=p5udm19354.1.2.3 bus2=p5ulv13549.1.2.3 switch=n enabled=y phases=3 Linecode=3P_UG_AL_350kcmil_15_0_416_0_3_3_3_3

New Line.l(r:p5udm19354-p5udt6757lv) Units=km Length=0.0168167 bus1=p5udt6757lv.1.2.3 bus2=p5udm19354.1.2.3 switch=n enabled=y phases=3 Linecode=3P_UG_AL_350kcmil_15_0_416_0_3_3_3_3

New Line.l(r:p5udt6757-p5umv48) Units=km Length=0.037396 bus1=p5umv48.1.2.3 bus2=p5udt6757.1.2.3 switch=n enabled=y phases=3 Linecode=3P_OH_AL_ACSR_4/0_Penguin_12_47_0_3_3_3_3

New Line.l(r:p5udt643-p5umv48) Units=km Length=0.0570063 bus1=p5udt643.1.2.3 bus2=p5umv48.1.2.3 switch=n enabled=y phases=3 Linecode=3P_OH_AL_ACSR_4/0_Penguin_12_47_0_3_3_3_3

New Line.l(r:p5udt1090lv-p5ulv1199) Units=km Length=0.0139738 bus1=p5udt1090lv.1.2.3 bus2=p5ulv1199.1.2.3 switch=n enabled=y phases=3 Linecode=3P_UG_AL_350kcmil_15_0_416_0_3_3_3_3

New Line.l(r:p5udt1090-p5udt33535) Units=km Length=0.039812 bus1=p5udt33535.1.2.3 bus2=p5udt1090.1.2.3 switch=n enabled=y phases=3 Linecode=3P_OH_AL_ACSR_4/0_Penguin_12_47_0_3_3_3_3

New Line.l(r:p5udt33537lv-p5ulv77413) Units=km Length=0.0130429 bus1=p5udt33537lv.1.2.3 bus2=p5ulv77413.1.2.3 switch=n enabled=y phases=3 Linecode=3P_UG_AL_350kcmil_15_0_416_0_3_3_3_3

New Line.l(r:p5udt6956lv-p5ulv14417) Units=km Length=0.00295949 bus1=p5udt6956lv.1.2.3 bus2=p5ulv14417.1.2.3 switch=n enabled=y phases=3 Linecode=3P_UG_AL_350kcmil_15_0_416_0_3_3_3_3

New Line.l(r:p5udt6956lv-p5ulv14418) Units=km Length=0.00655986 bus1=p5udt6956lv.1.2.3 bus2=p5ulv14418.1.2.3 switch=n enabled=y phases=3 Linecode=3P_UG_AL_350kcmil_15_0_416_0_3_3_3_3

New Line.l(r:p5udt6305-p5udt6956) Units=km Length=0.001 bus1=p5udt6305.1.2.3 bus2=p5udt6956.1.2.3 switch=n enabled=y phases=3 Linecode=3P_OH_AL_ACSR_4/0_Penguin_12_47_0_3_3_3_3

New Line.l(r:p5udt6958lv-p5ulv14421) Units=km Length=0.0045601 bus1=p5udt6958lv.1.2.3 bus2=p5ulv14421.1.2.3 switch=n enabled=y phases=3 Linecode=3P_UG_AL_350kcmil_15_0_416_0_3_3_3_3

New Line.l(r:p5udm10443-p5ulv3807) Units=km Length=0.004642940000000001 bus1=p5udm10443.1.2.3 bus2=p5ulv3807.1.2.3 switch=n enabled=y phases=3 Linecode=3P_UG_AL_350kcmil_15_0_416_0_3_3_3_3

New Line.l(r:p5udm10446-p5ulv16593) Units=km Length=0.0167177 bus1=p5udm10446.1.2.3 bus2=p5ulv16593.1.2.3 switch=n enabled=y phases=3 Linecode=3P_UG_AL_350kcmil_15_0_416_0_3_3_3_3

New Line.l(r:p5udm10443-p5udm10446) Units=km Length=0.026430100000000005 bus1=p5udm10443.1.2.3 bus2=p5udm10446.1.2.3 switch=n enabled=y phases=3 Linecode=3P_UG_AL_350kcmil_15_0_416_0_3_3_3_3

New Line.l(r:p5udm10443-p5udt2949lv) Units=km Length=0.0173424 bus1=p5udt2949lv.1.2.3 bus2=p5udm10443.1.2.3 switch=n enabled=y phases=3 Linecode=3P_UG_AL_750kcmil_25_0_416_0_3_3_3_3

New Line.l(r:p5udm10444-p5ulv3808) Units=km Length=0.00316 bus1=p5udm10444.1.2.3 bus2=p5ulv3808.1.2.3 switch=n enabled=y phases=3 Linecode=3P_UG_AL_350kcmil_15_0_416_0_3_3_3_3

New Line.l(r:p5udm10445-p5ulv10897) Units=km Length=0.00728643 bus1=p5udm10445.1.2.3 bus2=p5ulv10897.1.2.3 switch=n enabled=y phases=3 Linecode=3P_UG_AL_750kcmil_25_0_416_0_3_3_3_3

New Line.l(r:p5udm10444-p5udm10445) Units=km Length=0.0173329 bus1=p5udm10444.1.2.3 bus2=p5udm10445.1.2.3 switch=n enabled=y phases=3 Linecode=3P_UG_AL_750kcmil_25_0_416_0_3_3_3_3

New Line.l(r:p5udm10444-p5udt2949lv) Units=km Length=0.0173396 bus1=p5udt2949lv.1.2.3 bus2=p5udm10444.1.2.3 switch=n enabled=y phases=3 Linecode=3P_UG_AL_750kcmil_25_0_416_0_3_3_3_3

New Line.l(r:p5udt7416lv-p5ulv16594) Units=km Length=0.00589139 bus1=p5udt7416lv.1.2.3 bus2=p5ulv16594.1.2.3 switch=n enabled=y phases=3 Linecode=3P_UG_AL_750kcmil_25_0_416_0_3_3_3_3

New Line.l(r:p5udm20303-p5ulv16592) Units=km Length=0.00434232 bus1=p5udm20303.1.2.3 bus2=p5ulv16592.1.2.3 switch=n enabled=y phases=3 Linecode=3P_UG_AL_750kcmil_25_0_416_0_3_3_3_3

New Line.l(r:p5udm20303-p5udt7416lv) Units=km Length=0.0175621 bus1=p5udt7416lv.1.2.3 bus2=p5udm20303.1.2.3 switch=n enabled=y phases=3 Linecode=3P_UG_AL_750kcmil_25_0_416_0_3_3_3_3

New Line.l(r:p5udt1091lv-p5ulv1200) Units=km Length=0.0021300900000000003 bus1=p5udt1091lv.1.2.3 bus2=p5ulv1200.1.2.3 switch=n enabled=y phases=3 Linecode=3P_UG_AL_750kcmil_25_0_416_0_3_3_3_3

New Line.l(r:p5udt1091lv-p5ulv27415) Units=km Length=0.00688809 bus1=p5udt1091lv.1.2.3 bus2=p5ulv27415.1.2.3 switch=n enabled=y phases=3 Linecode=3P_UG_AL_750kcmil_25_0_416_0_3_3_3_3

New Line.l(r:p5udt1091-p5umv5) Units=km Length=0.00688809 bus1=p5udt1091.1.2.3 bus2=p5umv5.1.2.3 switch=n enabled=y phases=3 Linecode=3P_OH_AL_ACSR_4/0_Penguin_12_47_0_3_3_3_3

New Line.l(r:p5udt6303lv-p5ulv11848) Units=km Length=0.00965776 bus1=p5udt6303lv.1.2.3 bus2=p5ulv11848.1.2.3 switch=n enabled=y phases=3 Linecode=3P_UG_AL_750kcmil_25_0_416_0_3_3_3_3

New Line.l(r:p5udt6303lv-p5ulv11850) Units=km Length=0.004008 bus1=p5udt6303lv.1.2.3 bus2=p5ulv11850.1.2.3 switch=n enabled=y phases=3 Linecode=3P_UG_AL_750kcmil_25_0_416_0_3_3_3_3

New Line.l(r:p5udt33546-p5udt6303) Units=km Length=0.028352900000000004 bus1=p5udt33546.1.2.3 bus2=p5udt6303.1.2.3 switch=n enabled=y phases=3 Linecode=3P_OH_AL_ACSR_4/0_Penguin_12_47_0_3_3_3_3

New Line.l(r:p5udt33546-p5umv110) Units=km Length=0.0402813 bus1=p5umv110.1.2.3 bus2=p5udt33546.1.2.3 switch=n enabled=y phases=3 Linecode=3P_OH_AL_ACSR_4/0_Penguin_12_47_0_3_3_3_3

New Line.l(r:p5udt640-p5umv5) Units=km Length=0.0618501 bus1=p5udt640-p5umv5x.1.2.3 bus2=p5udt640.1.2.3 switch=n enabled=y phases=3 Linecode=3P_OH_AL_ACSR_1033kcmil_Curlew_12.47_1_3_3_3_3

New Line.padswitch(r:p5udt33550-p5udt643)p5u_119048 Units=km Length=0.001 bus1=p5udt33550-p5udt643xxx.3 bus2=p5udt33550-p5udt643xx.3 switch=y enabled=y phases=1 Linecode=padswitch_1_1_1_1

New Line.padswitch(r:p5udt33550-p5udt643)p5u_119049 Units=km Length=0.001 bus1=p5udt33550-p5udt643x.3 bus2=p5udt33550.3 switch=y enabled=y phases=1 Linecode=padswitch_1_3_1_1_1

New Line.elbswitch(r:p5udt6304-p5umv110)p5u_151202 Units=km Length=0.001 bus1=p5umv110.1.2.3 bus2=p5udt6304-p5umv110x.1.2.3 switch=y enabled=n phases=3 Linecode=elbswitch_3_3_3_3

New Line.elbswitch(r:p5udt640-p5umv5)p5u_151257 Units=km Length=0.001 bus1=p5umv5.1.2.3 bus2=p5udt640-p5umv5x.1.2.3 switch=y enabled=n phases=3 Linecode=elbswitch_3_6_3_3_3

New Line.fuse(r:p5udt33550-p5udt643)p5u_151581 Units=km Length=0.001 bus1=p5udt643.3 bus2=p5udt33550-p5udt643xxx.3 switch=n enabled=y phases=1 Linecode=fuse_1_1_1_1

New Fuse.Fuse_fuse(r:p5udt33550-p5udt643)p5u_151581 monitoredobj=Line.fuse(r:p5udt33550-p5udt643)p5u_151581 enabled=y ratedcurrent=100.0

New Line.fuse(r:p5udt1090-p5udt33551)p5u_151635 Units=km Length=0.001 bus1=p5udt1090.1 bus2=p5udt1090-p5udt33551x.1 switch=n enabled=y phases=1 Linecode=fuse_1_7_1_1_1

New Fuse.Fuse_fuse(r:p5udt1090-p5udt33551)p5u_151635 monitoredobj=Line.fuse(r:p5udt1090-p5udt33551)p5u_151635 enabled=y ratedcurrent=100.0

New Line.fuse(r:p5udt2479-p5udt2480)p5u_151821 Units=km Length=0.001 bus1=p5udt2480.2 bus2=p5udt2479-p5udt2480x.2 switch=n enabled=y phases=1 Linecode=fuse_1_7_1_5_1_1

New Fuse.Fuse_fuse(r:p5udt2479-p5udt2480)p5u_151821 monitoredobj=Line.fuse(r:p5udt2479-p5udt2480)p5u_151821 enabled=y ratedcurrent=100.0
