New Capacitor.p5uc20 Bus1=p5udt1454 phases=3 Kv=12.47 conn=Wye Kvar=450.0

New CapControl.p5uc20 Capacitor=p5uc20 Element=Line.padswitch(r:p5udt1454-p5udt6970)p5u_119298 Terminal=1 delay=100.0 Type=voltage Vmin=120.5 Vmax=125.0 Ptratio=59.99631547328862 Ctratio=100.0
