New Line.l(r:p5udt310lv-p5ulv10974) Units=km Length=0.0144201 bus1=p5udt310lv.1.2 bus2=p5ulv10974.1.2 switch=n enabled=y phases=2 Linecode=1P_UG_AL_1/0_Brenau_0_416_0_2_2_2_2

New Line.l(r:p5udm1194-p5ulv11915) Units=km Length=0.0126397 bus1=p5udm1194.1.2 bus2=p5ulv11915.1.2 switch=n enabled=y phases=2 Linecode=1P_UG_AL_1/0_Brenau_0_416_0_2_2_2_2

New Line.l(r:p5udm1191-p5ulv323) Units=km Length=0.0147657 bus1=p5udm1191.1.2 bus2=p5ulv323.1.2 switch=n enabled=y phases=2 Linecode=1P_UG_AL_1/0_Brenau_0_416_0_2_2_2_2

New Line.l(r:p5udm1191-p5udm1194) Units=km Length=0.0178488 bus1=p5udm1194.1.2 bus2=p5udm1191.1.2 switch=n enabled=y phases=2 Linecode=1P_UG_AL_1/0_Brenau_0_416_0_2_2_2_2

New Line.l(r:p5udm1194-p5udt310lv) Units=km Length=0.00891897 bus1=p5udt310lv.1.2 bus2=p5udm1194.1.2 switch=n enabled=y phases=2 Linecode=1P_UG_AL_2/0_Converse_0_416_0_2_2_2_2

New Line.l(r:p5udm1195-p5ulv78456) Units=km Length=0.0123382 bus1=p5udm1195.1.2 bus2=p5ulv78456.1.2 switch=n enabled=y phases=2 Linecode=1P_UG_AL_1/0_Brenau_0_416_0_2_2_2_2

New Line.l(r:p5udm1192-p5ulv4586) Units=km Length=0.0112599 bus1=p5udm1192.1.2 bus2=p5ulv4586.1.2 switch=n enabled=y phases=2 Linecode=1P_UG_AL_1/0_Brenau_0_416_0_2_2_2_2

New Line.l(r:p5udm1192-p5udm1195) Units=km Length=0.0178484 bus1=p5udm1195.1.2 bus2=p5udm1192.1.2 switch=n enabled=y phases=2 Linecode=1P_UG_AL_1/0_Brenau_0_416_0_2_2_2_2

New Line.l(r:p5udm1195-p5udt310lv) Units=km Length=0.00892942 bus1=p5udt310lv.1.2 bus2=p5udm1195.1.2 switch=n enabled=y phases=2 Linecode=1P_UG_AL_1/0_Brenau_0_416_0_2_2_2_2

New Line.l(r:p5udt311lv-p5ulv1628) Units=km Length=0.013219300000000002 bus1=p5udt311lv.1.2 bus2=p5ulv1628.1.2 switch=n enabled=y phases=2 Linecode=1P_OH_AL_2/0_Rucina_0_416_0_2_2_2_2

New Line.l(r:p5udm1196-p5ulv324) Units=km Length=0.00932258 bus1=p5udm1196.1.2 bus2=p5ulv324.1.2 switch=n enabled=y phases=2 Linecode=1P_OH_AL_2/0_Rucina_0_416_0_2_2_2_2

New Line.l(r:p5udm1196-p5ulv7757) Units=km Length=0.00788676 bus1=p5udm1196.1.2 bus2=p5ulv7757.1.2 switch=n enabled=y phases=2 Linecode=1P_OH_AL_2/0_Rucina_0_416_0_2_2_2_2

New Line.l(r:p5udm1196-p5udt311lv) Units=km Length=0.0181212 bus1=p5udt311lv.1.2 bus2=p5udm1196.1.2 switch=n enabled=y phases=2 Linecode=1P_OH_AL_2/0_Rucina_0_416_0_2_2_2_2

New Line.l(r:p5udm1200-p5ulv18928) Units=km Length=0.0102539 bus1=p5udm1200.1.2 bus2=p5ulv18928.1.2 switch=n enabled=y phases=2 Linecode=1P_OH_AL_2/0_Rucina_0_416_0_2_2_2_2

New Line.l(r:p5udm1200-p5ulv43206) Units=km Length=0.0060192 bus1=p5udm1200.1.2 bus2=p5ulv43206.1.2 switch=n enabled=y phases=2 Linecode=1P_OH_AL_2/0_Rucina_0_416_0_2_2_2_2

New Line.l(r:p5udm1198-p5ulv4218) Units=km Length=0.01607 bus1=p5udm1198.1.2 bus2=p5ulv4218.1.2 switch=n enabled=y phases=2 Linecode=1P_OH_AL_2/0_Rucina_0_416_0_2_2_2_2

New Line.l(r:p5udm1198-p5udm1200) Units=km Length=0.018133 bus1=p5udm1200.1.2 bus2=p5udm1198.1.2 switch=n enabled=y phases=2 Linecode=1P_OH_AL_2/0_Rucina_0_416_0_2_2_2_2

New Line.l(r:p5udm1200-p5udt311lv) Units=km Length=0.018133 bus1=p5udt311lv.1.2 bus2=p5udm1200.1.2 switch=n enabled=y phases=2 Linecode=1P_OH_AL_2/0_Rucina_0_416_0_2_2_2_2

New Line.l(r:p5udm2038-p5ulv552) Units=km Length=0.011471 bus1=p5udm2038.1.2 bus2=p5ulv552.1.2 switch=n enabled=y phases=2 Linecode=1P_UG_AL_1/0_Brenau_0_416_0_2_2_2_2

New Line.l(r:p5udm2038-p5udt526lv) Units=km Length=0.0349784 bus1=p5udt526lv.1.2 bus2=p5udm2038.1.2 switch=n enabled=y phases=2 Linecode=1P_UG_AL_1/0_Brenau_0_416_0_2_2_2_2

New Line.l(r:p5udm2040-p5ulv39851) Units=km Length=0.006758 bus1=p5udm2040.1.2 bus2=p5ulv39851.1.2 switch=n enabled=y phases=2 Linecode=1P_UG_AL_1/0_Brenau_0_416_0_2_2_2_2

New Line.l(r:p5udm2039-p5ulv38238) Units=km Length=0.00195126 bus1=p5udm2039.1.2 bus2=p5ulv38238.1.2 switch=n enabled=y phases=2 Linecode=1P_OH_AL_4_Periwinkle_0_416_0_2_2_2_2

New Line.l(r:p5udm2039-p5udm2040) Units=km Length=0.025188 bus1=p5udm2040.1.2 bus2=p5udm2039.1.2 switch=n enabled=y phases=2 Linecode=1P_OH_AL_2/0_Rucina_0_416_0_2_2_2_2

New Line.l(r:p5udm2040-p5udt526lv) Units=km Length=0.00912674 bus1=p5udt526lv.1.2 bus2=p5udm2040.1.2 switch=n enabled=y phases=2 Linecode=1P_UG_AL_1/0_Brenau_0_416_0_2_2_2_2

New Line.l(r:p5udm2660-p5ulv744) Units=km Length=0.0119324 bus1=p5udm2660.1.2 bus2=p5ulv744.1.2 switch=n enabled=y phases=2 Linecode=1P_UG_AL_1/0_Brenau_0_416_0_2_2_2_2

New Line.l(r:p5udm2662-p5ulv3704) Units=km Length=0.014777900000000002 bus1=p5udm2662.1.2 bus2=p5ulv3704.1.2 switch=n enabled=y phases=2 Linecode=1P_UG_AL_1/0_Brenau_0_416_0_2_2_2_2

New Line.l(r:p5udm2660-p5udm2662) Units=km Length=0.0298683 bus1=p5udm2660.1.2 bus2=p5udm2662.1.2 switch=n enabled=y phases=2 Linecode=1P_UG_AL_1/0_Brenau_0_416_0_2_2_2_2

New Line.l(r:p5udm2660-p5udt696lv) Units=km Length=0.009946360000000001 bus1=p5udt696lv.1.2 bus2=p5udm2660.1.2 switch=n enabled=y phases=2 Linecode=1P_UG_AL_4/0_Sweetbriar_0_416_0_2_2_2_2

New Line.l(r:p5udm2664-p5ulv11348) Units=km Length=0.0133052 bus1=p5udm2664.1.2 bus2=p5ulv11348.1.2 switch=n enabled=y phases=2 Linecode=1P_UG_AL_1/0_Brenau_0_416_0_2_2_2_2

New Line.l(r:p5udm2664-p5ulv11728) Units=km Length=0.00994875 bus1=p5udm2664.1.2 bus2=p5ulv11728.1.2 switch=n enabled=y phases=2 Linecode=1P_UG_AL_1/0_Brenau_0_416_0_2_2_2_2

New Line.l(r:p5udm2663-p5ulv8872) Units=km Length=0.0161555 bus1=p5udm2663.1.2 bus2=p5ulv8872.1.2 switch=n enabled=y phases=2 Linecode=1P_UG_AL_1/0_Brenau_0_416_0_2_2_2_2

New Line.l(r:p5udm2661-p5ulv2188) Units=km Length=0.0141919 bus1=p5udm2661.1.2 bus2=p5ulv2188.1.2 switch=n enabled=y phases=2 Linecode=1P_UG_AL_1/0_Brenau_0_416_0_2_2_2_2

New Line.l(r:p5udm2661-p5udm2663) Units=km Length=0.00995611 bus1=p5udm2663.1.2 bus2=p5udm2661.1.2 switch=n enabled=y phases=2 Linecode=1P_UG_AL_1/0_Brenau_0_416_0_2_2_2_2

New Line.l(r:p5udm2663-p5udm2664) Units=km Length=0.00995611 bus1=p5udm2664.1.2 bus2=p5udm2663.1.2 switch=n enabled=y phases=2 Linecode=1P_UG_AL_2/0_Converse_0_416_0_2_2_2_2

New Line.l(r:p5udm2664-p5udt696lv) Units=km Length=0.00995611 bus1=p5udt696lv.1.2 bus2=p5udm2664.1.2 switch=n enabled=y phases=2 Linecode=1P_UG_AL_4/0_Sweetbriar_0_416_0_2_2_2_2

New Line.l(r:p5udm3175-p5ulv11137) Units=km Length=0.01212 bus1=p5udm3175.1.2 bus2=p5ulv11137.1.2 switch=n enabled=y phases=2 Linecode=1P_OH_AL_2/0_Rucina_0_416_0_2_2_2_2

New Line.l(r:p5udm3174-p5ulv895) Units=km Length=0.00688559 bus1=p5udm3174.1.2 bus2=p5ulv895.1.2 switch=n enabled=y phases=2 Linecode=1P_UG_AL_1/0_Brenau_0_416_0_2_2_2_2

New Line.l(r:p5udm3178-p5ulv67310) Units=km Length=0.0129782 bus1=p5udm3178.1.2 bus2=p5ulv67310.1.2 switch=n enabled=y phases=2 Linecode=1P_UG_AL_1/0_Brenau_0_416_0_2_2_2_2

New Line.l(r:p5udm3174-p5udm3178) Units=km Length=0.0046146 bus1=p5udm3174.1.2 bus2=p5udm3178.1.2 switch=n enabled=y phases=2 Linecode=1P_UG_AL_1/0_Brenau_0_416_0_2_2_2_2

New Line.l(r:p5udm3174-p5udm3175) Units=km Length=0.0596225 bus1=p5udm3175.1.2 bus2=p5udm3174.1.2 switch=n enabled=y phases=2 Linecode=1P_OH_AL_4/0_Zuzara_0_416_0_2_2_2_2

New Line.l(r:p5udm3175-p5udt829lv) Units=km Length=0.03775 bus1=p5udt829lv.1.2 bus2=p5udm3175.1.2 switch=n enabled=y phases=2 Linecode=1P_OH_AL_4/0_Zuzara_0_416_0_2_2_2_2

New Line.l(r:p5udm3176-p5ulv11553) Units=km Length=0.0071148900000000005 bus1=p5udm3176.1.2 bus2=p5ulv11553.1.2 switch=n enabled=y phases=2 Linecode=1P_UG_AL_1/0_Brenau_0_416_0_2_2_2_2

New Line.l(r:p5udm3177-p5ulv15188) Units=km Length=0.00925316 bus1=p5udm3177.1.2 bus2=p5ulv15188.1.2 switch=n enabled=y phases=2 Linecode=1P_UG_AL_1/0_Brenau_0_416_0_2_2_2_2

New Line.l(r:p5udm3176-p5udm3177) Units=km Length=0.018903 bus1=p5udm3176.1.2 bus2=p5udm3177.1.2 switch=n enabled=y phases=2 Linecode=1P_UG_AL_1/0_Brenau_0_416_0_2_2_2_2

New Line.l(r:p5udm3176-p5udt829lv) Units=km Length=0.0484496 bus1=p5udt829lv.1.2 bus2=p5udm3176.1.2 switch=n enabled=y phases=2 Linecode=1P_OH_AL_4/0_Zuzara_0_416_0_2_2_2_2

New Line.l(r:p5udt991lv-p5ulv1088) Units=km Length=0.00459504 bus1=p5udt991lv.1.2 bus2=p5ulv1088.1.2 switch=n enabled=y phases=2 Linecode=1P_UG_AL_1/0_Brenau_0_416_0_2_2_2_2

New Line.l(r:p5udt991lv-p5ulv13614) Units=km Length=0.0296831 bus1=p5udt991lv.1.2 bus2=p5ulv13614.1.2 switch=n enabled=y phases=2 Linecode=1P_UG_AL_1/0_Brenau_0_416_0_2_2_2_2

New Line.l(r:p5udm3762-p5ulv7573) Units=km Length=0.0053322 bus1=p5udm3762.1.2 bus2=p5ulv7573.1.2 switch=n enabled=y phases=2 Linecode=1P_UG_AL_1/0_Brenau_0_416_0_2_2_2_2

New Line.l(r:p5udm3762-p5ulv9280) Units=km Length=0.00572496 bus1=p5udm3762.1.2 bus2=p5ulv9280.1.2 switch=n enabled=y phases=2 Linecode=1P_UG_AL_1/0_Brenau_0_416_0_2_2_2_2

New Line.l(r:p5udm3760-p5ulv2751) Units=km Length=0.00447147 bus1=p5udm3760.1.2 bus2=p5ulv2751.1.2 switch=n enabled=y phases=2 Linecode=1P_UG_AL_1/0_Brenau_0_416_0_2_2_2_2

New Line.l(r:p5udm3761-p5ulv3705) Units=km Length=0.011015200000000001 bus1=p5udm3761.1.2 bus2=p5ulv3705.1.2 switch=n enabled=y phases=2 Linecode=1P_UG_AL_1/0_Brenau_0_416_0_2_2_2_2

New Line.l(r:p5udm3760-p5udm3761) Units=km Length=0.00934436 bus1=p5udm3760.1.2 bus2=p5udm3761.1.2 switch=n enabled=y phases=2 Linecode=1P_UG_AL_1/0_Brenau_0_416_0_2_2_2_2

New Line.l(r:p5udm3760-p5udm3762) Units=km Length=0.00935413 bus1=p5udm3762.1.2 bus2=p5udm3760.1.2 switch=n enabled=y phases=2 Linecode=1P_UG_AL_2/0_Converse_0_416_0_2_2_2_2

New Line.l(r:p5udm3762-p5udt991lv) Units=km Length=0.00934436 bus1=p5udt991lv.1.2 bus2=p5udm3762.1.2 switch=n enabled=y phases=2 Linecode=1P_UG_AL_4/0_Sweetbriar_0_416_0_2_2_2_2

New Line.l(r:p5udm3764-p5ulv13613) Units=km Length=0.0233499 bus1=p5udm3764.1.2 bus2=p5ulv13613.1.2 switch=n enabled=y phases=2 Linecode=1P_UG_AL_1/0_Brenau_0_416_0_2_2_2_2

New Line.l(r:p5udm3766-p5ulv17039) Units=km Length=0.0169612 bus1=p5udm3766.1.2 bus2=p5ulv17039.1.2 switch=n enabled=y phases=2 Linecode=1P_UG_AL_1/0_Brenau_0_416_0_2_2_2_2

New Line.l(r:p5udm3764-p5udm3766) Units=km Length=0.00989307 bus1=p5udm3764.1.2 bus2=p5udm3766.1.2 switch=n enabled=y phases=2 Linecode=1P_UG_AL_1/0_Brenau_0_416_0_2_2_2_2

New Line.l(r:p5udm3764-p5udt991lv) Units=km Length=0.009352010000000001 bus1=p5udt991lv.1.2 bus2=p5udm3764.1.2 switch=n enabled=y phases=2 Linecode=1P_UG_AL_4/0_Sweetbriar_0_416_0_2_2_2_2

New Line.l(r:p5udt992lv-p5ulv12093) Units=km Length=0.0130027 bus1=p5udt992lv.1.2 bus2=p5ulv12093.1.2 switch=n enabled=y phases=2 Linecode=1P_UG_AL_1/0_Brenau_0_416_0_2_2_2_2

New Line.l(r:p5udm3768-p5ulv4948) Units=km Length=0.0106511 bus1=p5udm3768.1.2 bus2=p5ulv4948.1.2 switch=n enabled=y phases=2 Linecode=1P_UG_AL_1/0_Brenau_0_416_0_2_2_2_2

New Line.l(r:p5udm3767-p5ulv1089) Units=km Length=0.0150513 bus1=p5udm3767.1.2 bus2=p5ulv1089.1.2 switch=n enabled=y phases=2 Linecode=1P_UG_AL_1/0_Brenau_0_416_0_2_2_2_2

New Line.l(r:p5udm3767-p5udm3768) Units=km Length=0.00968754 bus1=p5udm3768.1.2 bus2=p5udm3767.1.2 switch=n enabled=y phases=2 Linecode=1P_UG_AL_1/0_Brenau_0_416_0_2_2_2_2

New Line.l(r:p5udm3768-p5udt992lv) Units=km Length=0.00969677 bus1=p5udt992lv.1.2 bus2=p5udm3768.1.2 switch=n enabled=y phases=2 Linecode=1P_UG_AL_4/0_Sweetbriar_0_416_0_2_2_2_2

New Line.l(r:p5udm3770-p5ulv19119) Units=km Length=0.0069711 bus1=p5udm3770.1.2 bus2=p5ulv19119.1.2 switch=n enabled=y phases=2 Linecode=1P_UG_AL_1/0_Brenau_0_416_0_2_2_2_2

New Line.l(r:p5udm3770-p5udt992lv) Units=km Length=0.0444029 bus1=p5udt992lv.1.2 bus2=p5udm3770.1.2 switch=n enabled=y phases=2 Linecode=1P_UG_AL_1/0_Brenau_0_416_0_2_2_2_2

New Line.l(r:p5udm3771-p5ulv1090) Units=km Length=0.0135312 bus1=p5udm3771.1.2 bus2=p5ulv1090.1.2 switch=n enabled=y phases=2 Linecode=1P_UG_AL_4/0_Sweetbriar_0_416_0_2_2_2_2

New Line.l(r:p5udm3771-p5udt993lv) Units=km Length=0.0373213 bus1=p5udt993lv.1.2 bus2=p5udm3771.1.2 switch=n enabled=y phases=2 Linecode=1P_UG_AL_4/0_Sweetbriar_0_416_0_2_2_2_2

New Line.l(r:p5udm3772-p5ulv2556) Units=km Length=0.0111883 bus1=p5udm3772.1.2 bus2=p5ulv2556.1.2 switch=n enabled=y phases=2 Linecode=1P_UG_AL_1/0_Brenau_0_416_0_2_2_2_2

New Line.l(r:p5udm3773-p5ulv15186) Units=km Length=0.0123546 bus1=p5udm3773.1.2 bus2=p5ulv15186.1.2 switch=n enabled=y phases=2 Linecode=1P_UG_AL_1/0_Brenau_0_416_0_2_2_2_2

New Line.l(r:p5udm3772-p5udm3773) Units=km Length=0.00932344 bus1=p5udm3772.1.2 bus2=p5udm3773.1.2 switch=n enabled=y phases=2 Linecode=1P_UG_AL_1/0_Brenau_0_416_0_2_2_2_2

New Line.l(r:p5udm3772-p5udt993lv) Units=km Length=0.0186567 bus1=p5udt993lv.1.2 bus2=p5udm3772.1.2 switch=n enabled=y phases=2 Linecode=1P_UG_AL_4/0_Sweetbriar_0_416_0_2_2_2_2

New Line.l(r:p5udt995lv-p5ulv1092) Units=km Length=0.00619342 bus1=p5udt995lv.1.2 bus2=p5ulv1092.1.2 switch=n enabled=y phases=2 Linecode=1P_OH_AL_2/0_Rucina_0_416_0_2_2_2_2

New Line.l(r:p5udt995lv-p5ulv17394) Units=km Length=0.00841204 bus1=p5udt995lv.1.2 bus2=p5ulv17394.1.2 switch=n enabled=y phases=2 Linecode=1P_OH_AL_2/0_Rucina_0_416_0_2_2_2_2

New Line.l(r:p5udm4397-p5ulv1284) Units=km Length=0.0174316 bus1=p5udm4397.1.2 bus2=p5ulv1284.1.2 switch=n enabled=y phases=2 Linecode=1P_UG_AL_1/0_Brenau_0_416_0_2_2_2_2

New Line.l(r:p5udm4397-p5udt1168lv) Units=km Length=0.00944146 bus1=p5udt1168lv.1.2 bus2=p5udm4397.1.2 switch=n enabled=y phases=2 Linecode=1P_UG_AL_1/0_Brenau_0_416_0_2_2_2_2

New Line.l(r:p5udm4398-p5ulv43751) Units=km Length=0.0201509 bus1=p5udm4398.1.2 bus2=p5ulv43751.1.2 switch=n enabled=y phases=2 Linecode=1P_UG_AL_1/0_Brenau_0_416_0_2_2_2_2

New Line.l(r:p5udm4398-p5udt1168lv) Units=km Length=0.019200200000000004 bus1=p5udt1168lv.1.2 bus2=p5udm4398.1.2 switch=n enabled=y phases=2 Linecode=1P_UG_AL_1/0_Brenau_0_416_0_2_2_2_2

New Line.l(r:p5udm5395-p5ulv15950) Units=km Length=0.0209346 bus1=p5udm5395.1.2 bus2=p5ulv15950.1.2 switch=n enabled=y phases=2 Linecode=1P_UG_AL_1/0_Brenau_0_416_0_2_2_2_2

New Line.l(r:p5udm5395-p5udt1446lv) Units=km Length=0.0257285 bus1=p5udt1446lv.1.2 bus2=p5udm5395.1.2 switch=n enabled=y phases=2 Linecode=1P_UG_AL_1/0_Brenau_0_416_0_2_2_2_2

New Line.l(r:p5udm5396-p5ulv78274) Units=km Length=0.009504290000000002 bus1=p5udm5396.1.2 bus2=p5ulv78274.1.2 switch=n enabled=y phases=2 Linecode=1P_UG_AL_4/0_Sweetbriar_0_416_0_2_2_2_2

New Line.l(r:p5udm5394-p5ulv1630) Units=km Length=0.0095917 bus1=p5udm5394.1.2 bus2=p5ulv1630.1.2 switch=n enabled=y phases=2 Linecode=1P_UG_AL_4/0_Sweetbriar_0_416_0_2_2_2_2

New Line.l(r:p5udm5394-p5udm5396) Units=km Length=0.00938416 bus1=p5udm5396.1.2 bus2=p5udm5394.1.2 switch=n enabled=y phases=2 Linecode=1P_UG_AL_4/0_Sweetbriar_0_416_0_2_2_2_2

New Line.l(r:p5udm5396-p5udt1446lv) Units=km Length=0.00937634 bus1=p5udt1446lv.1.2 bus2=p5udm5396.1.2 switch=n enabled=y phases=2 Linecode=1P_UG_AL_4/0_Sweetbriar_0_416_0_2_2_2_2

New Line.l(r:p5udt1580lv-p5ulv12665) Units=km Length=0.0087336 bus1=p5udt1580lv.1.2 bus2=p5ulv12665.1.2 switch=n enabled=y phases=2 Linecode=1P_OH_AL_2/0_Rucina_0_416_0_2_2_2_2

New Line.l(r:p5udm5859-p5ulv1799) Units=km Length=0.00814141 bus1=p5udm5859.1.2 bus2=p5ulv1799.1.2 switch=n enabled=y phases=2 Linecode=1P_OH_AL_2/0_Rucina_0_416_0_2_2_2_2

New Line.l(r:p5udm5859-p5ulv10975) Units=km Length=0.00439477 bus1=p5udm5859.1.2 bus2=p5ulv10975.1.2 switch=n enabled=y phases=2 Linecode=1P_OH_AL_2/0_Rucina_0_416_0_2_2_2_2

New Line.l(r:p5udm5859-p5udt1580lv) Units=km Length=0.0197674 bus1=p5udt1580lv.1.2 bus2=p5udm5859.1.2 switch=n enabled=y phases=2 Linecode=1P_OH_AL_2/0_Rucina_0_416_0_2_2_2_2

New Line.l(r:p5udm5860-p5ulv9468) Units=km Length=0.00222524 bus1=p5udm5860.1.2 bus2=p5ulv9468.1.2 switch=n enabled=y phases=2 Linecode=1P_OH_AL_4_Periwinkle_0_416_0_2_2_2_2

New Line.l(r:p5udm5860-p5udt1580lv) Units=km Length=0.0153871 bus1=p5udt1580lv.1.2 bus2=p5udm5860.1.2 switch=n enabled=y phases=2 Linecode=1P_OH_AL_2/0_Rucina_0_416_0_2_2_2_2

New Line.l(r:p5udt1581lv-p5ulv1800) Units=km Length=0.0175602 bus1=p5udt1581lv.1.2 bus2=p5ulv1800.1.2 switch=n enabled=y phases=2 Linecode=1P_UG_AL_1/0_Brenau_0_416_0_2_2_2_2

New Line.l(r:p5udm5864-p5ulv2557) Units=km Length=0.014825300000000001 bus1=p5udm5864.1.2 bus2=p5ulv2557.1.2 switch=n enabled=y phases=2 Linecode=1P_UG_AL_1/0_Brenau_0_416_0_2_2_2_2

New Line.l(r:p5udm5864-p5udt1581lv) Units=km Length=0.00967465 bus1=p5udt1581lv.1.2 bus2=p5udm5864.1.2 switch=n enabled=y phases=2 Linecode=1P_UG_AL_1/0_Brenau_0_416_0_2_2_2_2

New Line.l(r:p5udt1735lv-p5ulv2005) Units=km Length=0.00950842 bus1=p5udt1735lv.1.2 bus2=p5ulv2005.1.2 switch=n enabled=y phases=2 Linecode=1P_UG_AL_1/0_Brenau_0_416_0_2_2_2_2

New Line.l(r:p5udm6397-p5ulv3879) Units=km Length=0.0178296 bus1=p5udm6397.1.2 bus2=p5ulv3879.1.2 switch=n enabled=y phases=2 Linecode=1P_UG_AL_1/0_Brenau_0_416_0_2_2_2_2

New Line.l(r:p5udm6397-p5udt1735lv) Units=km Length=0.00967465 bus1=p5udt1735lv.1.2 bus2=p5udm6397.1.2 switch=n enabled=y phases=2 Linecode=1P_UG_AL_1/0_Brenau_0_416_0_2_2_2_2

New Line.l(r:p5udt1737lv-p5ulv2384) Units=km Length=0.00903478 bus1=p5udt1737lv.1.2 bus2=p5ulv2384.1.2 switch=n enabled=y phases=2 Linecode=1P_UG_AL_1/0_Brenau_0_416_0_2_2_2_2

New Line.l(r:p5udm6403-p5ulv2007) Units=km Length=0.00906706 bus1=p5udm6403.1.2 bus2=p5ulv2007.1.2 switch=n enabled=y phases=2 Linecode=1P_UG_AL_1/0_Brenau_0_416_0_2_2_2_2

New Line.l(r:p5udm6403-p5udt1737lv) Units=km Length=0.00874893 bus1=p5udt1737lv.1.2 bus2=p5udm6403.1.2 switch=n enabled=y phases=2 Linecode=1P_UG_AL_1/0_Brenau_0_416_0_2_2_2_2

New Line.l(r:p5udt1862lv-p5ulv17986) Units=km Length=0.017018700000000005 bus1=p5udt1862lv.1.2 bus2=p5ulv17986.1.2 switch=n enabled=y phases=2 Linecode=1P_UG_AL_1/0_Brenau_0_416_0_2_2_2_2

New Line.l(r:p5udm6847-p5ulv2189) Units=km Length=0.013380800000000002 bus1=p5udm6847.1.2 bus2=p5ulv2189.1.2 switch=n enabled=y phases=2 Linecode=1P_UG_AL_1/0_Brenau_0_416_0_2_2_2_2

New Line.l(r:p5udm6847-p5ulv14495) Units=km Length=0.020952500000000002 bus1=p5udm6847.1.2 bus2=p5ulv14495.1.2 switch=n enabled=y phases=2 Linecode=1P_UG_AL_1/0_Brenau_0_416_0_2_2_2_2

New Line.l(r:p5udm6847-p5udt1862lv) Units=km Length=0.0191322 bus1=p5udt1862lv.1.2 bus2=p5udm6847.1.2 switch=n enabled=y phases=2 Linecode=1P_UG_AL_4/0_Sweetbriar_0_416_0_2_2_2_2

New Line.l(r:p5udm6848-p5ulv13984) Units=km Length=0.0170738 bus1=p5udm6848.1.2 bus2=p5ulv13984.1.2 switch=n enabled=y phases=2 Linecode=1P_UG_AL_1/0_Brenau_0_416_0_2_2_2_2

New Line.l(r:p5udm6848-p5udt1862lv) Units=km Length=0.0382608 bus1=p5udt1862lv.1.2 bus2=p5udm6848.1.2 switch=n enabled=y phases=2 Linecode=1P_UG_AL_1/0_Brenau_0_416_0_2_2_2_2

New Line.l(r:p5udt2536lv-p5ulv5140) Units=km Length=0.0150201 bus1=p5udt2536lv.1.2 bus2=p5ulv5140.1.2 switch=n enabled=y phases=2 Linecode=1P_OH_AL_2/0_Rucina_0_416_0_2_2_2_2

New Line.l(r:p5udm9107-p5ulv3153) Units=km Length=0.0138789 bus1=p5udm9107.1.2 bus2=p5ulv3153.1.2 switch=n enabled=y phases=2 Linecode=1P_OH_AL_2/0_Rucina_0_416_0_2_2_2_2

New Line.l(r:p5udm9107-p5ulv74011) Units=km Length=0.00655717 bus1=p5udm9107.1.2 bus2=p5ulv74011.1.2 switch=n enabled=y phases=2 Linecode=1P_OH_AL_2/0_Rucina_0_416_0_2_2_2_2

New Line.l(r:p5udm9107-p5udt2536lv) Units=km Length=0.018133 bus1=p5udt2536lv.1.2 bus2=p5udm9107.1.2 switch=n enabled=y phases=2 Linecode=1P_OH_AL_2/0_Rucina_0_416_0_2_2_2_2

New Line.l(r:p5udm9109-p5ulv28259) Units=km Length=0.00508073 bus1=p5udm9109.1.2 bus2=p5ulv28259.1.2 switch=n enabled=y phases=2 Linecode=1P_OH_AL_2/0_Rucina_0_416_0_2_2_2_2

New Line.l(r:p5udm9109-p5udt2536lv) Units=km Length=0.0181231 bus1=p5udt2536lv.1.2 bus2=p5udm9109.1.2 switch=n enabled=y phases=2 Linecode=1P_OH_AL_2/0_Rucina_0_416_0_2_2_2_2

New Line.l(r:p5udt2647lv-p5ulv3327) Units=km Length=0.0164124 bus1=p5udt2647lv.1.2 bus2=p5ulv3327.1.2 switch=n enabled=y phases=2 Linecode=1P_UG_AL_1/0_Brenau_0_416_0_2_2_2_2

New Line.l(r:p5udm9468-p5ulv8664) Units=km Length=0.0227167 bus1=p5udm9468.1.2 bus2=p5ulv8664.1.2 switch=n enabled=y phases=2 Linecode=1P_UG_AL_1/0_Brenau_0_416_0_2_2_2_2

New Line.l(r:p5udm9468-p5ulv13227) Units=km Length=0.0155444 bus1=p5udm9468.1.2 bus2=p5ulv13227.1.2 switch=n enabled=y phases=2 Linecode=1P_UG_AL_1/0_Brenau_0_416_0_2_2_2_2

New Line.l(r:p5udm9468-p5udt2647lv) Units=km Length=0.00969677 bus1=p5udt2647lv.1.2 bus2=p5udm9468.1.2 switch=n enabled=y phases=2 Linecode=1P_UG_AL_4/0_Sweetbriar_0_416_0_2_2_2_2

New Line.l(r:p5udm9469-p5ulv12871) Units=km Length=0.0139561 bus1=p5udm9469.1.2 bus2=p5ulv12871.1.2 switch=n enabled=y phases=2 Linecode=1P_UG_AL_1/0_Brenau_0_416_0_2_2_2_2

New Line.l(r:p5udm9469-p5udt2647lv) Units=km Length=0.00968754 bus1=p5udt2647lv.1.2 bus2=p5udm9469.1.2 switch=n enabled=y phases=2 Linecode=1P_UG_AL_1/0_Brenau_0_416_0_2_2_2_2

New Line.l(r:p5udm9479-p5ulv3331) Units=km Length=0.00728069 bus1=p5udm9479.1.2 bus2=p5ulv3331.1.2 switch=n enabled=y phases=2 Linecode=1P_UG_AL_4/0_Sweetbriar_0_416_0_2_2_2_2

New Line.l(r:p5udm9479-p5udt2650lv) Units=km Length=0.0327128 bus1=p5udt2650lv.1.2 bus2=p5udm9479.1.2 switch=n enabled=y phases=2 Linecode=1P_UG_AL_4/0_Sweetbriar_0_416_0_2_2_2_2

New Line.l(r:p5udm9480-p5ulv5142) Units=km Length=0.0074185200000000005 bus1=p5udm9480.1.2 bus2=p5ulv5142.1.2 switch=n enabled=y phases=2 Linecode=1P_UG_AL_1/0_Brenau_0_416_0_2_2_2_2

New Line.l(r:p5udm9480-p5udt2650lv) Units=km Length=0.0286978 bus1=p5udt2650lv.1.2 bus2=p5udm9480.1.2 switch=n enabled=y phases=2 Linecode=1P_UG_AL_1/0_Brenau_0_416_0_2_2_2_2

New Line.l(r:p5udm10260-p5ulv3706) Units=km Length=0.0109112 bus1=p5udm10260.1.2 bus2=p5ulv3706.1.2 switch=n enabled=y phases=2 Linecode=1P_UG_AL_1/0_Brenau_0_416_0_2_2_2_2

New Line.l(r:p5udm10261-p5ulv14156) Units=km Length=0.00958816 bus1=p5udm10261.1.2 bus2=p5ulv14156.1.2 switch=n enabled=y phases=2 Linecode=1P_UG_AL_1/0_Brenau_0_416_0_2_2_2_2

New Line.l(r:p5udm10260-p5udm10261) Units=km Length=0.00959002 bus1=p5udm10260.1.2 bus2=p5udm10261.1.2 switch=n enabled=y phases=2 Linecode=1P_UG_AL_1/0_Brenau_0_416_0_2_2_2_2

New Line.l(r:p5udm10260-p5udt2886lv) Units=km Length=0.0095862 bus1=p5udt2886lv.1.2 bus2=p5udm10260.1.2 switch=n enabled=y phases=2 Linecode=1P_UG_AL_2/0_Converse_0_416_0_2_2_2_2

New Line.l(r:p5udm10262-p5ulv17215) Units=km Length=0.0111052 bus1=p5udm10262.1.2 bus2=p5ulv17215.1.2 switch=n enabled=y phases=2 Linecode=1P_UG_AL_1/0_Brenau_0_416_0_2_2_2_2

New Line.l(r:p5udm10263-p5ulv18340) Units=km Length=0.0126886 bus1=p5udm10263.1.2 bus2=p5ulv18340.1.2 switch=n enabled=y phases=2 Linecode=1P_UG_AL_1/0_Brenau_0_416_0_2_2_2_2

New Line.l(r:p5udm10262-p5udm10263) Units=km Length=0.0095862 bus1=p5udm10262.1.2 bus2=p5udm10263.1.2 switch=n enabled=y phases=2 Linecode=1P_UG_AL_1/0_Brenau_0_416_0_2_2_2_2

New Line.l(r:p5udm10262-p5udt2886lv) Units=km Length=0.00958078 bus1=p5udt2886lv.1.2 bus2=p5udm10262.1.2 switch=n enabled=y phases=2 Linecode=1P_UG_AL_4/0_Sweetbriar_0_416_0_2_2_2_2

New Line.l(r:p5udt3319lv-p5ulv4408) Units=km Length=0.015558400000000002 bus1=p5udt3319lv.1.2 bus2=p5ulv4408.1.2 switch=n enabled=y phases=2 Linecode=1P_UG_AL_1/0_Brenau_0_416_0_2_2_2_2

New Line.l(r:p5udm11582-p5ulv5331) Units=km Length=0.0164984 bus1=p5udm11582.1.2 bus2=p5ulv5331.1.2 switch=n enabled=y phases=2 Linecode=1P_UG_AL_1/0_Brenau_0_416_0_2_2_2_2

New Line.l(r:p5udm11582-p5udt3319lv) Units=km Length=0.008046650000000002 bus1=p5udt3319lv.1.2 bus2=p5udm11582.1.2 switch=n enabled=y phases=2 Linecode=1P_UG_AL_1/0_Brenau_0_416_0_2_2_2_2

New Line.l(r:p5udt3411lv-p5ulv8471) Units=km Length=0.0182052 bus1=p5udt3411lv.1.2 bus2=p5ulv8471.1.2 switch=n enabled=y phases=2 Linecode=1P_UG_AL_1/0_Brenau_0_416_0_2_2_2_2

New Line.l(r:p5udm11858-p5ulv4585) Units=km Length=0.0155521 bus1=p5udm11858.1.2 bus2=p5ulv4585.1.2 switch=n enabled=y phases=2 Linecode=1P_UG_AL_1/0_Brenau_0_416_0_2_2_2_2

New Line.l(r:p5udm11858-p5ulv14490) Units=km Length=0.0119552 bus1=p5udm11858.1.2 bus2=p5ulv14490.1.2 switch=n enabled=y phases=2 Linecode=1P_UG_AL_1/0_Brenau_0_416_0_2_2_2_2

New Line.l(r:p5udm11858-p5udt3411lv) Units=km Length=0.0185809 bus1=p5udt3411lv.1.2 bus2=p5udm11858.1.2 switch=n enabled=y phases=2 Linecode=1P_UG_AL_2/0_Converse_0_416_0_2_2_2_2

New Line.l(r:p5udm11860-p5ulv5728) Units=km Length=0.00987628 bus1=p5udm11860.1.2 bus2=p5ulv5728.1.2 switch=n enabled=y phases=2 Linecode=1P_UG_AL_1/0_Brenau_0_416_0_2_2_2_2

New Line.l(r:p5udm11859-p5ulv5329) Units=km Length=0.0100413 bus1=p5udm11859.1.2 bus2=p5ulv5329.1.2 switch=n enabled=y phases=2 Linecode=1P_UG_AL_1/0_Brenau_0_416_0_2_2_2_2

New Line.l(r:p5udm11859-p5ulv7574) Units=km Length=0.0163429 bus1=p5udm11859.1.2 bus2=p5ulv7574.1.2 switch=n enabled=y phases=2 Linecode=1P_UG_AL_1/0_Brenau_0_416_0_2_2_2_2

New Line.l(r:p5udm11859-p5udm11860) Units=km Length=0.00994131 bus1=p5udm11860.1.2 bus2=p5udm11859.1.2 switch=n enabled=y phases=2 Linecode=1P_UG_AL_4/0_Sweetbriar_0_416_0_2_2_2_2

New Line.l(r:p5udm11860-p5udt3411lv) Units=km Length=0.00994131 bus1=p5udt3411lv.1.2 bus2=p5udm11860.1.2 switch=n enabled=y phases=2 Linecode=1P_UG_AL_4/0_Sweetbriar_0_416_0_2_2_2_2

New Line.l(r:p5udt3412lv-p5ulv4588) Units=km Length=0.0156719 bus1=p5udt3412lv.1.2 bus2=p5ulv4588.1.2 switch=n enabled=y phases=2 Linecode=1P_UG_AL_1/0_Brenau_0_416_0_2_2_2_2

New Line.l(r:p5udt3412lv-p5ulv15582) Units=km Length=0.0149908 bus1=p5udt3412lv.1.2 bus2=p5ulv15582.1.2 switch=n enabled=y phases=2 Linecode=1P_UG_AL_1/0_Brenau_0_416_0_2_2_2_2

New Line.l(r:p5udm11864-p5ulv4587) Units=km Length=0.0160213 bus1=p5udm11864.1.2 bus2=p5ulv4587.1.2 switch=n enabled=y phases=2 Linecode=1P_UG_AL_1/0_Brenau_0_416_0_2_2_2_2

New Line.l(r:p5udm11864-p5ulv9075) Units=km Length=0.0157418 bus1=p5udm11864.1.2 bus2=p5ulv9075.1.2 switch=n enabled=y phases=2 Linecode=1P_UG_AL_1/0_Brenau_0_416_0_2_2_2_2

New Line.l(r:p5udm11864-p5udt3412lv) Units=km Length=0.00968754 bus1=p5udt3412lv.1.2 bus2=p5udm11864.1.2 switch=n enabled=y phases=2 Linecode=1P_UG_AL_1/0_Brenau_0_416_0_2_2_2_2

New Line.l(r:p5udm11868-p5ulv16660) Units=km Length=0.0159113 bus1=p5udm11868.1.2 bus2=p5ulv16660.1.2 switch=n enabled=y phases=2 Linecode=1P_UG_AL_1/0_Brenau_0_416_0_2_2_2_2

New Line.l(r:p5udm11868-p5udt3412lv) Units=km Length=0.019394300000000003 bus1=p5udt3412lv.1.2 bus2=p5udm11868.1.2 switch=n enabled=y phases=2 Linecode=1P_UG_AL_1/0_Brenau_0_416_0_2_2_2_2

New Line.l(r:p5udt3506lv-p5ulv6651) Units=km Length=0.0150719 bus1=p5udt3506lv.1.2 bus2=p5ulv6651.1.2 switch=n enabled=y phases=2 Linecode=1P_OH_AL_2/0_Rucina_0_416_0_2_2_2_2

New Line.l(r:p5udm12123-p5ulv4766) Units=km Length=0.0132748 bus1=p5udm12123.1.2 bus2=p5ulv4766.1.2 switch=n enabled=y phases=2 Linecode=1P_OH_AL_2/0_Rucina_0_416_0_2_2_2_2

New Line.l(r:p5udm12126-p5ulv14155) Units=km Length=0.00305221 bus1=p5udm12126.1.2 bus2=p5ulv14155.1.2 switch=n enabled=y phases=2 Linecode=1P_UG_AL_1/0_Brenau_0_416_0_2_2_2_2

New Line.l(r:p5udm12123-p5udm12126) Units=km Length=0.00934436 bus1=p5udm12123.1.2 bus2=p5udm12126.1.2 switch=n enabled=y phases=2 Linecode=1P_OH_AL_2/0_Rucina_0_416_0_2_2_2_2

New Line.l(r:p5udm12123-p5udt3506lv) Units=km Length=0.0151108 bus1=p5udt3506lv.1.2 bus2=p5udm12123.1.2 switch=n enabled=y phases=2 Linecode=1P_OH_AL_2/0_Rucina_0_416_0_2_2_2_2

New Line.l(r:p5udm12124-p5ulv5729) Units=km Length=0.0120944 bus1=p5udm12124.1.2 bus2=p5ulv5729.1.2 switch=n enabled=y phases=2 Linecode=1P_OH_AL_2/0_Rucina_0_416_0_2_2_2_2

New Line.l(r:p5udm12124-p5udt3506lv) Units=km Length=0.015100900000000002 bus1=p5udt3506lv.1.2 bus2=p5udm12124.1.2 switch=n enabled=y phases=2 Linecode=1P_OH_AL_2/0_Rucina_0_416_0_2_2_2_2

New Line.l(r:p5udt3605lv-p5ulv17984) Units=km Length=0.0111032 bus1=p5udt3605lv.1.2 bus2=p5ulv17984.1.2 switch=n enabled=y phases=2 Linecode=1P_UG_AL_1/0_Brenau_0_416_0_2_2_2_2

New Line.l(r:p5udm12410-p5ulv4947) Units=km Length=0.0103896 bus1=p5udm12410.1.2 bus2=p5ulv4947.1.2 switch=n enabled=y phases=2 Linecode=1P_UG_AL_1/0_Brenau_0_416_0_2_2_2_2

New Line.l(r:p5udm12410-p5udt3605lv) Units=km Length=0.0191958 bus1=p5udt3605lv.1.2 bus2=p5udm12410.1.2 switch=n enabled=y phases=2 Linecode=1P_UG_AL_1/0_Brenau_0_416_0_2_2_2_2

New Line.l(r:p5udm12411-p5ulv14665) Units=km Length=0.012367300000000001 bus1=p5udm12411.1.2 bus2=p5ulv14665.1.2 switch=n enabled=y phases=2 Linecode=1P_UG_AL_1/0_Brenau_0_416_0_2_2_2_2

New Line.l(r:p5udm12411-p5udt3605lv) Units=km Length=0.00959878 bus1=p5udt3605lv.1.2 bus2=p5udm12411.1.2 switch=n enabled=y phases=2 Linecode=1P_UG_AL_1/0_Brenau_0_416_0_2_2_2_2

New Line.l(r:p5udt3896lv-p5ulv5538) Units=km Length=0.016851 bus1=p5udt3896lv.1.2 bus2=p5ulv5538.1.2 switch=n enabled=y phases=2 Linecode=1P_UG_AL_1/0_Brenau_0_416_0_2_2_2_2

New Line.l(r:p5udt3896lv-p5ulv17609) Units=km Length=0.0193736 bus1=p5udt3896lv.1.2 bus2=p5ulv17609.1.2 switch=n enabled=y phases=2 Linecode=1P_UG_AL_1/0_Brenau_0_416_0_2_2_2_2

New Line.l(r:p5udm13203-p5ulv12096) Units=km Length=0.0196525 bus1=p5udm13203.1.2 bus2=p5ulv12096.1.2 switch=n enabled=y phases=2 Linecode=1P_UG_AL_1/0_Brenau_0_416_0_2_2_2_2

New Line.l(r:p5udm13203-p5udt3896lv) Units=km Length=0.00956519 bus1=p5udt3896lv.1.2 bus2=p5udm13203.1.2 switch=n enabled=y phases=2 Linecode=1P_UG_AL_1/0_Brenau_0_416_0_2_2_2_2

New Line.l(r:p5udm13204-p5ulv17040) Units=km Length=0.021222 bus1=p5udm13204.1.2 bus2=p5ulv17040.1.2 switch=n enabled=y phases=2 Linecode=1P_UG_AL_1/0_Brenau_0_416_0_2_2_2_2

New Line.l(r:p5udm13204-p5udt3896lv) Units=km Length=0.00956519 bus1=p5udt3896lv.1.2 bus2=p5udm13204.1.2 switch=n enabled=y phases=2 Linecode=1P_UG_AL_1/0_Brenau_0_416_0_2_2_2_2

New Line.l(r:p5udt4248lv-p5ulv6291) Units=km Length=0.016613 bus1=p5udt4248lv.1.2 bus2=p5ulv6291.1.2 switch=n enabled=y phases=2 Linecode=1P_UG_AL_1/0_Brenau_0_416_0_2_2_2_2

New Line.l(r:p5udm14321-p5ulv6461) Units=km Length=0.009279060000000002 bus1=p5udm14321.1.2 bus2=p5ulv6461.1.2 switch=n enabled=y phases=2 Linecode=1P_UG_AL_1/0_Brenau_0_416_0_2_2_2_2

New Line.l(r:p5udm14321-p5ulv7755) Units=km Length=0.00862968 bus1=p5udm14321.1.2 bus2=p5ulv7755.1.2 switch=n enabled=y phases=2 Linecode=1P_UG_AL_1/0_Brenau_0_416_0_2_2_2_2

New Line.l(r:p5udm14321-p5udt4332lv) Units=km Length=0.00822061 bus1=p5udt4332lv.1.2 bus2=p5udm14321.1.2 switch=n enabled=y phases=2 Linecode=1P_UG_AL_2/0_Converse_0_416_0_2_2_2_2

New Line.l(r:p5udm14323-p5ulv77837) Units=km Length=0.00680507 bus1=p5udm14323.1.2 bus2=p5ulv77837.1.2 switch=n enabled=y phases=2 Linecode=1P_UG_AL_1/0_Brenau_0_416_0_2_2_2_2

New Line.l(r:p5udm14323-p5udt4332lv) Units=km Length=0.016451 bus1=p5udt4332lv.1.2 bus2=p5udm14323.1.2 switch=n enabled=y phases=2 Linecode=1P_UG_AL_1/0_Brenau_0_416_0_2_2_2_2

New Line.l(r:p5udt4333lv-p5ulv6462) Units=km Length=0.011871900000000001 bus1=p5udt4333lv.1.2 bus2=p5ulv6462.1.2 switch=n enabled=y phases=2 Linecode=1P_OH_AL_2/0_Rucina_0_416_0_2_2_2_2

New Line.l(r:p5udt4431lv-p5ulv15953) Units=km Length=0.0104167 bus1=p5udt4431lv.1.2 bus2=p5ulv15953.1.2 switch=n enabled=y phases=2 Linecode=1P_UG_AL_1/0_Brenau_0_416_0_2_2_2_2

New Line.l(r:p5udm14571-p5ulv6655) Units=km Length=0.009755620000000001 bus1=p5udm14571.1.2 bus2=p5ulv6655.1.2 switch=n enabled=y phases=2 Linecode=1P_UG_AL_1/0_Brenau_0_416_0_2_2_2_2

New Line.l(r:p5udm14571-p5udt4431lv) Units=km Length=0.018519100000000004 bus1=p5udt4431lv.1.2 bus2=p5udm14571.1.2 switch=n enabled=y phases=2 Linecode=1P_UG_AL_1/0_Brenau_0_416_0_2_2_2_2

New Line.l(r:p5udm14572-p5ulv14496) Units=km Length=0.010847 bus1=p5udm14572.1.2 bus2=p5ulv14496.1.2 switch=n enabled=y phases=2 Linecode=1P_UG_AL_1/0_Brenau_0_416_0_2_2_2_2

New Line.l(r:p5udm14572-p5udt4431lv) Units=km Length=0.0187356 bus1=p5udt4431lv.1.2 bus2=p5udm14572.1.2 switch=n enabled=y phases=2 Linecode=1P_UG_AL_1/0_Brenau_0_416_0_2_2_2_2

New Line.l(r:p5udt4745lv-p5ulv7391) Units=km Length=0.0148762 bus1=p5udt4745lv.1.2 bus2=p5ulv7391.1.2 switch=n enabled=y phases=2 Linecode=1P_OH_AL_2/0_Rucina_0_416_0_2_2_2_2

New Line.l(r:p5udm15350-p5ulv9802) Units=km Length=0.0149908 bus1=p5udm15350.1.2 bus2=p5ulv9802.1.2 switch=n enabled=y phases=2 Linecode=1P_OH_AL_2/0_Rucina_0_416_0_2_2_2_2

New Line.l(r:p5udm15350-p5udt4745lv) Units=km Length=0.018256700000000004 bus1=p5udt4745lv.1.2 bus2=p5udm15350.1.2 switch=n enabled=y phases=2 Linecode=1P_OH_AL_2/0_Rucina_0_416_0_2_2_2_2

New Line.l(r:p5udt4966lv-p5ulv7930) Units=km Length=0.0203427 bus1=p5udt4966lv.1.2 bus2=p5ulv7930.1.2 switch=n enabled=y phases=2 Linecode=1P_OH_AL_2/0_Rucina_0_416_0_2_2_2_2

New Line.l(r:p5udt5042lv-p5ulv8125) Units=km Length=0.0259999 bus1=p5udt5042lv.1.2 bus2=p5ulv8125.1.2 switch=n enabled=y phases=2 Linecode=1P_OH_AL_2/0_Rucina_0_416_0_2_2_2_2

New Line.l(r:p5udm16051-p5ulv10979) Units=km Length=0.0200938 bus1=p5udm16051.1.2 bus2=p5ulv10979.1.2 switch=n enabled=y phases=2 Linecode=1P_OH_AL_2/0_Rucina_0_416_0_2_2_2_2

New Line.l(r:p5udm16051-p5udt5042lv) Units=km Length=0.0175263 bus1=p5udt5042lv.1.2 bus2=p5udm16051.1.2 switch=n enabled=y phases=2 Linecode=1P_OH_AL_2/0_Rucina_0_416_0_2_2_2_2

New Line.l(r:p5udt5179lv-p5ulv8476) Units=km Length=0.012459 bus1=p5udt5179lv.1.2 bus2=p5ulv8476.1.2 switch=n enabled=y phases=2 Linecode=1P_UG_AL_1/0_Brenau_0_416_0_2_2_2_2

New Line.l(r:p5udt5306lv-p5ulv8856) Units=km Length=0.0626246 bus1=p5udt5306lv.1.2 bus2=p5ulv8856.1.2 switch=n enabled=y phases=2 Linecode=1P_OH_AL_4/0_Zuzara_0_416_0_2_2_2_2

New Line.l(r:p5udm16661-p5ulv47609) Units=km Length=0.0496622 bus1=p5udm16661.1.2 bus2=p5ulv47609.1.2 switch=n enabled=y phases=2 Linecode=1P_OH_AL_4/0_Zuzara_0_416_0_2_2_2_2

New Line.l(r:p5udm16661-p5udt5306lv) Units=km Length=0.0112031 bus1=p5udt5306lv.1.2 bus2=p5udm16661.1.2 switch=n enabled=y phases=2 Linecode=1P_OH_AL_2/0_Rucina_0_416_0_2_2_2_2

New Line.l(r:p5udt5311lv-p5ulv8873) Units=km Length=0.0150155 bus1=p5udt5311lv.1.2 bus2=p5ulv8873.1.2 switch=n enabled=y phases=2 Linecode=1P_UG_AL_1/0_Brenau_0_416_0_2_2_2_2

New Line.l(r:p5udm16673-p5ulv12278) Units=km Length=0.016170100000000003 bus1=p5udm16673.1.2 bus2=p5ulv12278.1.2 switch=n enabled=y phases=2 Linecode=1P_UG_AL_1/0_Brenau_0_416_0_2_2_2_2

New Line.l(r:p5udm16673-p5udt5311lv) Units=km Length=0.00956335 bus1=p5udt5311lv.1.2 bus2=p5udm16673.1.2 switch=n enabled=y phases=2 Linecode=1P_UG_AL_1/0_Brenau_0_416_0_2_2_2_2

New Line.l(r:p5udt5527lv-p5ulv9471) Units=km Length=0.00475337 bus1=p5udt5527lv.1.2 bus2=p5ulv9471.1.2 switch=n enabled=y phases=2 Linecode=1P_OH_AL_2/0_Rucina_0_416_0_2_2_2_2

New Line.l(r:p5udt5588lv-p5ulv17606) Units=km Length=0.00995327 bus1=p5udt5588lv.1.2 bus2=p5ulv17606.1.2 switch=n enabled=y phases=2 Linecode=1P_UG_AL_1/0_Brenau_0_416_0_2_2_2_2

New Line.l(r:p5udm17229-p5ulv9645) Units=km Length=0.00716549 bus1=p5udm17229.1.2 bus2=p5ulv9645.1.2 switch=n enabled=y phases=2 Linecode=1P_UG_AL_1/0_Brenau_0_416_0_2_2_2_2

New Line.l(r:p5udm17229-p5udt5588lv) Units=km Length=0.00959002 bus1=p5udt5588lv.1.2 bus2=p5udm17229.1.2 switch=n enabled=y phases=2 Linecode=1P_UG_AL_1/0_Brenau_0_416_0_2_2_2_2

New Line.l(r:p5udm17230-p5ulv13981) Units=km Length=0.0119929 bus1=p5udm17230.1.2 bus2=p5ulv13981.1.2 switch=n enabled=y phases=2 Linecode=1P_UG_AL_1/0_Brenau_0_416_0_2_2_2_2

New Line.l(r:p5udm17230-p5udt5588lv) Units=km Length=0.0095862 bus1=p5udt5588lv.1.2 bus2=p5udm17230.1.2 switch=n enabled=y phases=2 Linecode=1P_UG_AL_1/0_Brenau_0_416_0_2_2_2_2

New Line.l(r:p5udt5589lv-p5ulv9801) Units=km Length=0.00710412 bus1=p5udt5589lv.1.2 bus2=p5ulv9801.1.2 switch=n enabled=y phases=2 Linecode=1P_UG_AL_1/0_Brenau_0_416_0_2_2_2_2

New Line.l(r:p5udm17234-p5ulv15013) Units=km Length=0.00626547 bus1=p5udm17234.1.2 bus2=p5ulv15013.1.2 switch=n enabled=y phases=2 Linecode=1P_UG_AL_1/0_Brenau_0_416_0_2_2_2_2

New Line.l(r:p5udm17235-p5ulv17393) Units=km Length=0.00915731 bus1=p5udm17235.1.2 bus2=p5ulv17393.1.2 switch=n enabled=y phases=2 Linecode=1P_UG_AL_1/0_Brenau_0_416_0_2_2_2_2

New Line.l(r:p5udm17234-p5udm17235) Units=km Length=0.00774824 bus1=p5udm17234.1.2 bus2=p5udm17235.1.2 switch=n enabled=y phases=2 Linecode=1P_UG_AL_1/0_Brenau_0_416_0_2_2_2_2

New Line.l(r:p5udm17234-p5udt5589lv) Units=km Length=0.0180505 bus1=p5udt5589lv.1.2 bus2=p5udm17234.1.2 switch=n enabled=y phases=2 Linecode=1P_UG_AL_2/0_Converse_0_416_0_2_2_2_2

New Line.l(r:p5udm17236-p5ulv77836) Units=km Length=0.00845146 bus1=p5udm17236.1.2 bus2=p5ulv77836.1.2 switch=n enabled=y phases=2 Linecode=1P_UG_AL_1/0_Brenau_0_416_0_2_2_2_2

New Line.l(r:p5udm17232-p5ulv9646) Units=km Length=0.00824044 bus1=p5udm17232.1.2 bus2=p5ulv9646.1.2 switch=n enabled=y phases=2 Linecode=1P_OH_AL_2/0_Rucina_0_416_0_2_2_2_2

New Line.l(r:p5udm17232-p5udm17236) Units=km Length=0.0405113 bus1=p5udm17236.1.2 bus2=p5udm17232.1.2 switch=n enabled=y phases=2 Linecode=1P_OH_AL_4/0_Zuzara_0_416_0_2_2_2_2

New Line.l(r:p5udm17236-p5udt5589lv) Units=km Length=0.00987209 bus1=p5udt5589lv.1.2 bus2=p5udm17236.1.2 switch=n enabled=y phases=2 Linecode=1P_UG_AL_1/0_Brenau_0_416_0_2_2_2_2

New Line.l(r:p5udt5643lv-p5ulv9803) Units=km Length=0.00842005 bus1=p5udt5643lv.1.2 bus2=p5ulv9803.1.2 switch=n enabled=y phases=2 Linecode=1P_OH_AL_2/0_Rucina_0_416_0_2_2_2_2

New Line.l(r:p5udt5643lv-p5ulv11555) Units=km Length=0.006048840000000001 bus1=p5udt5643lv.1.2 bus2=p5ulv11555.1.2 switch=n enabled=y phases=2 Linecode=1P_OH_AL_2/0_Rucina_0_416_0_2_2_2_2

New Line.l(r:p5udm17335-p5ulv14157) Units=km Length=0.00883971 bus1=p5udm17335.1.2 bus2=p5ulv14157.1.2 switch=n enabled=y phases=2 Linecode=1P_UG_AL_4/0_Sweetbriar_0_416_0_2_2_2_2

New Line.l(r:p5udm17335-p5udt5643lv) Units=km Length=0.0271763 bus1=p5udt5643lv.1.2 bus2=p5udm17335.1.2 switch=n enabled=y phases=2 Linecode=1P_OH_AL_4/0_Zuzara_0_416_0_2_2_2_2

New Line.l(r:p5udt5882lv-p5ulv10477) Units=km Length=0.013633 bus1=p5udt5882lv.1.2 bus2=p5ulv10477.1.2 switch=n enabled=y phases=2 Linecode=1P_OH_AL_2/0_Rucina_0_416_0_2_2_2_2

New Line.l(r:p5udt6124lv-p5ulv11264) Units=km Length=0.013050200000000001 bus1=p5udt6124lv.1.2 bus2=p5ulv11264.1.2 switch=n enabled=y phases=2 Linecode=1P_OH_AL_2/0_Rucina_0_416_0_2_2_2_2

New Line.l(r:p5udm18393-p5ulv11473) Units=km Length=0.0101393 bus1=p5udm18393.1.2 bus2=p5ulv11473.1.2 switch=n enabled=y phases=2 Linecode=1P_OH_AL_2/0_Rucina_0_416_0_2_2_2_2

New Line.l(r:p5udm18393-p5udt6183lv) Units=km Length=0.03473840000000001 bus1=p5udt6183lv.1.2 bus2=p5udm18393.1.2 switch=n enabled=y phases=2 Linecode=1P_OH_AL_4/0_Zuzara_0_416_0_2_2_2_2

New Line.l(r:p5udm18394-p5ulv17721) Units=km Length=0.0124782 bus1=p5udm18394.1.2 bus2=p5ulv17721.1.2 switch=n enabled=y phases=2 Linecode=1P_OH_AL_2/0_Rucina_0_416_0_2_2_2_2

New Line.l(r:p5udm18394-p5udt6183lv) Units=km Length=0.0562517 bus1=p5udt6183lv.1.2 bus2=p5udm18394.1.2 switch=n enabled=y phases=2 Linecode=1P_OH_AL_4/0_Zuzara_0_416_0_2_2_2_2

New Line.l(r:p5udm18443-p5ulv11552) Units=km Length=0.00789023 bus1=p5udm18443.1.2 bus2=p5ulv11552.1.2 switch=n enabled=y phases=2 Linecode=1P_UG_AL_1/0_Brenau_0_416_0_2_2_2_2

New Line.l(r:p5udm18443-p5udt6207lv) Units=km Length=0.00960255 bus1=p5udt6207lv.1.2 bus2=p5udm18443.1.2 switch=n enabled=y phases=2 Linecode=1P_UG_AL_1/0_Brenau_0_416_0_2_2_2_2

New Line.l(r:p5udm18444-p5ulv15580) Units=km Length=0.0137981 bus1=p5udm18444.1.2 bus2=p5ulv15580.1.2 switch=n enabled=y phases=2 Linecode=1P_UG_AL_1/0_Brenau_0_416_0_2_2_2_2

New Line.l(r:p5udm18444-p5ulv15581) Units=km Length=0.040686900000000005 bus1=p5udm18444.1.2 bus2=p5ulv15581.1.2 switch=n enabled=y phases=2 Linecode=1P_UG_AL_1/0_Brenau_0_416_0_2_2_2_2

New Line.l(r:p5udm18444-p5udt6207lv) Units=km Length=0.00960255 bus1=p5udt6207lv.1.2 bus2=p5udm18444.1.2 switch=n enabled=y phases=2 Linecode=1P_UG_AL_1/0_Brenau_0_416_0_2_2_2_2

New Line.l(r:p5udt6428lv-p5ulv12273) Units=km Length=0.009614 bus1=p5udt6428lv.1.2 bus2=p5ulv12273.1.2 switch=n enabled=y phases=2 Linecode=1P_OH_AL_2/0_Rucina_0_416_0_2_2_2_2

New Line.l(r:p5udt6474lv-p5ulv12469) Units=km Length=0.0192341 bus1=p5udt6474lv.1.2 bus2=p5ulv12469.1.2 switch=n enabled=y phases=2 Linecode=1P_UG_AL_1/0_Brenau_0_416_0_2_2_2_2

New Line.l(r:p5udm18862-p5ulv14494) Units=km Length=0.0142786 bus1=p5udm18862.1.2 bus2=p5ulv14494.1.2 switch=n enabled=y phases=2 Linecode=1P_UG_AL_1/0_Brenau_0_416_0_2_2_2_2

New Line.l(r:p5udm18862-p5udt6474lv) Units=km Length=0.00967465 bus1=p5udt6474lv.1.2 bus2=p5udm18862.1.2 switch=n enabled=y phases=2 Linecode=1P_UG_AL_1/0_Brenau_0_416_0_2_2_2_2

New Line.l(r:p5udm18956-p5ulv12668) Units=km Length=0.00340777 bus1=p5udm18956.1.2 bus2=p5ulv12668.1.2 switch=n enabled=y phases=2 Linecode=1P_OH_AL_4_Periwinkle_0_416_0_2_2_2_2

New Line.l(r:p5udm18956-p5udt6525lv) Units=km Length=0.0427188 bus1=p5udt6525lv.1.2 bus2=p5udm18956.1.2 switch=n enabled=y phases=2 Linecode=1P_OH_AL_4/0_Zuzara_0_416_0_2_2_2_2

New Line.l(r:p5udm18957-p5ulv18342) Units=km Length=0.00446061 bus1=p5udm18957.1.2 bus2=p5ulv18342.1.2 switch=n enabled=y phases=2 Linecode=1P_UG_AL_4/0_Sweetbriar_0_416_0_2_2_2_2

New Line.l(r:p5udm18957-p5udt6525lv) Units=km Length=0.03747960000000001 bus1=p5udt6525lv.1.2 bus2=p5udm18957.1.2 switch=n enabled=y phases=2 Linecode=1P_OH_AL_4/0_Zuzara_0_416_0_2_2_2_2

New Line.l(r:p5udt6587lv-p5ulv12872) Units=km Length=0.00794529 bus1=p5udt6587lv.1.2 bus2=p5ulv12872.1.2 switch=n enabled=y phases=2 Linecode=1P_UG_AL_1/0_Brenau_0_416_0_2_2_2_2

New Line.l(r:p5udt6853lv-p5ulv13982) Units=km Length=0.0102857 bus1=p5udt6853lv.1.2 bus2=p5ulv13982.1.2 switch=n enabled=y phases=2 Linecode=1P_UG_AL_1/0_Brenau_0_416_0_2_2_2_2

New Line.l(r:p5udm19509-p5ulv16464) Units=km Length=0.00749825 bus1=p5udm19509.1.2 bus2=p5ulv16464.1.2 switch=n enabled=y phases=2 Linecode=1P_UG_AL_1/0_Brenau_0_416_0_2_2_2_2

New Line.l(r:p5udm19508-p5ulv14493) Units=km Length=0.001 bus1=p5udm19508.1.2 bus2=p5ulv14493.1.2 switch=n enabled=y phases=2 Linecode=1P_OH_AL_4_Periwinkle_0_416_0_2_2_2_2

New Line.l(r:p5udm19508-p5udm19509) Units=km Length=0.121058 bus1=p5udm19509.1.2 bus2=p5udm19508.1.2 switch=n enabled=y phases=2 Linecode=1P_OH_AL_4/0_Zuzara_0_416_0_2_2_2_2

New Line.l(r:p5udm19509-p5udt6853lv) Units=km Length=0.0210136 bus1=p5udt6853lv.1.2 bus2=p5udm19509.1.2 switch=n enabled=y phases=2 Linecode=1P_UG_AL_1/0_Brenau_0_416_0_2_2_2_2

New Line.l(r:p5udt6991lv-p5ulv14593) Units=km Length=0.0125964 bus1=p5udt6991lv.1.2 bus2=p5ulv14593.1.2 switch=n enabled=y phases=2 Linecode=1P_OH_AL_2/0_Rucina_0_416_0_2_2_2_2

New Line.l(r:p5udt7197lv-p5ulv15583) Units=km Length=0.0175078 bus1=p5udt7197lv.1.2 bus2=p5ulv15583.1.2 switch=n enabled=y phases=2 Linecode=1P_UG_AL_1/0_Brenau_0_416_0_2_2_2_2

New Line.l(r:p5udt7198lv-p5ulv15585) Units=km Length=0.0181306 bus1=p5udt7198lv.1.2 bus2=p5ulv15585.1.2 switch=n enabled=y phases=2 Linecode=1P_UG_AL_2/0_Converse_0_416_0_2_2_2_2

New Line.l(r:p5udt7244lv-p5ulv15774) Units=km Length=0.0150842 bus1=p5udt7244lv.1.2 bus2=p5ulv15774.1.2 switch=n enabled=y phases=2 Linecode=1P_OH_AL_2/0_Rucina_0_416_0_2_2_2_2

New Line.l(r:p5udt7296lv-p5ulv15935) Units=km Length=0.0279214 bus1=p5udt7296lv.1.2 bus2=p5ulv15935.1.2 switch=n enabled=y phases=2 Linecode=1P_OH_AL_4/0_Zuzara_0_416_0_2_2_2_2

New Line.l(r:p5udt7322lv-p5ulv16056) Units=km Length=0.0140581 bus1=p5udt7322lv.1.2 bus2=p5ulv16056.1.2 switch=n enabled=y phases=2 Linecode=1P_UG_AL_4/0_Sweetbriar_0_416_0_2_2_2_2

New Line.l(r:p5udt7601lv-p5ulv17611) Units=km Length=0.0147677 bus1=p5udt7601lv.1.2 bus2=p5ulv17611.1.2 switch=n enabled=y phases=2 Linecode=1P_UG_AL_1/0_Brenau_0_416_0_2_2_2_2

New Line.l(r:p5udt7775lv-p5ulv18536) Units=km Length=0.00666753 bus1=p5udt7775lv.1.2 bus2=p5ulv18536.1.2 switch=n enabled=y phases=2 Linecode=1P_OH_AL_2/0_Rucina_0_416_0_2_2_2_2

New Line.l(r:p5udt7917lv-p5ulv19228) Units=km Length=0.0148012 bus1=p5udt7917lv.1.2 bus2=p5ulv19228.1.2 switch=n enabled=y phases=2 Linecode=1P_UG_AL_4/0_Sweetbriar_0_416_0_2_2_2_2

New Line.l(r:p5udt14892lv-p5ulv27645) Units=km Length=0.0388168 bus1=p5udt14892lv.1.2 bus2=p5ulv27645.1.2 switch=n enabled=y phases=2 Linecode=1P_OH_AL_4/0_Zuzara_0_416_0_2_2_2_2

New Line.l(r:p5udt18097lv-p5ulv32636) Units=km Length=0.00693878 bus1=p5udt18097lv.1.2 bus2=p5ulv32636.1.2 switch=n enabled=y phases=2 Linecode=1P_OH_AL_2/0_Rucina_0_416_0_2_2_2_2

New Line.l(r:p5udt31232lv-p5ulv67631) Units=km Length=0.016248700000000005 bus1=p5udt31232lv.1.2 bus2=p5ulv67631.1.2 switch=n enabled=y phases=2 Linecode=1P_UG_AL_1/0_Brenau_0_416_0_2_2_2_2

New Line.l(r:p5udt33094lv-p5ulv75471) Units=km Length=0.009366990000000002 bus1=p5udt33094lv.1.2 bus2=p5ulv75471.1.2 switch=n enabled=y phases=2 Linecode=1P_OH_AL_2/0_Rucina_0_416_0_2_2_2_2

New Line.l(r:p5udt33597lv-p5ulv77838) Units=km Length=0.00763325 bus1=p5udt33597lv.1.2 bus2=p5ulv77838.1.2 switch=n enabled=y phases=2 Linecode=1P_OH_AL_2/0_Rucina_0_416_0_2_2_2_2

New Line.l(r:p5udt33598lv-p5ulv77839) Units=km Length=0.0184911 bus1=p5udt33598lv.1.2 bus2=p5ulv77839.1.2 switch=n enabled=y phases=2 Linecode=1P_OH_AL_2/0_Rucina_0_416_0_2_2_2_2

New Line.l(r:p5udt33599lv-p5ulv77840) Units=km Length=0.0241415 bus1=p5udt33599lv.1.2 bus2=p5ulv77840.1.2 switch=n enabled=y phases=2 Linecode=1P_OH_AL_2/0_Rucina_0_416_0_2_2_2_2

New Line.l(r:p5udt33683lv-p5ulv78493) Units=km Length=0.005892990000000001 bus1=p5udt33683lv.1.2 bus2=p5ulv78493.1.2 switch=n enabled=y phases=2 Linecode=1P_UG_AL_1/0_Brenau_0_416_0_2_2_2_2

New Line.l(r:p5udt1087-p5udt6124) Units=km Length=0.0173483 bus1=p5udt1087-p5udt6124x.1 bus2=p5udt6124.1 switch=n enabled=y phases=1 Linecode=1P_OH_AL_ACSR_#2_Sparrow_12_47_0_1_1_1_1

New Line.l(r:p5udt4327-p5udt7296) Units=km Length=0.136268 bus1=p5udt4327-p5udt7296x.2 bus2=p5udt7296.2 switch=n enabled=y phases=1 Linecode=1P_OH_AL_ACSR_#2_Sparrow_12_47_0_1_1_1_1

New Line.l(r:p5udt1394-p5udt4218) Units=km Length=0.153536 bus1=p5udt1394.1.2.3 bus2=p5udt4218.1.2.3 switch=n enabled=y phases=3 Linecode=3P_OH_AL_ACSR_336kcmil_Merlin_12_47_0_3_3_3_3

New Line.l(r:p5udt33599-p5udt3899) Units=km Length=0.001 bus1=p5udt33599-p5udt3899x.3 bus2=p5udt33599.3 switch=n enabled=y phases=1 Linecode=1P_OH_AL_ACSR_#2_Sparrow_12_47_0_1_1_1_1

New Line.l(r:p5udt1394-p5udt933) Units=km Length=0.16128500000000004 bus1=p5udt933.1.2.3 bus2=p5udt1394.1.2.3 switch=n enabled=y phases=3 Linecode=3P_OH_AL_ACSR_477kcmil_Hawk_12_47_0_3_3_3_3

New Line.l(r:p5udt33094-p5udt933) Units=km Length=0.001 bus1=p5udt33094-p5udt933x.1 bus2=p5udt33094.1 switch=n enabled=y phases=1 Linecode=1P_OH_AL_ACSR_#2_Sparrow_12_47_0_1_1_1_1

New Line.l(r:p5udt5562-p5udt933) Units=km Length=0.112767 bus1=p5udt5562.1.2.3 bus2=p5udt933.1.2.3 switch=n enabled=y phases=3 Linecode=3P_OH_AL_ACSR_477kcmil_Hawk_12_47_0_3_3_3_3

New Line.l(r:p5udt5562-p5udt6183) Units=km Length=0.07119 bus1=p5udt6183.1.2.3 bus2=p5udt5562.1.2.3 switch=n enabled=y phases=3 Linecode=3P_OH_AL_ACSR_477kcmil_Hawk_12_47_0_3_3_3_3

New Line.l(r:p5udt2405-p5udt995) Units=km Length=0.0693016 bus1=p5udt2405-p5udt995x.1 bus2=p5udt995.1 switch=n enabled=y phases=1 Linecode=1P_OH_AL_ACSR_#2_Sparrow_12_47_0_1_1_1_1

New Line.l(r:p5udt2650-p5udt4431) Units=km Length=0.0776896 bus1=p5udt2650-p5udt4431x.2 bus2=p5udt2650-p5udt4431xx.2 switch=n enabled=y phases=1 Linecode=1P_UG_AL_#2_15_12_47_0_1_1_1_1

New Line.l(r:p5udt1446-p5udt2650) Units=km Length=0.115467 bus1=p5udt1446-p5udt2650x.2 bus2=p5udt1446-p5udt2650xx.2 switch=n enabled=y phases=1 Linecode=1P_UG_AL_#2_15_12_47_0_1_1_1_1

New Line.l(r:p5udt5311-p5udt7601) Units=km Length=0.0287017 bus1=p5udt5311-p5udt7601x.2 bus2=p5udt5311-p5udt7601xx.2 switch=n enabled=y phases=1 Linecode=1P_UG_AL_#2_15_12_47_0_1_1_1_1

New Line.l(r:p5udt5179-p5udt5311) Units=km Length=0.0191384 bus1=p5udt5179-p5udt5311x.2 bus2=p5udt5179-p5udt5311xx.2 switch=n enabled=y phases=1 Linecode=1P_UG_AL_#2_15_12_47_0_1_1_1_1

New Line.l(r:p5udt1446-p5udt5179) Units=km Length=0.0963385 bus1=p5udt1446-p5udt5179x.2 bus2=p5udt1446-p5udt5179xx.2 switch=n enabled=y phases=1 Linecode=1P_UG_AL_#2_15_12_47_0_1_1_1_1

New Line.l(r:p5udt1446-p5udt5643) Units=km Length=0.0177999 bus1=p5udt1446.2 bus2=p5udt5643.2 switch=n enabled=y phases=1 Linecode=1P_OH_AL_ACSR_#2_Sparrow_12_47_0_1_1_1_1

New Line.l(r:p5udt1168-p5udt1446) Units=km Length=0.12804 bus1=p5udt1168-p5udt1446x.2 bus2=p5udt1168-p5udt1446xx.2 switch=n enabled=y phases=1 Linecode=1P_UG_AL_#2_15_12_47_0_1_1_1_1

New Line.l(r:p5udt1168-p5udt5042) Units=km Length=0.079607 bus1=p5udt1168.2 bus2=p5udt5042.2 switch=n enabled=y phases=1 Linecode=1P_OH_AL_ACSR_#2_Sparrow_12_47_0_1_1_1_1

New Line.l(r:p5udt1168-p5udt7198) Units=km Length=0.00425301 bus1=p5udt1168-p5udt7198xx.2 bus2=p5udt1168-p5udt7198x.2 switch=n enabled=y phases=1 Linecode=1P_UG_AL_#2_15_12_47_0_1_1_1_1

New Line.l(r:p5udt1862-p5udt3896) Units=km Length=0.0191304 bus1=p5udt1862-p5udt3896xx.2 bus2=p5udt1862-p5udt3896x.2 switch=n enabled=y phases=1 Linecode=1P_UG_AL_#2_15_12_47_0_1_1_1_1

New Line.l(r:p5udt1737-p5udt3896) Units=km Length=0.0836534 bus1=p5udt1737-p5udt3896x.2 bus2=p5udt1737-p5udt3896xx.2 switch=n enabled=y phases=1 Linecode=1P_UG_AL_#2_15_12_47_0_1_1_1_1

New Line.l(r:p5udt1737-p5udt7198) Units=km Length=0.0944963 bus1=p5udt1737-p5udt7198xx.2 bus2=p5udt1737-p5udt7198x.2 switch=n enabled=y phases=1 Linecode=1P_UG_AL_#2_15_12_47_0_1_1_1_1

New Line.l(r:p5udt4966-p5udt7198) Units=km Length=0.161521 bus1=p5udt4966-p5udt7198x.2 bus2=p5udt7198.2 switch=n enabled=y phases=1 Linecode=1P_OH_AL_ACSR_#2_Sparrow_12_47_0_1_1_1_1

New Line.l(r:p5udt18097-p5udt2536) Units=km Length=0.0362659 bus1=p5udt2536.1 bus2=p5udt18097.1 switch=n enabled=y phases=1 Linecode=1P_OH_AL_ACSR_#2_Sparrow_12_47_0_1_1_1_1

New Line.l(r:p5udt2536-p5udt311) Units=km Length=0.05438910000000001 bus1=p5udt311.1 bus2=p5udt2536.1 switch=n enabled=y phases=1 Linecode=1P_OH_AL_ACSR_#2_Sparrow_12_47_0_1_1_1_1

New Line.l(r:p5udt1581-p5udt311) Units=km Length=0.127108 bus1=p5udt1581.1 bus2=p5udt311.1 switch=n enabled=y phases=1 Linecode=1P_OH_AL_ACSR_#2_Sparrow_12_47_0_1_1_1_1

New Line.l(r:p5udt1581-p5udt829) Units=km Length=0.10364400000000001 bus1=p5udt1581.1 bus2=p5udt829.1 switch=n enabled=y phases=1 Linecode=1P_OH_AL_ACSR_#2_Sparrow_12_47_0_1_1_1_1

New Line.l(r:p5udt1581-p5udt4248) Units=km Length=0.0290104 bus1=p5udt1581-p5udt4248xx.1 bus2=p5udt1581-p5udt4248x.1 switch=n enabled=y phases=1 Linecode=1P_UG_AL_#2_15_12_47_0_1_1_1_1

New Line.l(r:p5udt4248-p5udt6474) Units=km Length=0.0193357 bus1=p5udt4248-p5udt6474xx.1 bus2=p5udt4248-p5udt6474x.1 switch=n enabled=y phases=1 Linecode=1P_UG_AL_#2_15_12_47_0_1_1_1_1

New Line.l(r:p5udt1735-p5udt6474) Units=km Length=0.038685 bus1=p5udt1735-p5udt6474x.1 bus2=p5udt1735-p5udt6474xx.1 switch=n enabled=y phases=1 Linecode=1P_UG_AL_#2_15_12_47_0_1_1_1_1

New Line.l(r:p5udt1735-p5udt526) Units=km Length=0.027928 bus1=p5udt1735-p5udt526xx.1 bus2=p5udt1735-p5udt526x.1 switch=n enabled=y phases=1 Linecode=1P_UG_AL_#2_15_12_47_0_1_1_1_1

New Line.l(r:p5udt526-p5udt993) Units=km Length=0.0740366 bus1=p5udt526-p5udt993xx.1 bus2=p5udt526-p5udt993x.1 switch=n enabled=y phases=1 Linecode=1P_UG_AL_#2_15_12_47_0_1_1_1_1

New Line.l(r:p5udt7197-p5udt993) Units=km Length=0.0847707 bus1=p5udt7197-p5udt993xx.1 bus2=p5udt7197-p5udt993xxx.1 switch=n enabled=y phases=1 Linecode=1P_UG_AL_#2_15_12_47_0_1_1_1_1

New Line.l(r:p5udt2886-p5udt5588) Units=km Length=0.0479294 bus1=p5udt2886-p5udt5588xx.2 bus2=p5udt2886-p5udt5588x.2 switch=n enabled=y phases=1 Linecode=1P_UG_AL_#2_15_12_47_0_1_1_1_1

New Line.l(r:p5udt1580-p5udt5589) Units=km Length=0.0843485 bus1=p5udt5589.3 bus2=p5udt1580.3 switch=n enabled=y phases=1 Linecode=1P_OH_AL_ACSR_#2_Sparrow_12_47_0_1_1_1_1

New Line.l(r:p5udt3506-p5udt991) Units=km Length=0.0618521 bus1=p5udt3506.3 bus2=p5udt991.3 switch=n enabled=y phases=1 Linecode=1P_OH_AL_ACSR_#2_Sparrow_12_47_0_1_1_1_1

New Line.l(r:p5udt310-p5udt3506) Units=km Length=0.0659089 bus1=p5udt310.3 bus2=p5udt3506.3 switch=n enabled=y phases=1 Linecode=1P_OH_AL_ACSR_#2_Sparrow_12_47_0_1_1_1_1

New Line.l(r:p5udt310-p5udt4333) Units=km Length=0.052993 bus1=p5udt310.3 bus2=p5udt4333.3 switch=n enabled=y phases=1 Linecode=1P_OH_AL_ACSR_#2_Sparrow_12_47_0_1_1_1_1

New Line.l(r:p5udt310-p5udt992) Units=km Length=0.0640005 bus1=p5udt310-p5udt992xx.3 bus2=p5udt310-p5udt992x.3 switch=n enabled=y phases=1 Linecode=1P_UG_AL_#2_15_12_47_0_1_1_1_1

New Line.l(r:p5udt3319-p5udt992) Units=km Length=0.0685526 bus1=p5udt3319-p5udt992xx.3 bus2=p5udt3319-p5udt992x.3 switch=n enabled=y phases=1 Linecode=1P_UG_AL_#2_15_12_47_0_1_1_1_1

New Line.l(r:p5udt3411-p5udt696) Units=km Length=0.0541065 bus1=p5udt3411-p5udt696x.3 bus2=p5udt3411-p5udt696xx.3 switch=n enabled=y phases=1 Linecode=1P_UG_AL_#2_15_12_47_0_1_1_1_1

New Line.l(r:p5udt3411-p5udt992) Units=km Length=0.0625069 bus1=p5udt3411-p5udt992xx.3 bus2=p5udt3411-p5udt992x.3 switch=n enabled=y phases=1 Linecode=1P_UG_AL_#2_15_12_47_0_1_1_1_1

New Line.l(r:p5udt2647-p5udt992) Units=km Length=0.0387686 bus1=p5udt2647-p5udt992x.3 bus2=p5udt2647-p5udt992xx.3 switch=n enabled=y phases=1 Linecode=1P_UG_AL_#2_15_12_47_0_1_1_1_1

New Line.l(r:p5udt2647-p5udt3412) Units=km Length=0.0387686 bus1=p5udt2647-p5udt3412xx.3 bus2=p5udt2647-p5udt3412x.3 switch=n enabled=y phases=1 Linecode=1P_UG_AL_#2_15_12_47_0_1_1_1_1

New Line.l(r:p5udt3412-p5udt6853) Units=km Length=0.0563545 bus1=p5udt3412-p5udt6853xx.3 bus2=p5udt3412-p5udt6853x.3 switch=n enabled=y phases=1 Linecode=1P_UG_AL_#2_15_12_47_0_1_1_1_1

New Line.l(r:p5udt3605-p5udt6207) Units=km Length=0.0383972 bus1=p5udt3605-p5udt6207x.3 bus2=p5udt3605-p5udt6207xx.3 switch=n enabled=y phases=1 Linecode=1P_UG_AL_#2_15_12_47_0_1_1_1_1

New Line.l(r:p5udt3605-p5udt4332) Units=km Length=0.0628747 bus1=p5udt3605-p5udt4332xx.3 bus2=p5udt3605-p5udt4332x.3 switch=n enabled=y phases=1 Linecode=1P_UG_AL_#2_15_12_47_0_1_1_1_1

New Line.l(r:p5udt4332-p5udt6853) Units=km Length=0.06658220000000001 bus1=p5udt4332-p5udt6853xx.3 bus2=p5udt4332-p5udt6853x.3 switch=n enabled=y phases=1 Linecode=1P_UG_AL_#2_15_12_47_0_1_1_1_1

New Line.l(r:p5udt5589-p5udt6853) Units=km Length=0.0832696 bus1=p5udt5589-p5udt6853x.3 bus2=p5udt5589-p5udt6853xx.3 switch=n enabled=y phases=1 Linecode=1P_UG_AL_#2_15_12_47_0_1_1_1_1

New Line.l(r:p5udt33596-p5udt5589) Units=km Length=0.0335599 bus1=p5udt33596-p5udt5589xx.3 bus2=p5udt33596-p5udt5589xxx.3 switch=n enabled=y phases=1 Linecode=1P_UG_AL_#2_15_12_47_0_1_1_1_1

New Line.l(r:p5udt4745-p5udt6587) Units=km Length=0.0568389 bus1=p5udt4745.2 bus2=p5udt6587.2 switch=n enabled=y phases=1 Linecode=1P_OH_AL_ACSR_#2_Sparrow_12_47_0_1_1_1_1

New Line.l(r:p5udt4745-p5udt7244) Units=km Length=0.0365036 bus1=p5udt7244.2 bus2=p5udt4745.2 switch=n enabled=y phases=1 Linecode=1P_OH_AL_ACSR_#2_Sparrow_12_47_0_1_1_1_1

New Line.l(r:p5udt6428-p5udt7244) Units=km Length=0.058009000000000005 bus1=p5udt6428-p5udt7244x.2 bus2=p5udt7244.2 switch=n enabled=y phases=1 Linecode=1P_OH_AL_ACSR_#2_Sparrow_12_47_0_1_1_1_1

New Line.l(r:p5udt6183-p5udt7322) Units=km Length=0.160167 bus1=p5udt7322.1.2.3 bus2=p5udt6183.1.2.3 switch=n enabled=y phases=3 Linecode=3P_OH_AL_ACSR_1033kcmil_Curlew_12.47_1_3_3_3_3

New Line.l(r:p5udt31232-p5udt7322) Units=km Length=0.019262700000000004 bus1=p5udt31232-p5udt7322x.1.2.3 bus2=p5udt31232-p5udt7322xx.1.2.3 switch=n enabled=y phases=3 Linecode=3P_OH_AL_ACSR_1033kcmil_Curlew_12.47_1_3_3_3_3

New Line.l(r:p5udt31232-p5udt7103) Units=km Length=0.0385444 bus1=p5udt31232-p5udt7103xx.1.2.3 bus2=p5udt31232-p5udt7103x.1.2.3 switch=n enabled=y phases=3 Linecode=3P_OH_AL_ACSR_1033kcmil_Curlew_12.47_1_3_3_3_3

New Line.l(r:p5udt1528-p5udt7103) Units=km Length=0.0392703 bus1=p5udt1528-p5udt7103x.1.2.3 bus2=p5udt1528-p5udt7103xx.1.2.3 switch=n enabled=y phases=3 Linecode=3P_OH_AL_ACSR_1033kcmil_Curlew_12.47_1_3_3_3_3

New Line.l(r:p5udt1528-p5udt6002) Units=km Length=0.179927 bus1=p5udt6002.1.2.3 bus2=p5udt1528.1.2.3 switch=n enabled=y phases=3 Linecode=3P_OH_AL_ACSR_1033kcmil_Curlew_12.47_1_3_3_3_3

New Line.l(r:p5udt6002-p5udt7917) Units=km Length=0.0717527 bus1=p5udt6002-p5udt7917x.1 bus2=p5udt7917.1 switch=n enabled=y phases=1 Linecode=1P_OH_AL_ACSR_#2_Sparrow_12_47_0_1_1_1_1

New Line.l(r:p5udt6002-p5uhs3_1247) Units=km Length=0.263032 bus1=p5udt6002-p5uhs3_1247x.1.2.3 bus2=p5udt6002.1.2.3 switch=n enabled=y phases=3 Linecode=3P_OH_AL_ACSR_1033kcmil_Curlew_12.47_1_3_3_3_3

New Line.l(r:p5udt33600-p5udt5527) Units=km Length=0.0195794 bus1=p5udt5527.1.2.3 bus2=p5udt33600.1.2.3 switch=n enabled=y phases=3 Linecode=3P_OH_AL_ACSR_4/0_Penguin_12_47_0_3_3_3_3

New Line.l(r:p5udt5527-p5umv30) Units=km Length=0.07002 bus1=p5umv30.1.2.3 bus2=p5udt5527.1.2.3 switch=n enabled=y phases=3 Linecode=3P_OH_AL_ACSR_4/0_Penguin_12_47_0_3_3_3_3

New Line.l(r:p5udt4433-p5udt6727) Units=km Length=0.123762 bus1=p5udt6727.1.2.3 bus2=p5udt4433.1.2.3 switch=n enabled=y phases=3 Linecode=3P_OH_AL_ACSR_4/0_Penguin_12_47_0_3_3_3_3

New Line.l(r:p5udt6727-p5umv30) Units=km Length=0.191442 bus1=p5umv30.1.2.3 bus2=p5udt6727.1.2.3 switch=n enabled=y phases=3 Linecode=3P_OH_AL_ACSR_4/0_Penguin_12_47_0_3_3_3_3

New Line.l(r:p5udt4218-p5umv30) Units=km Length=0.104639 bus1=p5udt4218.1.2.3 bus2=p5umv30.1.2.3 switch=n enabled=y phases=3 Linecode=3P_OH_AL_ACSR_4/0_Penguin_12_47_0_3_3_3_3

New Line.l(r:p5udt33683-p5umv78) Units=km Length=0.0365254 bus1=p5udt33683-p5umv78x.1.2.3 bus2=p5udt33683-p5umv78xx.1.2.3 switch=n enabled=y phases=3 Linecode=3P_UG_AL_4/0_25_12_47_0_3_3_3_3

New Line.l(r:p5udt33683-p5udt3900) Units=km Length=0.0285199 bus1=p5udt33683-p5udt3900xx.1.2.3 bus2=p5udt33683-p5udt3900x.1.2.3 switch=n enabled=y phases=3 Linecode=3P_UG_AL_4/0_25_12_47_0_3_3_3_3

New Line.l(r:p5udt3898-p5udt3900) Units=km Length=0.0475415 bus1=p5udt3898-p5udt3900x.1.2.3 bus2=p5udt3898-p5udt3900xx.1.2.3 switch=n enabled=y phases=3 Linecode=3P_UG_AL_4/0_25_12_47_0_3_3_3_3

New Line.l(r:p5udt3898-p5udt3899) Units=km Length=0.0366742 bus1=p5udt3899.1.2.3 bus2=p5udt3898.1.2.3 switch=n enabled=y phases=3 Linecode=3P_OH_AL_ACSR_4/0_Penguin_12_47_0_3_3_3_3

New Line.l(r:p5udt3899-p5udt6525) Units=km Length=0.072046 bus1=p5udt6525.1.2.3 bus2=p5udt3899.1.2.3 switch=n enabled=y phases=3 Linecode=3P_OH_AL_ACSR_4/0_Penguin_12_47_0_3_3_3_3

New Line.l(r:p5udt1394-p5udt6525) Units=km Length=0.076152 bus1=p5udt1394.1.2.3 bus2=p5udt6525.1.2.3 switch=n enabled=y phases=3 Linecode=3P_OH_AL_ACSR_4/0_Penguin_12_47_0_3_3_3_3

New Line.l(r:p5udt33598-p5udt6926) Units=km Length=0.260081 bus1=p5udt6926.1.2.3 bus2=p5udt33598.1.2.3 switch=n enabled=y phases=3 Linecode=3P_OH_AL_ACSR_4/0_Penguin_12_47_0_3_3_3_3

New Line.l(r:p5udt4894-p5udt6926) Units=km Length=0.0463464 bus1=p5udt4894.1.2.3 bus2=p5udt6926.1.2.3 switch=n enabled=y phases=3 Linecode=3P_OH_AL_ACSR_4/0_Penguin_12_47_0_3_3_3_3

New Line.l(r:p5udt4894-p5udt7037) Units=km Length=0.0971795 bus1=p5udt7037.1.2.3 bus2=p5udt4894.1.2.3 switch=n enabled=y phases=3 Linecode=3P_OH_AL_ACSR_4/0_Penguin_12_47_0_3_3_3_3

New Line.l(r:p5udt5882-p5udt7037) Units=km Length=0.0640882 bus1=p5udt5882.1.2.3 bus2=p5udt7037.1.2.3 switch=n enabled=y phases=3 Linecode=3P_OH_AL_ACSR_4/0_Penguin_12_47_0_3_3_3_3

New Line.l(r:p5udt24321-p5udt5244) Units=km Length=0.108795 bus1=p5udt24321-p5udt5244xx.1.2.3 bus2=p5udt24321-p5udt5244x.1.2.3 switch=n enabled=y phases=3 Linecode=3P_UG_AL_4/0_25_12_47_0_3_3_3_3

New Line.l(r:p5udt5244-p5udt5588) Units=km Length=0.110448 bus1=p5udt5244-p5udt5588xx.1.2.3 bus2=p5udt5244-p5udt5588x.1.2.3 switch=n enabled=y phases=3 Linecode=3P_UG_AL_4/0_25_12_47_0_3_3_3_3

New Line.l(r:p5udt33596-p5udt5588) Units=km Length=0.05999440000000001 bus1=p5udt33596-p5udt5588x.1.2.3 bus2=p5udt33596-p5udt5588xx.1.2.3 switch=n enabled=y phases=3 Linecode=3P_UG_AL_4/0_25_12_47_0_3_3_3_3

New Line.l(r:p5udt33596-p5udt7197) Units=km Length=0.06712020000000002 bus1=p5udt33596-p5udt7197xx.1.2.3 bus2=p5udt33596-p5udt7197x.1.2.3 switch=n enabled=y phases=3 Linecode=3P_UG_AL_4/0_25_12_47_0_3_3_3_3

New Line.l(r:p5udt6428-p5udt7197) Units=km Length=0.07795970000000002 bus1=p5udt6428.1.2.3 bus2=p5udt7197.1.2.3 switch=n enabled=y phases=3 Linecode=3P_OH_AL_ACSR_4/0_Penguin_12_47_0_3_3_3_3

New Line.l(r:p5udt6428-p5udt7775) Units=km Length=0.325562 bus1=p5udt7775.1.2.3 bus2=p5udt6428.1.2.3 switch=n enabled=y phases=3 Linecode=3P_OH_AL_ACSR_4/0_Penguin_12_47_0_3_3_3_3

New Line.l(r:p5udt7775-p5udt7895) Units=km Length=0.0933184 bus1=p5udt7895.1.2.3 bus2=p5udt7775.1.2.3 switch=n enabled=y phases=3 Linecode=3P_OH_AL_ACSR_4/0_Penguin_12_47_0_3_3_3_3

New Line.l(r:p5udt5882-p5udt7895) Units=km Length=0.0754853 bus1=p5udt5882.1.2.3 bus2=p5udt7895.1.2.3 switch=n enabled=y phases=3 Linecode=3P_OH_AL_ACSR_4/0_Penguin_12_47_0_3_3_3_3

New Line.l(r:p5udt5882-p5udt6183) Units=km Length=0.0359677 bus1=p5udt6183.1.2.3 bus2=p5udt5882.1.2.3 switch=n enabled=y phases=3 Linecode=3P_OH_AL_ACSR_4/0_Penguin_12_47_0_3_3_3_3

New Line.l(r:p5udt6002lv-p5ulv10895) Units=km Length=0.00888708 bus1=p5udt6002lv.1.2.3 bus2=p5ulv10895.1.2.3 switch=n enabled=y phases=3 Linecode=3P_UG_AL_350kcmil_15_0_416_0_3_3_3_3

New Line.l(r:p5udm5665-p5ulv1738) Units=km Length=0.014934 bus1=p5udm5665.1.2.3 bus2=p5ulv1738.1.2.3 switch=n enabled=y phases=3 Linecode=3P_UG_AL_350kcmil_15_0_416_0_3_3_3_3

New Line.l(r:p5udm5665-p5udt1528lv) Units=km Length=0.0984 bus1=p5udt1528lv.1.2.3 bus2=p5udm5665.1.2.3 switch=n enabled=y phases=3 Linecode=3P_UG_AL_350kcmil_15_0_416_0_3_3_3_3

New Line.l(r:p5udm5666-p5ulv16788) Units=km Length=0.0151918 bus1=p5udm5666.1.2.3 bus2=p5ulv16788.1.2.3 switch=n enabled=y phases=3 Linecode=3P_UG_AL_350kcmil_15_0_416_0_3_3_3_3

New Line.l(r:p5udm5666-p5udt1528lv) Units=km Length=0.00987768 bus1=p5udt1528lv.1.2.3 bus2=p5udm5666.1.2.3 switch=n enabled=y phases=3 Linecode=3P_UG_AL_350kcmil_15_0_416_0_3_3_3_3

New Line.l(r:p5udm4104-p5ulv2488) Units=km Length=0.0114544 bus1=p5udm4104.1.2.3 bus2=p5ulv2488.1.2.3 switch=n enabled=y phases=3 Linecode=3P_UG_AL_350kcmil_15_0_416_0_3_3_3_3

New Line.l(r:p5udm4103-p5ulv1196) Units=km Length=0.0178682 bus1=p5udm4103.1.2.3 bus2=p5ulv1196.1.2.3 switch=n enabled=y phases=3 Linecode=3P_UG_AL_350kcmil_15_0_416_0_3_3_3_3

New Line.l(r:p5udm4103-p5udm4104) Units=km Length=0.0508585 bus1=p5udm4104.1.2.3 bus2=p5udm4103.1.2.3 switch=n enabled=y phases=3 Linecode=3P_UG_AL_350kcmil_15_0_416_0_3_3_3_3

New Line.l(r:p5udm4104-p5udt1087lv) Units=km Length=0.0544239 bus1=p5udt1087lv.1.2.3 bus2=p5udm4104.1.2.3 switch=n enabled=y phases=3 Linecode=3P_UG_AL_750kcmil_25_0_416_0_3_3_3_3

New Line.l(r:p5udm4105-p5ulv11073) Units=km Length=0.0126857 bus1=p5udm4105.1.2.3 bus2=p5ulv11073.1.2.3 switch=n enabled=y phases=3 Linecode=3P_UG_AL_350kcmil_15_0_416_0_3_3_3_3

New Line.l(r:p5udm4105-p5udt1087lv) Units=km Length=0.0520198 bus1=p5udt1087lv.1.2.3 bus2=p5udm4105.1.2.3 switch=n enabled=y phases=3 Linecode=3P_UG_AL_350kcmil_15_0_416_0_3_3_3_3

New Line.l(r:p5udt1087-p5udt1528) Units=km Length=0.23159700000000003 bus1=p5udt1528.1.2.3 bus2=p5udt1087.1.2.3 switch=n enabled=y phases=3 Linecode=3P_OH_AL_ACSR_4/0_Penguin_12_47_0_3_3_3_3

New Line.l(r:p5udt7103lv-p5ulv15116) Units=km Length=0.0122661 bus1=p5udt7103lv.1.2.3 bus2=p5ulv15116.1.2.3 switch=n enabled=y phases=3 Linecode=3P_UG_AL_350kcmil_15_0_416_0_3_3_3_3

New Line.l(r:p5udt5562lv-p5ulv9569) Units=km Length=0.010563 bus1=p5udt5562lv.1.2.3 bus2=p5ulv9569.1.2.3 switch=n enabled=y phases=3 Linecode=3P_UG_AL_350kcmil_15_0_416_0_3_3_3_3

New Line.l(r:p5udt933lv-p5ulv1020) Units=km Length=0.00340969 bus1=p5udt933lv.1.2.3 bus2=p5ulv1020.1.2.3 switch=n enabled=y phases=3 Linecode=3P_UG_AL_350kcmil_15_0_416_0_3_3_3_3

New Line.l(r:p5udm5209-p5ulv1562) Units=km Length=0.00961252 bus1=p5udm5209.1.2.3 bus2=p5ulv1562.1.2.3 switch=n enabled=y phases=3 Linecode=3P_UG_AL_350kcmil_15_0_416_0_3_3_3_3

New Line.l(r:p5udm5209-p5udt1394lv) Units=km Length=0.0135524 bus1=p5udt1394lv.1.2.3 bus2=p5udm5209.1.2.3 switch=n enabled=y phases=3 Linecode=3P_UG_AL_350kcmil_15_0_416_0_3_3_3_3

New Line.l(r:p5udm5210-p5ulv5537) Units=km Length=0.00512455 bus1=p5udm5210.1.2.3 bus2=p5ulv5537.1.2.3 switch=n enabled=y phases=3 Linecode=3P_UG_AL_750kcmil_25_0_416_0_3_3_3_3

New Line.l(r:p5udm5210-p5udt1394lv) Units=km Length=0.028649400000000002 bus1=p5udt1394lv.1.2.3 bus2=p5udm5210.1.2.3 switch=n enabled=y phases=3 Linecode=3P_UG_AL_750kcmil_25_0_416_0_3_3_3_3

New Line.l(r:p5udt4218lv-p5ulv6229) Units=km Length=0.0118556 bus1=p5udt4218lv.1.2.3 bus2=p5ulv6229.1.2.3 switch=n enabled=y phases=3 Linecode=3P_UG_AL_750kcmil_25_0_416_0_3_3_3_3

New Line.l(r:p5udt4218-p5umv20) Units=km Length=0.045617 bus1=p5udt4218.1.2.3 bus2=p5umv20.1.2.3 switch=n enabled=y phases=3 Linecode=3P_OH_AL_ACSR_4/0_Penguin_12_47_0_3_3_3_3

New Line.l(r:p5udt33600lv-p5ulv77841) Units=km Length=0.00854134 bus1=p5udt33600lv.1.2.3 bus2=p5ulv77841.1.2.3 switch=n enabled=y phases=3 Linecode=3P_UG_AL_750kcmil_25_0_416_0_3_3_3_3

New Line.l(r:p5udt33600-p5umv22) Units=km Length=0.021231000000000003 bus1=p5udt33600.1.2.3 bus2=p5umv22.1.2.3 switch=n enabled=y phases=3 Linecode=3P_OH_AL_ACSR_4/0_Penguin_12_47_0_3_3_3_3

New Line.l(r:p5udt6727lv-p5ulv13421) Units=km Length=0.0147587 bus1=p5udt6727lv.1.2.3 bus2=p5ulv13421.1.2.3 switch=n enabled=y phases=3 Linecode=3P_UG_AL_350kcmil_15_0_416_0_3_3_3_3

New Line.l(r:p5udt4433lv-p5ulv71238) Units=km Length=0.0353407 bus1=p5udt4433lv.1.2.3 bus2=p5ulv71238.1.2.3 switch=n enabled=y phases=3 Linecode=3P_UG_AL_350kcmil_15_0_416_0_3_3_3_3

New Line.l(r:p5udm14576-p5ulv6658) Units=km Length=0.0235937 bus1=p5udm14576.1.2.3 bus2=p5ulv6658.1.2.3 switch=n enabled=y phases=3 Linecode=3P_UG_AL_750kcmil_25_0_416_0_3_3_3_3

New Line.l(r:p5udm14576-p5udt4433lv) Units=km Length=0.018431000000000003 bus1=p5udt4433lv.1.2.3 bus2=p5udm14576.1.2.3 switch=n enabled=y phases=3 Linecode=3P_UG_AL_750kcmil_25_0_416_0_3_3_3_3

New Line.l(r:p5udm14577-p5ulv17219) Units=km Length=0.0398403 bus1=p5udm14577.1.2.3 bus2=p5ulv17219.1.2.3 switch=n enabled=y phases=3 Linecode=3P_UG_AL_750kcmil_25_0_416_0_3_3_3_3

New Line.l(r:p5udm14577-p5udt4433lv) Units=km Length=0.018431000000000003 bus1=p5udt4433lv.1.2.3 bus2=p5udm14577.1.2.3 switch=n enabled=y phases=3 Linecode=3P_UG_AL_750kcmil_25_0_416_0_3_3_3_3

New Line.l(r:p5udt5520lv-p5ulv9442) Units=km Length=0.025771800000000004 bus1=p5udt5520lv.1.2.3 bus2=p5ulv9442.1.2.3 switch=n enabled=y phases=3 Linecode=3P_UG_AL_350kcmil_15_0_416_0_3_3_3_3

New Line.l(r:p5udt7857lv-p5ulv18913) Units=km Length=0.016300800000000004 bus1=p5udt7857lv.1.2.3 bus2=p5ulv18913.1.2.3 switch=n enabled=y phases=3 Linecode=3P_UG_AL_750kcmil_25_0_416_0_3_3_3_3

New Line.l(r:p5udt4327lv-p5ulv6451) Units=km Length=0.00505408 bus1=p5udt4327lv.1.2.3 bus2=p5ulv6451.1.2.3 switch=n enabled=y phases=3 Linecode=3P_UG_AL_750kcmil_25_0_416_0_3_3_3_3

New Line.l(r:p5udt2636lv-p5ulv3311) Units=km Length=0.00412029 bus1=p5udt2636lv.1.2.3 bus2=p5ulv3311.1.2.3 switch=n enabled=y phases=3 Linecode=3P_UG_AL_750kcmil_25_0_416_0_3_3_3_3

New Line.l(r:p5udt2636-p5udt4327) Units=km Length=0.0440584 bus1=p5udt4327.1.2.3 bus2=p5udt2636.1.2.3 switch=n enabled=y phases=3 Linecode=3P_OH_AL_ACSR_4/0_Penguin_12_47_0_3_3_3_3

New Line.l(r:p5udt4327-p5udt7857) Units=km Length=0.283922 bus1=p5udt7857.1.2.3 bus2=p5udt4327.1.2.3 switch=n enabled=y phases=3 Linecode=3P_OH_AL_ACSR_4/0_Penguin_12_47_0_3_3_3_3

New Line.l(r:p5udt14892-p5udt7857) Units=km Length=0.05955 bus1=p5udt14892.1.2.3 bus2=p5udt7857.1.2.3 switch=n enabled=y phases=3 Linecode=3P_OH_AL_ACSR_4/0_Penguin_12_47_0_3_3_3_3

New Line.l(r:p5udt14892-p5udt5520) Units=km Length=0.141672 bus1=p5udt5520.1.2.3 bus2=p5udt14892.1.2.3 switch=n enabled=y phases=3 Linecode=3P_OH_AL_ACSR_4/0_Penguin_12_47_0_3_3_3_3

New Line.l(r:p5udt5306-p5udt5520) Units=km Length=0.0112031 bus1=p5udt5306.1.2.3 bus2=p5udt5520.1.2.3 switch=n enabled=y phases=3 Linecode=3P_OH_AL_ACSR_4/0_Penguin_12_47_0_3_3_3_3

New Line.l(r:p5udt4433-p5udt5306) Units=km Length=0.100313 bus1=p5udt4433.1.2.3 bus2=p5udt5306.1.2.3 switch=n enabled=y phases=3 Linecode=3P_OH_AL_ACSR_4/0_Penguin_12_47_0_3_3_3_3

New Line.l(r:p5udt4218-p5umv113) Units=km Length=0.0129557 bus1=p5udt4218.1.2.3 bus2=p5umv113.1.2.3 switch=n enabled=y phases=3 Linecode=3P_OH_AL_ACSR_4/0_Penguin_12_47_0_3_3_3_3

New Line.l(r:p5udt3899lv-p5ulv5542) Units=km Length=0.0255457 bus1=p5udt3899lv.1.2.3 bus2=p5ulv5542.1.2.3 switch=n enabled=y phases=3 Linecode=3P_UG_AL_350kcmil_15_0_416_0_3_3_3_3

New Line.l(r:p5udt3898lv-p5ulv5541) Units=km Length=0.00976559 bus1=p5udt3898lv.1.2.3 bus2=p5ulv5541.1.2.3 switch=n enabled=y phases=3 Linecode=3P_UG_AL_350kcmil_15_0_416_0_3_3_3_3

New Line.l(r:p5udt3900lv-p5ulv5543) Units=km Length=0.0103892 bus1=p5udt3900lv.1.2.3 bus2=p5ulv5543.1.2.3 switch=n enabled=y phases=3 Linecode=3P_UG_AL_350kcmil_15_0_416_0_3_3_3_3

New Line.l(r:p5umv21-p5umv78) Units=km Length=0.0648159 bus1=p5umv78.1.2.3 bus2=p5umv21.1.2.3 switch=n enabled=y phases=3 Linecode=3P_OH_AL_ACSR_4/0_Penguin_12_47_0_3_3_3_3

New Line.l(r:p5udt7331lv-p5ulv16116) Units=km Length=0.00205273 bus1=p5udt7331lv.1.2.3 bus2=p5ulv16116.1.2.3 switch=n enabled=y phases=3 Linecode=3P_UG_AL_750kcmil_25_0_416_0_3_3_3_3

New Line.l(r:p5udt6525-p5udt7331) Units=km Length=0.0614098 bus1=p5udt6525.1.2.3 bus2=p5udt7331.1.2.3 switch=n enabled=y phases=3 Linecode=3P_OH_AL_ACSR_4/0_Penguin_12_47_0_3_3_3_3

New Line.l(r:p5udt6262lv-p5ulv11729) Units=km Length=0.0113196 bus1=p5udt6262lv.1.2.3 bus2=p5ulv11729.1.2.3 switch=n enabled=y phases=3 Linecode=3P_UG_AL_350kcmil_15_0_416_0_3_3_3_3

New Line.l(r:p5udt6262-p5udt933) Units=km Length=0.0865297 bus1=p5udt933.1.2.3 bus2=p5udt6262.1.2.3 switch=n enabled=y phases=3 Linecode=3P_OH_AL_ACSR_4/0_Penguin_12_47_0_3_3_3_3

New Line.l(r:p5udt7037lv-p5ulv14784) Units=km Length=0.00347386 bus1=p5udt7037lv.1.2.3 bus2=p5ulv14784.1.2.3 switch=n enabled=y phases=3 Linecode=3P_UG_AL_750kcmil_25_0_416_0_3_3_3_3

New Line.l(r:p5udt4894lv-p5ulv7756) Units=km Length=0.0091239 bus1=p5udt4894lv.1.2.3 bus2=p5ulv7756.1.2.3 switch=n enabled=y phases=3 Linecode=3P_UG_AL_750kcmil_25_0_416_0_3_3_3_3

New Line.l(r:p5udt6926lv-p5ulv14307) Units=km Length=0.00479471 bus1=p5udt6926lv.1.2.3 bus2=p5ulv14307.1.2.3 switch=n enabled=y phases=3 Linecode=3P_UG_AL_750kcmil_25_0_416_0_3_3_3_3

New Line.l(r:p5udt2405lv-p5ulv2952) Units=km Length=0.00437321 bus1=p5udt2405lv.1.2.3 bus2=p5ulv2952.1.2.3 switch=n enabled=y phases=3 Linecode=3P_UG_AL_750kcmil_25_0_416_0_3_3_3_3

New Line.l(r:p5udm8688-p5ulv17216) Units=km Length=0.00694161 bus1=p5udm8688.1.2.3 bus2=p5ulv17216.1.2.3 switch=n enabled=y phases=3 Linecode=3P_UG_AL_350kcmil_15_0_416_0_3_3_3_3

New Line.l(r:p5udm8688-p5udt2405lv) Units=km Length=0.0173229 bus1=p5udt2405lv.1.2.3 bus2=p5udm8688.1.2.3 switch=n enabled=y phases=3 Linecode=3P_UG_AL_350kcmil_15_0_416_0_3_3_3_3

New Line.l(r:p5udt2405-p5udt33598) Units=km Length=0.150672 bus1=p5udt33598.1.2.3 bus2=p5udt2405.1.2.3 switch=n enabled=y phases=3 Linecode=3P_OH_AL_ACSR_4/0_Penguin_12_47_0_3_3_3_3

New Line.l(r:p5udt3897lv-p5ulv5540) Units=km Length=0.00400746 bus1=p5udt3897lv.1.2.3 bus2=p5ulv5540.1.2.3 switch=n enabled=y phases=3 Linecode=3P_UG_AL_750kcmil_25_0_416_0_3_3_3_3

New Line.l(r:p5udt33597-p5udt3897) Units=km Length=0.00573564 bus1=p5udt33597.1.2.3 bus2=p5udt3897.1.2.3 switch=n enabled=y phases=3 Linecode=3P_OH_AL_ACSR_4/0_Penguin_12_47_0_3_3_3_3

New Line.l(r:p5udt33597-p5udt4966) Units=km Length=0.123803 bus1=p5udt4966.1.2.3 bus2=p5udt33597.1.2.3 switch=n enabled=y phases=3 Linecode=3P_OH_AL_ACSR_4/0_Penguin_12_47_0_3_3_3_3

New Line.l(r:p5udt33598-p5udt4966) Units=km Length=0.0203457 bus1=p5udt33598.1.2.3 bus2=p5udt4966.1.2.3 switch=n enabled=y phases=3 Linecode=3P_OH_AL_ACSR_4/0_Penguin_12_47_0_3_3_3_3

New Line.l(r:p5udt7895lv-p5ulv19118) Units=km Length=0.013269 bus1=p5udt7895lv.1.2.3 bus2=p5ulv19118.1.2.3 switch=n enabled=y phases=3 Linecode=3P_UG_AL_750kcmil_25_0_416_0_3_3_3_3

New Line.l(r:p5udt33596lv-p5ulv77835) Units=km Length=0.0123373 bus1=p5udt33596lv.1.2.3 bus2=p5ulv77835.1.2.3 switch=n enabled=y phases=3 Linecode=3P_UG_AL_350kcmil_15_0_416_0_3_3_3_3

New Line.l(r:p5udt4519lv-p5ulv6838) Units=km Length=0.00263594 bus1=p5udt4519lv.1.2.3 bus2=p5ulv6838.1.2.3 switch=n enabled=y phases=3 Linecode=3P_UG_AL_350kcmil_15_0_416_0_3_3_3_3

New Line.l(r:p5udt4519lv-p5ulv39850) Units=km Length=0.00871966 bus1=p5udt4519lv.1.2.3 bus2=p5ulv39850.1.2.3 switch=n enabled=y phases=3 Linecode=3P_UG_AL_350kcmil_15_0_416_0_3_3_3_3

New Line.l(r:p5udm14793-p5ulv6839) Units=km Length=0.0112149 bus1=p5udm14793.1.2.3 bus2=p5ulv6839.1.2.3 switch=n enabled=y phases=3 Linecode=3P_UG_AL_350kcmil_15_0_416_0_3_3_3_3

New Line.l(r:p5udm14793-p5udt4519lv) Units=km Length=0.0460502 bus1=p5udt4519lv.1.2.3 bus2=p5udm14793.1.2.3 switch=n enabled=y phases=3 Linecode=3P_UG_AL_350kcmil_15_0_416_0_3_3_3_3

New Line.l(r:p5udm14794-p5ulv16855) Units=km Length=0.00723163 bus1=p5udm14794.1.2.3 bus2=p5ulv16855.1.2.3 switch=n enabled=y phases=3 Linecode=3P_UG_AL_350kcmil_15_0_416_0_3_3_3_3

New Line.l(r:p5udm14794-p5udt4519lv) Units=km Length=0.0179441 bus1=p5udt4519lv.1.2.3 bus2=p5udm14794.1.2.3 switch=n enabled=y phases=3 Linecode=3P_UG_AL_350kcmil_15_0_416_0_3_3_3_3

New Line.l(r:p5udt33596-p5udt4519) Units=km Length=0.0923366 bus1=p5udt33596.1.2.3 bus2=p5udt4519.1.2.3 switch=n enabled=y phases=3 Linecode=3P_OH_AL_ACSR_4/0_Penguin_12_47_0_3_3_3_3

New Line.l(r:p5udm16495-p5ulv8663) Units=km Length=0.00562211 bus1=p5udm16495.1.2.3 bus2=p5ulv8663.1.2.3 switch=n enabled=y phases=3 Linecode=3P_UG_AL_350kcmil_15_0_416_0_3_3_3_3

New Line.l(r:p5udm16495-p5udt5244lv) Units=km Length=0.0236483 bus1=p5udt5244lv.1.2.3 bus2=p5udm16495.1.2.3 switch=n enabled=y phases=3 Linecode=3P_UG_AL_350kcmil_15_0_416_0_3_3_3_3

New Line.l(r:p5udm16496-p5ulv15184) Units=km Length=0.008151350000000002 bus1=p5udm16496.1.2.3 bus2=p5ulv15184.1.2.3 switch=n enabled=y phases=3 Linecode=3P_UG_AL_350kcmil_15_0_416_0_3_3_3_3

New Line.l(r:p5udm16496-p5udt5244lv) Units=km Length=0.0212731 bus1=p5udt5244lv.1.2.3 bus2=p5udm16496.1.2.3 switch=n enabled=y phases=3 Linecode=3P_UG_AL_350kcmil_15_0_416_0_3_3_3_3

New Line.l(r:p5udt24321lv-p5ulv45441) Units=km Length=0.0271117 bus1=p5udt24321lv.1.2.3 bus2=p5ulv45441.1.2.3 switch=n enabled=y phases=3 Linecode=3P_UG_AL_350kcmil_15_0_416_0_3_3_3_3

New Line.l(r:p5udt24321-p5ulv8662u) Units=km Length=0.0192943 bus1=p5udt24321-p5ulv8662ux.1.2.3 bus2=p5udt24321-p5ulv8662uxx.1.2.3 switch=n enabled=y phases=3 Linecode=3P_UG_AL_4/0_25_12_47_0_3_3_3_3

New Line.l(r:p5udm15975-p5ulv8050) Units=km Length=0.011249 bus1=p5udm15975.1.2.3 bus2=p5ulv8050.1.2.3 switch=n enabled=y phases=3 Linecode=3P_UG_AL_750kcmil_25_0_416_0_3_3_3_3

New Line.l(r:p5udm15975-p5udt5016lv) Units=km Length=0.0188862 bus1=p5udt5016lv.1.2.3 bus2=p5udm15975.1.2.3 switch=n enabled=y phases=3 Linecode=3P_UG_AL_750kcmil_25_0_416_0_3_3_3_3

New Line.l(r:p5udm15976-p5ulv15496) Units=km Length=0.0171759 bus1=p5udm15976.1.2.3 bus2=p5ulv15496.1.2.3 switch=n enabled=y phases=3 Linecode=3P_UG_AL_350kcmil_15_0_416_0_3_3_3_3

New Line.l(r:p5udm15976-p5udt5016lv) Units=km Length=0.0188737 bus1=p5udt5016lv.1.2.3 bus2=p5udm15976.1.2.3 switch=n enabled=y phases=3 Linecode=3P_UG_AL_350kcmil_15_0_416_0_3_3_3_3

New Line.l(r:p5udt5016-p5udt6991) Units=km Length=0.0188737 bus1=p5udt6991.1.2.3 bus2=p5udt5016.1.2.3 switch=n enabled=y phases=3 Linecode=3P_OH_AL_ACSR_4/0_Penguin_12_47_0_3_3_3_3

New Line.l(r:p5udt6183-p5udt6991) Units=km Length=0.06810150000000001 bus1=p5udt6183.1.2.3 bus2=p5udt6991.1.2.3 switch=n enabled=y phases=3 Linecode=3P_OH_AL_ACSR_4/0_Penguin_12_47_0_3_3_3_3

New Line.l(r:p5udt4515-p5udt5520) Units=km Length=0.11545000000000001 bus1=p5udt4515-p5udt5520x.1.2.3 bus2=p5udt5520.1.2.3 switch=n enabled=y phases=3 Linecode=3P_OH_AL_ACSR_1033kcmil_Curlew_12.47_1_3_3_3_3

New Line.l(r:p5udt5588-p5udt6967) Units=km Length=0.27164900000000003 bus1=p5udt5588-p5udt6967x.1.2.3 bus2=p5udt6967.1.2.3 switch=n enabled=y phases=3 Linecode=3P_OH_AL_ACSR_1033kcmil_Curlew_12.47_1_3_3_3_3

New Line.l(r:p5udt1087-p5udt442) Units=km Length=0.128173 bus1=p5udt1087-p5udt442x.1.2.3 bus2=p5udt442.1.2.3 switch=n enabled=y phases=3 Linecode=3P_OH_AL_ACSR_1033kcmil_Curlew_12.47_1_3_3_3_3

New Line.l(r:p5udt2405-p5udt6428) Units=km Length=0.147212 bus1=p5udt2405-p5udt6428x.1.2.3 bus2=p5udt6428.1.2.3 switch=n enabled=y phases=3 Linecode=3P_OH_AL_ACSR_1033kcmil_Curlew_12.47_1_3_3_3_3

New Line.l(r:p5udt3897-p5umv78) Units=km Length=0.0988308 bus1=p5udt3897-p5umv78x.1.2.3 bus2=p5udt3897.1.2.3 switch=n enabled=y phases=3 Linecode=3P_OH_AL_ACSR_1033kcmil_Curlew_12.47_1_3_3_3_3

New Line.padswitch(r:p5udt2650-p5udt4431)p5u_119324 Units=km Length=0.001 bus1=p5udt2650.2 bus2=p5udt2650-p5udt4431x.2 switch=y enabled=y phases=1 Linecode=padswitch_1_1_1_1

New Line.padswitch(r:p5udt2650-p5udt4431)p5u_119325 Units=km Length=0.001 bus1=p5udt2650-p5udt4431xx.2 bus2=p5udt4431.2 switch=y enabled=y phases=1 Linecode=padswitch_1_3_1_1_1

New Line.padswitch(r:p5udt1446-p5udt2650)p5u_119326 Units=km Length=0.001 bus1=p5udt1446.2 bus2=p5udt1446-p5udt2650x.2 switch=y enabled=y phases=1 Linecode=padswitch_1_3_1_1_1_1

New Line.padswitch(r:p5udt1446-p5udt2650)p5u_119327 Units=km Length=0.001 bus1=p5udt1446-p5udt2650xx.2 bus2=p5udt2650.2 switch=y enabled=y phases=1 Linecode=padswitch_1_3_1_1_1

New Line.padswitch(r:p5udt5311-p5udt7601)p5u_119328 Units=km Length=0.001 bus1=p5udt5311.2 bus2=p5udt5311-p5udt7601x.2 switch=y enabled=y phases=1 Linecode=padswitch_1_3_1_1_1

New Line.padswitch(r:p5udt5311-p5udt7601)p5u_119329 Units=km Length=0.001 bus1=p5udt5311-p5udt7601xx.2 bus2=p5udt7601.2 switch=y enabled=y phases=1 Linecode=padswitch_1_3_1_1_1

New Line.padswitch(r:p5udt5179-p5udt5311)p5u_119330 Units=km Length=0.001 bus1=p5udt5179.2 bus2=p5udt5179-p5udt5311x.2 switch=y enabled=y phases=1 Linecode=padswitch_1_1_1_1

New Line.padswitch(r:p5udt5179-p5udt5311)p5u_119331 Units=km Length=0.001 bus1=p5udt5179-p5udt5311xx.2 bus2=p5udt5311.2 switch=y enabled=y phases=1 Linecode=padswitch_1_3_1_1_1

New Line.padswitch(r:p5udt1446-p5udt5179)p5u_119332 Units=km Length=0.001 bus1=p5udt1446.2 bus2=p5udt1446-p5udt5179x.2 switch=y enabled=y phases=1 Linecode=padswitch_1_3_1_1_1_0_1

New Line.padswitch(r:p5udt1446-p5udt5179)p5u_119333 Units=km Length=0.001 bus1=p5udt1446-p5udt5179xx.2 bus2=p5udt5179.2 switch=y enabled=y phases=1 Linecode=padswitch_1_1_1_1

New Line.padswitch(r:p5udt1168-p5udt1446)p5u_119334 Units=km Length=0.001 bus1=p5udt1168.2 bus2=p5udt1168-p5udt1446x.2 switch=y enabled=y phases=1 Linecode=padswitch_1_3_1_1_1_0_1

New Line.padswitch(r:p5udt1168-p5udt1446)p5u_119335 Units=km Length=0.001 bus1=p5udt1168-p5udt1446xx.2 bus2=p5udt1446.2 switch=y enabled=y phases=1 Linecode=padswitch_1_3_1_1_1_0_1

New Line.padswitch(r:p5udt1168-p5udt7198)p5u_119336 Units=km Length=0.001 bus1=p5udt7198.2 bus2=p5udt1168-p5udt7198xx.2 switch=y enabled=y phases=1 Linecode=padswitch_1_3_1_1_1_1

New Line.padswitch(r:p5udt1168-p5udt7198)p5u_119337 Units=km Length=0.001 bus1=p5udt1168-p5udt7198x.2 bus2=p5udt1168.2 switch=y enabled=y phases=1 Linecode=padswitch_1_3_1_1_1_0_1

New Line.padswitch(r:p5udt1862-p5udt3896)p5u_119338 Units=km Length=0.001 bus1=p5udt3896.2 bus2=p5udt1862-p5udt3896xx.2 switch=y enabled=y phases=1 Linecode=padswitch_1_3_1_1_1_0_1_0

New Line.padswitch(r:p5udt1862-p5udt3896)p5u_119339 Units=km Length=0.001 bus1=p5udt1862-p5udt3896x.2 bus2=p5udt1862.2 switch=y enabled=y phases=1 Linecode=padswitch_1_3_1_1_1_0_1_0

New Line.padswitch(r:p5udt1737-p5udt3896)p5u_119340 Units=km Length=0.001 bus1=p5udt1737.2 bus2=p5udt1737-p5udt3896x.2 switch=y enabled=y phases=1 Linecode=padswitch_1_1_1_1

New Line.padswitch(r:p5udt1737-p5udt3896)p5u_119341 Units=km Length=0.001 bus1=p5udt1737-p5udt3896xx.2 bus2=p5udt3896.2 switch=y enabled=y phases=1 Linecode=padswitch_1_3_1_1_1_0_1_0

New Line.padswitch(r:p5udt1737-p5udt7198)p5u_119342 Units=km Length=0.001 bus1=p5udt7198.2 bus2=p5udt1737-p5udt7198xx.2 switch=y enabled=y phases=1 Linecode=padswitch_1_3_1_1_1

New Line.padswitch(r:p5udt1737-p5udt7198)p5u_119343 Units=km Length=0.001 bus1=p5udt1737-p5udt7198x.2 bus2=p5udt1737.2 switch=y enabled=y phases=1 Linecode=padswitch_1_1_1_1

New Line.padswitch(r:p5udt1581-p5udt4248)p5u_119344 Units=km Length=0.001 bus1=p5udt4248.1 bus2=p5udt1581-p5udt4248xx.1 switch=y enabled=y phases=1 Linecode=padswitch_1_1_1_1

New Line.padswitch(r:p5udt1581-p5udt4248)p5u_119345 Units=km Length=0.001 bus1=p5udt1581-p5udt4248x.1 bus2=p5udt1581.1 switch=y enabled=y phases=1 Linecode=padswitch_1_3_1_1_1_0_1

New Line.padswitch(r:p5udt4248-p5udt6474)p5u_119346 Units=km Length=0.001 bus1=p5udt6474.1 bus2=p5udt4248-p5udt6474xx.1 switch=y enabled=y phases=1 Linecode=padswitch_1_3_1_1_1_0_1

New Line.padswitch(r:p5udt4248-p5udt6474)p5u_119347 Units=km Length=0.001 bus1=p5udt4248-p5udt6474x.1 bus2=p5udt4248.1 switch=y enabled=y phases=1 Linecode=padswitch_1_1_1_1

New Line.padswitch(r:p5udt1735-p5udt6474)p5u_119348 Units=km Length=0.001 bus1=p5udt1735.1 bus2=p5udt1735-p5udt6474x.1 switch=y enabled=y phases=1 Linecode=padswitch_1_3_1_1_1_0_1

New Line.padswitch(r:p5udt1735-p5udt6474)p5u_119349 Units=km Length=0.001 bus1=p5udt1735-p5udt6474xx.1 bus2=p5udt6474.1 switch=y enabled=y phases=1 Linecode=padswitch_1_1_1_1

New Line.padswitch(r:p5udt1735-p5udt526)p5u_119350 Units=km Length=0.001 bus1=p5udt526.1 bus2=p5udt1735-p5udt526xx.1 switch=y enabled=y phases=1 Linecode=padswitch_1_3_1_1_1

New Line.padswitch(r:p5udt1735-p5udt526)p5u_119351 Units=km Length=0.001 bus1=p5udt1735-p5udt526x.1 bus2=p5udt1735.1 switch=y enabled=y phases=1 Linecode=padswitch_1_3_1_1_1_0_1

New Line.padswitch(r:p5udt526-p5udt993)p5u_119352 Units=km Length=0.001 bus1=p5udt993.1 bus2=p5udt526-p5udt993xx.1 switch=y enabled=y phases=1 Linecode=padswitch_1_1_1_1

New Line.padswitch(r:p5udt526-p5udt993)p5u_119353 Units=km Length=0.001 bus1=p5udt526-p5udt993x.1 bus2=p5udt526.1 switch=y enabled=y phases=1 Linecode=padswitch_1_3_1_1_1

New Line.padswitch(r:p5udt7197-p5udt993)p5u_119354 Units=km Length=0.001 bus1=p5udt7197-p5udt993x.1 bus2=p5udt7197-p5udt993xx.1 switch=y enabled=y phases=1 Linecode=padswitch_1_1_1_1

New Line.padswitch(r:p5udt7197-p5udt993)p5u_119355 Units=km Length=0.001 bus1=p5udt7197-p5udt993xxx.1 bus2=p5udt993.1 switch=y enabled=y phases=1 Linecode=padswitch_1_3_1_1_1

New Line.padswitch(r:p5udt2886-p5udt5588)p5u_119356 Units=km Length=0.001 bus1=p5udt2886-p5udt5588xxx.2 bus2=p5udt2886-p5udt5588xx.2 switch=y enabled=y phases=1 Linecode=padswitch_1_1_1_1

New Line.padswitch(r:p5udt2886-p5udt5588)p5u_119357 Units=km Length=0.001 bus1=p5udt2886-p5udt5588x.2 bus2=p5udt2886.2 switch=y enabled=y phases=1 Linecode=padswitch_1_3_1_1_1

New Line.padswitch(r:p5udt310-p5udt992)p5u_119366 Units=km Length=0.001 bus1=p5udt992.3 bus2=p5udt310-p5udt992xx.3 switch=y enabled=y phases=1 Linecode=padswitch_1_1_1_1

New Line.padswitch(r:p5udt310-p5udt992)p5u_119367 Units=km Length=0.001 bus1=p5udt310-p5udt992x.3 bus2=p5udt310.3 switch=y enabled=y phases=1 Linecode=padswitch_1_3_1_1_1_1

New Line.padswitch(r:p5udt3319-p5udt992)p5u_119368 Units=km Length=0.001 bus1=p5udt992.3 bus2=p5udt3319-p5udt992xx.3 switch=y enabled=y phases=1 Linecode=padswitch_1_1_1_1

New Line.padswitch(r:p5udt3319-p5udt992)p5u_119369 Units=km Length=0.001 bus1=p5udt3319-p5udt992x.3 bus2=p5udt3319.3 switch=y enabled=y phases=1 Linecode=padswitch_1_3_1_1_1

New Line.padswitch(r:p5udt3411-p5udt696)p5u_119370 Units=km Length=0.001 bus1=p5udt3411.3 bus2=p5udt3411-p5udt696x.3 switch=y enabled=y phases=1 Linecode=padswitch_1_1_1_1

New Line.padswitch(r:p5udt3411-p5udt696)p5u_119371 Units=km Length=0.001 bus1=p5udt3411-p5udt696xx.3 bus2=p5udt696.3 switch=y enabled=y phases=1 Linecode=padswitch_1_3_1_1_1_0_1_0

New Line.padswitch(r:p5udt3411-p5udt992)p5u_119372 Units=km Length=0.001 bus1=p5udt992.3 bus2=p5udt3411-p5udt992xx.3 switch=y enabled=y phases=1 Linecode=padswitch_1_1_1_1

New Line.padswitch(r:p5udt3411-p5udt992)p5u_119373 Units=km Length=0.001 bus1=p5udt3411-p5udt992x.3 bus2=p5udt3411.3 switch=y enabled=y phases=1 Linecode=padswitch_1_1_1_1

New Line.padswitch(r:p5udt2647-p5udt992)p5u_119374 Units=km Length=0.001 bus1=p5udt2647.3 bus2=p5udt2647-p5udt992x.3 switch=y enabled=y phases=1 Linecode=padswitch_1_1_1_1

New Line.padswitch(r:p5udt2647-p5udt992)p5u_119375 Units=km Length=0.001 bus1=p5udt2647-p5udt992xx.3 bus2=p5udt992.3 switch=y enabled=y phases=1 Linecode=padswitch_1_3_1_1_1_1

New Line.padswitch(r:p5udt2647-p5udt3412)p5u_119376 Units=km Length=0.001 bus1=p5udt3412.3 bus2=p5udt2647-p5udt3412xx.3 switch=y enabled=y phases=1 Linecode=padswitch_1_1_1_1

New Line.padswitch(r:p5udt2647-p5udt3412)p5u_119377 Units=km Length=0.001 bus1=p5udt2647-p5udt3412x.3 bus2=p5udt2647.3 switch=y enabled=y phases=1 Linecode=padswitch_1_1_1_1

New Line.padswitch(r:p5udt3412-p5udt6853)p5u_119378 Units=km Length=0.001 bus1=p5udt6853.3 bus2=p5udt3412-p5udt6853xx.3 switch=y enabled=y phases=1 Linecode=padswitch_1_1_1_1

New Line.padswitch(r:p5udt3412-p5udt6853)p5u_119379 Units=km Length=0.001 bus1=p5udt3412-p5udt6853x.3 bus2=p5udt3412.3 switch=y enabled=y phases=1 Linecode=padswitch_1_1_1_1

New Line.padswitch(r:p5udt3605-p5udt6207)p5u_119380 Units=km Length=0.001 bus1=p5udt3605.3 bus2=p5udt3605-p5udt6207x.3 switch=y enabled=y phases=1 Linecode=padswitch_1_3_1_1_1

New Line.padswitch(r:p5udt3605-p5udt6207)p5u_119381 Units=km Length=0.001 bus1=p5udt3605-p5udt6207xx.3 bus2=p5udt6207.3 switch=y enabled=y phases=1 Linecode=padswitch_1_3_1_1_1

New Line.padswitch(r:p5udt3605-p5udt4332)p5u_119382 Units=km Length=0.001 bus1=p5udt4332.3 bus2=p5udt3605-p5udt4332xx.3 switch=y enabled=y phases=1 Linecode=padswitch_1_3_1_1_1

New Line.padswitch(r:p5udt3605-p5udt4332)p5u_119383 Units=km Length=0.001 bus1=p5udt3605-p5udt4332x.3 bus2=p5udt3605.3 switch=y enabled=y phases=1 Linecode=padswitch_1_1_1_1

New Line.padswitch(r:p5udt4332-p5udt6853)p5u_119384 Units=km Length=0.001 bus1=p5udt6853.3 bus2=p5udt4332-p5udt6853xx.3 switch=y enabled=y phases=1 Linecode=padswitch_1_1_1_1

New Line.padswitch(r:p5udt4332-p5udt6853)p5u_119385 Units=km Length=0.001 bus1=p5udt4332-p5udt6853x.3 bus2=p5udt4332.3 switch=y enabled=y phases=1 Linecode=padswitch_1_3_1_1_1

New Line.padswitch(r:p5udt5589-p5udt6853)p5u_119386 Units=km Length=0.001 bus1=p5udt5589.3 bus2=p5udt5589-p5udt6853x.3 switch=y enabled=y phases=1 Linecode=padswitch_1_3_1_1_1_0_1

New Line.padswitch(r:p5udt5589-p5udt6853)p5u_119387 Units=km Length=0.001 bus1=p5udt5589-p5udt6853xx.3 bus2=p5udt6853.3 switch=y enabled=y phases=1 Linecode=padswitch_1_1_1_1

New Line.padswitch(r:p5udt33596-p5udt5589)p5u_119388 Units=km Length=0.001 bus1=p5udt33596-p5udt5589x.3 bus2=p5udt33596-p5udt5589xx.3 switch=y enabled=y phases=1 Linecode=padswitch_1_1_1_1

New Line.padswitch(r:p5udt33596-p5udt5589)p5u_119389 Units=km Length=0.001 bus1=p5udt33596-p5udt5589xxx.3 bus2=p5udt5589.3 switch=y enabled=y phases=1 Linecode=padswitch_1_3_1_1_1_1

New Line.padswitch(r:p5udt31232-p5udt7322)p5u_119392 Units=km Length=0.001 bus1=p5udt31232.1.2.3 bus2=p5udt31232-p5udt7322x.1.2.3 switch=y enabled=y phases=3 Linecode=padswitch_3_3_3_3

New Line.padswitch(r:p5udt31232-p5udt7322)p5u_119393 Units=km Length=0.001 bus1=p5udt31232-p5udt7322xx.1.2.3 bus2=p5udt7322.1.2.3 switch=y enabled=y phases=3 Linecode=padswitch_3_4_3_3_3

New Line.padswitch(r:p5udt31232-p5udt7103)p5u_119394 Units=km Length=0.001 bus1=p5udt7103.1.2.3 bus2=p5udt31232-p5udt7103xx.1.2.3 switch=y enabled=y phases=3 Linecode=padswitch_3_4_3_2_3_3

New Line.padswitch(r:p5udt31232-p5udt7103)p5u_119395 Units=km Length=0.001 bus1=p5udt31232-p5udt7103x.1.2.3 bus2=p5udt31232.1.2.3 switch=y enabled=y phases=3 Linecode=padswitch_3_4_3_2_3_1_3

New Line.padswitch(r:p5udt1528-p5udt7103)p5u_119396 Units=km Length=0.001 bus1=p5udt1528.1.2.3 bus2=p5udt1528-p5udt7103x.1.2.3 switch=y enabled=y phases=3 Linecode=padswitch_3_4_3_2_3_1_3_1

New Line.padswitch(r:p5udt1528-p5udt7103)p5u_119397 Units=km Length=0.001 bus1=p5udt1528-p5udt7103xx.1.2.3 bus2=p5udt7103.1.2.3 switch=y enabled=y phases=3 Linecode=padswitch_3_4_3_2_3_1_3_1

New Line.padswitch(r:p5udt33683-p5umv78)p5u_119318 Units=km Length=0.001 bus1=p5udt33683.1.2.3 bus2=p5udt33683-p5umv78x.1.2.3 switch=y enabled=y phases=3 Linecode=padswitch_3_4_3_3_3

New Line.padswitch(r:p5udt33683-p5umv78)p5u_119319 Units=km Length=0.001 bus1=p5udt33683-p5umv78xx.1.2.3 bus2=p5umv78.1.2.3 switch=y enabled=y phases=3 Linecode=padswitch_3_4_3_2_3_1_3_1

New Line.padswitch(r:p5udt33683-p5udt3900)p5u_119320 Units=km Length=0.001 bus1=p5udt3900.1.2.3 bus2=p5udt33683-p5udt3900xx.1.2.3 switch=y enabled=y phases=3 Linecode=padswitch_3_4_3_3_3

New Line.padswitch(r:p5udt33683-p5udt3900)p5u_119321 Units=km Length=0.001 bus1=p5udt33683-p5udt3900x.1.2.3 bus2=p5udt33683.1.2.3 switch=y enabled=y phases=3 Linecode=padswitch_3_4_3_3_3

New Line.padswitch(r:p5udt3898-p5udt3900)p5u_119322 Units=km Length=0.001 bus1=p5udt3898.1.2.3 bus2=p5udt3898-p5udt3900x.1.2.3 switch=y enabled=y phases=3 Linecode=padswitch_3_4_3_3_3

New Line.padswitch(r:p5udt3898-p5udt3900)p5u_119323 Units=km Length=0.001 bus1=p5udt3898-p5udt3900xx.1.2.3 bus2=p5udt3900.1.2.3 switch=y enabled=y phases=3 Linecode=padswitch_3_4_3_3_3

New Line.padswitch(r:p5udt24321-p5udt5244)p5u_119360 Units=km Length=0.001 bus1=p5udt5244.1.2.3 bus2=p5udt24321-p5udt5244xx.1.2.3 switch=y enabled=y phases=3 Linecode=padswitch_3_4_3_3_3

New Line.padswitch(r:p5udt24321-p5udt5244)p5u_119361 Units=km Length=0.001 bus1=p5udt24321-p5udt5244x.1.2.3 bus2=p5udt24321.1.2.3 switch=y enabled=y phases=3 Linecode=padswitch_3_4_3_2_3_1_3_1

New Line.padswitch(r:p5udt5244-p5udt5588)p5u_119362 Units=km Length=0.001 bus1=p5udt5588.1.2.3 bus2=p5udt5244-p5udt5588xx.1.2.3 switch=y enabled=y phases=3 Linecode=padswitch_3_4_3_3_3

New Line.padswitch(r:p5udt5244-p5udt5588)p5u_119363 Units=km Length=0.001 bus1=p5udt5244-p5udt5588x.1.2.3 bus2=p5udt5244.1.2.3 switch=y enabled=y phases=3 Linecode=padswitch_3_4_3_3_3

New Line.padswitch(r:p5udt33596-p5udt5588)p5u_119364 Units=km Length=0.001 bus1=p5udt33596.1.2.3 bus2=p5udt33596-p5udt5588x.1.2.3 switch=y enabled=y phases=3 Linecode=padswitch_3_4_3_2_3_1_3_1

New Line.padswitch(r:p5udt33596-p5udt5588)p5u_119365 Units=km Length=0.001 bus1=p5udt33596-p5udt5588xx.1.2.3 bus2=p5udt5588.1.2.3 switch=y enabled=y phases=3 Linecode=padswitch_3_4_3_3_3

New Line.padswitch(r:p5udt33596-p5udt7197)p5u_119390 Units=km Length=0.001 bus1=p5udt7197.1.2.3 bus2=p5udt33596-p5udt7197xx.1.2.3 switch=y enabled=y phases=3 Linecode=padswitch_3_4_3_2_3_1_3_1

New Line.padswitch(r:p5udt33596-p5udt7197)p5u_119391 Units=km Length=0.001 bus1=p5udt33596-p5udt7197x.1.2.3 bus2=p5udt33596.1.2.3 switch=y enabled=y phases=3 Linecode=padswitch_3_4_3_2_3_1_3_1

New Line.padswitch(r:p5udt24321-p5ulv8662u)p5u_119358 Units=km Length=0.001 bus1=p5udt24321.1.2.3 bus2=p5udt24321-p5ulv8662ux.1.2.3 switch=y enabled=y phases=3 Linecode=padswitch_3_4_3_2_3_1_3_1

New Line.padswitch(r:p5udt24321-p5ulv8662u)p5u_119359 Units=km Length=0.001 bus1=p5udt24321-p5ulv8662uxx.1.2.3 bus2=p5ulv8662u.1.2.3 switch=y enabled=y phases=3 Linecode=padswitch_3_4_3_3_3

New Line.elbswitch(r:p5udt5588-p5udt6967)p5u_151278 Units=km Length=0.001 bus1=p5udt5588.1.2.3 bus2=p5udt5588-p5udt6967x.1.2.3 switch=y enabled=n phases=3 Linecode=elbswitch_3_3_3_3

New Line.elbswitch(r:p5udt1087-p5udt442)p5u_151320 Units=km Length=0.001 bus1=p5udt1087.1.2.3 bus2=p5udt1087-p5udt442x.1.2.3 switch=y enabled=n phases=3 Linecode=elbswitch_3_6_3_3_3

New Line.elbswitch(r:p5udt2405-p5udt6428)p5u_151451 Units=km Length=0.001 bus1=p5udt2405.1.2.3 bus2=p5udt2405-p5udt6428x.1.2.3 switch=y enabled=n phases=3 Linecode=elbswitch_3_6_3_3_3

New Line.elbswitch(r:p5udt3897-p5umv78)p5u_151452 Units=km Length=0.001 bus1=p5umv78.1.2.3 bus2=p5udt3897-p5umv78x.1.2.3 switch=y enabled=n phases=3 Linecode=elbswitch_3_6_3_3_3

New Line.fuse(r:p5udt33094-p5udt933)p5u_151618 Units=km Length=0.001 bus1=p5udt933.1 bus2=p5udt33094-p5udt933x.1 switch=n enabled=y phases=1 Linecode=fuse_1_1_1_1

New Fuse.Fuse_fuse(r:p5udt33094-p5udt933)p5u_151618 monitoredobj=Line.fuse(r:p5udt33094-p5udt933)p5u_151618 enabled=y ratedcurrent=100.0

New Line.fuse(r:p5udt1087-p5udt6124)p5u_151634 Units=km Length=0.001 bus1=p5udt1087.1 bus2=p5udt1087-p5udt6124x.1 switch=n enabled=y phases=1 Linecode=fuse_1_7_1_1_1

New Fuse.Fuse_fuse(r:p5udt1087-p5udt6124)p5u_151634 monitoredobj=Line.fuse(r:p5udt1087-p5udt6124)p5u_151634 enabled=y ratedcurrent=100.0

New Line.fuse(r:p5udt2405-p5udt995)p5u_151809 Units=km Length=0.001 bus1=p5udt2405.1 bus2=p5udt2405-p5udt995x.1 switch=n enabled=y phases=1 Linecode=fuse_1_7_1_1_1

New Fuse.Fuse_fuse(r:p5udt2405-p5udt995)p5u_151809 monitoredobj=Line.fuse(r:p5udt2405-p5udt995)p5u_151809 enabled=y ratedcurrent=100.0

New Line.fuse(r:p5udt33599-p5udt3899)p5u_152056 Units=km Length=0.001 bus1=p5udt3899.3 bus2=p5udt33599-p5udt3899x.3 switch=n enabled=y phases=1 Linecode=fuse_1_7_1_1_1

New Fuse.Fuse_fuse(r:p5udt33599-p5udt3899)p5u_152056 monitoredobj=Line.fuse(r:p5udt33599-p5udt3899)p5u_152056 enabled=y ratedcurrent=100.0

New Line.fuse(r:p5udt4327-p5udt7296)p5u_152114 Units=km Length=0.001 bus1=p5udt4327.2 bus2=p5udt4327-p5udt7296x.2 switch=n enabled=y phases=1 Linecode=fuse_1_7_1_1_1

New Fuse.Fuse_fuse(r:p5udt4327-p5udt7296)p5u_152114 monitoredobj=Line.fuse(r:p5udt4327-p5udt7296)p5u_152114 enabled=y ratedcurrent=100.0

New Line.fuse(r:p5udt4966-p5udt7198)p5u_152214 Units=km Length=0.001 bus1=p5udt4966.2 bus2=p5udt4966-p5udt7198x.2 switch=n enabled=y phases=1 Linecode=fuse_1_7_1_1_1

New Fuse.Fuse_fuse(r:p5udt4966-p5udt7198)p5u_152214 monitoredobj=Line.fuse(r:p5udt4966-p5udt7198)p5u_152214 enabled=y ratedcurrent=100.0

New Line.fuse(r:p5udt2886-p5udt5588)p5u_152315 Units=km Length=0.001 bus1=p5udt5588.2 bus2=p5udt2886-p5udt5588xxx.2 switch=n enabled=y phases=1 Linecode=fuse_1_7_1_5_1_1

New Fuse.Fuse_fuse(r:p5udt2886-p5udt5588)p5u_152315 monitoredobj=Line.fuse(r:p5udt2886-p5udt5588)p5u_152315 enabled=y ratedcurrent=100.0

New Line.fuse(r:p5udt6002-p5udt7917)p5u_152384 Units=km Length=0.001 bus1=p5udt6002.1 bus2=p5udt6002-p5udt7917x.1 switch=n enabled=y phases=1 Linecode=fuse_1_7_1_5_1_4_1

New Fuse.Fuse_fuse(r:p5udt6002-p5udt7917)p5u_152384 monitoredobj=Line.fuse(r:p5udt6002-p5udt7917)p5u_152384 enabled=y ratedcurrent=100.0

New Line.fuse(r:p5udt6428-p5udt7244)p5u_152474 Units=km Length=0.001 bus1=p5udt6428.2 bus2=p5udt6428-p5udt7244x.2 switch=n enabled=y phases=1 Linecode=fuse_1_7_1_1_1

New Fuse.Fuse_fuse(r:p5udt6428-p5udt7244)p5u_152474 monitoredobj=Line.fuse(r:p5udt6428-p5udt7244)p5u_152474 enabled=y ratedcurrent=100.0

New Line.fuse(r:p5udt7197-p5udt993)p5u_152584 Units=km Length=0.001 bus1=p5udt7197.1 bus2=p5udt7197-p5udt993x.1 switch=n enabled=y phases=1 Linecode=fuse_1_7_1_5_1_4_1_3

New Fuse.Fuse_fuse(r:p5udt7197-p5udt993)p5u_152584 monitoredobj=Line.fuse(r:p5udt7197-p5udt993)p5u_152584 enabled=y ratedcurrent=100.0

New Line.fuse(r:p5udt33596-p5udt5589)p5u_155499 Units=km Length=0.001 bus1=p5udt33596.3 bus2=p5udt33596-p5udt5589x.3 switch=n enabled=y phases=1 Linecode=fuse_1_7_1_1_1

New Fuse.Fuse_fuse(r:p5udt33596-p5udt5589)p5u_155499 monitoredobj=Line.fuse(r:p5udt33596-p5udt5589)p5u_155499 enabled=y ratedcurrent=100.0
