New Capacitor.p5uc17 Bus1=p5udt33625 phases=3 Kv=12.47 conn=Wye Kvar=600.0

New CapControl.p5uc17 Capacitor=p5uc17 Element=Line.l(r:p5udt33625-p5udt33626) Terminal=1 delay=100.0 Type=voltage Vmin=120.5 Vmax=125.0 Ptratio=59.99631547328862 Ctratio=100.0
