New Capacitor.p5uc19 Bus1=p5umv50 phases=3 Kv=12.47 conn=Wye Kvar=450.0

New CapControl.p5uc19 Capacitor=p5uc19 Element=Line.l(r:p5umv118-p5umv50) Terminal=1 delay=100.0 Type=voltage Vmin=120.5 Vmax=125.0 Ptratio=59.99631547328862 Ctratio=100.0
