New Line.l(r:p5udm6225-p5ulv1936) Units=km Length=0.0135421 bus1=p5udm6225.1.2 bus2=p5ulv1936.1.2 switch=n enabled=y phases=2 Linecode=1P_UG_AL_1/0_Brenau_0_416_0_2_2_2_2

New Line.l(r:p5udm6225-p5udt1685lv) Units=km Length=0.101145 bus1=p5udt1685lv.1.2 bus2=p5udm6225.1.2 switch=n enabled=y phases=2 Linecode=1P_OH_AL_4/0_Zuzara_0_416_0_2_2_2_2

New Line.l(r:p5udm6226-p5ulv6784) Units=km Length=0.00608802 bus1=p5udm6226.1.2 bus2=p5ulv6784.1.2 switch=n enabled=y phases=2 Linecode=1P_OH_AL_2/0_Rucina_0_416_0_2_2_2_2

New Line.l(r:p5udm6226-p5udt1685lv) Units=km Length=0.0173529 bus1=p5udt1685lv.1.2 bus2=p5udm6226.1.2 switch=n enabled=y phases=2 Linecode=1P_OH_AL_2/0_Rucina_0_416_0_2_2_2_2

New Line.l(r:p5udt1960lv-p5ulv2313) Units=km Length=0.00598689 bus1=p5udt1960lv.1.2 bus2=p5ulv2313.1.2 switch=n enabled=y phases=2 Linecode=1P_OH_AL_2/0_Rucina_0_416_0_2_2_2_2

New Line.l(r:p5udt2603lv-p5ulv3258) Units=km Length=0.012762800000000001 bus1=p5udt2603lv.1.2 bus2=p5ulv3258.1.2 switch=n enabled=y phases=2 Linecode=1P_OH_AL_2/0_Rucina_0_416_0_2_2_2_2

New Line.l(r:p5udm11465-p5ulv4342) Units=km Length=0.0167305 bus1=p5udm11465.1.2 bus2=p5ulv4342.1.2 switch=n enabled=y phases=2 Linecode=1P_OH_AL_2/0_Rucina_0_416_0_2_2_2_2

New Line.l(r:p5udm11465-p5udt3281lv) Units=km Length=0.0641796 bus1=p5udt3281lv.1.2 bus2=p5udm11465.1.2 switch=n enabled=y phases=2 Linecode=1P_OH_AL_4/0_Zuzara_0_416_0_2_2_2_2

New Line.l(r:p5udm11466-p5ulv10481) Units=km Length=0.029874100000000004 bus1=p5udm11466.1.2 bus2=p5ulv10481.1.2 switch=n enabled=y phases=2 Linecode=1P_OH_AL_4/0_Zuzara_0_416_0_2_2_2_2

New Line.l(r:p5udm11466-p5udt3281lv) Units=km Length=0.0174158 bus1=p5udt3281lv.1.2 bus2=p5udm11466.1.2 switch=n enabled=y phases=2 Linecode=1P_OH_AL_2/0_Rucina_0_416_0_2_2_2_2

New Line.l(r:p5udt3476lv-p5ulv4696) Units=km Length=0.0166194 bus1=p5udt3476lv.1.2 bus2=p5ulv4696.1.2 switch=n enabled=y phases=2 Linecode=1P_UG_AL_4/0_Sweetbriar_0_416_0_2_2_2_2

New Line.l(r:p5udt3957lv-p5ulv5649) Units=km Length=0.020361400000000005 bus1=p5udt3957lv.1.2 bus2=p5ulv5649.1.2 switch=n enabled=y phases=2 Linecode=1P_OH_AL_2/0_Rucina_0_416_0_2_2_2_2

New Line.l(r:p5udm18060-p5ulv10896) Units=km Length=0.00218673 bus1=p5udm18060.1.2 bus2=p5ulv10896.1.2 switch=n enabled=y phases=2 Linecode=1P_OH_AL_4_Periwinkle_0_416_0_2_2_2_2

New Line.l(r:p5udm18060-p5udt6003lv) Units=km Length=0.03874890000000001 bus1=p5udt6003lv.1.2 bus2=p5udm18060.1.2 switch=n enabled=y phases=2 Linecode=1P_OH_AL_4/0_Zuzara_0_416_0_2_2_2_2

New Line.l(r:p5udm18061-p5ulv78463) Units=km Length=0.00776663 bus1=p5udm18061.1.2 bus2=p5ulv78463.1.2 switch=n enabled=y phases=2 Linecode=1P_OH_AL_2/0_Rucina_0_416_0_2_2_2_2

New Line.l(r:p5udm18061-p5udt6003lv) Units=km Length=0.0347155 bus1=p5udt6003lv.1.2 bus2=p5udm18061.1.2 switch=n enabled=y phases=2 Linecode=1P_OH_AL_4/0_Zuzara_0_416_0_2_2_2_2

New Line.l(r:p5udt6755lv-p5ulv13540) Units=km Length=0.0152963 bus1=p5udt6755lv.1.2 bus2=p5ulv13540.1.2 switch=n enabled=y phases=2 Linecode=1P_OH_AL_2/0_Rucina_0_416_0_2_2_2_2

New Line.l(r:p5udt6756lv-p5ulv77415) Units=km Length=0.00566873 bus1=p5udt6756lv.1.2 bus2=p5ulv77415.1.2 switch=n enabled=y phases=2 Linecode=1P_OH_AL_2/0_Rucina_0_416_0_2_2_2_2

New Line.l(r:p5udm19348-p5ulv13546) Units=km Length=0.00716895 bus1=p5udm19348.1.2 bus2=p5ulv13546.1.2 switch=n enabled=y phases=2 Linecode=1P_OH_AL_2/0_Rucina_0_416_0_2_2_2_2

New Line.l(r:p5udm19347-p5ulv13541) Units=km Length=0.0086639 bus1=p5udm19347.1.2 bus2=p5ulv13541.1.2 switch=n enabled=y phases=2 Linecode=1P_OH_AL_2/0_Rucina_0_416_0_2_2_2_2

New Line.l(r:p5udm19347-p5udm19348) Units=km Length=0.0177887 bus1=p5udm19348.1.2 bus2=p5udm19347.1.2 switch=n enabled=y phases=2 Linecode=1P_OH_AL_2/0_Rucina_0_416_0_2_2_2_2

New Line.l(r:p5udm19348-p5udt6756lv) Units=km Length=0.0177856 bus1=p5udt6756lv.1.2 bus2=p5udm19348.1.2 switch=n enabled=y phases=2 Linecode=1P_OH_AL_2/0_Rucina_0_416_0_2_2_2_2

New Line.l(r:p5udm19350-p5ulv77416) Units=km Length=0.00371393 bus1=p5udm19350.1.2 bus2=p5ulv77416.1.2 switch=n enabled=y phases=2 Linecode=1P_OH_AL_4_Periwinkle_0_416_0_2_2_2_2

New Line.l(r:p5udm19351-p5ulv78460) Units=km Length=0.00307379 bus1=p5udm19351.1.2 bus2=p5ulv78460.1.2 switch=n enabled=y phases=2 Linecode=1P_OH_AL_4_Periwinkle_0_416_0_2_2_2_2

New Line.l(r:p5udm19350-p5udm19351) Units=km Length=0.0544908 bus1=p5udm19350.1.2 bus2=p5udm19351.1.2 switch=n enabled=y phases=2 Linecode=1P_OH_AL_4/0_Zuzara_0_416_0_2_2_2_2

New Line.l(r:p5udm19350-p5udt6756lv) Units=km Length=0.0177791 bus1=p5udt6756lv.1.2 bus2=p5udm19350.1.2 switch=n enabled=y phases=2 Linecode=1P_OH_AL_2/0_Rucina_0_416_0_2_2_2_2

New Line.l(r:p5udm20268-p5ulv77433) Units=km Length=0.011506300000000002 bus1=p5udm20268.1.2 bus2=p5ulv77433.1.2 switch=n enabled=y phases=2 Linecode=1P_UG_AL_1/0_Brenau_0_416_0_2_2_2_2

New Line.l(r:p5udm20267-p5ulv16406) Units=km Length=0.0142663 bus1=p5udm20267.1.2 bus2=p5ulv16406.1.2 switch=n enabled=y phases=2 Linecode=1P_UG_AL_1/0_Brenau_0_416_0_2_2_2_2

New Line.l(r:p5udm20267-p5udm20268) Units=km Length=0.111412 bus1=p5udm20268.1.2 bus2=p5udm20267.1.2 switch=n enabled=y phases=2 Linecode=1P_UG_AL_1/0_Brenau_0_416_0_2_2_2_2

New Line.l(r:p5udm20268-p5udt7387lv) Units=km Length=0.0517919 bus1=p5udt7387lv.1.2 bus2=p5udm20268.1.2 switch=n enabled=y phases=2 Linecode=1P_OH_AL_4/0_Zuzara_0_416_0_2_2_2_2

New Line.l(r:p5udt14299lv-p5ulv26818) Units=km Length=0.0135342 bus1=p5udt14299lv.1.2 bus2=p5ulv26818.1.2 switch=n enabled=y phases=2 Linecode=1P_OH_AL_2/0_Rucina_0_416_0_2_2_2_2

New Line.l(r:p5udm77268-p5ulv77417) Units=km Length=0.0036712 bus1=p5udm77268.1.2 bus2=p5ulv77417.1.2 switch=n enabled=y phases=2 Linecode=1P_OH_AL_4_Periwinkle_0_416_0_2_2_2_2

New Line.l(r:p5udm77268-p5udt33538lv) Units=km Length=0.0181984 bus1=p5udt33538lv.1.2 bus2=p5udm77268.1.2 switch=n enabled=y phases=2 Linecode=1P_OH_AL_2/0_Rucina_0_416_0_2_2_2_2

New Line.l(r:p5udm77269-p5ulv77419) Units=km Length=0.0124621 bus1=p5udm77269.1.2 bus2=p5ulv77419.1.2 switch=n enabled=y phases=2 Linecode=1P_OH_AL_2/0_Rucina_0_416_0_2_2_2_2

New Line.l(r:p5udm77269-p5udt33538lv) Units=km Length=0.0888474 bus1=p5udt33538lv.1.2 bus2=p5udm77269.1.2 switch=n enabled=y phases=2 Linecode=1P_OH_AL_4/0_Zuzara_0_416_0_2_2_2_2

New Line.l(r:p5udt33539lv-p5ulv77418) Units=km Length=0.0140464 bus1=p5udt33539lv.1.2 bus2=p5ulv77418.1.2 switch=n enabled=y phases=2 Linecode=1P_OH_AL_2/0_Rucina_0_416_0_2_2_2_2

New Line.l(r:p5udt2352-p5udt6756) Units=km Length=0.001 bus1=p5udt2352-p5udt6756x.2 bus2=p5udt6756.2 switch=n enabled=y phases=1 Linecode=1P_OH_AL_ACSR_#2_Sparrow_12_47_0_1_1_1_1

New Line.l(r:p5udt14299-p5udt2084) Units=km Length=0.001 bus1=p5udt14299-p5udt2084x.2 bus2=p5udt14299.2 switch=n enabled=y phases=1 Linecode=1P_OH_AL_ACSR_#2_Sparrow_12_47_0_1_1_1_1

New Line.l(r:p5udt3477-p5udt6755) Units=km Length=0.181132 bus1=p5udt3477-p5udt6755x.3 bus2=p5udt6755.3 switch=n enabled=y phases=1 Linecode=1P_OH_AL_ACSR_#2_Sparrow_12_47_0_1_1_1_1

New Line.l(r:p5udt2950-p5udt6003) Units=km Length=0.0953781 bus1=p5udt2950.1.2.3 bus2=p5udt6003.1.2.3 switch=n enabled=y phases=3 Linecode=3P_OH_AL_ACSR_477kcmil_Hawk_12_47_0_3_3_3_3

New Line.l(r:p5udt2218-p5udt2950) Units=km Length=0.127565 bus1=p5udt2218.1.2.3 bus2=p5udt2950.1.2.3 switch=n enabled=y phases=3 Linecode=3P_OH_AL_ACSR_477kcmil_Hawk_12_47_0_3_3_3_3

New Line.l(r:p5udt2218-p5udt33538) Units=km Length=0.001 bus1=p5udt2218-p5udt33538x.2 bus2=p5udt33538.2 switch=n enabled=y phases=1 Linecode=1P_OH_AL_ACSR_#2_Sparrow_12_47_0_1_1_1_1

New Line.l(r:p5udt2218-p5udt4136) Units=km Length=0.138619 bus1=p5udt4136.1.2.3 bus2=p5udt2218.1.2.3 switch=n enabled=y phases=3 Linecode=3P_OH_AL_ACSR_477kcmil_Hawk_12_47_0_3_3_3_3

New Line.l(r:p5udt3281-p5udt4136) Units=km Length=0.0174253 bus1=p5udt3281-p5udt4136x.3 bus2=p5udt3281.3 switch=n enabled=y phases=1 Linecode=1P_OH_AL_ACSR_#2_Sparrow_12_47_0_1_1_1_1

New Line.l(r:p5udt33539-p5udt4136) Units=km Length=0.0915711 bus1=p5udt33539-p5udt4136x.1 bus2=p5udt33539.1 switch=n enabled=y phases=1 Linecode=1P_OH_AL_ACSR_#2_Sparrow_12_47_0_1_1_1_1

New Line.l(r:p5udt4136-p5udt7358) Units=km Length=0.08838650000000002 bus1=p5udt7358.1.2.3 bus2=p5udt4136.1.2.3 switch=n enabled=y phases=3 Linecode=3P_OH_AL_ACSR_477kcmil_Hawk_12_47_0_3_3_3_3

New Line.l(r:p5udt7358-p5uhs3_1247) Units=km Length=0.109137 bus1=p5udt7358-p5uhs3_1247x.1.2.3 bus2=p5udt7358.1.2.3 switch=n enabled=y phases=3 Linecode=3P_OH_AL_ACSR_477kcmil_Hawk_12_47_0_3_3_3_3

New Line.l(r:p5udt4632-p5udt7039) Units=km Length=0.101153 bus1=p5udt4632.1.2.3 bus2=p5udt7039.1.2.3 switch=n enabled=y phases=3 Linecode=3P_OH_AL_ACSR_4/0_Penguin_12_47_0_3_3_3_3

New Line.l(r:p5udt4632-p5udt7452) Units=km Length=0.098953 bus1=p5udt7452.1.2.3 bus2=p5udt4632.1.2.3 switch=n enabled=y phases=3 Linecode=3P_OH_AL_ACSR_4/0_Penguin_12_47_0_3_3_3_3

New Line.l(r:p5udt2603-p5udt7452) Units=km Length=0.035320000000000004 bus1=p5udt2603.1.2.3 bus2=p5udt7452.1.2.3 switch=n enabled=y phases=3 Linecode=3P_OH_AL_ACSR_4/0_Penguin_12_47_0_3_3_3_3

New Line.l(r:p5udt1960-p5udt2603) Units=km Length=0.0353229 bus1=p5udt1960.1.2.3 bus2=p5udt2603.1.2.3 switch=n enabled=y phases=3 Linecode=3P_OH_AL_ACSR_4/0_Penguin_12_47_0_3_3_3_3

New Line.l(r:p5udt1960-p5udt3477) Units=km Length=0.0975263 bus1=p5udt3477.1.2.3 bus2=p5udt1960.1.2.3 switch=n enabled=y phases=3 Linecode=3P_OH_AL_ACSR_4/0_Penguin_12_47_0_3_3_3_3

New Line.l(r:p5udt3477-p5umv45) Units=km Length=0.174944 bus1=p5umv45.1.2.3 bus2=p5udt3477.1.2.3 switch=n enabled=y phases=3 Linecode=3P_OH_AL_ACSR_4/0_Penguin_12_47_0_3_3_3_3

New Line.l(r:p5udt1684-p5umv45) Units=km Length=0.0946781 bus1=p5udt1684.1.2.3 bus2=p5umv45.1.2.3 switch=n enabled=y phases=3 Linecode=3P_OH_AL_ACSR_4/0_Penguin_12_47_0_3_3_3_3

New Line.l(r:p5udt1684-p5udt6003) Units=km Length=0.0563202 bus1=p5udt6003.1.2.3 bus2=p5udt1684.1.2.3 switch=n enabled=y phases=3 Linecode=3P_OH_AL_ACSR_4/0_Penguin_12_47_0_3_3_3_3

New Line.l(r:p5udt5297-p5umv118) Units=km Length=0.0769943 bus1=p5udt5297.1.2.3 bus2=p5umv118.1.2.3 switch=n enabled=y phases=3 Linecode=3P_OH_AL_ACSR_4/0_Penguin_12_47_0_3_3_3_3

New Line.l(r:p5udt5296-p5udt5297) Units=km Length=0.0351542 bus1=p5udt5296.1.2.3 bus2=p5udt5297.1.2.3 switch=n enabled=y phases=3 Linecode=3P_OH_AL_ACSR_4/0_Penguin_12_47_0_3_3_3_3

New Line.l(r:p5udt1685-p5udt5296) Units=km Length=0.173325 bus1=p5udt1685.1.2.3 bus2=p5udt5296.1.2.3 switch=n enabled=y phases=3 Linecode=3P_OH_AL_ACSR_4/0_Penguin_12_47_0_3_3_3_3

New Line.l(r:p5udt4563-p5udt7387) Units=km Length=0.0174256 bus1=p5udt7387.1.2.3 bus2=p5udt4563.1.2.3 switch=n enabled=y phases=3 Linecode=3P_OH_AL_ACSR_4/0_Penguin_12_47_0_3_3_3_3

New Line.l(r:p5udt1685-p5udt7387) Units=km Length=0.160999 bus1=p5udt1685.1.2.3 bus2=p5udt7387.1.2.3 switch=n enabled=y phases=3 Linecode=3P_OH_AL_ACSR_4/0_Penguin_12_47_0_3_3_3_3

New Line.l(r:p5udt1685-p5udt5814) Units=km Length=0.0347059 bus1=p5udt5814.1.2.3 bus2=p5udt1685.1.2.3 switch=n enabled=y phases=3 Linecode=3P_OH_AL_ACSR_4/0_Penguin_12_47_0_3_3_3_3

New Line.l(r:p5udt5814-p5udt6003) Units=km Length=0.0347155 bus1=p5udt6003.1.2.3 bus2=p5udt5814.1.2.3 switch=n enabled=y phases=3 Linecode=3P_OH_AL_ACSR_4/0_Penguin_12_47_0_3_3_3_3

New Line.l(r:p5udt7358lv-p5ulv16218) Units=km Length=0.00664777 bus1=p5udt7358lv.1.2.3 bus2=p5ulv16218.1.2.3 switch=n enabled=y phases=3 Linecode=3P_UG_AL_350kcmil_15_0_416_0_3_3_3_3

New Line.l(r:p5udt2352lv-p5ulv2868) Units=km Length=0.005345290000000001 bus1=p5udt2352lv.1.2.3 bus2=p5ulv2868.1.2.3 switch=n enabled=y phases=3 Linecode=3P_UG_AL_350kcmil_15_0_416_0_3_3_3_3

New Line.l(r:p5udt2352lv-p5ulv13543) Units=km Length=0.00519507 bus1=p5udt2352lv.1.2.3 bus2=p5ulv13543.1.2.3 switch=n enabled=y phases=3 Linecode=3P_UG_AL_350kcmil_15_0_416_0_3_3_3_3

New Line.l(r:p5udm8504-p5ulv2867) Units=km Length=0.00329577 bus1=p5udm8504.1.2.3 bus2=p5ulv2867.1.2.3 switch=n enabled=y phases=3 Linecode=3P_UG_AL_350kcmil_15_0_416_0_3_3_3_3

New Line.l(r:p5udm8504-p5ulv13544) Units=km Length=0.00560262 bus1=p5udm8504.1.2.3 bus2=p5ulv13544.1.2.3 switch=n enabled=y phases=3 Linecode=3P_UG_AL_350kcmil_15_0_416_0_3_3_3_3

New Line.l(r:p5udm8504-p5ulv13545) Units=km Length=0.00718849 bus1=p5udm8504.1.2.3 bus2=p5ulv13545.1.2.3 switch=n enabled=y phases=3 Linecode=3P_UG_AL_350kcmil_15_0_416_0_3_3_3_3

New Line.l(r:p5udm8504-p5udt2352lv) Units=km Length=0.0177791 bus1=p5udt2352lv.1.2.3 bus2=p5udm8504.1.2.3 switch=n enabled=y phases=3 Linecode=3P_UG_AL_750kcmil_25_0_416_0_3_3_3_3

New Line.l(r:p5udm8506-p5ulv13542) Units=km Length=0.00305805 bus1=p5udm8506.1.2.3 bus2=p5ulv13542.1.2.3 switch=n enabled=y phases=3 Linecode=3P_UG_AL_350kcmil_15_0_416_0_3_3_3_3

New Line.l(r:p5udm8506-p5udt2352lv) Units=km Length=0.0177856 bus1=p5udt2352lv.1.2.3 bus2=p5udm8506.1.2.3 switch=n enabled=y phases=3 Linecode=3P_UG_AL_350kcmil_15_0_416_0_3_3_3_3

New Line.l(r:p5udt2352-p5udt7358) Units=km Length=0.0614382 bus1=p5udt7358.1.2.3 bus2=p5udt2352.1.2.3 switch=n enabled=y phases=3 Linecode=3P_OH_AL_ACSR_4/0_Penguin_12_47_0_3_3_3_3

New Line.l(r:p5udt4136lv-p5ulv6034) Units=km Length=0.011843500000000002 bus1=p5udt4136lv.1.2.3 bus2=p5ulv6034.1.2.3 switch=n enabled=y phases=3 Linecode=3P_UG_AL_350kcmil_15_0_416_0_3_3_3_3

New Line.l(r:p5udt2218lv-p5ulv17157) Units=km Length=0.00265198 bus1=p5udt2218lv.1.2.3 bus2=p5ulv17157.1.2.3 switch=n enabled=y phases=3 Linecode=3P_UG_AL_350kcmil_15_0_416_0_3_3_3_3

New Line.l(r:p5udm8079-p5ulv2682) Units=km Length=0.00535511 bus1=p5udm8079.1.2.3 bus2=p5ulv2682.1.2.3 switch=n enabled=y phases=3 Linecode=3P_UG_AL_750kcmil_25_0_416_0_3_3_3_3

New Line.l(r:p5udm8079-p5ulv17155) Units=km Length=0.00428747 bus1=p5udm8079.1.2.3 bus2=p5ulv17155.1.2.3 switch=n enabled=y phases=3 Linecode=3P_UG_AL_750kcmil_25_0_416_0_3_3_3_3

New Line.l(r:p5udm8079-p5udt2218lv) Units=km Length=0.0181984 bus1=p5udt2218lv.1.2.3 bus2=p5udm8079.1.2.3 switch=n enabled=y phases=3 Linecode=3P_UG_AL_750kcmil_25_0_416_0_3_3_3_3

New Line.l(r:p5udm8082-p5ulv17158) Units=km Length=0.00467364 bus1=p5udm8082.1.2.3 bus2=p5ulv17158.1.2.3 switch=n enabled=y phases=3 Linecode=3P_UG_AL_350kcmil_15_0_416_0_3_3_3_3

New Line.l(r:p5udm8082-p5udt2218lv) Units=km Length=0.0363938 bus1=p5udt2218lv.1.2.3 bus2=p5udm8082.1.2.3 switch=n enabled=y phases=3 Linecode=3P_UG_AL_350kcmil_15_0_416_0_3_3_3_3

New Line.l(r:p5udt2950lv-p5ulv3809) Units=km Length=0.0112874 bus1=p5udt2950lv.1.2.3 bus2=p5ulv3809.1.2.3 switch=n enabled=y phases=3 Linecode=3P_UG_AL_350kcmil_15_0_416_0_3_3_3_3

New Line.l(r:p5udm10448-p5ulv6783) Units=km Length=0.013717100000000001 bus1=p5udm10448.1.2.3 bus2=p5ulv6783.1.2.3 switch=n enabled=y phases=3 Linecode=3P_UG_AL_350kcmil_15_0_416_0_3_3_3_3

New Line.l(r:p5udm10448-p5udt2950lv) Units=km Length=0.009435750000000001 bus1=p5udt2950lv.1.2.3 bus2=p5udm10448.1.2.3 switch=n enabled=y phases=3 Linecode=3P_UG_AL_350kcmil_15_0_416_0_3_3_3_3

New Line.l(r:p5udt446lv-p5ulv470) Units=km Length=0.013095700000000002 bus1=p5udt446lv.1.2.3 bus2=p5ulv470.1.2.3 switch=n enabled=y phases=3 Linecode=3P_UG_AL_350kcmil_15_0_416_0_3_3_3_3

New Line.l(r:p5udm1696-p5ulv77539) Units=km Length=0.0127172 bus1=p5udm1696.1.2.3 bus2=p5ulv77539.1.2.3 switch=n enabled=y phases=3 Linecode=3P_UG_AL_350kcmil_15_0_416_0_3_3_3_3

New Line.l(r:p5udm1696-p5udt446lv) Units=km Length=0.00951738 bus1=p5udt446lv.1.2.3 bus2=p5udm1696.1.2.3 switch=n enabled=y phases=3 Linecode=3P_UG_AL_350kcmil_15_0_416_0_3_3_3_3

New Line.l(r:p5udt2950-p5udt446) Units=km Length=0.07939 bus1=p5udt2950-p5udt446x.1.2.3 bus2=p5udt2950-p5udt446xx.1.2.3 switch=n enabled=y phases=3 Linecode=3P_UG_AL_4/0_25_12_47_0_3_3_3_3

New Line.l(r:p5udt1684lv-p5ulv1935) Units=km Length=0.00521138 bus1=p5udt1684lv.1.2.3 bus2=p5ulv1935.1.2.3 switch=n enabled=y phases=3 Linecode=3P_UG_AL_750kcmil_25_0_416_0_3_3_3_3

New Line.l(r:p5udm6716-p5ulv2125) Units=km Length=0.0133201 bus1=p5udm6716.1.2.3 bus2=p5ulv2125.1.2.3 switch=n enabled=y phases=3 Linecode=3P_UG_AL_350kcmil_15_0_416_0_3_3_3_3

New Line.l(r:p5udm6716-p5udt1826lv) Units=km Length=0.053895 bus1=p5udt1826lv.1.2.3 bus2=p5udm6716.1.2.3 switch=n enabled=y phases=3 Linecode=3P_UG_AL_350kcmil_15_0_416_0_3_3_3_3

New Line.l(r:p5udm6717-p5ulv77432) Units=km Length=0.00775403 bus1=p5udm6717.1.2.3 bus2=p5ulv77432.1.2.3 switch=n enabled=y phases=3 Linecode=3P_UG_AL_350kcmil_15_0_416_0_3_3_3_3

New Line.l(r:p5udm6717-p5udt1826lv) Units=km Length=0.0586709 bus1=p5udt1826lv.1.2.3 bus2=p5udm6717.1.2.3 switch=n enabled=y phases=3 Linecode=3P_UG_AL_350kcmil_15_0_416_0_3_3_3_3

New Line.l(r:p5udm5219-p5ulv1567) Units=km Length=0.0048827 bus1=p5udm5219.1.2.3 bus2=p5ulv1567.1.2.3 switch=n enabled=y phases=3 Linecode=3P_UG_AL_750kcmil_25_0_416_0_3_3_3_3

New Line.l(r:p5udm5219-p5ulv7503) Units=km Length=0.0105922 bus1=p5udm5219.1.2.3 bus2=p5ulv7503.1.2.3 switch=n enabled=y phases=3 Linecode=3P_UG_AL_750kcmil_25_0_416_0_3_3_3_3

New Line.l(r:p5udm5219-p5udt1398lv) Units=km Length=0.0315771 bus1=p5udt1398lv.1.2.3 bus2=p5udm5219.1.2.3 switch=n enabled=y phases=3 Linecode=3P_UG_AL_750kcmil_25_0_416_0_3_3_3_3

New Line.l(r:p5udm5221-p5ulv14791) Units=km Length=0.00221883 bus1=p5udm5221.1.2.3 bus2=p5ulv14791.1.2.3 switch=n enabled=y phases=3 Linecode=3P_UG_AL_750kcmil_25_0_416_0_3_3_3_3

New Line.l(r:p5udm5221-p5udt1398lv) Units=km Length=0.0323999 bus1=p5udt1398lv.1.2.3 bus2=p5udm5221.1.2.3 switch=n enabled=y phases=3 Linecode=3P_UG_AL_750kcmil_25_0_416_0_3_3_3_3

New Line.l(r:p5udt1398-p5udt1826) Units=km Length=0.0709875 bus1=p5udt1826.1.2.3 bus2=p5udt1398.1.2.3 switch=n enabled=y phases=3 Linecode=3P_OH_AL_ACSR_4/0_Penguin_12_47_0_3_3_3_3

New Line.l(r:p5udt1826-p5umv45) Units=km Length=0.130503 bus1=p5umv45.1.2.3 bus2=p5udt1826.1.2.3 switch=n enabled=y phases=3 Linecode=3P_OH_AL_ACSR_4/0_Penguin_12_47_0_3_3_3_3

New Line.l(r:p5udt3477lv-p5ulv4697) Units=km Length=0.0106632 bus1=p5udt3477lv.1.2.3 bus2=p5ulv4697.1.2.3 switch=n enabled=y phases=3 Linecode=3P_UG_AL_350kcmil_15_0_416_0_3_3_3_3

New Line.l(r:p5udt75lv-p5ulv76) Units=km Length=0.004110110000000001 bus1=p5udt75lv.1.2.3 bus2=p5ulv76.1.2.3 switch=n enabled=y phases=3 Linecode=3P_UG_AL_350kcmil_15_0_416_0_3_3_3_3

New Line.l(r:p5udt2084lv-p5ulv2490) Units=km Length=0.0135893 bus1=p5udt2084lv.1.2.3 bus2=p5ulv2490.1.2.3 switch=n enabled=y phases=3 Linecode=3P_UG_AL_350kcmil_15_0_416_0_3_3_3_3

New Line.l(r:p5udt2084-p5udt75) Units=km Length=0.17696 bus1=p5udt75.1.2.3 bus2=p5udt2084.1.2.3 switch=n enabled=y phases=3 Linecode=3P_OH_AL_ACSR_4/0_Penguin_12_47_0_3_3_3_3

New Line.l(r:p5udt6409lv-p5ulv12204) Units=km Length=0.0107468 bus1=p5udt6409lv.1.2.3 bus2=p5ulv12204.1.2.3 switch=n enabled=y phases=3 Linecode=3P_UG_AL_350kcmil_15_0_416_0_3_3_3_3

New Line.l(r:p5udt6409-p5udt75) Units=km Length=0.0599759 bus1=p5udt75.1.2.3 bus2=p5udt6409.1.2.3 switch=n enabled=y phases=3 Linecode=3P_OH_AL_ACSR_4/0_Penguin_12_47_0_3_3_3_3

New Line.l(r:p5udt1960-p5udt75) Units=km Length=0.159761 bus1=p5udt1960.1.2.3 bus2=p5udt75.1.2.3 switch=n enabled=y phases=3 Linecode=3P_OH_AL_ACSR_4/0_Penguin_12_47_0_3_3_3_3

New Line.l(r:p5udt7452lv-p5ulv16790) Units=km Length=0.00363275 bus1=p5udt7452lv.1.2.3 bus2=p5ulv16790.1.2.3 switch=n enabled=y phases=3 Linecode=3P_UG_AL_350kcmil_15_0_416_0_3_3_3_3

New Line.l(r:p5udt4632lv-p5ulv7118) Units=km Length=0.0151528 bus1=p5udt4632lv.1.2.3 bus2=p5ulv7118.1.2.3 switch=n enabled=y phases=3 Linecode=3P_UG_AL_350kcmil_15_0_416_0_3_3_3_3

New Line.l(r:p5udt7039lv-p5ulv14789) Units=km Length=0.013441900000000001 bus1=p5udt7039lv.1.2.3 bus2=p5ulv14789.1.2.3 switch=n enabled=y phases=3 Linecode=3P_UG_AL_750kcmil_25_0_416_0_3_3_3_3

New Line.l(r:p5udt7039-p5ulv14790u) Units=km Length=0.05538 bus1=p5udt7039.1.2.3 bus2=p5ulv14790u.1.2.3 switch=n enabled=y phases=3 Linecode=3P_OH_AL_ACSR_4/0_Penguin_12_47_0_3_3_3_3

New Line.l(r:p5udt7588lv-p5ulv17531) Units=km Length=0.0181979 bus1=p5udt7588lv.1.2.3 bus2=p5ulv17531.1.2.3 switch=n enabled=y phases=3 Linecode=3P_UG_AL_750kcmil_25_0_416_0_3_3_3_3

New Line.l(r:p5udt7588lv-p5ulv77431) Units=km Length=0.0271162 bus1=p5udt7588lv.1.2.3 bus2=p5ulv77431.1.2.3 switch=n enabled=y phases=3 Linecode=3P_UG_AL_750kcmil_25_0_416_0_3_3_3_3

New Line.l(r:p5udt6570lv-p5ulv12791) Units=km Length=0.0185903 bus1=p5udt6570lv.1.2.3 bus2=p5ulv12791.1.2.3 switch=n enabled=y phases=3 Linecode=3P_UG_AL_350kcmil_15_0_416_0_3_3_3_3

New Line.l(r:p5udt6570-p5udt7588) Units=km Length=0.166323 bus1=p5udt7588.1.2.3 bus2=p5udt6570.1.2.3 switch=n enabled=y phases=3 Linecode=3P_OH_AL_ACSR_4/0_Penguin_12_47_0_3_3_3_3

New Line.l(r:p5udt7452-p5udt7588) Units=km Length=0.0988047 bus1=p5udt7452.1.2.3 bus2=p5udt7588.1.2.3 switch=n enabled=y phases=3 Linecode=3P_OH_AL_ACSR_4/0_Penguin_12_47_0_3_3_3_3

New Line.l(r:p5udt31791lv-p5ulv69883) Units=km Length=0.0100993 bus1=p5udt31791lv.1.2.3 bus2=p5ulv69883.1.2.3 switch=n enabled=y phases=3 Linecode=3P_UG_AL_350kcmil_15_0_416_0_3_3_3_3

New Line.l(r:p5udt31791-p5udt3476) Units=km Length=0.0274551 bus1=p5udt31791-p5udt3476xx.1.2.3 bus2=p5udt31791-p5udt3476x.1.2.3 switch=n enabled=y phases=3 Linecode=3P_UG_AL_4/0_25_12_47_0_3_3_3_3

New Line.l(r:p5udt3476-p5udt3477) Units=km Length=0.0274551 bus1=p5udt3476-p5udt3477xx.1.2.3 bus2=p5udt3476-p5udt3477x.1.2.3 switch=n enabled=y phases=3 Linecode=3P_UG_AL_4/0_25_12_47_0_3_3_3_3

New Line.l(r:p5udt5814lv-p5ulv10295) Units=km Length=0.00815365 bus1=p5udt5814lv.1.2.3 bus2=p5ulv10295.1.2.3 switch=n enabled=y phases=3 Linecode=3P_UG_AL_750kcmil_25_0_416_0_3_3_3_3

New Line.l(r:p5udt5296lv-p5ulv8796) Units=km Length=0.00242217 bus1=p5udt5296lv.1.2.3 bus2=p5ulv8796.1.2.3 switch=n enabled=y phases=3 Linecode=3P_UG_AL_750kcmil_25_0_416_0_3_3_3_3

New Line.l(r:p5udm16629-p5ulv8795) Units=km Length=0.011109 bus1=p5udm16629.1.2.3 bus2=p5ulv8795.1.2.3 switch=n enabled=y phases=3 Linecode=3P_UG_AL_350kcmil_15_0_416_0_3_3_3_3

New Line.l(r:p5udm16629-p5udt5296lv) Units=km Length=0.0583466 bus1=p5udt5296lv.1.2.3 bus2=p5udm16629.1.2.3 switch=n enabled=y phases=3 Linecode=3P_UG_AL_350kcmil_15_0_416_0_3_3_3_3

New Line.l(r:p5udt5566lv-p5ulv9579) Units=km Length=0.0183484 bus1=p5udt5566lv.1.2.3 bus2=p5ulv9579.1.2.3 switch=n enabled=y phases=3 Linecode=3P_UG_AL_350kcmil_15_0_416_0_3_3_3_3

New Line.l(r:p5udt5565lv-p5ulv9578) Units=km Length=0.017877 bus1=p5udt5565lv.1.2.3 bus2=p5ulv9578.1.2.3 switch=n enabled=y phases=3 Linecode=3P_UG_AL_350kcmil_15_0_416_0_3_3_3_3

New Line.l(r:p5udt5565-p5udt5566) Units=km Length=0.017013 bus1=p5udt5566.1.2.3 bus2=p5udt5565.1.2.3 switch=n enabled=y phases=3 Linecode=3P_OH_AL_ACSR_4/0_Penguin_12_47_0_3_3_3_3

New Line.l(r:p5udt3957-p5udt5566) Units=km Length=0.0170255 bus1=p5udt3957.1.2.3 bus2=p5udt5566.1.2.3 switch=n enabled=y phases=3 Linecode=3P_OH_AL_ACSR_4/0_Penguin_12_47_0_3_3_3_3

New Line.l(r:p5udt3957-p5udt5296) Units=km Length=0.121851 bus1=p5udt5296.1.2.3 bus2=p5udt3957.1.2.3 switch=n enabled=y phases=3 Linecode=3P_OH_AL_ACSR_4/0_Penguin_12_47_0_3_3_3_3

New Line.l(r:p5udt5297lv-p5ulv8797) Units=km Length=0.00856394 bus1=p5udt5297lv.1.2.3 bus2=p5ulv8797.1.2.3 switch=n enabled=y phases=3 Linecode=3P_UG_AL_750kcmil_25_0_416_0_3_3_3_3

New Line.l(r:p5udt7386lv-p5ulv16405) Units=km Length=0.0124721 bus1=p5udt7386lv.1.2.3 bus2=p5ulv16405.1.2.3 switch=n enabled=y phases=3 Linecode=3P_UG_AL_750kcmil_25_0_416_0_3_3_3_3

New Line.l(r:p5udt7386-p5umv50) Units=km Length=0.0267717 bus1=p5umv50.1.2.3 bus2=p5udt7386.1.2.3 switch=n enabled=y phases=3 Linecode=3P_OH_AL_ACSR_4/0_Penguin_12_47_0_3_3_3_3

New Line.l(r:p5umv118-p5umv50) Units=km Length=0.318979 bus1=p5umv118.1.2.3 bus2=p5umv50.1.2.3 switch=n enabled=y phases=3 Linecode=3P_OH_AL_ACSR_4/0_Penguin_12_47_0_3_3_3_3

New Line.l(r:p5udm14896-p5ulv6936) Units=km Length=0.00564413 bus1=p5udm14896.1.2.3 bus2=p5ulv6936.1.2.3 switch=n enabled=y phases=3 Linecode=3P_UG_AL_750kcmil_25_0_416_0_3_3_3_3

New Line.l(r:p5udm14898-p5ulv16407) Units=km Length=0.007480430000000001 bus1=p5udm14898.1.2.3 bus2=p5ulv16407.1.2.3 switch=n enabled=y phases=3 Linecode=3P_UG_AL_750kcmil_25_0_416_0_3_3_3_3

New Line.l(r:p5udm14896-p5udm14898) Units=km Length=0.0174191 bus1=p5udm14896.1.2.3 bus2=p5udm14898.1.2.3 switch=n enabled=y phases=3 Linecode=3P_UG_AL_750kcmil_25_0_416_0_3_3_3_3

New Line.l(r:p5udm14897-p5ulv6937) Units=km Length=0.00244965 bus1=p5udm14897.1.2.3 bus2=p5ulv6937.1.2.3 switch=n enabled=y phases=3 Linecode=3P_UG_AL_750kcmil_25_0_416_0_3_3_3_3

New Line.l(r:p5udm14897-p5udt4563lv) Units=km Length=0.0348446 bus1=p5udt4563lv.1.2.3 bus2=p5udm14897.1.2.3 switch=n enabled=y phases=3 Linecode=3P_UG_AL_750kcmil_25_0_416_0_3_3_3_3

New Line.l(r:p5udt5354lv-p5ulv9001) Units=km Length=0.00782777 bus1=p5udt5354lv.1.2.3 bus2=p5ulv9001.1.2.3 switch=n enabled=y phases=3 Linecode=3P_UG_AL_750kcmil_25_0_416_0_3_3_3_3

New Line.l(r:p5udt5354lv-p5ulv17532) Units=km Length=0.00651504 bus1=p5udt5354lv.1.2.3 bus2=p5ulv17532.1.2.3 switch=n enabled=y phases=3 Linecode=3P_UG_AL_750kcmil_25_0_416_0_3_3_3_3

New Line.l(r:p5udt5354-p5udt7387) Units=km Length=0.18287 bus1=p5udt7387.1.2.3 bus2=p5udt5354.1.2.3 switch=n enabled=y phases=3 Linecode=3P_OH_AL_ACSR_4/0_Penguin_12_47_0_3_3_3_3

New Line.l(r:p5udt7357lv-p5ulv16217) Units=km Length=0.00467847 bus1=p5udt7357lv.1.2.3 bus2=p5ulv16217.1.2.3 switch=n enabled=y phases=3 Linecode=3P_UG_AL_350kcmil_15_0_416_0_3_3_3_3

New Line.l(r:p5udt6509lv-p5ulv16215) Units=km Length=0.0057234 bus1=p5udt6509lv.1.2.3 bus2=p5ulv16215.1.2.3 switch=n enabled=y phases=3 Linecode=3P_UG_AL_350kcmil_15_0_416_0_3_3_3_3

New Line.l(r:p5udm18918-p5ulv12590) Units=km Length=0.00833514 bus1=p5udm18918.1.2.3 bus2=p5ulv12590.1.2.3 switch=n enabled=y phases=3 Linecode=3P_UG_AL_350kcmil_15_0_416_0_3_3_3_3

New Line.l(r:p5udm18918-p5udt6509lv) Units=km Length=0.0632154 bus1=p5udt6509lv.1.2.3 bus2=p5udm18918.1.2.3 switch=n enabled=y phases=3 Linecode=3P_UG_AL_350kcmil_15_0_416_0_3_3_3_3

New Line.l(r:p5udm18920-p5ulv16216) Units=km Length=0.00518785 bus1=p5udm18920.1.2.3 bus2=p5ulv16216.1.2.3 switch=n enabled=y phases=3 Linecode=3P_UG_AL_350kcmil_15_0_416_0_3_3_3_3

New Line.l(r:p5udm18920-p5udt6509lv) Units=km Length=0.0176878 bus1=p5udt6509lv.1.2.3 bus2=p5udm18920.1.2.3 switch=n enabled=y phases=3 Linecode=3P_UG_AL_350kcmil_15_0_416_0_3_3_3_3

New Line.l(r:p5udt6509-p5udt7357) Units=km Length=0.0530414 bus1=p5udt7357.1.2.3 bus2=p5udt6509.1.2.3 switch=n enabled=y phases=3 Linecode=3P_OH_AL_ACSR_4/0_Penguin_12_47_0_3_3_3_3

New Line.l(r:p5udt7357-p5udt7358) Units=km Length=0.04080240000000001 bus1=p5udt7358.1.2.3 bus2=p5udt7357.1.2.3 switch=n enabled=y phases=3 Linecode=3P_OH_AL_ACSR_4/0_Penguin_12_47_0_3_3_3_3

New Line.l(r:p5udt444-p5udt6409) Units=km Length=0.145029 bus1=p5udt444-p5udt6409x.1.2.3 bus2=p5udt444.1.2.3 switch=n enabled=y phases=3 Linecode=3P_OH_AL_ACSR_1033kcmil_Curlew_12.47_1_3_3_3_3

New Line.l(r:p5udt5354-p5udt7452) Units=km Length=0.0732183 bus1=p5udt5354-p5udt7452x.1.2.3 bus2=p5udt7452.1.2.3 switch=n enabled=y phases=3 Linecode=3P_OH_AL_ACSR_1033kcmil_Curlew_12.47_1_3_3_3_3

New Line.l(r:p5udm14896-p5udt4563lv)p5ud1 Units=km Length=0.0174191 bus1=p5udt4563lv.1.2.3 bus2=p5udm14896.1.2.3 switch=n enabled=y phases=3 Linecode=3P_UG_AL_750kcmil_25_0_416_0_3_3_3_3

New Line.l(r:p5udm14896-p5udt4563lv)p5ud1p5ud1 Units=km Length=0.0174191 bus1=p5udt4563lv.1.2.3 bus2=p5udm14896.1.2.3 switch=n enabled=y phases=3 Linecode=3P_UG_AL_750kcmil_25_0_416_0_3_3_3_3

New Line.padswitch(r:p5udt2950-p5udt446)p5u_119412 Units=km Length=0.001 bus1=p5udt2950.1.2.3 bus2=p5udt2950-p5udt446x.1.2.3 switch=y enabled=y phases=3 Linecode=padswitch_3_3_3_3

New Line.padswitch(r:p5udt2950-p5udt446)p5u_119413 Units=km Length=0.001 bus1=p5udt2950-p5udt446xx.1.2.3 bus2=p5udt446.1.2.3 switch=y enabled=y phases=3 Linecode=padswitch_3_4_3_3_3

New Line.padswitch(r:p5udt31791-p5udt3476)p5u_119414 Units=km Length=0.001 bus1=p5udt3476.1.2.3 bus2=p5udt31791-p5udt3476xx.1.2.3 switch=y enabled=y phases=3 Linecode=padswitch_3_4_3_3_3

New Line.padswitch(r:p5udt31791-p5udt3476)p5u_119415 Units=km Length=0.001 bus1=p5udt31791-p5udt3476x.1.2.3 bus2=p5udt31791.1.2.3 switch=y enabled=y phases=3 Linecode=padswitch_3_4_3_2_3_3

New Line.padswitch(r:p5udt3476-p5udt3477)p5u_119416 Units=km Length=0.001 bus1=p5udt3477.1.2.3 bus2=p5udt3476-p5udt3477xx.1.2.3 switch=y enabled=y phases=3 Linecode=padswitch_3_4_3_2_3_1_3

New Line.padswitch(r:p5udt3476-p5udt3477)p5u_119417 Units=km Length=0.001 bus1=p5udt3476-p5udt3477x.1.2.3 bus2=p5udt3476.1.2.3 switch=y enabled=y phases=3 Linecode=padswitch_3_4_3_2_3_1_3_1

New Line.elbswitch(r:p5udt444-p5udt6409)p5u_151237 Units=km Length=0.001 bus1=p5udt6409.1.2.3 bus2=p5udt444-p5udt6409x.1.2.3 switch=y enabled=n phases=3 Linecode=elbswitch_3_3_3_3

New Line.elbswitch(r:p5udt5354-p5udt7452)p5u_151330 Units=km Length=0.001 bus1=p5udt5354.1.2.3 bus2=p5udt5354-p5udt7452x.1.2.3 switch=y enabled=n phases=3 Linecode=elbswitch_3_6_3_3_3

New Line.fuse(r:p5udt14299-p5udt2084)p5u_151764 Units=km Length=0.001 bus1=p5udt2084.2 bus2=p5udt14299-p5udt2084x.2 switch=n enabled=y phases=1 Linecode=fuse_1_1_1_1

New Fuse.Fuse_fuse(r:p5udt14299-p5udt2084)p5u_151764 monitoredobj=Line.fuse(r:p5udt14299-p5udt2084)p5u_151764 enabled=y ratedcurrent=100.0

New Line.fuse(r:p5udt2218-p5udt33538)p5u_151787 Units=km Length=0.001 bus1=p5udt2218.2 bus2=p5udt2218-p5udt33538x.2 switch=n enabled=y phases=1 Linecode=fuse_1_7_1_1_1

New Fuse.Fuse_fuse(r:p5udt2218-p5udt33538)p5u_151787 monitoredobj=Line.fuse(r:p5udt2218-p5udt33538)p5u_151787 enabled=y ratedcurrent=100.0

New Line.fuse(r:p5udt2352-p5udt6756)p5u_151802 Units=km Length=0.001 bus1=p5udt2352.2 bus2=p5udt2352-p5udt6756x.2 switch=n enabled=y phases=1 Linecode=fuse_1_7_1_1_1

New Fuse.Fuse_fuse(r:p5udt2352-p5udt6756)p5u_151802 monitoredobj=Line.fuse(r:p5udt2352-p5udt6756)p5u_151802 enabled=y ratedcurrent=100.0

New Line.fuse(r:p5udt3477-p5udt6755)p5u_151982 Units=km Length=0.001 bus1=p5udt3477.3 bus2=p5udt3477-p5udt6755x.3 switch=n enabled=y phases=1 Linecode=fuse_1_7_1_1_1

New Fuse.Fuse_fuse(r:p5udt3477-p5udt6755)p5u_151982 monitoredobj=Line.fuse(r:p5udt3477-p5udt6755)p5u_151982 enabled=y ratedcurrent=100.0

New Line.fuse(r:p5udt3281-p5udt4136)p5u_152093 Units=km Length=0.001 bus1=p5udt4136.3 bus2=p5udt3281-p5udt4136x.3 switch=n enabled=y phases=1 Linecode=fuse_1_7_1_5_1_1

New Fuse.Fuse_fuse(r:p5udt3281-p5udt4136)p5u_152093 monitoredobj=Line.fuse(r:p5udt3281-p5udt4136)p5u_152093 enabled=y ratedcurrent=100.0

New Line.fuse(r:p5udt33539-p5udt4136)p5u_152094 Units=km Length=0.001 bus1=p5udt4136.1 bus2=p5udt33539-p5udt4136x.1 switch=n enabled=y phases=1 Linecode=fuse_1_7_1_5_1_4_1

New Fuse.Fuse_fuse(r:p5udt33539-p5udt4136)p5u_152094 monitoredobj=Line.fuse(r:p5udt33539-p5udt4136)p5u_152094 enabled=y ratedcurrent=100.0
