New Capacitor.p5uc12 Bus1=p5udt33674 phases=3 Kv=12.47 conn=Wye Kvar=600.0

New CapControl.p5uc12 Capacitor=p5uc12 Element=Line.l(r:p5udt33674-p5udt4219) Terminal=1 delay=100.0 Type=voltage Vmin=120.5 Vmax=125.0 Ptratio=59.99631547328862 Ctratio=100.0

New Capacitor.p5uc14 Bus1=p5udt33481 phases=3 Kv=12.47 conn=Wye Kvar=600.0

New CapControl.p5uc14 Capacitor=p5uc14 Element=Line.l(r:p5udt33481-p5umv60) Terminal=1 delay=100.0 Type=voltage Vmin=120.5 Vmax=125.0 Ptratio=59.99631547328862 Ctratio=100.0

New Capacitor.p5uc16 Bus1=p5umv14 phases=3 Kv=12.47 conn=Wye Kvar=600.0

New CapControl.p5uc16 Capacitor=p5uc16 Element=Line.padswitch(r:p5udt7323-p5umv14)p5u_119426 Terminal=1 delay=100.0 Type=voltage Vmin=120.5 Vmax=125.0 Ptratio=59.99631547328862 Ctratio=100.0
