New Line.l(r:p5udt3475lv-p5ulv4695) Units=km Length=0.011606200000000002 bus1=p5udt3475lv.1.2 bus2=p5ulv4695.1.2 switch=n enabled=y phases=2 Linecode=1P_UG_AL_4/0_Sweetbriar_0_416_0_2_2_2_2

New Line.l(r:p5udm14723-p5ulv33491) Units=km Length=0.0167834 bus1=p5udm14723.1.2 bus2=p5ulv33491.1.2 switch=n enabled=y phases=2 Linecode=1P_OH_AL_2/0_Rucina_0_416_0_2_2_2_2

New Line.l(r:p5udm14722-p5ulv6781) Units=km Length=0.00241963 bus1=p5udm14722.1.2 bus2=p5ulv6781.1.2 switch=n enabled=y phases=2 Linecode=1P_OH_AL_4_Periwinkle_0_416_0_2_2_2_2

New Line.l(r:p5udm14722-p5udm14723) Units=km Length=0.0350654 bus1=p5udm14723.1.2 bus2=p5udm14722.1.2 switch=n enabled=y phases=2 Linecode=1P_OH_AL_4/0_Zuzara_0_416_0_2_2_2_2

New Line.l(r:p5udm14723-p5udt4491lv) Units=km Length=0.0175231 bus1=p5udt4491lv.1.2 bus2=p5udm14723.1.2 switch=n enabled=y phases=2 Linecode=1P_OH_AL_2/0_Rucina_0_416_0_2_2_2_2

New Line.l(r:p5udm14725-p5ulv77708) Units=km Length=0.0031967800000000006 bus1=p5udm14725.1.2 bus2=p5ulv77708.1.2 switch=n enabled=y phases=2 Linecode=1P_OH_AL_4_Periwinkle_0_416_0_2_2_2_2

New Line.l(r:p5udm14724-p5ulv77707) Units=km Length=0.0124078 bus1=p5udm14724.1.2 bus2=p5ulv77707.1.2 switch=n enabled=y phases=2 Linecode=1P_UG_AL_1/0_Brenau_0_416_0_2_2_2_2

New Line.l(r:p5udm14724-p5udm14725) Units=km Length=0.104278 bus1=p5udm14725.1.2 bus2=p5udm14724.1.2 switch=n enabled=y phases=2 Linecode=1P_OH_AL_4/0_Zuzara_0_416_0_2_2_2_2

New Line.l(r:p5udm14725-p5udt4491lv) Units=km Length=0.0175327 bus1=p5udt4491lv.1.2 bus2=p5udm14725.1.2 switch=n enabled=y phases=2 Linecode=1P_OH_AL_2/0_Rucina_0_416_0_2_2_2_2

New Line.l(r:p5udm20359-p5ulv16793) Units=km Length=0.00538221 bus1=p5udm20359.1.2 bus2=p5ulv16793.1.2 switch=n enabled=y phases=2 Linecode=1P_OH_AL_2/0_Rucina_0_416_0_2_2_2_2

New Line.l(r:p5udm20359-p5udt7454lv) Units=km Length=0.0177247 bus1=p5udt7454lv.1.2 bus2=p5udm20359.1.2 switch=n enabled=y phases=2 Linecode=1P_OH_AL_2/0_Rucina_0_416_0_2_2_2_2

New Line.l(r:p5udm20360-p5ulv16795) Units=km Length=0.00504279 bus1=p5udm20360.1.2 bus2=p5ulv16795.1.2 switch=n enabled=y phases=2 Linecode=1P_OH_AL_2/0_Rucina_0_416_0_2_2_2_2

New Line.l(r:p5udm20360-p5ulv77552) Units=km Length=0.005037 bus1=p5udm20360.1.2 bus2=p5ulv77552.1.2 switch=n enabled=y phases=2 Linecode=1P_OH_AL_2/0_Rucina_0_416_0_2_2_2_2

New Line.l(r:p5udm20360-p5udt7454lv) Units=km Length=0.0177218 bus1=p5udt7454lv.1.2 bus2=p5udm20360.1.2 switch=n enabled=y phases=2 Linecode=1P_OH_AL_2/0_Rucina_0_416_0_2_2_2_2

New Line.l(r:p5udt7850lv-p5ulv18862) Units=km Length=0.0432353 bus1=p5udt7850lv.1.2 bus2=p5ulv18862.1.2 switch=n enabled=y phases=2 Linecode=1P_OH_AL_4/0_Zuzara_0_416_0_2_2_2_2

New Line.l(r:p5udm48339-p5ulv30790) Units=km Length=0.00533926 bus1=p5udm48339.1.2 bus2=p5ulv30790.1.2 switch=n enabled=y phases=2 Linecode=1P_OH_AL_2/0_Rucina_0_416_0_2_2_2_2

New Line.l(r:p5udm48339-p5udt16996lv) Units=km Length=0.0348257 bus1=p5udt16996lv.1.2 bus2=p5udm48339.1.2 switch=n enabled=y phases=2 Linecode=1P_OH_AL_4/0_Zuzara_0_416_0_2_2_2_2

New Line.l(r:p5udm48340-p5ulv77440) Units=km Length=0.007787810000000001 bus1=p5udm48340.1.2 bus2=p5ulv77440.1.2 switch=n enabled=y phases=2 Linecode=1P_OH_AL_2/0_Rucina_0_416_0_2_2_2_2

New Line.l(r:p5udm48340-p5udt16996lv) Units=km Length=0.0117826 bus1=p5udt16996lv.1.2 bus2=p5udm48340.1.2 switch=n enabled=y phases=2 Linecode=1P_OH_AL_2/0_Rucina_0_416_0_2_2_2_2

New Line.l(r:p5udm77271-p5ulv77420) Units=km Length=0.00527732 bus1=p5udm77271.1.2 bus2=p5ulv77420.1.2 switch=n enabled=y phases=2 Linecode=1P_OH_AL_2/0_Rucina_0_416_0_2_2_2_2

New Line.l(r:p5udm77272-p5ulv77422) Units=km Length=0.005277650000000001 bus1=p5udm77272.1.2 bus2=p5ulv77422.1.2 switch=n enabled=y phases=2 Linecode=1P_OH_AL_2/0_Rucina_0_416_0_2_2_2_2

New Line.l(r:p5udm77271-p5udm77272) Units=km Length=0.0348955 bus1=p5udm77271.1.2 bus2=p5udm77272.1.2 switch=n enabled=y phases=2 Linecode=1P_OH_AL_4/0_Zuzara_0_416_0_2_2_2_2

New Line.l(r:p5udm77271-p5udt33540lv) Units=km Length=0.0290344 bus1=p5udt33540lv.1.2 bus2=p5udm77271.1.2 switch=n enabled=y phases=2 Linecode=1P_OH_AL_4/0_Zuzara_0_416_0_2_2_2_2

New Line.l(r:p5udm77273-p5ulv77425) Units=km Length=0.00512762 bus1=p5udm77273.1.2 bus2=p5ulv77425.1.2 switch=n enabled=y phases=2 Linecode=1P_OH_AL_2/0_Rucina_0_416_0_2_2_2_2

New Line.l(r:p5udm77275-p5ulv77427) Units=km Length=0.00187491 bus1=p5udm77275.1.2 bus2=p5ulv77427.1.2 switch=n enabled=y phases=2 Linecode=1P_OH_AL_4_Periwinkle_0_416_0_2_2_2_2

New Line.l(r:p5udm77274-p5ulv77426) Units=km Length=0.00402101 bus1=p5udm77274.1.2 bus2=p5ulv77426.1.2 switch=n enabled=y phases=2 Linecode=1P_OH_AL_2/0_Rucina_0_416_0_2_2_2_2

New Line.l(r:p5udm77274-p5udm77275) Units=km Length=0.0174373 bus1=p5udm77275.1.2 bus2=p5udm77274.1.2 switch=n enabled=y phases=2 Linecode=1P_OH_AL_2/0_Rucina_0_416_0_2_2_2_2

New Line.l(r:p5udm77273-p5udm77275) Units=km Length=0.017449700000000002 bus1=p5udm77273.1.2 bus2=p5udm77275.1.2 switch=n enabled=y phases=2 Linecode=1P_OH_AL_2/0_Rucina_0_416_0_2_2_2_2

New Line.l(r:p5udm77273-p5udt33540lv) Units=km Length=0.00992695 bus1=p5udt33540lv.1.2 bus2=p5udm77273.1.2 switch=n enabled=y phases=2 Linecode=1P_OH_AL_2/0_Rucina_0_416_0_2_2_2_2

New Line.l(r:p5udt33541lv-p5ulv77421) Units=km Length=0.0105967 bus1=p5udt33541lv.1.2 bus2=p5ulv77421.1.2 switch=n enabled=y phases=2 Linecode=1P_OH_AL_2/0_Rucina_0_416_0_2_2_2_2

New Line.l(r:p5udm77277-p5ulv77423) Units=km Length=0.0181955 bus1=p5udm77277.1.2 bus2=p5ulv77423.1.2 switch=n enabled=y phases=2 Linecode=1P_OH_AL_2/0_Rucina_0_416_0_2_2_2_2

New Line.l(r:p5udm77277-p5udt33542lv) Units=km Length=0.0174968 bus1=p5udt33542lv.1.2 bus2=p5udm77277.1.2 switch=n enabled=y phases=2 Linecode=1P_OH_AL_2/0_Rucina_0_416_0_2_2_2_2

New Line.l(r:p5udm77278-p5ulv77424) Units=km Length=0.0135833 bus1=p5udm77278.1.2 bus2=p5ulv77424.1.2 switch=n enabled=y phases=2 Linecode=1P_OH_AL_2/0_Rucina_0_416_0_2_2_2_2

New Line.l(r:p5udm77278-p5udt33542lv) Units=km Length=0.0282038 bus1=p5udt33542lv.1.2 bus2=p5udm77278.1.2 switch=n enabled=y phases=2 Linecode=1P_OH_AL_4/0_Zuzara_0_416_0_2_2_2_2

New Line.l(r:p5udm77279-p5ulv77436) Units=km Length=0.0126637 bus1=p5udm77279.1.2 bus2=p5ulv77436.1.2 switch=n enabled=y phases=2 Linecode=1P_OH_AL_2/0_Rucina_0_416_0_2_2_2_2

New Line.l(r:p5udm77279-p5udt33542lv) Units=km Length=0.028803800000000004 bus1=p5udt33542lv.1.2 bus2=p5udm77279.1.2 switch=n enabled=y phases=2 Linecode=1P_OH_AL_4/0_Zuzara_0_416_0_2_2_2_2

New Line.l(r:p5udt33582lv-p5ulv77709) Units=km Length=0.012572 bus1=p5udt33582lv.1.2 bus2=p5ulv77709.1.2 switch=n enabled=y phases=2 Linecode=1P_OH_AL_2/0_Rucina_0_416_0_2_2_2_2

New Line.l(r:p5udt33583lv-p5ulv77710) Units=km Length=0.017234700000000002 bus1=p5udt33583lv.1.2 bus2=p5ulv77710.1.2 switch=n enabled=y phases=2 Linecode=1P_UG_AL_1/0_Brenau_0_416_0_2_2_2_2

New Line.l(r:p5udt7850-p5umv23) Units=km Length=0.374997 bus1=p5udt7850-p5umv23x.2 bus2=p5udt7850.2 switch=n enabled=y phases=1 Linecode=1P_OH_AL_ACSR_#2_Sparrow_12_47_0_1_1_1_1

New Line.l(r:p5udt33583-p5udt6457) Units=km Length=0.001 bus1=p5udt33583-p5udt6457xx.1 bus2=p5udt33583-p5udt6457x.1 switch=n enabled=y phases=1 Linecode=1P_UG_AL_#2_15_12_47_0_1_1_1_1

New Line.l(r:p5udt1687-p5udt5564) Units=km Length=0.110083 bus1=p5udt1687.1.2.3 bus2=p5udt5564.1.2.3 switch=n enabled=y phases=3 Linecode=3P_OH_AL_ACSR_336kcmil_Merlin_12_47_0_3_3_3_3

New Line.l(r:p5udt1682-p5udt3475) Units=km Length=0.137003 bus1=p5udt1682-p5udt3475x.1 bus2=p5udt3475.1 switch=n enabled=y phases=1 Linecode=1P_OH_AL_ACSR_#2_Sparrow_12_47_0_1_1_1_1

New Line.l(r:p5udt33582-p5udt6306) Units=km Length=0.0873051 bus1=p5udt33582-p5udt6306x.3 bus2=p5udt33582.3 switch=n enabled=y phases=1 Linecode=1P_OH_AL_ACSR_#2_Sparrow_12_47_0_1_1_1_1

New Line.l(r:p5udt1687-p5udt6304) Units=km Length=0.176672 bus1=p5udt6304.1.2.3 bus2=p5udt1687.1.2.3 switch=n enabled=y phases=3 Linecode=3P_OH_AL_ACSR_1033kcmil_Curlew_12.47_1_3_3_3_3

New Line.l(r:p5udt6304-p5udt7453) Units=km Length=0.520952 bus1=p5udt7453.1.2.3 bus2=p5udt6304.1.2.3 switch=n enabled=y phases=3 Linecode=3P_OH_AL_ACSR_1033kcmil_Curlew_12.47_1_3_3_3_3

New Line.l(r:p5udt7453-p5uhs3_1247) Units=km Length=0.0610548 bus1=p5udt7453-p5uhs3_1247x.1.2.3 bus2=p5udt7453.1.2.3 switch=n enabled=y phases=3 Linecode=3P_OH_AL_ACSR_1033kcmil_Curlew_12.47_1_3_3_3_3

New Line.l(r:p5udt33481-p5umv60) Units=km Length=0.00624119 bus1=p5umv60.1.2.3 bus2=p5udt33481.1.2.3 switch=n enabled=y phases=3 Linecode=3P_OH_AL_ACSR_4/0_Penguin_12_47_0_3_3_3_3

New Line.l(r:p5udt6658-p5umv60) Units=km Length=0.06220520000000001 bus1=p5udt6658.1.2.3 bus2=p5umv60.1.2.3 switch=n enabled=y phases=3 Linecode=3P_OH_AL_ACSR_4/0_Penguin_12_47_0_3_3_3_3

New Line.l(r:p5udt6657-p5udt6658) Units=km Length=0.0317549 bus1=p5udt6657.1.2.3 bus2=p5udt6658.1.2.3 switch=n enabled=y phases=3 Linecode=3P_OH_AL_ACSR_4/0_Penguin_12_47_0_3_3_3_3

New Line.l(r:p5udt5564-p5udt6657) Units=km Length=0.137978 bus1=p5udt5564.1.2.3 bus2=p5udt6657.1.2.3 switch=n enabled=y phases=3 Linecode=3P_OH_AL_ACSR_4/0_Penguin_12_47_0_3_3_3_3

New Line.l(r:p5udt7323-p5umv14) Units=km Length=0.138564 bus1=p5udt7323-p5umv14x.1.2.3 bus2=p5udt7323-p5umv14xx.1.2.3 switch=n enabled=y phases=3 Linecode=3P_UG_AL_4/0_25_12_47_0_3_3_3_3

New Line.l(r:p5udt33674-p5udt4219) Units=km Length=0.0941654 bus1=p5udt4219.1.2.3 bus2=p5udt33674.1.2.3 switch=n enabled=y phases=3 Linecode=3P_OH_AL_ACSR_4/0_Penguin_12_47_0_3_3_3_3

New Line.l(r:p5udt4219-p5udt6241) Units=km Length=0.104926 bus1=p5udt6241.1.2.3 bus2=p5udt4219.1.2.3 switch=n enabled=y phases=3 Linecode=3P_OH_AL_ACSR_4/0_Penguin_12_47_0_3_3_3_3

New Line.l(r:p5udt6241-p5udt7323) Units=km Length=0.289566 bus1=p5udt6241-p5udt7323xx.1.2.3 bus2=p5udt6241-p5udt7323x.1.2.3 switch=n enabled=y phases=3 Linecode=3P_UG_AL_4/0_25_12_47_0_3_3_3_3

New Line.l(r:p5udt5564-p5udt7323) Units=km Length=0.149324 bus1=p5udt5564.1.2.3 bus2=p5udt7323.1.2.3 switch=n enabled=y phases=3 Linecode=3P_OH_AL_ACSR_4/0_Penguin_12_47_0_3_3_3_3

New Line.l(r:p5udt2843-p5udt33540) Units=km Length=0.044814 bus1=p5udt33540.1.2.3 bus2=p5udt2843.1.2.3 switch=n enabled=y phases=3 Linecode=3P_OH_AL_ACSR_4/0_Penguin_12_47_0_3_3_3_3

New Line.l(r:p5udt1687-p5udt33540) Units=km Length=0.0464854 bus1=p5udt1687.1.2.3 bus2=p5udt33540.1.2.3 switch=n enabled=y phases=3 Linecode=3P_OH_AL_ACSR_4/0_Penguin_12_47_0_3_3_3_3

New Line.l(r:p5udt1682-p5udt33541) Units=km Length=0.08132440000000002 bus1=p5udt33541.1.2.3 bus2=p5udt1682.1.2.3 switch=n enabled=y phases=3 Linecode=3P_OH_AL_ACSR_4/0_Penguin_12_47_0_3_3_3_3

New Line.l(r:p5udt2948-p5udt4871) Units=km Length=0.052248 bus1=p5udt2948.1.2.3 bus2=p5udt4871.1.2.3 switch=n enabled=y phases=3 Linecode=3P_OH_AL_ACSR_4/0_Penguin_12_47_0_3_3_3_3

New Line.l(r:p5udt16996-p5udt2948) Units=km Length=0.0348257 bus1=p5udt16996.1.2.3 bus2=p5udt2948.1.2.3 switch=n enabled=y phases=3 Linecode=3P_OH_AL_ACSR_4/0_Penguin_12_47_0_3_3_3_3

New Line.l(r:p5udt16996-p5udt33541) Units=km Length=0.11267300000000001 bus1=p5udt33541.1.2.3 bus2=p5udt16996.1.2.3 switch=n enabled=y phases=3 Linecode=3P_OH_AL_ACSR_4/0_Penguin_12_47_0_3_3_3_3

New Line.l(r:p5udt1687-p5udt33541) Units=km Length=0.175183 bus1=p5udt1687.1.2.3 bus2=p5udt33541.1.2.3 switch=n enabled=y phases=3 Linecode=3P_OH_AL_ACSR_4/0_Penguin_12_47_0_3_3_3_3

New Line.l(r:p5udt7453lv-p5ulv16791) Units=km Length=0.004032100000000001 bus1=p5udt7453lv.1.2.3 bus2=p5ulv16791.1.2.3 switch=n enabled=y phases=3 Linecode=3P_UG_AL_350kcmil_15_0_416_0_3_3_3_3

New Line.l(r:p5udt6304lv-p5ulv11849) Units=km Length=0.0133683 bus1=p5udt6304lv.1.2.3 bus2=p5ulv11849.1.2.3 switch=n enabled=y phases=3 Linecode=3P_UG_AL_350kcmil_15_0_416_0_3_3_3_3

New Line.l(r:p5udt1687lv-p5ulv1939) Units=km Length=0.005307390000000001 bus1=p5udt1687lv.1.2.3 bus2=p5ulv1939.1.2.3 switch=n enabled=y phases=3 Linecode=3P_UG_AL_350kcmil_15_0_416_0_3_3_3_3

New Line.l(r:p5udt1687lv-p5ulv5854) Units=km Length=0.00515714 bus1=p5udt1687lv.1.2.3 bus2=p5ulv5854.1.2.3 switch=n enabled=y phases=3 Linecode=3P_UG_AL_350kcmil_15_0_416_0_3_3_3_3

New Line.l(r:p5udm6228-p5ulv1938) Units=km Length=0.005524090000000001 bus1=p5udm6228.1.2.3 bus2=p5ulv1938.1.2.3 switch=n enabled=y phases=3 Linecode=3P_UG_AL_350kcmil_15_0_416_0_3_3_3_3

New Line.l(r:p5udm6228-p5ulv5853) Units=km Length=0.00230638 bus1=p5udm6228.1.2.3 bus2=p5ulv5853.1.2.3 switch=n enabled=y phases=3 Linecode=3P_UG_AL_750kcmil_25_0_416_0_3_3_3_3

New Line.l(r:p5udm6228-p5udt1687lv) Units=km Length=0.0174511 bus1=p5udt1687lv.1.2.3 bus2=p5udm6228.1.2.3 switch=n enabled=y phases=3 Linecode=3P_UG_AL_750kcmil_25_0_416_0_3_3_3_3

New Line.l(r:p5udm6232-p5ulv5855) Units=km Length=0.00295855 bus1=p5udm6232.1.2.3 bus2=p5ulv5855.1.2.3 switch=n enabled=y phases=3 Linecode=3P_UG_AL_350kcmil_15_0_416_0_3_3_3_3

New Line.l(r:p5udm6232-p5udt1687lv) Units=km Length=0.0174444 bus1=p5udt1687lv.1.2.3 bus2=p5udm6232.1.2.3 switch=n enabled=y phases=3 Linecode=3P_UG_AL_350kcmil_15_0_416_0_3_3_3_3

New Line.l(r:p5udt5564lv-p5ulv13740) Units=km Length=0.00935139 bus1=p5udt5564lv.1.2.3 bus2=p5ulv13740.1.2.3 switch=n enabled=y phases=3 Linecode=3P_UG_AL_750kcmil_25_0_416_0_3_3_3_3

New Line.l(r:p5udm17181-p5ulv9577) Units=km Length=0.0026732 bus1=p5udm17181.1.2.3 bus2=p5ulv9577.1.2.3 switch=n enabled=y phases=3 Linecode=3P_UG_AL_350kcmil_15_0_416_0_3_3_3_3

New Line.l(r:p5udm17180-p5ulv9576) Units=km Length=0.00374831 bus1=p5udm17180.1.2.3 bus2=p5ulv9576.1.2.3 switch=n enabled=y phases=3 Linecode=3P_UG_AL_350kcmil_15_0_416_0_3_3_3_3

New Line.l(r:p5udm17180-p5ulv77439) Units=km Length=0.0058134400000000004 bus1=p5udm17180.1.2.3 bus2=p5ulv77439.1.2.3 switch=n enabled=y phases=3 Linecode=3P_UG_AL_350kcmil_15_0_416_0_3_3_3_3

New Line.l(r:p5udm17180-p5udm17181) Units=km Length=0.0183724 bus1=p5udm17181.1.2.3 bus2=p5udm17180.1.2.3 switch=n enabled=y phases=3 Linecode=3P_UG_AL_750kcmil_25_0_416_0_3_3_3_3

New Line.l(r:p5udm17181-p5udt5564lv) Units=km Length=0.018360000000000005 bus1=p5udt5564lv.1.2.3 bus2=p5udm17181.1.2.3 switch=n enabled=y phases=3 Linecode=3P_UG_AL_750kcmil_25_0_416_0_3_3_3_3

New Line.l(r:p5udm17183-p5ulv13741) Units=km Length=0.00527731 bus1=p5udm17183.1.2.3 bus2=p5ulv13741.1.2.3 switch=n enabled=y phases=3 Linecode=3P_UG_AL_750kcmil_25_0_416_0_3_3_3_3

New Line.l(r:p5udm17184-p5ulv13742) Units=km Length=0.00516493 bus1=p5udm17184.1.2.3 bus2=p5ulv13742.1.2.3 switch=n enabled=y phases=3 Linecode=3P_UG_AL_750kcmil_25_0_416_0_3_3_3_3

New Line.l(r:p5udm17184-p5ulv13743) Units=km Length=0.00435001 bus1=p5udm17184.1.2.3 bus2=p5ulv13743.1.2.3 switch=n enabled=y phases=3 Linecode=3P_UG_AL_350kcmil_15_0_416_0_3_3_3_3

New Line.l(r:p5udm17183-p5udm17184) Units=km Length=0.0301719 bus1=p5udm17183.1.2.3 bus2=p5udm17184.1.2.3 switch=n enabled=y phases=3 Linecode=3P_UG_AL_750kcmil_25_0_416_0_3_3_3_3

New Line.l(r:p5udm17183-p5udt5564lv) Units=km Length=0.00733396 bus1=p5udt5564lv.1.2.3 bus2=p5udm17183.1.2.3 switch=n enabled=y phases=3 Linecode=3P_UG_AL_750kcmil_25_0_416_0_3_3_3_3

New Line.l(r:p5udt6657lv-p5ulv13159) Units=km Length=0.00400472 bus1=p5udt6657lv.1.2.3 bus2=p5ulv13159.1.2.3 switch=n enabled=y phases=3 Linecode=3P_UG_AL_750kcmil_25_0_416_0_3_3_3_3

New Line.l(r:p5udm19187-p5ulv13158) Units=km Length=0.00323543 bus1=p5udm19187.1.2.3 bus2=p5ulv13158.1.2.3 switch=n enabled=y phases=3 Linecode=3P_UG_AL_750kcmil_25_0_416_0_3_3_3_3

New Line.l(r:p5udm19187-p5udt6657lv) Units=km Length=0.0158808 bus1=p5udt6657lv.1.2.3 bus2=p5udm19187.1.2.3 switch=n enabled=y phases=3 Linecode=3P_UG_AL_750kcmil_25_0_416_0_3_3_3_3

New Line.l(r:p5udt6658lv-p5ulv13160) Units=km Length=0.00436296 bus1=p5udt6658lv.1.2.3 bus2=p5ulv13160.1.2.3 switch=n enabled=y phases=3 Linecode=3P_UG_AL_750kcmil_25_0_416_0_3_3_3_3

New Line.l(r:p5udt33481lv-p5ulv77121) Units=km Length=0.00325885 bus1=p5udt33481lv.1.2.3 bus2=p5ulv77121.1.2.3 switch=n enabled=y phases=3 Linecode=3P_UG_AL_750kcmil_25_0_416_0_3_3_3_3

New Line.l(r:p5udt33481-p5umv23) Units=km Length=0.205708 bus1=p5udt33481.1.2.3 bus2=p5umv23.1.2.3 switch=n enabled=y phases=3 Linecode=3P_OH_AL_ACSR_4/0_Penguin_12_47_0_3_3_3_3

New Line.l(r:p5udt33481-p5umv61) Units=km Length=0.00325885 bus1=p5udt33481.1.2.3 bus2=p5umv61.1.2.3 switch=n enabled=y phases=3 Linecode=3P_OH_AL_ACSR_4/0_Penguin_12_47_0_3_3_3_3

New Line.l(r:p5udt7323lv-p5ulv16057) Units=km Length=0.0102283 bus1=p5udt7323lv.1.2.3 bus2=p5ulv16057.1.2.3 switch=n enabled=y phases=3 Linecode=3P_UG_AL_350kcmil_15_0_416_0_3_3_3_3

New Line.l(r:p5udt6457lv-p5ulv12388) Units=km Length=0.017234700000000002 bus1=p5udt6457lv.1.2.3 bus2=p5ulv12388.1.2.3 switch=n enabled=y phases=3 Linecode=3P_UG_AL_350kcmil_15_0_416_0_3_3_3_3

New Line.l(r:p5udt6457-p5umv24) Units=km Length=0.140821 bus1=p5udt6457-p5umv24xx.1.2.3 bus2=p5udt6457-p5umv24x.1.2.3 switch=n enabled=y phases=3 Linecode=3P_UG_AL_4/0_25_12_47_0_3_3_3_3

New Line.l(r:p5udt7324lv-p5ulv16058) Units=km Length=0.00563873 bus1=p5udt7324lv.1.2.3 bus2=p5ulv16058.1.2.3 switch=n enabled=y phases=3 Linecode=3P_UG_AL_750kcmil_25_0_416_0_3_3_3_3

New Line.l(r:p5udt7324-p5umv24) Units=km Length=0.19300400000000004 bus1=p5umv24.1.2.3 bus2=p5udt7324.1.2.3 switch=n enabled=y phases=3 Linecode=3P_OH_AL_ACSR_4/0_Penguin_12_47_0_3_3_3_3

New Line.l(r:p5umv14-p5umv24) Units=km Length=0.119408 bus1=p5umv14-p5umv24x.1.2.3 bus2=p5umv14-p5umv24xx.1.2.3 switch=n enabled=y phases=3 Linecode=3P_UG_AL_4/0_25_12_47_0_3_3_3_3

New Line.l(r:p5udm14043-p5ulv6230) Units=km Length=0.0108124 bus1=p5udm14043.1.2.3 bus2=p5ulv6230.1.2.3 switch=n enabled=y phases=3 Linecode=3P_UG_AL_350kcmil_15_0_416_0_3_3_3_3

New Line.l(r:p5udm14043-p5udt4219lv) Units=km Length=0.0591273 bus1=p5udt4219lv.1.2.3 bus2=p5udm14043.1.2.3 switch=n enabled=y phases=3 Linecode=3P_UG_AL_350kcmil_15_0_416_0_3_3_3_3

New Line.l(r:p5udm14044-p5ulv37973) Units=km Length=0.0111881 bus1=p5udm14044.1.2.3 bus2=p5ulv37973.1.2.3 switch=n enabled=y phases=3 Linecode=3P_UG_AL_750kcmil_25_0_416_0_3_3_3_3

New Line.l(r:p5udm14044-p5udt4219lv) Units=km Length=0.0305387 bus1=p5udt4219lv.1.2.3 bus2=p5udm14044.1.2.3 switch=n enabled=y phases=3 Linecode=3P_UG_AL_750kcmil_25_0_416_0_3_3_3_3

New Line.l(r:p5udt33674lv-p5ulv78373) Units=km Length=0.0074556 bus1=p5udt33674lv.1.2.3 bus2=p5ulv78373.1.2.3 switch=n enabled=y phases=3 Linecode=3P_UG_AL_750kcmil_25_0_416_0_3_3_3_3

New Line.l(r:p5udt33674-p5umv27) Units=km Length=0.007674410000000001 bus1=p5udt33674.1.2.3 bus2=p5umv27.1.2.3 switch=n enabled=y phases=3 Linecode=3P_OH_AL_ACSR_4/0_Penguin_12_47_0_3_3_3_3

New Line.l(r:p5udt2843lv-p5ulv3634) Units=km Length=0.00446593 bus1=p5udt2843lv.1.2.3 bus2=p5ulv3634.1.2.3 switch=n enabled=y phases=3 Linecode=3P_UG_AL_350kcmil_15_0_416_0_3_3_3_3

New Line.l(r:p5udm10115-p5ulv3635) Units=km Length=0.00330177 bus1=p5udm10115.1.2.3 bus2=p5ulv3635.1.2.3 switch=n enabled=y phases=3 Linecode=3P_UG_AL_350kcmil_15_0_416_0_3_3_3_3

New Line.l(r:p5udm10115-p5udt2843lv) Units=km Length=0.0174373 bus1=p5udt2843lv.1.2.3 bus2=p5udm10115.1.2.3 switch=n enabled=y phases=3 Linecode=3P_UG_AL_350kcmil_15_0_416_0_3_3_3_3

New Line.l(r:p5udt7761lv-p5ulv18450) Units=km Length=0.012608 bus1=p5udt7761lv.1.2.3 bus2=p5ulv18450.1.2.3 switch=n enabled=y phases=3 Linecode=3P_UG_AL_750kcmil_25_0_416_0_3_3_3_3

New Line.l(r:p5udt7761-p5ulv3633u) Units=km Length=0.0836081 bus1=p5ulv3633u.1.2.3 bus2=p5udt7761.1.2.3 switch=n enabled=y phases=3 Linecode=3P_OH_AL_ACSR_4/0_Penguin_12_47_0_3_3_3_3

New Line.l(r:p5udt2843-p5ulv3633u) Units=km Length=0.0198065 bus1=p5udt2843.1.2.3 bus2=p5ulv3633u.1.2.3 switch=n enabled=y phases=3 Linecode=3P_OH_AL_ACSR_4/0_Penguin_12_47_0_3_3_3_3

New Line.l(r:p5udt2843-p5ulv4700u) Units=km Length=0.00644895 bus1=p5udt2843.1.2.3 bus2=p5ulv4700u.1.2.3 switch=n enabled=y phases=3 Linecode=3P_OH_AL_ACSR_4/0_Penguin_12_47_0_3_3_3_3

New Line.l(r:p5udt1682lv-p5ulv1931) Units=km Length=0.00602536 bus1=p5udt1682lv.1.2.3 bus2=p5ulv1931.1.2.3 switch=n enabled=y phases=3 Linecode=3P_UG_AL_350kcmil_15_0_416_0_3_3_3_3

New Line.l(r:p5udt1682lv-p5ulv1932) Units=km Length=0.00333422 bus1=p5udt1682lv.1.2.3 bus2=p5ulv1932.1.2.3 switch=n enabled=y phases=3 Linecode=3P_UG_AL_350kcmil_15_0_416_0_3_3_3_3

New Line.l(r:p5udm6219-p5ulv1933) Units=km Length=0.00410542 bus1=p5udm6219.1.2.3 bus2=p5ulv1933.1.2.3 switch=n enabled=y phases=3 Linecode=3P_UG_AL_350kcmil_15_0_416_0_3_3_3_3

New Line.l(r:p5udm6220-p5ulv7113) Units=km Length=0.00783922 bus1=p5udm6220.1.2.3 bus2=p5ulv7113.1.2.3 switch=n enabled=y phases=3 Linecode=3P_UG_AL_750kcmil_25_0_416_0_3_3_3_3

New Line.l(r:p5udm6219-p5udm6220) Units=km Length=0.0568932 bus1=p5udm6219.1.2.3 bus2=p5udm6220.1.2.3 switch=n enabled=y phases=3 Linecode=3P_UG_AL_750kcmil_25_0_416_0_3_3_3_3

New Line.l(r:p5udm6219-p5udt1682lv) Units=km Length=0.0174474 bus1=p5udt1682lv.1.2.3 bus2=p5udm6219.1.2.3 switch=n enabled=y phases=3 Linecode=3P_UG_AL_750kcmil_25_0_416_0_3_3_3_3

New Line.l(r:p5udm6221-p5ulv12023) Units=km Length=0.00363446 bus1=p5udm6221.1.2.3 bus2=p5ulv12023.1.2.3 switch=n enabled=y phases=3 Linecode=3P_UG_AL_350kcmil_15_0_416_0_3_3_3_3

New Line.l(r:p5udm6222-p5ulv55276) Units=km Length=0.00384167 bus1=p5udm6222.1.2.3 bus2=p5ulv55276.1.2.3 switch=n enabled=y phases=3 Linecode=3P_UG_AL_350kcmil_15_0_416_0_3_3_3_3

New Line.l(r:p5udm6221-p5udm6222) Units=km Length=0.0174503 bus1=p5udm6221.1.2.3 bus2=p5udm6222.1.2.3 switch=n enabled=y phases=3 Linecode=3P_UG_AL_350kcmil_15_0_416_0_3_3_3_3

New Line.l(r:p5udm6221-p5udt1682lv) Units=km Length=0.0174408 bus1=p5udt1682lv.1.2.3 bus2=p5udm6221.1.2.3 switch=n enabled=y phases=3 Linecode=3P_UG_AL_750kcmil_25_0_416_0_3_3_3_3

New Line.l(r:p5udt4630lv-p5ulv7115) Units=km Length=0.00389801 bus1=p5udt4630lv.1.2.3 bus2=p5ulv7115.1.2.3 switch=n enabled=y phases=3 Linecode=3P_UG_AL_750kcmil_25_0_416_0_3_3_3_3

New Line.l(r:p5udt4631lv-p5ulv7116) Units=km Length=0.00465027 bus1=p5udt4631lv.1.2.3 bus2=p5ulv7116.1.2.3 switch=n enabled=y phases=3 Linecode=3P_UG_AL_750kcmil_25_0_416_0_3_3_3_3

New Line.l(r:p5udt4630-p5udt4631) Units=km Length=0.0350558 bus1=p5udt4630.1.2.3 bus2=p5udt4631.1.2.3 switch=n enabled=y phases=3 Linecode=3P_OH_AL_ACSR_4/0_Penguin_12_47_0_3_3_3_3

New Line.l(r:p5udt4491-p5udt4630) Units=km Length=0.0350558 bus1=p5udt4491.1.2.3 bus2=p5udt4630.1.2.3 switch=n enabled=y phases=3 Linecode=3P_OH_AL_ACSR_4/0_Penguin_12_47_0_3_3_3_3

New Line.l(r:p5udt1682-p5udt4491) Units=km Length=0.05681750000000001 bus1=p5udt1682.1.2.3 bus2=p5udt4491.1.2.3 switch=n enabled=y phases=3 Linecode=3P_OH_AL_ACSR_4/0_Penguin_12_47_0_3_3_3_3

New Line.l(r:p5udt1686lv-p5ulv1937) Units=km Length=0.0147313 bus1=p5udt1686lv.1.2.3 bus2=p5ulv1937.1.2.3 switch=n enabled=y phases=3 Linecode=3P_UG_AL_350kcmil_15_0_416_0_3_3_3_3

New Line.l(r:p5udt1686-p5udt33541) Units=km Length=0.0771874 bus1=p5udt33541.1.2.3 bus2=p5udt1686.1.2.3 switch=n enabled=y phases=3 Linecode=3P_OH_AL_ACSR_4/0_Penguin_12_47_0_3_3_3_3

New Line.l(r:p5udm18602-p5ulv11852) Units=km Length=0.0113195 bus1=p5udm18602.1.2.3 bus2=p5ulv11852.1.2.3 switch=n enabled=y phases=3 Linecode=3P_UG_AL_750kcmil_25_0_416_0_3_3_3_3

New Line.l(r:p5udm18602-p5udt6306lv) Units=km Length=0.0168688 bus1=p5udt6306lv.1.2.3 bus2=p5udm18602.1.2.3 switch=n enabled=y phases=3 Linecode=3P_UG_AL_750kcmil_25_0_416_0_3_3_3_3

New Line.l(r:p5udm18603-p5ulv54725) Units=km Length=0.0134209 bus1=p5udm18603.1.2.3 bus2=p5ulv54725.1.2.3 switch=n enabled=y phases=3 Linecode=3P_UG_AL_350kcmil_15_0_416_0_3_3_3_3

New Line.l(r:p5udm18603-p5udt6306lv) Units=km Length=0.0168783 bus1=p5udt6306lv.1.2.3 bus2=p5udm18603.1.2.3 switch=n enabled=y phases=3 Linecode=3P_UG_AL_350kcmil_15_0_416_0_3_3_3_3

New Line.l(r:p5udt33541-p5udt6306) Units=km Length=0.137574 bus1=p5udt33541.1.2.3 bus2=p5udt6306.1.2.3 switch=n enabled=y phases=3 Linecode=3P_OH_AL_ACSR_4/0_Penguin_12_47_0_3_3_3_3

New Line.l(r:p5udt2948lv-p5ulv13354) Units=km Length=0.00570004 bus1=p5udt2948lv.1.2.3 bus2=p5ulv13354.1.2.3 switch=n enabled=y phases=3 Linecode=3P_UG_AL_350kcmil_15_0_416_0_3_3_3_3

New Line.l(r:p5udm10439-p5ulv3806) Units=km Length=0.00284614 bus1=p5udm10439.1.2.3 bus2=p5ulv3806.1.2.3 switch=n enabled=y phases=3 Linecode=3P_UG_AL_350kcmil_15_0_416_0_3_3_3_3

New Line.l(r:p5udm10439-p5udt2948lv) Units=km Length=0.0348257 bus1=p5udt2948lv.1.2.3 bus2=p5udm10439.1.2.3 switch=n enabled=y phases=3 Linecode=3P_UG_AL_350kcmil_15_0_416_0_3_3_3_3

New Line.l(r:p5udm10441-p5ulv13355) Units=km Length=0.00394657 bus1=p5udm10441.1.2.3 bus2=p5ulv13355.1.2.3 switch=n enabled=y phases=3 Linecode=3P_UG_AL_750kcmil_25_0_416_0_3_3_3_3

New Line.l(r:p5udm10441-p5ulv13356) Units=km Length=0.006359630000000001 bus1=p5udm10441.1.2.3 bus2=p5ulv13356.1.2.3 switch=n enabled=y phases=3 Linecode=3P_UG_AL_350kcmil_15_0_416_0_3_3_3_3

New Line.l(r:p5udm10441-p5udt2948lv) Units=km Length=0.0174224 bus1=p5udt2948lv.1.2.3 bus2=p5udm10441.1.2.3 switch=n enabled=y phases=3 Linecode=3P_UG_AL_750kcmil_25_0_416_0_3_3_3_3

New Line.l(r:p5udt4871lv-p5ulv7699) Units=km Length=0.0033786700000000003 bus1=p5udt4871lv.1.2.3 bus2=p5ulv7699.1.2.3 switch=n enabled=y phases=3 Linecode=3P_UG_AL_350kcmil_15_0_416_0_3_3_3_3

New Line.l(r:p5udt4871lv-p5ulv13357) Units=km Length=0.00437018 bus1=p5udt4871lv.1.2.3 bus2=p5ulv13357.1.2.3 switch=n enabled=y phases=3 Linecode=3P_UG_AL_350kcmil_15_0_416_0_3_3_3_3

New Line.l(r:p5udt4871-p5umv42) Units=km Length=0.0245041 bus1=p5udt4871.1.2.3 bus2=p5umv42.1.2.3 switch=n enabled=y phases=3 Linecode=3P_OH_AL_ACSR_4/0_Penguin_12_47_0_3_3_3_3

New Line.l(r:p5udt4059lv-p5ulv5856) Units=km Length=0.0138778 bus1=p5udt4059lv.1.2.3 bus2=p5ulv5856.1.2.3 switch=n enabled=y phases=3 Linecode=3P_UG_AL_350kcmil_15_0_416_0_3_3_3_3

New Line.l(r:p5udt33542-p5udt4059) Units=km Length=0.0282038 bus1=p5udt33542.1.2.3 bus2=p5udt4059.1.2.3 switch=n enabled=y phases=3 Linecode=3P_OH_AL_ACSR_4/0_Penguin_12_47_0_3_3_3_3

New Line.l(r:p5udt33545lv-p5ulv77430) Units=km Length=0.0110684 bus1=p5udt33545lv.1.2.3 bus2=p5ulv77430.1.2.3 switch=n enabled=y phases=3 Linecode=3P_UG_AL_350kcmil_15_0_416_0_3_3_3_3

New Line.l(r:p5udt7415lv-p5ulv16591) Units=km Length=0.0144006 bus1=p5udt7415lv.1.2.3 bus2=p5ulv16591.1.2.3 switch=n enabled=y phases=3 Linecode=3P_UG_AL_350kcmil_15_0_416_0_3_3_3_3

New Line.l(r:p5udt33545-p5udt7415) Units=km Length=0.0179885 bus1=p5udt33545.1.2.3 bus2=p5udt7415.1.2.3 switch=n enabled=y phases=3 Linecode=3P_OH_AL_ACSR_4/0_Penguin_12_47_0_3_3_3_3

New Line.l(r:p5udt33542-p5udt33545) Units=km Length=0.028803800000000004 bus1=p5udt33542.1.2.3 bus2=p5udt33545.1.2.3 switch=n enabled=y phases=3 Linecode=3P_OH_AL_ACSR_4/0_Penguin_12_47_0_3_3_3_3

New Line.l(r:p5udt33542-p5udt6304) Units=km Length=0.142865 bus1=p5udt6304.1.2.3 bus2=p5udt33542.1.2.3 switch=n enabled=y phases=3 Linecode=3P_OH_AL_ACSR_4/0_Penguin_12_47_0_3_3_3_3

New Line.l(r:p5udt7455lv-p5ulv16794) Units=km Length=0.00596512 bus1=p5udt7455lv.1.2.3 bus2=p5ulv16794.1.2.3 switch=n enabled=y phases=3 Linecode=3P_UG_AL_350kcmil_15_0_416_0_3_3_3_3

New Line.l(r:p5udt7454-p5udt7455) Units=km Length=0.0177218 bus1=p5udt7454.1.2.3 bus2=p5udt7455.1.2.3 switch=n enabled=y phases=3 Linecode=3P_OH_AL_ACSR_4/0_Penguin_12_47_0_3_3_3_3

New Line.l(r:p5udt7453-p5udt7454) Units=km Length=0.0177247 bus1=p5udt7453.1.2.3 bus2=p5udt7454.1.2.3 switch=n enabled=y phases=3 Linecode=3P_OH_AL_ACSR_4/0_Penguin_12_47_0_3_3_3_3

New Line.l(r:p5udt6304-p5umv110) Units=km Length=0.0402754 bus1=p5udt6304-p5umv110x.1.2.3 bus2=p5udt6304.1.2.3 switch=n enabled=y phases=3 Linecode=3P_OH_AL_ACSR_1033kcmil_Curlew_12.47_1_3_3_3_3

New Line.l(r:p5udt4396-p5udt4631) Units=km Length=0.127821 bus1=p5udt4396-p5udt4631x.1.2.3 bus2=p5udt4631.1.2.3 switch=n enabled=y phases=3 Linecode=3P_OH_AL_ACSR_1033kcmil_Curlew_12.47_1_3_3_3_3

New Line.l(r:p5udt6457-p5udt6458) Units=km Length=0.207829 bus1=p5udt6457-p5udt6458x.1.2.3 bus2=p5udt6457-p5udt6458xx.1.2.3 switch=n enabled=y phases=3 Linecode=3P_OH_AL_ACSR_1033kcmil_Curlew_12.47_1_3_3_3_3

New Line.l(r:p5udt7760-p5udt7761) Units=km Length=0.113834 bus1=p5udt7760-p5udt7761x.1.2.3 bus2=p5udt7760.1.2.3 switch=n enabled=y phases=3 Linecode=3P_OH_AL_ACSR_1033kcmil_Curlew_12.47_1_3_3_3_3

New Line.l(r:p5udt6241lv-p5ulv11661)p5ud1 Units=km Length=0.0103521 bus1=p5udt6241lv.1.2.3 bus2=p5ulv11661.1.2.3 switch=n enabled=y phases=3 Linecode=3P_UG_AL_750kcmil_25_0_416_0_3_3_3_3

New Line.padswitch(r:p5udt33583-p5udt6457)p5u_119419 Units=km Length=0.001 bus1=p5udt33583-p5udt6457xxx.1 bus2=p5udt33583-p5udt6457xx.1 switch=y enabled=y phases=1 Linecode=padswitch_1_1_1_1

New Line.padswitch(r:p5udt33583-p5udt6457)p5u_119420 Units=km Length=0.001 bus1=p5udt33583-p5udt6457x.1 bus2=p5udt33583.1 switch=y enabled=y phases=1 Linecode=padswitch_1_3_1_1_1

New Line.padswitch(r:p5udt7323-p5umv14)p5u_119425 Units=km Length=0.001 bus1=p5udt7323.1.2.3 bus2=p5udt7323-p5umv14x.1.2.3 switch=y enabled=y phases=3 Linecode=padswitch_3_3_3_3

New Line.padswitch(r:p5udt7323-p5umv14)p5u_119426 Units=km Length=0.001 bus1=p5udt7323-p5umv14xx.1.2.3 bus2=p5umv14.1.2.3 switch=y enabled=y phases=3 Linecode=padswitch_3_4_3_3_3

New Line.padswitch(r:p5udt6241-p5udt7323)p5u_119427 Units=km Length=0.001 bus1=p5udt7323.1.2.3 bus2=p5udt6241-p5udt7323xx.1.2.3 switch=y enabled=y phases=3 Linecode=padswitch_3_4_3_2_3_3

New Line.padswitch(r:p5udt6241-p5udt7323)p5u_119428 Units=km Length=0.001 bus1=p5udt6241-p5udt7323x.1.2.3 bus2=p5udt6241.1.2.3 switch=y enabled=y phases=3 Linecode=padswitch_3_4_3_2_3_1_3

New Line.padswitch(r:p5udt6457-p5umv24)p5u_119421 Units=km Length=0.001 bus1=p5umv24.1.2.3 bus2=p5udt6457-p5umv24xx.1.2.3 switch=y enabled=y phases=3 Linecode=padswitch_3_4_3_2_3_1_3_1

New Line.padswitch(r:p5udt6457-p5umv24)p5u_119422 Units=km Length=0.001 bus1=p5udt6457-p5umv24x.1.2.3 bus2=p5udt6457.1.2.3 switch=y enabled=y phases=3 Linecode=padswitch_3_4_3_2_3_1_3_1

New Line.padswitch(r:p5umv14-p5umv24)p5u_119423 Units=km Length=0.001 bus1=p5umv14.1.2.3 bus2=p5umv14-p5umv24x.1.2.3 switch=y enabled=y phases=3 Linecode=padswitch_3_4_3_3_3

New Line.padswitch(r:p5umv14-p5umv24)p5u_119424 Units=km Length=0.001 bus1=p5umv14-p5umv24xx.1.2.3 bus2=p5umv24.1.2.3 switch=y enabled=y phases=3 Linecode=padswitch_3_4_3_2_3_1_3_1

New Line.padswitch(r:p5udt6457-p5udt6458)p5u_151382 Units=km Length=0.001 bus1=p5udt6457.1.2.3 bus2=p5udt6457-p5udt6458x.1.2.3 switch=y enabled=n phases=3 Linecode=padswitch_3_4_3_2_3_1_3_1

New Line.padswitch(r:p5udt6457-p5udt6458)p5u_151383 Units=km Length=0.001 bus1=p5udt6457-p5udt6458xx.1.2.3 bus2=p5udt6458.1.2.3 switch=y enabled=n phases=3 Linecode=padswitch_3_4_3_2_3_1_3_1

New Line.elbswitch(r:p5udt7760-p5udt7761)p5u_151400 Units=km Length=0.001 bus1=p5udt7761.1.2.3 bus2=p5udt7760-p5udt7761x.1.2.3 switch=y enabled=n phases=3 Linecode=elbswitch_3_3_3_3

New Line.fuse(r:p5udt7850-p5umv23)p5u_151479 Units=km Length=0.001 bus1=p5umv23.2 bus2=p5udt7850-p5umv23x.2 switch=n enabled=y phases=1 Linecode=fuse_1_1_1_1

New Fuse.Fuse_fuse(r:p5udt7850-p5umv23)p5u_151479 monitoredobj=Line.fuse(r:p5udt7850-p5umv23)p5u_151479 enabled=y ratedcurrent=100.0

New Line.fuse(r:p5udt1682-p5udt3475)p5u_151713 Units=km Length=0.001 bus1=p5udt1682.1 bus2=p5udt1682-p5udt3475x.1 switch=n enabled=y phases=1 Linecode=fuse_1_7_1_1_1

New Fuse.Fuse_fuse(r:p5udt1682-p5udt3475)p5u_151713 monitoredobj=Line.fuse(r:p5udt1682-p5udt3475)p5u_151713 enabled=y ratedcurrent=100.0

New Line.fuse(r:p5udt33582-p5udt6306)p5u_152448 Units=km Length=0.001 bus1=p5udt6306.3 bus2=p5udt33582-p5udt6306x.3 switch=n enabled=y phases=1 Linecode=fuse_1_7_1_1_1

New Fuse.Fuse_fuse(r:p5udt33582-p5udt6306)p5u_152448 monitoredobj=Line.fuse(r:p5udt33582-p5udt6306)p5u_152448 enabled=y ratedcurrent=100.0

New Line.fuse(r:p5udt33583-p5udt6457)p5u_152484 Units=km Length=0.001 bus1=p5udt6457.1 bus2=p5udt33583-p5udt6457xxx.1 switch=n enabled=y phases=1 Linecode=fuse_1_7_1_5_1_1

New Fuse.Fuse_fuse(r:p5udt33583-p5udt6457)p5u_152484 monitoredobj=Line.fuse(r:p5udt33583-p5udt6457)p5u_152484 enabled=y ratedcurrent=100.0
