New Capacitor.p5uc23 Bus1=p5udt19922 phases=3 Kv=12.47 conn=Wye Kvar=450.0

New CapControl.p5uc23 Capacitor=p5uc23 Element=Line.padswitch(r:p5udt19922-p5udt30694)p5u_120312 Terminal=1 delay=100.0 Type=voltage Vmin=120.5 Vmax=125.0 Ptratio=59.99631547328862 Ctratio=100.0
