New Line.l(r:p5udt102lv-p5ulv103) Units=km Length=0.0309125 bus1=p5udt102lv.1.2 bus2=p5ulv103.1.2 switch=n enabled=y phases=2 Linecode=1P_UG_AL_1/0_Brenau_0_416_0_2_2_2_2

New Line.l(r:p5udt102lv-p5ulv868) Units=km Length=0.0130608 bus1=p5udt102lv.1.2 bus2=p5ulv868.1.2 switch=n enabled=y phases=2 Linecode=1P_UG_AL_1/0_Brenau_0_416_0_2_2_2_2

New Line.l(r:p5udt102lv-p5ulv12632) Units=km Length=0.0101268 bus1=p5udt102lv.1.2 bus2=p5ulv12632.1.2 switch=n enabled=y phases=2 Linecode=1P_UG_AL_1/0_Brenau_0_416_0_2_2_2_2

New Line.l(r:p5udm379-p5ulv77598) Units=km Length=0.00899209 bus1=p5udm379.1.2 bus2=p5ulv77598.1.2 switch=n enabled=y phases=2 Linecode=1P_UG_AL_1/0_Brenau_0_416_0_2_2_2_2

New Line.l(r:p5udm379-p5udt102lv) Units=km Length=0.00906767 bus1=p5udt102lv.1.2 bus2=p5udm379.1.2 switch=n enabled=y phases=2 Linecode=1P_UG_AL_1/0_Brenau_0_416_0_2_2_2_2

New Line.l(r:p5udt297lv-p5ulv4199) Units=km Length=0.004254840000000001 bus1=p5udt297lv.1.2 bus2=p5ulv4199.1.2 switch=n enabled=y phases=2 Linecode=1P_OH_AL_2/0_Rucina_0_416_0_2_2_2_2

New Line.l(r:p5udt297lv-p5ulv7364) Units=km Length=0.00420268 bus1=p5udt297lv.1.2 bus2=p5ulv7364.1.2 switch=n enabled=y phases=2 Linecode=1P_OH_AL_2/0_Rucina_0_416_0_2_2_2_2

New Line.l(r:p5udm1133-p5ulv310) Units=km Length=0.00535855 bus1=p5udm1133.1.2 bus2=p5ulv310.1.2 switch=n enabled=y phases=2 Linecode=1P_OH_AL_2/0_Rucina_0_416_0_2_2_2_2

New Line.l(r:p5udm1133-p5udt297lv) Units=km Length=0.018468900000000003 bus1=p5udt297lv.1.2 bus2=p5udm1133.1.2 switch=n enabled=y phases=2 Linecode=1P_OH_AL_2/0_Rucina_0_416_0_2_2_2_2

New Line.l(r:p5udm1135-p5ulv7363) Units=km Length=0.00133795 bus1=p5udm1135.1.2 bus2=p5ulv7363.1.2 switch=n enabled=y phases=2 Linecode=1P_OH_AL_4_Periwinkle_0_416_0_2_2_2_2

New Line.l(r:p5udm1135-p5udt297lv) Units=km Length=0.018473600000000003 bus1=p5udt297lv.1.2 bus2=p5udm1135.1.2 switch=n enabled=y phases=2 Linecode=1P_OH_AL_2/0_Rucina_0_416_0_2_2_2_2

New Line.l(r:p5udm2549-p5ulv715) Units=km Length=0.00520543 bus1=p5udm2549.1.2 bus2=p5ulv715.1.2 switch=n enabled=y phases=2 Linecode=1P_OH_AL_2/0_Rucina_0_416_0_2_2_2_2

New Line.l(r:p5udm2549-p5udt670lv) Units=km Length=0.0192297 bus1=p5udt670lv.1.2 bus2=p5udm2549.1.2 switch=n enabled=y phases=2 Linecode=1P_OH_AL_2/0_Rucina_0_416_0_2_2_2_2

New Line.l(r:p5udm2550-p5ulv65108) Units=km Length=0.00353193 bus1=p5udm2550.1.2 bus2=p5ulv65108.1.2 switch=n enabled=y phases=2 Linecode=1P_OH_AL_4/0_Zuzara_0_416_0_2_2_2_2

New Line.l(r:p5udm2550-p5udt670lv) Units=km Length=0.0192432 bus1=p5udt670lv.1.2 bus2=p5udm2550.1.2 switch=n enabled=y phases=2 Linecode=1P_OH_AL_4/0_Zuzara_0_416_0_2_0_2_2_2

New Line.l(r:p5udt809lv-p5ulv9784) Units=km Length=0.013549 bus1=p5udt809lv.1.2 bus2=p5ulv9784.1.2 switch=n enabled=y phases=2 Linecode=1P_UG_AL_1/0_Brenau_0_416_0_2_2_2_2

New Line.l(r:p5udm3087-p5ulv873) Units=km Length=0.0145637 bus1=p5udm3087.1.2 bus2=p5ulv873.1.2 switch=n enabled=y phases=2 Linecode=1P_UG_AL_1/0_Brenau_0_416_0_2_2_2_2

New Line.l(r:p5udm3087-p5ulv2377) Units=km Length=0.0124008 bus1=p5udm3087.1.2 bus2=p5ulv2377.1.2 switch=n enabled=y phases=2 Linecode=1P_UG_AL_1/0_Brenau_0_416_0_2_2_2_2

New Line.l(r:p5udm3087-p5udt809lv) Units=km Length=0.009542970000000001 bus1=p5udt809lv.1.2 bus2=p5udm3087.1.2 switch=n enabled=y phases=2 Linecode=1P_UG_AL_2/0_Converse_0_416_0_2_2_2_2

New Line.l(r:p5udm3091-p5ulv78162) Units=km Length=0.0266985 bus1=p5udm3091.1.2 bus2=p5ulv78162.1.2 switch=n enabled=y phases=2 Linecode=1P_UG_AL_1/0_Brenau_0_416_0_2_2_2_2

New Line.l(r:p5udm3089-p5ulv2939) Units=km Length=0.014210100000000002 bus1=p5udm3089.1.2 bus2=p5ulv2939.1.2 switch=n enabled=y phases=2 Linecode=1P_UG_AL_1/0_Brenau_0_416_0_2_2_2_2

New Line.l(r:p5udm3089-p5udm3091) Units=km Length=0.00953415 bus1=p5udm3091.1.2 bus2=p5udm3089.1.2 switch=n enabled=y phases=2 Linecode=1P_UG_AL_1/0_Brenau_0_416_0_2_2_2_2

New Line.l(r:p5udm3091-p5udt809lv) Units=km Length=0.009542970000000001 bus1=p5udt809lv.1.2 bus2=p5udm3091.1.2 switch=n enabled=y phases=2 Linecode=1P_UG_AL_1/0_Brenau_0_416_0_2_2_2_2

New Line.l(r:p5udt824lv-p5ulv889) Units=km Length=0.004004960000000001 bus1=p5udt824lv.1.2 bus2=p5ulv889.1.2 switch=n enabled=y phases=2 Linecode=1P_OH_AL_2/0_Rucina_0_416_0_2_2_2_2

New Line.l(r:p5udt824lv-p5ulv77681) Units=km Length=0.00275191 bus1=p5udt824lv.1.2 bus2=p5ulv77681.1.2 switch=n enabled=y phases=2 Linecode=1P_OH_AL_4_Periwinkle_0_416_0_2_2_2_2

New Line.l(r:p5udt824lv-p5ulv77682) Units=km Length=0.0137028 bus1=p5udt824lv.1.2 bus2=p5ulv77682.1.2 switch=n enabled=y phases=2 Linecode=1P_OH_AL_2/0_Rucina_0_416_0_2_2_2_2

New Line.l(r:p5udm3163-p5ulv5720) Units=km Length=0.0177788 bus1=p5udm3163.1.2 bus2=p5ulv5720.1.2 switch=n enabled=y phases=2 Linecode=1P_OH_AL_2/0_Rucina_0_416_0_2_2_2_2

New Line.l(r:p5udm3163-p5ulv10356) Units=km Length=0.0110301 bus1=p5udm3163.1.2 bus2=p5ulv10356.1.2 switch=n enabled=y phases=2 Linecode=1P_OH_AL_2/0_Rucina_0_416_0_2_2_2_2

New Line.l(r:p5udm3163-p5udt824lv) Units=km Length=0.0163584 bus1=p5udt824lv.1.2 bus2=p5udm3163.1.2 switch=n enabled=y phases=2 Linecode=1P_OH_AL_2/0_Rucina_0_416_0_2_2_2_2

New Line.l(r:p5udt1154lv-p5ulv11546) Units=km Length=0.0174306 bus1=p5udt1154lv.1.2 bus2=p5ulv11546.1.2 switch=n enabled=y phases=2 Linecode=1P_UG_AL_1/0_Brenau_0_416_0_2_2_2_2

New Line.l(r:p5udm4349-p5ulv1269) Units=km Length=0.0129449 bus1=p5udm4349.1.2 bus2=p5ulv1269.1.2 switch=n enabled=y phases=2 Linecode=1P_UG_AL_1/0_Brenau_0_416_0_2_2_2_2

New Line.l(r:p5udm4350-p5ulv1793) Units=km Length=0.0149074 bus1=p5udm4350.1.2 bus2=p5ulv1793.1.2 switch=n enabled=y phases=2 Linecode=1P_UG_AL_1/0_Brenau_0_416_0_2_2_2_2

New Line.l(r:p5udm4349-p5udm4350) Units=km Length=0.00949893 bus1=p5udm4349.1.2 bus2=p5udm4350.1.2 switch=n enabled=y phases=2 Linecode=1P_UG_AL_1/0_Brenau_0_416_0_2_2_2_2

New Line.l(r:p5udm4349-p5udt1154lv) Units=km Length=0.00949419 bus1=p5udt1154lv.1.2 bus2=p5udm4349.1.2 switch=n enabled=y phases=2 Linecode=1P_UG_AL_4/0_Sweetbriar_0_416_0_2_2_2_2

New Line.l(r:p5udm4352-p5ulv16849) Units=km Length=0.0128347 bus1=p5udm4352.1.2 bus2=p5ulv16849.1.2 switch=n enabled=y phases=2 Linecode=1P_UG_AL_1/0_Brenau_0_416_0_2_2_2_2

New Line.l(r:p5udm4352-p5udt1154lv) Units=km Length=0.0466793 bus1=p5udt1154lv.1.2 bus2=p5udm4352.1.2 switch=n enabled=y phases=2 Linecode=1P_UG_AL_1/0_Brenau_0_416_0_2_2_2_2

New Line.l(r:p5udt1427lv-p5ulv7736) Units=km Length=0.013513900000000002 bus1=p5udt1427lv.1.2 bus2=p5ulv7736.1.2 switch=n enabled=y phases=2 Linecode=1P_UG_AL_1/0_Brenau_0_416_0_2_2_2_2

New Line.l(r:p5udm5336-p5ulv1599) Units=km Length=0.01736 bus1=p5udm5336.1.2 bus2=p5ulv1599.1.2 switch=n enabled=y phases=2 Linecode=1P_UG_AL_1/0_Brenau_0_416_0_2_2_2_2

New Line.l(r:p5udm5336-p5udt1427lv) Units=km Length=0.00933862 bus1=p5udt1427lv.1.2 bus2=p5udm5336.1.2 switch=n enabled=y phases=2 Linecode=1P_UG_AL_1/0_Brenau_0_416_0_2_2_2_2

New Line.l(r:p5udm6796-p5ulv2159) Units=km Length=0.014878 bus1=p5udm6796.1.2 bus2=p5ulv2159.1.2 switch=n enabled=y phases=2 Linecode=1P_UG_AL_1/0_Brenau_0_416_0_2_2_2_2

New Line.l(r:p5udm6796-p5ulv2913) Units=km Length=0.0157037 bus1=p5udm6796.1.2 bus2=p5ulv2913.1.2 switch=n enabled=y phases=2 Linecode=1P_UG_AL_1/0_Brenau_0_416_0_2_2_2_2

New Line.l(r:p5udm6796-p5ulv10158) Units=km Length=0.0127404 bus1=p5udm6796.1.2 bus2=p5ulv10158.1.2 switch=n enabled=y phases=2 Linecode=1P_UG_AL_1/0_Brenau_0_416_0_2_2_2_2

New Line.l(r:p5udm6796-p5udt1847lv) Units=km Length=0.00920179 bus1=p5udt1847lv.1.2 bus2=p5udm6796.1.2 switch=n enabled=y phases=2 Linecode=1P_UG_AL_4/0_Sweetbriar_0_416_0_2_2_2_2

New Line.l(r:p5udm6799-p5ulv19093) Units=km Length=0.0133427 bus1=p5udm6799.1.2 bus2=p5ulv19093.1.2 switch=n enabled=y phases=2 Linecode=1P_UG_AL_1/0_Brenau_0_416_0_2_2_2_2

New Line.l(r:p5udm6799-p5udt1847lv) Units=km Length=0.00918828 bus1=p5udt1847lv.1.2 bus2=p5udm6799.1.2 switch=n enabled=y phases=2 Linecode=1P_UG_AL_1/0_Brenau_0_416_0_2_2_2_2

New Line.l(r:p5udt2248lv-p5ulv12846) Units=km Length=0.0136878 bus1=p5udt2248lv.1.2 bus2=p5ulv12846.1.2 switch=n enabled=y phases=2 Linecode=1P_UG_AL_1/0_Brenau_0_416_0_2_2_2_2

New Line.l(r:p5udm8188-p5ulv12845) Units=km Length=0.016816000000000005 bus1=p5udm8188.1.2 bus2=p5ulv12845.1.2 switch=n enabled=y phases=2 Linecode=1P_UG_AL_1/0_Brenau_0_416_0_2_2_2_2

New Line.l(r:p5udm8186-p5ulv2725) Units=km Length=0.0182339 bus1=p5udm8186.1.2 bus2=p5ulv2725.1.2 switch=n enabled=y phases=2 Linecode=1P_UG_AL_1/0_Brenau_0_416_0_2_2_2_2

New Line.l(r:p5udm8186-p5ulv18316) Units=km Length=0.015568 bus1=p5udm8186.1.2 bus2=p5ulv18316.1.2 switch=n enabled=y phases=2 Linecode=1P_UG_AL_1/0_Brenau_0_416_0_2_2_2_2

New Line.l(r:p5udm8186-p5udm8188) Units=km Length=0.00930731 bus1=p5udm8188.1.2 bus2=p5udm8186.1.2 switch=n enabled=y phases=2 Linecode=1P_UG_AL_4/0_Sweetbriar_0_416_0_2_2_2_2

New Line.l(r:p5udm8188-p5udt2248lv) Units=km Length=0.00930731 bus1=p5udt2248lv.1.2 bus2=p5udm8188.1.2 switch=n enabled=y phases=2 Linecode=1P_UG_AL_4/0_Sweetbriar_0_416_0_2_2_2_2

New Line.l(r:p5udm8191-p5ulv17576) Units=km Length=0.014631100000000001 bus1=p5udm8191.1.2 bus2=p5ulv17576.1.2 switch=n enabled=y phases=2 Linecode=1P_UG_AL_1/0_Brenau_0_416_0_2_2_2_2

New Line.l(r:p5udm8187-p5ulv6977) Units=km Length=0.0149215 bus1=p5udm8187.1.2 bus2=p5ulv6977.1.2 switch=n enabled=y phases=2 Linecode=1P_UG_AL_1/0_Brenau_0_416_0_2_2_2_2

New Line.l(r:p5udm8190-p5ulv15155) Units=km Length=0.0154861 bus1=p5udm8190.1.2 bus2=p5ulv15155.1.2 switch=n enabled=y phases=2 Linecode=1P_UG_AL_1/0_Brenau_0_416_0_2_2_2_2

New Line.l(r:p5udm8187-p5udm8190) Units=km Length=0.00930731 bus1=p5udm8187.1.2 bus2=p5udm8190.1.2 switch=n enabled=y phases=2 Linecode=1P_UG_AL_1/0_Brenau_0_416_0_2_2_2_2

New Line.l(r:p5udm8187-p5udm8191) Units=km Length=0.0093161 bus1=p5udm8191.1.2 bus2=p5udm8187.1.2 switch=n enabled=y phases=2 Linecode=1P_UG_AL_1/0_Brenau_0_416_0_2_2_2_2

New Line.l(r:p5udm8191-p5udt2248lv) Units=km Length=0.00930731 bus1=p5udt2248lv.1.2 bus2=p5udm8191.1.2 switch=n enabled=y phases=2 Linecode=1P_UG_AL_4/0_Sweetbriar_0_416_0_2_2_2_2

New Line.l(r:p5udm8995-p5ulv3107) Units=km Length=0.00945176 bus1=p5udm8995.1.2 bus2=p5ulv3107.1.2 switch=n enabled=y phases=2 Linecode=1P_UG_AL_1/0_Brenau_0_416_0_2_2_2_2

New Line.l(r:p5udm8995-p5udt2502lv) Units=km Length=0.0193082 bus1=p5udt2502lv.1.2 bus2=p5udm8995.1.2 switch=n enabled=y phases=2 Linecode=1P_UG_AL_1/0_Brenau_0_416_0_2_2_2_2

New Line.l(r:p5udm8996-p5ulv16437) Units=km Length=0.013367 bus1=p5udm8996.1.2 bus2=p5ulv16437.1.2 switch=n enabled=y phases=2 Linecode=1P_UG_AL_1/0_Brenau_0_416_0_2_2_2_2

New Line.l(r:p5udm8996-p5udt2502lv) Units=km Length=0.0096473 bus1=p5udt2502lv.1.2 bus2=p5udm8996.1.2 switch=n enabled=y phases=2 Linecode=1P_UG_AL_1/0_Brenau_0_416_0_2_2_2_2

New Line.l(r:p5udt2503lv-p5ulv3108) Units=km Length=0.00981373 bus1=p5udt2503lv.1.2 bus2=p5ulv3108.1.2 switch=n enabled=y phases=2 Linecode=1P_UG_AL_1/0_Brenau_0_416_0_2_2_2_2

New Line.l(r:p5udm8998-p5ulv8097) Units=km Length=0.01271 bus1=p5udm8998.1.2 bus2=p5ulv8097.1.2 switch=n enabled=y phases=2 Linecode=1P_UG_AL_1/0_Brenau_0_416_0_2_2_2_2

New Line.l(r:p5udm8998-p5udt2503lv) Units=km Length=0.019303400000000002 bus1=p5udt2503lv.1.2 bus2=p5udm8998.1.2 switch=n enabled=y phases=2 Linecode=1P_UG_AL_1/0_Brenau_0_416_0_2_2_2_2

New Line.l(r:p5udm8999-p5ulv23700) Units=km Length=0.0302864 bus1=p5udm8999.1.2 bus2=p5ulv23700.1.2 switch=n enabled=y phases=2 Linecode=1P_UG_AL_1/0_Brenau_0_416_0_2_2_2_2

New Line.l(r:p5udm8999-p5udt2503lv) Units=km Length=0.00966086 bus1=p5udt2503lv.1.2 bus2=p5udm8999.1.2 switch=n enabled=y phases=2 Linecode=1P_UG_AL_1/0_Brenau_0_416_0_2_2_2_2

New Line.l(r:p5udt2504lv-p5ulv3109) Units=km Length=0.014815300000000002 bus1=p5udt2504lv.1.2 bus2=p5ulv3109.1.2 switch=n enabled=y phases=2 Linecode=1P_UG_AL_1/0_Brenau_0_416_0_2_2_2_2

New Line.l(r:p5udt2504lv-p5ulv5894) Units=km Length=0.012019200000000002 bus1=p5udt2504lv.1.2 bus2=p5ulv5894.1.2 switch=n enabled=y phases=2 Linecode=1P_UG_AL_1/0_Brenau_0_416_0_2_2_2_2

New Line.l(r:p5udm9005-p5ulv14130) Units=km Length=0.014380600000000002 bus1=p5udm9005.1.2 bus2=p5ulv14130.1.2 switch=n enabled=y phases=2 Linecode=1P_UG_AL_1/0_Brenau_0_416_0_2_2_2_2

New Line.l(r:p5udm9003-p5ulv9042) Units=km Length=0.0106031 bus1=p5udm9003.1.2 bus2=p5ulv9042.1.2 switch=n enabled=y phases=2 Linecode=1P_UG_AL_1/0_Brenau_0_416_0_2_2_2_2

New Line.l(r:p5udm9002-p5ulv6433) Units=km Length=0.013127400000000001 bus1=p5udm9002.1.2 bus2=p5ulv6433.1.2 switch=n enabled=y phases=2 Linecode=1P_UG_AL_1/0_Brenau_0_416_0_2_2_2_2

New Line.l(r:p5udm9002-p5udm9003) Units=km Length=0.00918828 bus1=p5udm9003.1.2 bus2=p5udm9002.1.2 switch=n enabled=y phases=2 Linecode=1P_UG_AL_1/0_Brenau_0_416_0_2_2_2_2

New Line.l(r:p5udm9003-p5udm9005) Units=km Length=0.0183901 bus1=p5udm9005.1.2 bus2=p5udm9003.1.2 switch=n enabled=y phases=2 Linecode=1P_UG_AL_4/0_Sweetbriar_0_416_0_2_2_2_2

New Line.l(r:p5udm9005-p5udt2504lv) Units=km Length=0.0187759 bus1=p5udt2504lv.1.2 bus2=p5udm9005.1.2 switch=n enabled=y phases=2 Linecode=1P_UG_AL_4/0_Sweetbriar_0_416_0_2_2_2_2

New Line.l(r:p5udm9006-p5ulv14813) Units=km Length=0.0119318 bus1=p5udm9006.1.2 bus2=p5ulv14813.1.2 switch=n enabled=y phases=2 Linecode=1P_UG_AL_1/0_Brenau_0_416_0_2_2_2_2

New Line.l(r:p5udm9004-p5ulv11311) Units=km Length=0.00969522 bus1=p5udm9004.1.2 bus2=p5ulv11311.1.2 switch=n enabled=y phases=2 Linecode=1P_UG_AL_1/0_Brenau_0_416_0_2_2_2_2

New Line.l(r:p5udm9004-p5udm9006) Units=km Length=0.0599083 bus1=p5udm9006.1.2 bus2=p5udm9004.1.2 switch=n enabled=y phases=2 Linecode=1P_UG_AL_1/0_Brenau_0_416_0_2_2_2_2

New Line.l(r:p5udm9006-p5udt2504lv) Units=km Length=0.0184629 bus1=p5udt2504lv.1.2 bus2=p5udm9006.1.2 switch=n enabled=y phases=2 Linecode=1P_UG_AL_2/0_Converse_0_416_0_2_2_2_2

New Line.l(r:p5udm10866-p5ulv4012) Units=km Length=0.0164129 bus1=p5udm10866.1.2 bus2=p5ulv4012.1.2 switch=n enabled=y phases=2 Linecode=1P_UG_AL_1/0_Brenau_0_416_0_2_2_2_2

New Line.l(r:p5udm10866-p5udt3080lv) Units=km Length=0.00930731 bus1=p5udt3080lv.1.2 bus2=p5udm10866.1.2 switch=n enabled=y phases=2 Linecode=1P_UG_AL_1/0_Brenau_0_416_0_2_2_2_2

New Line.l(r:p5udm10867-p5ulv19270) Units=km Length=0.014232800000000002 bus1=p5udm10867.1.2 bus2=p5ulv19270.1.2 switch=n enabled=y phases=2 Linecode=1P_UG_AL_1/0_Brenau_0_416_0_2_2_2_2

New Line.l(r:p5udm10867-p5udt3080lv) Units=km Length=0.00930731 bus1=p5udt3080lv.1.2 bus2=p5udm10867.1.2 switch=n enabled=y phases=2 Linecode=1P_UG_AL_1/0_Brenau_0_416_0_2_2_2_2

New Line.l(r:p5udt3183lv-p5ulv6976) Units=km Length=0.0144969 bus1=p5udt3183lv.1.2 bus2=p5ulv6976.1.2 switch=n enabled=y phases=2 Linecode=1P_UG_AL_1/0_Brenau_0_416_0_2_2_2_2

New Line.l(r:p5udm11215-p5ulv4180) Units=km Length=0.013949600000000001 bus1=p5udm11215.1.2 bus2=p5ulv4180.1.2 switch=n enabled=y phases=2 Linecode=1P_UG_AL_1/0_Brenau_0_416_0_2_2_2_2

New Line.l(r:p5udm11215-p5udt3183lv) Units=km Length=0.008015120000000002 bus1=p5udt3183lv.1.2 bus2=p5udm11215.1.2 switch=n enabled=y phases=2 Linecode=1P_UG_AL_1/0_Brenau_0_416_0_2_2_2_2

New Line.l(r:p5udm11217-p5ulv7146) Units=km Length=0.012997 bus1=p5udm11217.1.2 bus2=p5ulv7146.1.2 switch=n enabled=y phases=2 Linecode=1P_UG_AL_1/0_Brenau_0_416_0_2_2_2_2

New Line.l(r:p5udm11217-p5ulv7341) Units=km Length=0.0123753 bus1=p5udm11217.1.2 bus2=p5ulv7341.1.2 switch=n enabled=y phases=2 Linecode=1P_UG_AL_2/0_Converse_0_416_0_2_2_2_2

New Line.l(r:p5udm11217-p5udt3183lv) Units=km Length=0.00802861 bus1=p5udt3183lv.1.2 bus2=p5udm11217.1.2 switch=n enabled=y phases=2 Linecode=1P_UG_AL_4/0_Sweetbriar_0_416_0_2_2_2_2

New Line.l(r:p5udm11238-p5ulv4200) Units=km Length=0.0155848 bus1=p5udm11238.1.2 bus2=p5ulv4200.1.2 switch=n enabled=y phases=2 Linecode=1P_UG_AL_1/0_Brenau_0_416_0_2_2_2_2

New Line.l(r:p5udm11238-p5udt3192lv) Units=km Length=0.017050900000000004 bus1=p5udt3192lv.1.2 bus2=p5udm11238.1.2 switch=n enabled=y phases=2 Linecode=1P_UG_AL_1/0_Brenau_0_416_0_2_2_2_2

New Line.l(r:p5udm11239-p5ulv4201) Units=km Length=0.0141626 bus1=p5udm11239.1.2 bus2=p5ulv4201.1.2 switch=n enabled=y phases=2 Linecode=1P_OH_AL_2/0_Rucina_0_416_0_2_2_2_2

New Line.l(r:p5udm11239-p5udt3192lv) Units=km Length=0.039565 bus1=p5udt3192lv.1.2 bus2=p5udm11239.1.2 switch=n enabled=y phases=2 Linecode=1P_OH_AL_4/0_Zuzara_0_416_0_2_2_2_2

New Line.l(r:p5udt3502lv-p5ulv4757) Units=km Length=0.014118 bus1=p5udt3502lv.1.2 bus2=p5ulv4757.1.2 switch=n enabled=y phases=2 Linecode=1P_OH_AL_2/0_Rucina_0_416_0_2_2_2_2

New Line.l(r:p5udt3502lv-p5ulv8464) Units=km Length=0.0113542 bus1=p5udt3502lv.1.2 bus2=p5ulv8464.1.2 switch=n enabled=y phases=2 Linecode=1P_OH_AL_2/0_Rucina_0_416_0_2_2_2_2

New Line.l(r:p5udt3502lv-p5ulv77680) Units=km Length=0.0032568200000000005 bus1=p5udt3502lv.1.2 bus2=p5ulv77680.1.2 switch=n enabled=y phases=2 Linecode=1P_OH_AL_4_Periwinkle_0_416_0_2_2_2_2

New Line.l(r:p5udm12113-p5ulv27064) Units=km Length=0.00456984 bus1=p5udm12113.1.2 bus2=p5ulv27064.1.2 switch=n enabled=y phases=2 Linecode=1P_OH_AL_2/0_Rucina_0_416_0_2_2_2_2

New Line.l(r:p5udm12113-p5udt3502lv) Units=km Length=0.0163449 bus1=p5udt3502lv.1.2 bus2=p5udm12113.1.2 switch=n enabled=y phases=2 Linecode=1P_OH_AL_2/0_Rucina_0_416_0_2_2_2_2

New Line.l(r:p5udt4079lv-p5ulv5893) Units=km Length=0.00878873 bus1=p5udt4079lv.1.2 bus2=p5ulv5893.1.2 switch=n enabled=y phases=2 Linecode=1P_UG_AL_1/0_Brenau_0_416_0_2_2_2_2

New Line.l(r:p5udt4079lv-p5ulv6069) Units=km Length=0.013924000000000002 bus1=p5udt4079lv.1.2 bus2=p5ulv6069.1.2 switch=n enabled=y phases=2 Linecode=1P_UG_AL_1/0_Brenau_0_416_0_2_2_2_2

New Line.l(r:p5udm13698-p5ulv5895) Units=km Length=0.0138101 bus1=p5udm13698.1.2 bus2=p5ulv5895.1.2 switch=n enabled=y phases=2 Linecode=1P_UG_AL_1/0_Brenau_0_416_0_2_2_2_2

New Line.l(r:p5udm13698-p5udt4080lv) Units=km Length=0.00930731 bus1=p5udt4080lv.1.2 bus2=p5udm13698.1.2 switch=n enabled=y phases=2 Linecode=1P_UG_AL_1/0_Brenau_0_416_0_2_2_2_2

New Line.l(r:p5udm13699-p5ulv14984) Units=km Length=0.0145815 bus1=p5udm13699.1.2 bus2=p5ulv14984.1.2 switch=n enabled=y phases=2 Linecode=1P_UG_AL_1/0_Brenau_0_416_0_2_2_2_2

New Line.l(r:p5udm13699-p5udt4080lv) Units=km Length=0.00930731 bus1=p5udt4080lv.1.2 bus2=p5udm13699.1.2 switch=n enabled=y phases=2 Linecode=1P_UG_AL_1/0_Brenau_0_416_0_2_2_2_2

New Line.l(r:p5udm13700-p5ulv5896) Units=km Length=0.06143 bus1=p5udm13700.1.2 bus2=p5ulv5896.1.2 switch=n enabled=y phases=2 Linecode=1P_OH_AL_4/0_Zuzara_0_416_0_2_2_2_2

New Line.l(r:p5udm13700-p5udt4081lv) Units=km Length=0.0191944 bus1=p5udt4081lv.1.2 bus2=p5udm13700.1.2 switch=n enabled=y phases=2 Linecode=1P_OH_AL_2/0_Rucina_0_416_0_2_2_2_2

New Line.l(r:p5udm13701-p5ulv11309) Units=km Length=0.0139793 bus1=p5udm13701.1.2 bus2=p5ulv11309.1.2 switch=n enabled=y phases=2 Linecode=1P_OH_AL_2/0_Rucina_0_416_0_2_2_2_2

New Line.l(r:p5udm13701-p5udt4081lv) Units=km Length=0.0191918 bus1=p5udt4081lv.1.2 bus2=p5udm13701.1.2 switch=n enabled=y phases=2 Linecode=1P_OH_AL_2/0_Rucina_0_416_0_2_2_2_2

New Line.l(r:p5udt4083lv-p5ulv5899) Units=km Length=0.0135812 bus1=p5udt4083lv.1.2 bus2=p5ulv5899.1.2 switch=n enabled=y phases=2 Linecode=1P_UG_AL_1/0_Brenau_0_416_0_2_2_2_2

New Line.l(r:p5udm13704-p5ulv5900) Units=km Length=0.0126276 bus1=p5udm13704.1.2 bus2=p5ulv5900.1.2 switch=n enabled=y phases=2 Linecode=1P_UG_AL_1/0_Brenau_0_416_0_2_2_2_2

New Line.l(r:p5udm13704-p5udt4083lv) Units=km Length=0.009322940000000002 bus1=p5udt4083lv.1.2 bus2=p5udm13704.1.2 switch=n enabled=y phases=2 Linecode=1P_UG_AL_1/0_Brenau_0_416_0_2_2_2_2

New Line.l(r:p5udt4156lv-p5ulv6081) Units=km Length=0.0116399 bus1=p5udt4156lv.1.2 bus2=p5ulv6081.1.2 switch=n enabled=y phases=2 Linecode=1P_UG_AL_2/0_Converse_0_416_0_2_2_2_2

New Line.l(r:p5udt4156lv-p5ulv34820) Units=km Length=0.00935387 bus1=p5udt4156lv.1.2 bus2=p5ulv34820.1.2 switch=n enabled=y phases=2 Linecode=1P_UG_AL_1/0_Brenau_0_416_0_2_2_2_2

New Line.l(r:p5udm13885-p5ulv14136) Units=km Length=0.0169374 bus1=p5udm13885.1.2 bus2=p5ulv14136.1.2 switch=n enabled=y phases=2 Linecode=1P_UG_AL_1/0_Brenau_0_416_0_2_2_2_2

New Line.l(r:p5udm13885-p5udt4156lv) Units=km Length=0.027975000000000003 bus1=p5udt4156lv.1.2 bus2=p5udm13885.1.2 switch=n enabled=y phases=2 Linecode=1P_UG_AL_1/0_Brenau_0_416_0_2_2_2_2

New Line.l(r:p5udm13886-p5ulv17581) Units=km Length=0.0153859 bus1=p5udm13886.1.2 bus2=p5ulv17581.1.2 switch=n enabled=y phases=2 Linecode=1P_UG_AL_1/0_Brenau_0_416_0_2_2_2_2

New Line.l(r:p5udm13886-p5udt4156lv) Units=km Length=0.0093205 bus1=p5udt4156lv.1.2 bus2=p5udm13886.1.2 switch=n enabled=y phases=2 Linecode=1P_UG_AL_1/0_Brenau_0_416_0_2_2_2_2

New Line.l(r:p5udt4238lv-p5ulv6271) Units=km Length=0.013271 bus1=p5udt4238lv.1.2 bus2=p5ulv6271.1.2 switch=n enabled=y phases=2 Linecode=1P_OH_AL_2/0_Rucina_0_416_0_2_2_2_2

New Line.l(r:p5udt4242lv-p5ulv6283) Units=km Length=0.0112746 bus1=p5udt4242lv.1.2 bus2=p5ulv6283.1.2 switch=n enabled=y phases=2 Linecode=1P_UG_AL_1/0_Brenau_0_416_0_2_2_2_2

New Line.l(r:p5udt4242lv-p5ulv11128) Units=km Length=0.0136938 bus1=p5udt4242lv.1.2 bus2=p5ulv11128.1.2 switch=n enabled=y phases=2 Linecode=1P_UG_AL_1/0_Brenau_0_416_0_2_2_2_2

New Line.l(r:p5udm14295-p5ulv6434) Units=km Length=0.0164082 bus1=p5udm14295.1.2 bus2=p5ulv6434.1.2 switch=n enabled=y phases=2 Linecode=1P_UG_AL_1/0_Brenau_0_416_0_2_2_2_2

New Line.l(r:p5udm14298-p5ulv10518) Units=km Length=0.0157096 bus1=p5udm14298.1.2 bus2=p5ulv10518.1.2 switch=n enabled=y phases=2 Linecode=1P_UG_AL_1/0_Brenau_0_416_0_2_2_2_2

New Line.l(r:p5udm14295-p5udm14298) Units=km Length=0.00907706 bus1=p5udm14295.1.2 bus2=p5udm14298.1.2 switch=n enabled=y phases=2 Linecode=1P_UG_AL_1/0_Brenau_0_416_0_2_2_2_2

New Line.l(r:p5udm14295-p5udt4323lv) Units=km Length=0.0184406 bus1=p5udt4323lv.1.2 bus2=p5udm14295.1.2 switch=n enabled=y phases=2 Linecode=1P_UG_AL_1/0_Brenau_0_416_0_2_2_2_2

New Line.l(r:p5udm14297-p5ulv7538) Units=km Length=0.0152729 bus1=p5udm14297.1.2 bus2=p5ulv7538.1.2 switch=n enabled=y phases=2 Linecode=1P_UG_AL_1/0_Brenau_0_416_0_2_2_2_2

New Line.l(r:p5udm14296-p5ulv6975) Units=km Length=0.009363860000000002 bus1=p5udm14296.1.2 bus2=p5ulv6975.1.2 switch=n enabled=y phases=2 Linecode=1P_UG_AL_1/0_Brenau_0_416_0_2_2_2_2

New Line.l(r:p5udm14296-p5ulv11887) Units=km Length=0.0156738 bus1=p5udm14296.1.2 bus2=p5ulv11887.1.2 switch=n enabled=y phases=2 Linecode=1P_UG_AL_1/0_Brenau_0_416_0_2_2_2_2

New Line.l(r:p5udm14296-p5udm14297) Units=km Length=0.00937235 bus1=p5udm14297.1.2 bus2=p5udm14296.1.2 switch=n enabled=y phases=2 Linecode=1P_UG_AL_4/0_Sweetbriar_0_416_0_2_2_2_2

New Line.l(r:p5udm14297-p5udt4323lv) Units=km Length=0.00937235 bus1=p5udt4323lv.1.2 bus2=p5udm14297.1.2 switch=n enabled=y phases=2 Linecode=1P_UG_AL_4/0_Sweetbriar_0_416_0_2_2_2_2

New Line.l(r:p5udt4642lv-p5ulv7145) Units=km Length=0.0290079 bus1=p5udt4642lv.1.2 bus2=p5ulv7145.1.2 switch=n enabled=y phases=2 Linecode=1P_UG_AL_4/0_Sweetbriar_0_416_0_2_2_2_2

New Line.l(r:p5udm15314-p5ulv7361) Units=km Length=0.00249002 bus1=p5udm15314.1.2 bus2=p5ulv7361.1.2 switch=n enabled=y phases=2 Linecode=1P_OH_AL_4_Periwinkle_0_416_0_2_2_2_2

New Line.l(r:p5udm15314-p5udt4733lv) Units=km Length=0.018468900000000003 bus1=p5udt4733lv.1.2 bus2=p5udm15314.1.2 switch=n enabled=y phases=2 Linecode=1P_OH_AL_2/0_Rucina_0_416_0_2_2_2_2

New Line.l(r:p5udm15315-p5ulv77599) Units=km Length=0.009711680000000002 bus1=p5udm15315.1.2 bus2=p5ulv77599.1.2 switch=n enabled=y phases=2 Linecode=1P_OH_AL_2/0_Rucina_0_416_0_2_2_2_2

New Line.l(r:p5udm15315-p5udt4733lv) Units=km Length=0.018473600000000003 bus1=p5udt4733lv.1.2 bus2=p5udm15315.1.2 switch=n enabled=y phases=2 Linecode=1P_OH_AL_2/0_Rucina_0_416_0_2_2_2_2

New Line.l(r:p5udt5169lv-p5ulv8443) Units=km Length=0.00738304 bus1=p5udt5169lv.1.2 bus2=p5ulv8443.1.2 switch=n enabled=y phases=2 Linecode=1P_UG_AL_4/0_Sweetbriar_0_416_0_2_2_2_2

New Line.l(r:p5udt5169lv-p5ulv12061) Units=km Length=0.008642950000000002 bus1=p5udt5169lv.1.2 bus2=p5ulv12061.1.2 switch=n enabled=y phases=2 Linecode=1P_UG_AL_4/0_Sweetbriar_0_416_0_2_2_2_2

New Line.l(r:p5udt5303lv-p5ulv8840) Units=km Length=0.00770789 bus1=p5udt5303lv.1.2 bus2=p5ulv8840.1.2 switch=n enabled=y phases=2 Linecode=1P_OH_AL_2/0_Rucina_0_416_0_2_2_2_2

New Line.l(r:p5udt5517lv-p5ulv9433) Units=km Length=0.0131087 bus1=p5udt5517lv.1.2 bus2=p5ulv9433.1.2 switch=n enabled=y phases=2 Linecode=1P_UG_AL_4/0_Sweetbriar_0_416_0_2_2_2_2

New Line.l(r:p5udt5701lv-p5ulv9969) Units=km Length=0.00254018 bus1=p5udt5701lv.1.2 bus2=p5ulv9969.1.2 switch=n enabled=y phases=2 Linecode=1P_OH_AL_4_Periwinkle_0_416_0_2_2_2_2

New Line.l(r:p5udm17466-p5ulv9982) Units=km Length=0.0179787 bus1=p5udm17466.1.2 bus2=p5ulv9982.1.2 switch=n enabled=y phases=2 Linecode=1P_UG_AL_1/0_Brenau_0_416_0_2_2_2_2

New Line.l(r:p5udm17466-p5udt5705lv) Units=km Length=0.0485262 bus1=p5udt5705lv.1.2 bus2=p5udm17466.1.2 switch=n enabled=y phases=2 Linecode=1P_UG_AL_1/0_Brenau_0_416_0_2_2_2_2

New Line.l(r:p5udm17467-p5ulv13973) Units=km Length=0.0152343 bus1=p5udm17467.1.2 bus2=p5ulv13973.1.2 switch=n enabled=y phases=2 Linecode=1P_UG_AL_1/0_Brenau_0_416_0_2_2_2_2

New Line.l(r:p5udm17467-p5udt5705lv) Units=km Length=0.0448486 bus1=p5udt5705lv.1.2 bus2=p5udm17467.1.2 switch=n enabled=y phases=2 Linecode=1P_UG_AL_1/0_Brenau_0_416_0_2_2_2_2

New Line.l(r:p5udt5826lv-p5ulv10340) Units=km Length=0.0142553 bus1=p5udt5826lv.1.2 bus2=p5ulv10340.1.2 switch=n enabled=y phases=2 Linecode=1P_UG_AL_2/0_Converse_0_416_0_2_2_2_2

New Line.l(r:p5udt5826lv-p5ulv15747) Units=km Length=0.0141211 bus1=p5udt5826lv.1.2 bus2=p5ulv15747.1.2 switch=n enabled=y phases=2 Linecode=1P_UG_AL_4/0_Sweetbriar_0_416_0_2_2_2_2

New Line.l(r:p5udt6467lv-p5ulv12435) Units=km Length=0.026847 bus1=p5udt6467lv.1.2 bus2=p5ulv12435.1.2 switch=n enabled=y phases=2 Linecode=1P_UG_AL_1/0_Brenau_0_416_0_2_2_2_2

New Line.l(r:p5udm18844-p5ulv12844) Units=km Length=0.014865500000000002 bus1=p5udm18844.1.2 bus2=p5ulv12844.1.2 switch=n enabled=y phases=2 Linecode=1P_UG_AL_1/0_Brenau_0_416_0_2_2_2_2

New Line.l(r:p5udm18844-p5ulv13950) Units=km Length=0.0115746 bus1=p5udm18844.1.2 bus2=p5ulv13950.1.2 switch=n enabled=y phases=2 Linecode=1P_UG_AL_1/0_Brenau_0_416_0_2_2_2_2

New Line.l(r:p5udm18846-p5ulv16088) Units=km Length=0.0109182 bus1=p5udm18846.1.2 bus2=p5ulv16088.1.2 switch=n enabled=y phases=2 Linecode=1P_UG_AL_1/0_Brenau_0_416_0_2_2_2_2

New Line.l(r:p5udm18844-p5udm18846) Units=km Length=0.00889299 bus1=p5udm18844.1.2 bus2=p5udm18846.1.2 switch=n enabled=y phases=2 Linecode=1P_UG_AL_1/0_Brenau_0_416_0_2_2_2_2

New Line.l(r:p5udm18844-p5udt6467lv) Units=km Length=0.008879470000000002 bus1=p5udt6467lv.1.2 bus2=p5udm18844.1.2 switch=n enabled=y phases=2 Linecode=1P_UG_AL_4/0_Sweetbriar_0_416_0_2_2_2_2

New Line.l(r:p5udm19288-p5ulv13392) Units=km Length=0.0111496 bus1=p5udm19288.1.2 bus2=p5ulv13392.1.2 switch=n enabled=y phases=2 Linecode=1P_UG_AL_1/0_Brenau_0_416_0_2_2_2_2

New Line.l(r:p5udm19288-p5udt6718lv) Units=km Length=0.0366445 bus1=p5udt6718lv.1.2 bus2=p5udm19288.1.2 switch=n enabled=y phases=2 Linecode=1P_UG_AL_1/0_Brenau_0_416_0_2_2_2_2

New Line.l(r:p5udm19289-p5ulv16832) Units=km Length=0.00577759 bus1=p5udm19289.1.2 bus2=p5ulv16832.1.2 switch=n enabled=y phases=2 Linecode=1P_UG_AL_4/0_Sweetbriar_0_416_0_2_2_2_2

New Line.l(r:p5udm19289-p5udt6718lv) Units=km Length=0.0261257 bus1=p5udt6718lv.1.2 bus2=p5udm19289.1.2 switch=n enabled=y phases=2 Linecode=1P_UG_AL_4/0_Sweetbriar_0_416_0_2_2_2_2

New Line.l(r:p5udt6719lv-p5ulv18900) Units=km Length=0.00901586 bus1=p5udt6719lv.1.2 bus2=p5ulv18900.1.2 switch=n enabled=y phases=2 Linecode=1P_OH_AL_2/0_Rucina_0_416_0_2_2_2_2

New Line.l(r:p5udm19290-p5ulv13393) Units=km Length=0.00597804 bus1=p5udm19290.1.2 bus2=p5ulv13393.1.2 switch=n enabled=y phases=2 Linecode=1P_OH_AL_2/0_Rucina_0_416_0_2_2_2_2

New Line.l(r:p5udm19290-p5udt6719lv) Units=km Length=0.018473600000000003 bus1=p5udt6719lv.1.2 bus2=p5udm19290.1.2 switch=n enabled=y phases=2 Linecode=1P_OH_AL_2/0_Rucina_0_416_0_2_2_2_2

New Line.l(r:p5udt6809lv-p5ulv13777) Units=km Length=0.0146481 bus1=p5udt6809lv.1.2 bus2=p5ulv13777.1.2 switch=n enabled=y phases=2 Linecode=1P_UG_AL_1/0_Brenau_0_416_0_2_2_2_2

New Line.l(r:p5udt6809lv-p5ulv16089) Units=km Length=0.0227627 bus1=p5udt6809lv.1.2 bus2=p5ulv16089.1.2 switch=n enabled=y phases=2 Linecode=1P_UG_AL_1/0_Brenau_0_416_0_2_2_2_2

New Line.l(r:p5udm19437-p5ulv15739) Units=km Length=0.0130337 bus1=p5udm19437.1.2 bus2=p5ulv15739.1.2 switch=n enabled=y phases=2 Linecode=1P_UG_AL_1/0_Brenau_0_416_0_2_2_2_2

New Line.l(r:p5udm19437-p5udt6809lv) Units=km Length=0.00888415 bus1=p5udt6809lv.1.2 bus2=p5udm19437.1.2 switch=n enabled=y phases=2 Linecode=1P_UG_AL_1/0_Brenau_0_416_0_2_2_2_2

New Line.l(r:p5udt7155lv-p5ulv15344) Units=km Length=0.016817000000000002 bus1=p5udt7155lv.1.2 bus2=p5ulv15344.1.2 switch=n enabled=y phases=2 Linecode=1P_UG_AL_1/0_Brenau_0_416_0_2_2_2_2

New Line.l(r:p5udt7238lv-p5ulv15748) Units=km Length=0.0210758 bus1=p5udt7238lv.1.2 bus2=p5ulv15748.1.2 switch=n enabled=y phases=2 Linecode=1P_OH_AL_2/0_Rucina_0_416_0_2_2_2_2

New Line.l(r:p5udt7363lv-p5ulv16259) Units=km Length=0.0237697 bus1=p5udt7363lv.1.2 bus2=p5ulv16259.1.2 switch=n enabled=y phases=2 Linecode=1P_OH_AL_2/0_Rucina_0_416_0_2_2_2_2

New Line.l(r:p5udt7363lv-p5ulv16628) Units=km Length=0.01806 bus1=p5udt7363lv.1.2 bus2=p5ulv16628.1.2 switch=n enabled=y phases=2 Linecode=1P_OH_AL_2/0_Rucina_0_416_0_2_2_2_2

New Line.l(r:p5udt7495lv-p5ulv17017) Units=km Length=0.0132968 bus1=p5udt7495lv.1.2 bus2=p5ulv17017.1.2 switch=n enabled=y phases=2 Linecode=1P_OH_AL_2/0_Rucina_0_416_0_2_2_2_2

New Line.l(r:p5udt7712lv-p5ulv18146) Units=km Length=0.0123391 bus1=p5udt7712lv.1.2 bus2=p5ulv18146.1.2 switch=n enabled=y phases=2 Linecode=1P_UG_AL_4/0_Sweetbriar_0_416_0_2_2_2_2

New Line.l(r:p5udt28732lv-p5ulv58345) Units=km Length=0.00944765 bus1=p5udt28732lv.1.2 bus2=p5ulv58345.1.2 switch=n enabled=y phases=2 Linecode=1P_UG_AL_1/0_Brenau_0_416_0_2_2_2_2

New Line.l(r:p5udt28733lv-p5ulv58346) Units=km Length=0.00111086 bus1=p5udt28733lv.1.2 bus2=p5ulv58346.1.2 switch=n enabled=y phases=2 Linecode=1P_OH_AL_4_Periwinkle_0_416_0_2_2_2_2

New Line.l(r:p5udt30553lv-p5ulv65110) Units=km Length=0.0177395 bus1=p5udt30553lv.1.2 bus2=p5ulv65110.1.2 switch=n enabled=y phases=2 Linecode=1P_UG_AL_1/0_Brenau_0_416_0_2_2_2_2

New Line.l(r:p5udt33577lv-p5ulv77677) Units=km Length=0.023358 bus1=p5udt33577lv.1.2 bus2=p5ulv77677.1.2 switch=n enabled=y phases=2 Linecode=1P_UG_AL_1/0_Brenau_0_416_0_2_2_2_2

New Line.l(r:p5udt33642lv-p5ulv78078) Units=km Length=0.007401 bus1=p5udt33642lv.1.2 bus2=p5ulv78078.1.2 switch=n enabled=y phases=2 Linecode=1P_OH_AL_2/0_Rucina_0_416_0_2_2_2_2

New Line.l(r:p5udt2248-p5udt3080) Units=km Length=0.037238 bus1=p5udt2248-p5udt3080xx.2 bus2=p5udt2248-p5udt3080x.2 switch=n enabled=y phases=1 Linecode=1P_UG_AL_#2_15_12_47_0_1_1_1_1

New Line.l(r:p5udt3080-p5udt4080) Units=km Length=0.0465453 bus1=p5udt3080-p5udt4080xx.2 bus2=p5udt3080-p5udt4080x.2 switch=n enabled=y phases=1 Linecode=1P_UG_AL_#2_15_12_47_0_1_1_1_1

New Line.l(r:p5udt4080-p5udt7236) Units=km Length=0.0339268 bus1=p5udt4080-p5udt7236xx.2 bus2=p5udt4080-p5udt7236x.2 switch=n enabled=y phases=1 Linecode=1P_UG_AL_#2_15_12_47_0_1_1_1_1

New Line.l(r:p5udt2246-p5udt6719) Units=km Length=0.018468900000000003 bus1=p5udt2246-p5udt6719x.2 bus2=p5udt6719.2 switch=n enabled=y phases=1 Linecode=1P_OH_AL_ACSR_#2_Sparrow_12_47_0_1_1_1_1

New Line.l(r:p5udt30553-p5umv35) Units=km Length=0.0611693 bus1=p5udt30553-p5umv35xx.2 bus2=p5udt30553-p5umv35x.2 switch=n enabled=y phases=1 Linecode=1P_UG_AL_#2_15_12_47_0_1_1_1_1

New Line.l(r:p5udt33642-p5udt7495) Units=km Length=0.0373795 bus1=p5udt33642.2 bus2=p5udt7495.2 switch=n enabled=y phases=1 Linecode=1P_OH_AL_ACSR_#2_Sparrow_12_47_0_1_1_1_1

New Line.l(r:p5udt3192-p5udt33642) Units=km Length=0.138882 bus1=p5udt3192-p5udt33642x.2 bus2=p5udt33642.2 switch=n enabled=y phases=1 Linecode=1P_OH_AL_ACSR_#2_Sparrow_12_47_0_1_1_1_1

New Line.l(r:p5udt1154-p5udt809) Units=km Length=0.05710740000000001 bus1=p5udt1154-p5udt809xx.3 bus2=p5udt1154-p5udt809x.3 switch=n enabled=y phases=1 Linecode=1P_UG_AL_#2_15_12_47_0_1_1_1_1

New Line.l(r:p5udt4083-p5udt809) Units=km Length=0.028620100000000002 bus1=p5udt4083-p5udt809x.3 bus2=p5udt4083-p5udt809xx.3 switch=n enabled=y phases=1 Linecode=1P_UG_AL_#2_15_12_47_0_1_1_1_1

New Line.l(r:p5udt3502-p5udt824) Units=km Length=0.0327168 bus1=p5udt824.3 bus2=p5udt3502.3 switch=n enabled=y phases=1 Linecode=1P_OH_AL_ACSR_#2_Sparrow_12_47_0_1_1_1_1

New Line.l(r:p5udt4242-p5udt824) Units=km Length=0.0447327 bus1=p5udt4242.3 bus2=p5udt824.3 switch=n enabled=y phases=1 Linecode=1P_OH_AL_ACSR_#2_Sparrow_12_47_0_1_1_1_1

New Line.l(r:p5udt4242-p5udt5705) Units=km Length=0.00945838 bus1=p5udt4242-p5udt5705xx.3 bus2=p5udt4242-p5udt5705x.3 switch=n enabled=y phases=1 Linecode=1P_UG_AL_#2_15_12_47_0_1_1_1_1

New Line.l(r:p5udt33577-p5udt5705) Units=km Length=0.062775 bus1=p5udt33577-p5udt5705x.3 bus2=p5udt33577-p5udt5705xx.3 switch=n enabled=y phases=1 Linecode=1P_UG_AL_#2_15_12_47_0_1_1_1_1

New Line.l(r:p5udt33577-p5udt4083) Units=km Length=0.03713290000000001 bus1=p5udt33577-p5udt4083xx.3 bus2=p5udt33577-p5udt4083x.3 switch=n enabled=y phases=1 Linecode=1P_UG_AL_#2_15_12_47_0_1_1_1_1

New Line.l(r:p5udt4083-p5udt7599) Units=km Length=0.037283 bus1=p5udt4083-p5udt7599xx.3 bus2=p5udt4083-p5udt7599x.3 switch=n enabled=y phases=1 Linecode=1P_UG_AL_#2_15_12_47_0_1_1_1_1

New Line.l(r:p5udt4156-p5udt5827) Units=km Length=0.027975000000000003 bus1=p5udt4156-p5udt5827xx.2 bus2=p5udt4156-p5udt5827x.2 switch=n enabled=y phases=1 Linecode=1P_UG_AL_#2_15_12_47_0_1_1_1_1

New Line.l(r:p5udt25563-p5udt7238) Units=km Length=0.0826534 bus1=p5udt25563-p5udt7238x.1 bus2=p5udt7238.1 switch=n enabled=y phases=1 Linecode=1P_OH_AL_ACSR_#2_Sparrow_12_47_0_1_1_1_1

New Line.l(r:p5udt2627-p5umv117) Units=km Length=0.0312731 bus1=p5udt2627-p5umv117x.1.2.3 bus2=p5udt2627-p5umv117xx.1.2.3 switch=n enabled=y phases=3 Linecode=3P_UG_AL_4/0_25_12_47_0_3_3_3_3

New Line.l(r:p5udt4081-p5udt7236) Units=km Length=0.19025 bus1=p5udt7236.1.2.3 bus2=p5udt4081.1.2.3 switch=n enabled=y phases=3 Linecode=3P_OH_AL_ACSR_336kcmil_Merlin_12_47_0_3_3_3_3

New Line.l(r:p5udt669-p5udt670) Units=km Length=0.0384776 bus1=p5udt669-p5udt670x.1 bus2=p5udt670.1 switch=n enabled=y phases=1 Linecode=1P_OH_AL_ACSR_#2_Sparrow_12_47_0_1_1_1_1

New Line.l(r:p5udt28732-p5udt6203) Units=km Length=0.187343 bus1=p5udt28732-p5udt6203xx.2 bus2=p5udt28732-p5udt6203x.2 switch=n enabled=y phases=1 Linecode=1P_UG_AL_#2_15_12_47_0_1_1_1_1

New Line.l(r:p5udt2502-p5udt2503) Units=km Length=0.0579149 bus1=p5udt2502-p5udt2503xx.1 bus2=p5udt2502-p5udt2503x.1 switch=n enabled=y phases=1 Linecode=1P_UG_AL_#2_15_12_47_0_1_1_1_1

New Line.l(r:p5udt2503-p5udt4323) Units=km Length=0.0619584 bus1=p5udt2503-p5udt4323xx.1 bus2=p5udt2503-p5udt4323x.1 switch=n enabled=y phases=1 Linecode=1P_UG_AL_#2_15_12_47_0_1_1_1_1

New Line.l(r:p5udt102-p5udt3183) Units=km Length=0.0261681 bus1=p5udt102-p5udt3183x.1 bus2=p5udt102-p5udt3183xx.1 switch=n enabled=y phases=1 Linecode=1P_UG_AL_#2_15_12_47_0_1_1_1_1

New Line.l(r:p5udt102-p5udt1847) Units=km Length=0.054682600000000005 bus1=p5udt102-p5udt1847xx.1 bus2=p5udt102-p5udt1847x.1 switch=n enabled=y phases=1 Linecode=1P_UG_AL_#2_15_12_47_0_1_1_1_1

New Line.l(r:p5udt4079-p5udt7363) Units=km Length=0.0894554 bus1=p5udt4079.1 bus2=p5udt7363.1 switch=n enabled=y phases=1 Linecode=1P_OH_AL_ACSR_#2_Sparrow_12_47_0_1_1_1_1

New Line.l(r:p5udt1427-p5udt4079) Units=km Length=0.03546200000000001 bus1=p5udt1427-p5udt4079x.1 bus2=p5udt1427-p5udt4079xx.1 switch=n enabled=y phases=1 Linecode=1P_UG_AL_#2_15_12_47_0_1_1_1_1

New Line.l(r:p5udt1427-p5udt1847) Units=km Length=0.027727700000000004 bus1=p5udt1427-p5udt1847xx.1 bus2=p5udt1427-p5udt1847x.1 switch=n enabled=y phases=1 Linecode=1P_UG_AL_#2_15_12_47_0_1_1_1_1

New Line.l(r:p5udt1847-p5udt2504) Units=km Length=0.0831344 bus1=p5udt1847-p5udt2504xx.1 bus2=p5udt1847-p5udt2504x.1 switch=n enabled=y phases=1 Linecode=1P_UG_AL_#2_15_12_47_0_1_1_1_1

New Line.l(r:p5udt6467-p5udt6809) Units=km Length=0.0355449 bus1=p5udt6467-p5udt6809xx.1 bus2=p5udt6467-p5udt6809x.1 switch=n enabled=y phases=1 Linecode=1P_UG_AL_#2_15_12_47_0_1_1_1_1

New Line.l(r:p5udt2504-p5udt6809) Units=km Length=0.0454325 bus1=p5udt2504-p5udt6809x.1 bus2=p5udt2504-p5udt6809xx.1 switch=n enabled=y phases=1 Linecode=1P_UG_AL_#2_15_12_47_0_1_1_1_1

New Line.l(r:p5udt2504-p5udt4323) Units=km Length=0.0641218 bus1=p5udt2504-p5udt4323xx.1 bus2=p5udt2504-p5udt4323x.1 switch=n enabled=y phases=1 Linecode=1P_UG_AL_#2_15_12_47_0_1_1_1_1

New Line.l(r:p5udt4323-p5udt6894) Units=km Length=0.0374941 bus1=p5udt4323-p5udt6894xx.1 bus2=p5udt4323-p5udt6894x.1 switch=n enabled=y phases=1 Linecode=1P_UG_AL_#2_15_12_47_0_1_1_1_1

New Line.l(r:p5udt7236-p5uhs4_1247) Units=km Length=0.542552 bus1=p5udt7236-p5uhs4_1247x.1.2.3 bus2=p5udt7236.1.2.3 switch=n enabled=y phases=3 Linecode=3P_UG_AL_750kcmil_15_12_47_0_3_3_3_3

New Line.l(r:p5udt3192-p5udt6423) Units=km Length=0.11921600000000002 bus1=p5udt3192.1.2.3 bus2=p5udt6423.1.2.3 switch=n enabled=y phases=3 Linecode=3P_OH_AL_ACSR_4/0_Penguin_12_47_0_3_3_3_3

New Line.l(r:p5udt3192-p5udt4238) Units=km Length=0.114638 bus1=p5udt4238.1.2.3 bus2=p5udt3192.1.2.3 switch=n enabled=y phases=3 Linecode=3P_OH_AL_ACSR_4/0_Penguin_12_47_0_3_3_3_3

New Line.l(r:p5udt4238-p5udt5169) Units=km Length=0.065456 bus1=p5udt5169.1.2.3 bus2=p5udt4238.1.2.3 switch=n enabled=y phases=3 Linecode=3P_OH_AL_ACSR_4/0_Penguin_12_47_0_3_3_3_3

New Line.l(r:p5udt5169-p5udt671) Units=km Length=0.0399008 bus1=p5udt671.1.2.3 bus2=p5udt5169.1.2.3 switch=n enabled=y phases=3 Linecode=3P_OH_AL_ACSR_4/0_Penguin_12_47_0_3_3_3_3

New Line.l(r:p5udt4081-p5udt671) Units=km Length=0.113411 bus1=p5udt4081.1.2.3 bus2=p5udt671.1.2.3 switch=n enabled=y phases=3 Linecode=3P_OH_AL_ACSR_4/0_Penguin_12_47_0_3_3_3_3

New Line.l(r:p5udt25563-p5udt5638) Units=km Length=0.0774285 bus1=p5udt25563.1.2.3 bus2=p5udt5638.1.2.3 switch=n enabled=y phases=3 Linecode=3P_OH_AL_ACSR_4/0_Penguin_12_47_0_3_3_3_3

New Line.l(r:p5udt25563-p5udt6718) Units=km Length=0.0877602 bus1=p5udt6718.1.2.3 bus2=p5udt25563.1.2.3 switch=n enabled=y phases=3 Linecode=3P_OH_AL_ACSR_4/0_Penguin_12_47_0_3_3_3_3

New Line.l(r:p5udt6718-p5umv40) Units=km Length=0.089458 bus1=p5udt6718-p5umv40xx.1.2.3 bus2=p5udt6718-p5umv40x.1.2.3 switch=n enabled=y phases=3 Linecode=3P_UG_AL_4/0_25_12_47_0_3_3_3_3

New Line.l(r:p5umv117-p5umv40) Units=km Length=0.0974908 bus1=p5umv117-p5umv40x.1.2.3 bus2=p5umv117-p5umv40xx.1.2.3 switch=n enabled=y phases=3 Linecode=3P_UG_AL_4/0_25_12_47_0_3_3_3_3

New Line.l(r:p5udt2627-p5udt4081) Units=km Length=0.10292 bus1=p5udt4081.1.2.3 bus2=p5udt2627.1.2.3 switch=n enabled=y phases=3 Linecode=3P_OH_AL_ACSR_4/0_Penguin_12_47_0_3_3_3_3

New Line.l(r:p5udt25960-p5udt5771) Units=km Length=0.0313929 bus1=p5udt25960.1.2.3 bus2=p5udt5771.1.2.3 switch=n enabled=y phases=3 Linecode=3P_OH_AL_ACSR_4/0_Penguin_12_47_0_3_3_3_3

New Line.l(r:p5udt25960-p5udt5701) Units=km Length=0.226953 bus1=p5udt5701.1.2.3 bus2=p5udt25960.1.2.3 switch=n enabled=y phases=3 Linecode=3P_OH_AL_ACSR_4/0_Penguin_12_47_0_3_3_3_3

New Line.l(r:p5udt5701-p5udt5772) Units=km Length=0.164876 bus1=p5udt5772.1.2.3 bus2=p5udt5701.1.2.3 switch=n enabled=y phases=3 Linecode=3P_OH_AL_ACSR_4/0_Penguin_12_47_0_3_3_3_3

New Line.l(r:p5udt5772-p5umv8) Units=km Length=0.168919 bus1=p5umv8.1.2.3 bus2=p5udt5772.1.2.3 switch=n enabled=y phases=3 Linecode=3P_OH_AL_ACSR_4/0_Penguin_12_47_0_3_3_3_3

New Line.l(r:p5udt4726-p5umv8) Units=km Length=0.28478800000000004 bus1=p5udt4726.1.2.3 bus2=p5umv8.1.2.3 switch=n enabled=y phases=3 Linecode=3P_OH_AL_ACSR_4/0_Penguin_12_47_0_3_3_3_3

New Line.l(r:p5udt4642-p5udt4726) Units=km Length=0.0911314 bus1=p5udt4642.1.2.3 bus2=p5udt4726.1.2.3 switch=n enabled=y phases=3 Linecode=3P_OH_AL_ACSR_4/0_Penguin_12_47_0_3_3_3_3

New Line.l(r:p5udt4642-p5udt5303) Units=km Length=0.059797 bus1=p5udt5303.1.2.3 bus2=p5udt4642.1.2.3 switch=n enabled=y phases=3 Linecode=3P_OH_AL_ACSR_4/0_Penguin_12_47_0_3_3_3_3

New Line.l(r:p5udt5303-p5udt7236) Units=km Length=0.20819800000000002 bus1=p5udt7236.1.2.3 bus2=p5udt5303.1.2.3 switch=n enabled=y phases=3 Linecode=3P_OH_AL_ACSR_4/0_Penguin_12_47_0_3_3_3_3

New Line.l(r:p5udm20062-p5ulv15738) Units=km Length=0.0230455 bus1=p5udm20062.1.2.3 bus2=p5ulv15738.1.2.3 switch=n enabled=y phases=3 Linecode=3P_UG_AL_350kcmil_15_0_416_0_3_3_3_3

New Line.l(r:p5udm20062-p5udt7236lv) Units=km Length=0.041859 bus1=p5udt7236lv.1.2.3 bus2=p5udm20062.1.2.3 switch=n enabled=y phases=3 Linecode=3P_UG_AL_350kcmil_15_0_416_0_3_3_3_3

New Line.l(r:p5udm20063-p5ulv17365) Units=km Length=0.0168519 bus1=p5udm20063.1.2.3 bus2=p5ulv17365.1.2.3 switch=n enabled=y phases=3 Linecode=3P_UG_AL_750kcmil_25_0_416_0_3_3_3_3

New Line.l(r:p5udm20063-p5udt7236lv) Units=km Length=0.0699105 bus1=p5udt7236lv.1.2.3 bus2=p5udm20063.1.2.3 switch=n enabled=y phases=3 Linecode=3P_UG_AL_750kcmil_25_0_416_0_3_3_3_3

New Line.l(r:p5udm2552-p5ulv717) Units=km Length=0.00985 bus1=p5udm2552.1.2.3 bus2=p5ulv717.1.2.3 switch=n enabled=y phases=3 Linecode=3P_UG_AL_350kcmil_15_0_416_0_3_3_3_3

New Line.l(r:p5udm2551-p5ulv716) Units=km Length=0.0042386 bus1=p5udm2551.1.2.3 bus2=p5ulv716.1.2.3 switch=n enabled=y phases=3 Linecode=3P_UG_AL_350kcmil_15_0_416_0_3_3_3_3

New Line.l(r:p5udm2551-p5udm2552) Units=km Length=0.0192386 bus1=p5udm2552.1.2.3 bus2=p5udm2551.1.2.3 switch=n enabled=y phases=3 Linecode=3P_UG_AL_350kcmil_15_0_416_0_3_3_3_3

New Line.l(r:p5udm2552-p5udt671lv) Units=km Length=0.0507301 bus1=p5udt671lv.1.2.3 bus2=p5udm2552.1.2.3 switch=n enabled=y phases=3 Linecode=3P_UG_AL_750kcmil_25_0_416_0_3_3_3_3

New Line.l(r:p5udm2553-p5ulv3853) Units=km Length=0.00667404 bus1=p5udm2553.1.2.3 bus2=p5ulv3853.1.2.3 switch=n enabled=y phases=3 Linecode=3P_UG_AL_350kcmil_15_0_416_0_3_3_3_3

New Line.l(r:p5udm2553-p5udt671lv) Units=km Length=0.0588809 bus1=p5udt671lv.1.2.3 bus2=p5udm2553.1.2.3 switch=n enabled=y phases=3 Linecode=3P_UG_AL_350kcmil_15_0_416_0_3_3_3_3

New Line.l(r:p5udt4734lv-p5ulv7362) Units=km Length=0.0017572700000000002 bus1=p5udt4734lv.1.2.3 bus2=p5ulv7362.1.2.3 switch=n enabled=y phases=3 Linecode=3P_UG_AL_350kcmil_15_0_416_0_3_3_3_3

New Line.l(r:p5udt4734lv-p5ulv12434) Units=km Length=0.00665674 bus1=p5udt4734lv.1.2.3 bus2=p5ulv12434.1.2.3 switch=n enabled=y phases=3 Linecode=3P_UG_AL_350kcmil_15_0_416_0_3_3_3_3

New Line.l(r:p5udm15318-p5ulv32093) Units=km Length=0.00376789 bus1=p5udm15318.1.2.3 bus2=p5ulv32093.1.2.3 switch=n enabled=y phases=3 Linecode=3P_UG_AL_350kcmil_15_0_416_0_3_3_3_3

New Line.l(r:p5udm15318-p5udt4734lv) Units=km Length=0.018473600000000003 bus1=p5udt4734lv.1.2.3 bus2=p5udm15318.1.2.3 switch=n enabled=y phases=3 Linecode=3P_UG_AL_350kcmil_15_0_416_0_3_3_3_3

New Line.l(r:p5udt2246lv-p5ulv2722) Units=km Length=0.00392475 bus1=p5udt2246lv.1.2.3 bus2=p5ulv2722.1.2.3 switch=n enabled=y phases=3 Linecode=3P_UG_AL_350kcmil_15_0_416_0_3_3_3_3

New Line.l(r:p5udt2246lv-p5ulv2910) Units=km Length=0.009711680000000002 bus1=p5udt2246lv.1.2.3 bus2=p5ulv2910.1.2.3 switch=n enabled=y phases=3 Linecode=3P_UG_AL_350kcmil_15_0_416_0_3_3_3_3

New Line.l(r:p5udm8182-p5ulv15921) Units=km Length=0.00506475 bus1=p5udm8182.1.2.3 bus2=p5ulv15921.1.2.3 switch=n enabled=y phases=3 Linecode=3P_UG_AL_350kcmil_15_0_416_0_3_3_3_3

New Line.l(r:p5udm8182-p5udt2246lv) Units=km Length=0.018468900000000003 bus1=p5udt2246lv.1.2.3 bus2=p5udm8182.1.2.3 switch=n enabled=y phases=3 Linecode=3P_UG_AL_350kcmil_15_0_416_0_3_3_3_3

New Line.l(r:p5udt2246-p5udt4733) Units=km Length=0.018473600000000003 bus1=p5udt4733.1.2.3 bus2=p5udt2246.1.2.3 switch=n enabled=y phases=3 Linecode=3P_OH_AL_ACSR_4/0_Penguin_12_47_0_3_3_3_3

New Line.l(r:p5udt4733-p5udt4734) Units=km Length=0.036929 bus1=p5udt4734.1.2.3 bus2=p5udt4733.1.2.3 switch=n enabled=y phases=3 Linecode=3P_OH_AL_ACSR_4/0_Penguin_12_47_0_3_3_3_3

New Line.l(r:p5udt297-p5udt4734) Units=km Length=0.018473600000000003 bus1=p5udt297.1.2.3 bus2=p5udt4734.1.2.3 switch=n enabled=y phases=3 Linecode=3P_OH_AL_ACSR_4/0_Penguin_12_47_0_3_3_3_3

New Line.l(r:p5udt297-p5udt3192) Units=km Length=0.138214 bus1=p5udt3192.1.2.3 bus2=p5udt297.1.2.3 switch=n enabled=y phases=3 Linecode=3P_OH_AL_ACSR_4/0_Penguin_12_47_0_3_3_3_3

New Line.l(r:p5udt6423lv-p5ulv12258) Units=km Length=0.0161051 bus1=p5udt6423lv.1.2.3 bus2=p5ulv12258.1.2.3 switch=n enabled=y phases=3 Linecode=3P_UG_AL_750kcmil_25_0_416_0_3_3_3_3

New Line.l(r:p5udt6423-p5umv35) Units=km Length=0.481227 bus1=p5udt6423.1.2.3 bus2=p5umv35.1.2.3 switch=n enabled=y phases=3 Linecode=3P_OH_AL_ACSR_4/0_Penguin_12_47_0_3_3_3_3

New Line.l(r:p5udt2381lv-p5ulv3663) Units=km Length=0.00984485 bus1=p5udt2381lv.1.2.3 bus2=p5ulv3663.1.2.3 switch=n enabled=y phases=3 Linecode=3P_UG_AL_350kcmil_15_0_416_0_3_3_3_3

New Line.l(r:p5udm8599-p5ulv2911) Units=km Length=0.00669938 bus1=p5udm8599.1.2.3 bus2=p5ulv2911.1.2.3 switch=n enabled=y phases=3 Linecode=3P_UG_AL_350kcmil_15_0_416_0_3_3_3_3

New Line.l(r:p5udm8599-p5udt2381lv) Units=km Length=0.0189848 bus1=p5udt2381lv.1.2.3 bus2=p5udm8599.1.2.3 switch=n enabled=y phases=3 Linecode=3P_UG_AL_350kcmil_15_0_416_0_3_3_3_3

New Line.l(r:p5udm8601-p5ulv13776) Units=km Length=0.0060962 bus1=p5udm8601.1.2.3 bus2=p5ulv13776.1.2.3 switch=n enabled=y phases=3 Linecode=3P_UG_AL_350kcmil_15_0_416_0_3_3_3_3

New Line.l(r:p5udm8601-p5udt2381lv) Units=km Length=0.009496570000000001 bus1=p5udt2381lv.1.2.3 bus2=p5udm8601.1.2.3 switch=n enabled=y phases=3 Linecode=3P_UG_AL_350kcmil_15_0_416_0_3_3_3_3

New Line.l(r:p5udt2381-p5udt7712) Units=km Length=0.0284767 bus1=p5udt2381-p5udt7712xx.1.2.3 bus2=p5udt2381-p5udt7712x.1.2.3 switch=n enabled=y phases=3 Linecode=3P_UG_AL_4/0_25_12_47_0_3_3_3_3

New Line.l(r:p5udt5169-p5udt7712) Units=km Length=0.0189801 bus1=p5udt5169-p5udt7712x.1.2.3 bus2=p5udt5169-p5udt7712xx.1.2.3 switch=n enabled=y phases=3 Linecode=3P_UG_AL_4/0_25_12_47_0_3_3_3_3

New Line.l(r:p5udm9392-p5ulv6810) Units=km Length=0.00899499 bus1=p5udm9392.1.2.3 bus2=p5ulv6810.1.2.3 switch=n enabled=y phases=3 Linecode=3P_UG_AL_350kcmil_15_0_416_0_3_3_3_3

New Line.l(r:p5udm9392-p5udt2627lv) Units=km Length=0.0177409 bus1=p5udt2627lv.1.2.3 bus2=p5udm9392.1.2.3 switch=n enabled=y phases=3 Linecode=3P_UG_AL_350kcmil_15_0_416_0_3_3_3_3

New Line.l(r:p5udt7112lv-p5ulv15153) Units=km Length=0.00821336 bus1=p5udt7112lv.1.2.3 bus2=p5ulv15153.1.2.3 switch=n enabled=y phases=3 Linecode=3P_UG_AL_350kcmil_15_0_416_0_3_3_3_3

New Line.l(r:p5udt6718-p5udt7112) Units=km Length=0.0735902 bus1=p5udt6718-p5udt7112x.1.2.3 bus2=p5udt6718-p5udt7112xx.1.2.3 switch=n enabled=y phases=3 Linecode=3P_UG_AL_4/0_25_12_47_0_3_3_3_3

New Line.l(r:p5udt25563lv-p5ulv48746) Units=km Length=0.00951425 bus1=p5udt25563lv.1.2.3 bus2=p5ulv48746.1.2.3 switch=n enabled=y phases=3 Linecode=3P_UG_AL_750kcmil_25_0_416_0_3_3_3_3

New Line.l(r:p5udt7599lv-p5ulv17599) Units=km Length=0.017997 bus1=p5udt7599lv.1.2.3 bus2=p5ulv17599.1.2.3 switch=n enabled=y phases=3 Linecode=3P_UG_AL_350kcmil_15_0_416_0_3_3_3_3

New Line.l(r:p5udt7155-p5udt7599) Units=km Length=0.0186371 bus1=p5udt7155-p5udt7599x.1.2.3 bus2=p5udt7155-p5udt7599xx.1.2.3 switch=n enabled=y phases=3 Linecode=3P_UG_AL_4/0_25_12_47_0_3_3_3_3

New Line.l(r:p5udt5517-p5udt7155) Units=km Length=0.02796 bus1=p5udt5517-p5udt7155x.1.2.3 bus2=p5udt5517-p5udt7155xx.1.2.3 switch=n enabled=y phases=3 Linecode=3P_UG_AL_4/0_25_12_47_0_3_3_3_3

New Line.l(r:p5udt25563-p5udt5517) Units=km Length=0.0837251 bus1=p5udt25563.1.2.3 bus2=p5udt5517.1.2.3 switch=n enabled=y phases=3 Linecode=3P_OH_AL_ACSR_4/0_Penguin_12_47_0_3_3_3_3

New Line.l(r:p5udt5638lv-p5ulv9781) Units=km Length=0.0128273 bus1=p5udt5638lv.1.2.3 bus2=p5ulv9781.1.2.3 switch=n enabled=y phases=3 Linecode=3P_UG_AL_750kcmil_25_0_416_0_3_3_3_3

New Line.l(r:p5udt5638-p5umv112) Units=km Length=0.0295138 bus1=p5udt5638.1.2.3 bus2=p5umv112.1.2.3 switch=n enabled=y phases=3 Linecode=3P_OH_AL_ACSR_4/0_Penguin_12_47_0_3_3_3_3

New Line.l(r:p5udt5827lv-p5ulv10341) Units=km Length=0.0129783 bus1=p5udt5827lv.1.2.3 bus2=p5ulv10341.1.2.3 switch=n enabled=y phases=3 Linecode=3P_UG_AL_350kcmil_15_0_416_0_3_3_3_3

New Line.l(r:p5udt5826-p5udt5827) Units=km Length=0.0186456 bus1=p5udt5826-p5udt5827x.1.2.3 bus2=p5udt5826-p5udt5827xx.1.2.3 switch=n enabled=y phases=3 Linecode=3P_UG_AL_4/0_25_12_47_0_3_3_3_3

New Line.l(r:p5udt5638-p5udt5826) Units=km Length=0.09400520000000001 bus1=p5udt5638.1.2.3 bus2=p5udt5826.1.2.3 switch=n enabled=y phases=3 Linecode=3P_OH_AL_ACSR_4/0_Penguin_12_47_0_3_3_3_3

New Line.l(r:p5udt6317lv-p5ulv11900) Units=km Length=0.0161802 bus1=p5udt6317lv.1.2.3 bus2=p5ulv11900.1.2.3 switch=n enabled=y phases=3 Linecode=3P_UG_AL_350kcmil_15_0_416_0_3_3_3_3

New Line.l(r:p5udt25563-p5udt6317) Units=km Length=0.144442 bus1=p5udt25563.1.2.3 bus2=p5udt6317.1.2.3 switch=n enabled=y phases=3 Linecode=3P_OH_AL_ACSR_4/0_Penguin_12_47_0_3_3_3_3

New Line.l(r:p5udt7113lv-p5ulv15170) Units=km Length=0.0282462 bus1=p5udt7113lv.1.2.3 bus2=p5ulv15170.1.2.3 switch=n enabled=y phases=3 Linecode=3P_UG_AL_750kcmil_25_0_416_0_3_3_3_3

New Line.l(r:p5udt25563-p5udt7113) Units=km Length=0.0712411 bus1=p5udt25563.1.2.3 bus2=p5udt7113.1.2.3 switch=n enabled=y phases=3 Linecode=3P_OH_AL_ACSR_4/0_Penguin_12_47_0_3_3_3_3

New Line.l(r:p5udt669lv-p5ulv3488) Units=km Length=0.00503564 bus1=p5udt669lv.1.2.3 bus2=p5ulv3488.1.2.3 switch=n enabled=y phases=3 Linecode=3P_UG_AL_750kcmil_25_0_416_0_3_3_3_3

New Line.l(r:p5udt669lv-p5ulv78056) Units=km Length=0.00218909 bus1=p5udt669lv.1.2.3 bus2=p5ulv78056.1.2.3 switch=n enabled=y phases=3 Linecode=3P_UG_AL_350kcmil_15_0_416_0_3_3_3_3

New Line.l(r:p5udm2546-p5ulv15154) Units=km Length=0.00353193 bus1=p5udm2546.1.2.3 bus2=p5ulv15154.1.2.3 switch=n enabled=y phases=3 Linecode=3P_UG_AL_350kcmil_15_0_416_0_3_3_3_3

New Line.l(r:p5udm2544-p5ulv714) Units=km Length=0.004332320000000001 bus1=p5udm2544.1.2.3 bus2=p5ulv714.1.2.3 switch=n enabled=y phases=3 Linecode=3P_UG_AL_350kcmil_15_0_416_0_3_3_3_3

New Line.l(r:p5udm2544-p5udm2546) Units=km Length=0.0192432 bus1=p5udm2546.1.2.3 bus2=p5udm2544.1.2.3 switch=n enabled=y phases=3 Linecode=3P_UG_AL_350kcmil_15_0_416_0_3_3_3_3

New Line.l(r:p5udm2546-p5udt669lv) Units=km Length=0.0192344 bus1=p5udt669lv.1.2.3 bus2=p5udm2546.1.2.3 switch=n enabled=y phases=3 Linecode=3P_UG_AL_750kcmil_25_0_416_0_3_3_3_3

New Line.l(r:p5udm2547-p5ulv78055) Units=km Length=0.00379326 bus1=p5udm2547.1.2.3 bus2=p5ulv78055.1.2.3 switch=n enabled=y phases=3 Linecode=3P_UG_AL_350kcmil_15_0_416_0_3_3_3_3

New Line.l(r:p5udm2547-p5udt669lv) Units=km Length=0.0371619 bus1=p5udt669lv.1.2.3 bus2=p5udm2547.1.2.3 switch=n enabled=y phases=3 Linecode=3P_UG_AL_350kcmil_15_0_416_0_3_3_3_3

New Line.l(r:p5udt5303-p5udt669) Units=km Length=0.0192386 bus1=p5udt5303.1.2.3 bus2=p5udt669.1.2.3 switch=n enabled=y phases=3 Linecode=3P_OH_AL_ACSR_4/0_Penguin_12_47_0_3_3_3_3

New Line.l(r:p5udt3978lv-p5ulv12842) Units=km Length=0.00818687 bus1=p5udt3978lv.1.2.3 bus2=p5ulv12842.1.2.3 switch=n enabled=y phases=3 Linecode=3P_UG_AL_750kcmil_25_0_416_0_3_3_3_3

New Line.l(r:p5udt3978lv-p5ulv16087) Units=km Length=0.006833870000000001 bus1=p5udt3978lv.1.2.3 bus2=p5ulv16087.1.2.3 switch=n enabled=y phases=3 Linecode=3P_UG_AL_350kcmil_15_0_416_0_3_3_3_3

New Line.l(r:p5udm13419-p5ulv5694) Units=km Length=0.00194982 bus1=p5udm13419.1.2.3 bus2=p5ulv5694.1.2.3 switch=n enabled=y phases=3 Linecode=3P_UG_AL_350kcmil_15_0_416_0_3_3_3_3

New Line.l(r:p5udm13419-p5udt3978lv) Units=km Length=0.0172476 bus1=p5udt3978lv.1.2.3 bus2=p5udm13419.1.2.3 switch=n enabled=y phases=3 Linecode=3P_UG_AL_350kcmil_15_0_416_0_3_3_3_3

New Line.l(r:p5udm13420-p5ulv12841) Units=km Length=0.007051080000000001 bus1=p5udm13420.1.2.3 bus2=p5ulv12841.1.2.3 switch=n enabled=y phases=3 Linecode=3P_UG_AL_350kcmil_15_0_416_0_3_3_3_3

New Line.l(r:p5udm13420-p5udt3978lv) Units=km Length=0.0344951 bus1=p5udt3978lv.1.2.3 bus2=p5udm13420.1.2.3 switch=n enabled=y phases=3 Linecode=3P_UG_AL_350kcmil_15_0_416_0_3_3_3_3

New Line.l(r:p5udt2382lv-p5ulv6432) Units=km Length=0.00271061 bus1=p5udt2382lv.1.2.3 bus2=p5ulv6432.1.2.3 switch=n enabled=y phases=3 Linecode=3P_UG_AL_350kcmil_15_0_416_0_3_3_3_3

New Line.l(r:p5udm8602-p5ulv2912) Units=km Length=0.00937921 bus1=p5udm8602.1.2.3 bus2=p5ulv2912.1.2.3 switch=n enabled=y phases=3 Linecode=3P_UG_AL_350kcmil_15_0_416_0_3_3_3_3

New Line.l(r:p5udm8602-p5udt2382lv) Units=km Length=0.018621 bus1=p5udt2382lv.1.2.3 bus2=p5udm8602.1.2.3 switch=n enabled=y phases=3 Linecode=3P_UG_AL_350kcmil_15_0_416_0_3_3_3_3

New Line.l(r:p5udm8604-p5ulv6431) Units=km Length=0.00669633 bus1=p5udm8604.1.2.3 bus2=p5ulv6431.1.2.3 switch=n enabled=y phases=3 Linecode=3P_UG_AL_350kcmil_15_0_416_0_3_3_3_3

New Line.l(r:p5udm8603-p5ulv4550) Units=km Length=0.00326098 bus1=p5udm8603.1.2.3 bus2=p5ulv4550.1.2.3 switch=n enabled=y phases=3 Linecode=3P_UG_AL_350kcmil_15_0_416_0_3_3_3_3

New Line.l(r:p5udm8603-p5udm8604) Units=km Length=0.018621 bus1=p5udm8604.1.2.3 bus2=p5udm8603.1.2.3 switch=n enabled=y phases=3 Linecode=3P_UG_AL_350kcmil_15_0_416_0_3_3_3_3

New Line.l(r:p5udm8604-p5udt2382lv) Units=km Length=0.0186164 bus1=p5udt2382lv.1.2.3 bus2=p5udm8604.1.2.3 switch=n enabled=y phases=3 Linecode=3P_UG_AL_350kcmil_15_0_416_0_3_3_3_3

New Line.l(r:p5udt2382-p5udt3978) Units=km Length=0.10897900000000002 bus1=p5udt3978.1.2.3 bus2=p5udt2382.1.2.3 switch=n enabled=y phases=3 Linecode=3P_OH_AL_ACSR_4/0_Penguin_12_47_0_3_3_3_3

New Line.l(r:p5udt507lv-p5ulv532) Units=km Length=0.00132774 bus1=p5udt507lv.1.2.3 bus2=p5ulv532.1.2.3 switch=n enabled=y phases=3 Linecode=3P_UG_AL_350kcmil_15_0_416_0_3_3_3_3

New Line.l(r:p5udt28733-p5udt507) Units=km Length=0.0922164 bus1=p5udt28733.1.2.3 bus2=p5udt507.1.2.3 switch=n enabled=y phases=3 Linecode=3P_OH_AL_ACSR_4/0_Penguin_12_47_0_3_3_3_3

New Line.l(r:p5udt28733-p5udt3978) Units=km Length=0.184347 bus1=p5udt3978.1.2.3 bus2=p5udt28733.1.2.3 switch=n enabled=y phases=3 Linecode=3P_OH_AL_ACSR_4/0_Penguin_12_47_0_3_3_3_3

New Line.l(r:p5udt3978-p5udt4642) Units=km Length=0.090817 bus1=p5udt4642.1.2.3 bus2=p5udt3978.1.2.3 switch=n enabled=y phases=3 Linecode=3P_OH_AL_ACSR_4/0_Penguin_12_47_0_3_3_3_3

New Line.l(r:p5udt4726lv-p5ulv7340) Units=km Length=0.0144605 bus1=p5udt4726lv.1.2.3 bus2=p5ulv7340.1.2.3 switch=n enabled=y phases=3 Linecode=3P_UG_AL_350kcmil_15_0_416_0_3_3_3_3

New Line.l(r:p5udt5772lv-p5ulv10177) Units=km Length=0.00835867 bus1=p5udt5772lv.1.2.3 bus2=p5ulv10177.1.2.3 switch=n enabled=y phases=3 Linecode=3P_UG_AL_750kcmil_25_0_416_0_3_3_3_3

New Line.l(r:p5udt25960lv-p5ulv49893) Units=km Length=0.0045853 bus1=p5udt25960lv.1.2.3 bus2=p5ulv49893.1.2.3 switch=n enabled=y phases=3 Linecode=3P_UG_AL_750kcmil_25_0_416_0_3_3_3_3

New Line.l(r:p5udt5771lv-p5ulv10176) Units=km Length=0.0070798 bus1=p5udt5771lv.1.2.3 bus2=p5ulv10176.1.2.3 switch=n enabled=y phases=3 Linecode=3P_UG_AL_750kcmil_25_0_416_0_3_3_3_3

New Line.l(r:p5udm18435-p5ulv11534) Units=km Length=0.0152469 bus1=p5udm18435.1.2.3 bus2=p5ulv11534.1.2.3 switch=n enabled=y phases=3 Linecode=3P_UG_AL_350kcmil_15_0_416_0_3_3_3_3

New Line.l(r:p5udm18435-p5udt6203lv) Units=km Length=0.0241043 bus1=p5udt6203lv.1.2.3 bus2=p5udm18435.1.2.3 switch=n enabled=y phases=3 Linecode=3P_UG_AL_350kcmil_15_0_416_0_3_3_3_3

New Line.l(r:p5udm18436-p5ulv53802) Units=km Length=0.013163900000000001 bus1=p5udm18436.1.2.3 bus2=p5ulv53802.1.2.3 switch=n enabled=y phases=3 Linecode=3P_UG_AL_350kcmil_15_0_416_0_3_3_3_3

New Line.l(r:p5udm18436-p5udt6203lv) Units=km Length=0.0268585 bus1=p5udt6203lv.1.2.3 bus2=p5udm18436.1.2.3 switch=n enabled=y phases=3 Linecode=3P_UG_AL_350kcmil_15_0_416_0_3_3_3_3

New Line.l(r:p5udt5771-p5udt6203) Units=km Length=0.128729 bus1=p5udt5771.1.2.3 bus2=p5udt6203.1.2.3 switch=n enabled=y phases=3 Linecode=3P_OH_AL_ACSR_4/0_Penguin_12_47_0_3_3_3_3

New Line.l(r:p5udt6894lv-p5ulv14129) Units=km Length=0.011428 bus1=p5udt6894lv.1.2.3 bus2=p5ulv14129.1.2.3 switch=n enabled=y phases=3 Linecode=3P_UG_AL_350kcmil_15_0_416_0_3_3_3_3

New Line.l(r:p5udt967lv-p5ulv1057) Units=km Length=0.0062649 bus1=p5udt967lv.1.2.3 bus2=p5ulv1057.1.2.3 switch=n enabled=y phases=3 Linecode=3P_UG_AL_350kcmil_15_0_416_0_3_3_3_3

New Line.l(r:p5udm3664-p5ulv8278) Units=km Length=0.00660019 bus1=p5udm3664.1.2.3 bus2=p5ulv8278.1.2.3 switch=n enabled=y phases=3 Linecode=3P_UG_AL_350kcmil_15_0_416_0_3_3_3_3

New Line.l(r:p5udm3664-p5udt967lv) Units=km Length=0.0225813 bus1=p5udt967lv.1.2.3 bus2=p5udm3664.1.2.3 switch=n enabled=y phases=3 Linecode=3P_UG_AL_350kcmil_15_0_416_0_3_3_3_3

New Line.l(r:p5udt6894-p5udt967) Units=km Length=0.0612539 bus1=p5udt6894.1.2.3 bus2=p5udt967.1.2.3 switch=n enabled=y phases=3 Linecode=3P_OH_AL_ACSR_4/0_Penguin_12_47_0_3_3_3_3

New Line.l(r:p5udt6894-p5udt7236) Units=km Length=0.12413800000000001 bus1=p5udt6894-p5udt7236xx.1.2.3 bus2=p5udt6894-p5udt7236x.1.2.3 switch=n enabled=y phases=3 Linecode=3P_UG_AL_4/0_25_12_47_0_3_3_3_3

New Line.l(r:p5udt3783-p5umv112) Units=km Length=0.122893 bus1=p5udt3783-p5umv112x.1.2.3 bus2=p5udt3783.1.2.3 switch=n enabled=y phases=3 Linecode=3P_OH_AL_ACSR_1033kcmil_Curlew_12.47_1_3_3_3_3

New Line.l(r:p5udt6317-p5udt7240) Units=km Length=0.254107 bus1=p5udt6317-p5udt7240x.1.2.3 bus2=p5udt6317.1.2.3 switch=n enabled=y phases=3 Linecode=3P_OH_AL_ACSR_1033kcmil_Curlew_12.47_1_3_3_3_3

New Line.l(r:p5udt5346-p5udt6203) Units=km Length=0.334397 bus1=p5udt5346-p5udt6203xx.1.2.3 bus2=p5udt5346-p5udt6203x.1.2.3 switch=n enabled=y phases=3 Linecode=3P_OH_AL_ACSR_1033kcmil_Curlew_12.47_1_3_3_3_3

New Line.l(r:p5udm9391-p5udt2627lv)p5ud1 Units=km Length=0.0177372 bus1=p5udt2627lv.1.2.3 bus2=p5udm9391.1.2.3 switch=n enabled=y phases=3 Linecode=3P_UG_AL_750kcmil_25_0_416_0_3_3_3_3

New Line.l(r:p5udm9391-p5udt2627lv)p5ud1p5ud1 Units=km Length=0.0177372 bus1=p5udt2627lv.1.2.3 bus2=p5udm9391.1.2.3 switch=n enabled=y phases=3 Linecode=3P_UG_AL_750kcmil_25_0_416_0_3_3_3_3

New Line.l(r:p5udm9391-p5ulv3294)p5ud1 Units=km Length=0.0145 bus1=p5udm9391.1.2.3 bus2=p5ulv3294.1.2.3 switch=n enabled=y phases=3 Linecode=3P_UG_AL_750kcmil_25_0_416_0_3_3_3_3

New Line.l(r:p5udm9391-p5ulv3294)p5ud1p5ud1 Units=km Length=0.0145 bus1=p5udm9391.1.2.3 bus2=p5ulv3294.1.2.3 switch=n enabled=y phases=3 Linecode=3P_UG_AL_750kcmil_25_0_416_0_3_3_3_3

New Line.padswitch(r:p5udt2248-p5udt3080)p5u_120380 Units=km Length=0.001 bus1=p5udt3080.2 bus2=p5udt2248-p5udt3080xx.2 switch=y enabled=y phases=1 Linecode=padswitch_1_1_1_1

New Line.padswitch(r:p5udt2248-p5udt3080)p5u_120381 Units=km Length=0.001 bus1=p5udt2248-p5udt3080x.2 bus2=p5udt2248.2 switch=y enabled=y phases=1 Linecode=padswitch_1_1_1_1

New Line.padswitch(r:p5udt3080-p5udt4080)p5u_120382 Units=km Length=0.001 bus1=p5udt4080.2 bus2=p5udt3080-p5udt4080xx.2 switch=y enabled=y phases=1 Linecode=padswitch_1_1_1_1

New Line.padswitch(r:p5udt3080-p5udt4080)p5u_120383 Units=km Length=0.001 bus1=p5udt3080-p5udt4080x.2 bus2=p5udt3080.2 switch=y enabled=y phases=1 Linecode=padswitch_1_1_1_1

New Line.padswitch(r:p5udt4080-p5udt7236)p5u_120384 Units=km Length=0.001 bus1=p5udt4080-p5udt7236xxx.2 bus2=p5udt4080-p5udt7236xx.2 switch=y enabled=y phases=1 Linecode=padswitch_1_1_1_1

New Line.padswitch(r:p5udt4080-p5udt7236)p5u_120385 Units=km Length=0.001 bus1=p5udt4080-p5udt7236x.2 bus2=p5udt4080.2 switch=y enabled=y phases=1 Linecode=padswitch_1_1_1_1

New Line.padswitch(r:p5udt30553-p5umv35)p5u_120386 Units=km Length=0.001 bus1=p5udt30553-p5umv35xxx.2 bus2=p5udt30553-p5umv35xx.2 switch=y enabled=y phases=1 Linecode=padswitch_1_1_1_1

New Line.padswitch(r:p5udt30553-p5umv35)p5u_120387 Units=km Length=0.001 bus1=p5udt30553-p5umv35x.2 bus2=p5udt30553.2 switch=y enabled=y phases=1 Linecode=padswitch_1_3_1_1_1

New Line.padswitch(r:p5udt1154-p5udt809)p5u_120394 Units=km Length=0.001 bus1=p5udt809.3 bus2=p5udt1154-p5udt809xx.3 switch=y enabled=y phases=1 Linecode=padswitch_1_1_1_1

New Line.padswitch(r:p5udt1154-p5udt809)p5u_120395 Units=km Length=0.001 bus1=p5udt1154-p5udt809x.3 bus2=p5udt1154.3 switch=y enabled=y phases=1 Linecode=padswitch_1_3_1_1_1

New Line.padswitch(r:p5udt4083-p5udt809)p5u_120396 Units=km Length=0.001 bus1=p5udt4083.3 bus2=p5udt4083-p5udt809x.3 switch=y enabled=y phases=1 Linecode=padswitch_1_1_1_1

New Line.padswitch(r:p5udt4083-p5udt809)p5u_120397 Units=km Length=0.001 bus1=p5udt4083-p5udt809xx.3 bus2=p5udt809.3 switch=y enabled=y phases=1 Linecode=padswitch_1_1_1_1

New Line.padswitch(r:p5udt4242-p5udt5705)p5u_120398 Units=km Length=0.001 bus1=p5udt5705.3 bus2=p5udt4242-p5udt5705xx.3 switch=y enabled=y phases=1 Linecode=padswitch_1_1_1_1

New Line.padswitch(r:p5udt4242-p5udt5705)p5u_120399 Units=km Length=0.001 bus1=p5udt4242-p5udt5705x.3 bus2=p5udt4242.3 switch=y enabled=y phases=1 Linecode=padswitch_1_3_1_1_1_1

New Line.padswitch(r:p5udt33577-p5udt5705)p5u_120400 Units=km Length=0.001 bus1=p5udt33577.3 bus2=p5udt33577-p5udt5705x.3 switch=y enabled=y phases=1 Linecode=padswitch_1_1_1_1

New Line.padswitch(r:p5udt33577-p5udt5705)p5u_120401 Units=km Length=0.001 bus1=p5udt33577-p5udt5705xx.3 bus2=p5udt5705.3 switch=y enabled=y phases=1 Linecode=padswitch_1_1_1_1

New Line.padswitch(r:p5udt33577-p5udt4083)p5u_120402 Units=km Length=0.001 bus1=p5udt4083.3 bus2=p5udt33577-p5udt4083xx.3 switch=y enabled=y phases=1 Linecode=padswitch_1_1_1_1

New Line.padswitch(r:p5udt33577-p5udt4083)p5u_120403 Units=km Length=0.001 bus1=p5udt33577-p5udt4083x.3 bus2=p5udt33577.3 switch=y enabled=y phases=1 Linecode=padswitch_1_1_1_1

New Line.padswitch(r:p5udt4083-p5udt7599)p5u_120404 Units=km Length=0.001 bus1=p5udt4083-p5udt7599xxx.3 bus2=p5udt4083-p5udt7599xx.3 switch=y enabled=y phases=1 Linecode=padswitch_1_1_1_1

New Line.padswitch(r:p5udt4083-p5udt7599)p5u_120405 Units=km Length=0.001 bus1=p5udt4083-p5udt7599x.3 bus2=p5udt4083.3 switch=y enabled=y phases=1 Linecode=padswitch_1_1_1_1

New Line.padswitch(r:p5udt4156-p5udt5827)p5u_120410 Units=km Length=0.001 bus1=p5udt4156-p5udt5827xxx.2 bus2=p5udt4156-p5udt5827xx.2 switch=y enabled=y phases=1 Linecode=padswitch_1_1_1_1

New Line.padswitch(r:p5udt4156-p5udt5827)p5u_120411 Units=km Length=0.001 bus1=p5udt4156-p5udt5827x.2 bus2=p5udt4156.2 switch=y enabled=y phases=1 Linecode=padswitch_1_3_1_1_1

New Line.padswitch(r:p5udt2627-p5umv117)p5u_120418 Units=km Length=0.001 bus1=p5udt2627.1.2.3 bus2=p5udt2627-p5umv117x.1.2.3 switch=y enabled=y phases=3 Linecode=padswitch_3_3_3_3

New Line.padswitch(r:p5udt2627-p5umv117)p5u_120419 Units=km Length=0.001 bus1=p5udt2627-p5umv117xx.1.2.3 bus2=p5umv117.1.2.3 switch=y enabled=y phases=3 Linecode=padswitch_3_4_3_3_3

New Line.padswitch(r:p5udt28732-p5udt6203)p5u_120420 Units=km Length=0.001 bus1=p5udt28732-p5udt6203xxx.2 bus2=p5udt28732-p5udt6203xx.2 switch=y enabled=y phases=1 Linecode=padswitch_1_1_1_1

New Line.padswitch(r:p5udt28732-p5udt6203)p5u_120421 Units=km Length=0.001 bus1=p5udt28732-p5udt6203x.2 bus2=p5udt28732.2 switch=y enabled=y phases=1 Linecode=padswitch_1_1_1_1

New Line.padswitch(r:p5udt2502-p5udt2503)p5u_120422 Units=km Length=0.001 bus1=p5udt2503.1 bus2=p5udt2502-p5udt2503xx.1 switch=y enabled=y phases=1 Linecode=padswitch_1_3_1_1_1

New Line.padswitch(r:p5udt2502-p5udt2503)p5u_120423 Units=km Length=0.001 bus1=p5udt2502-p5udt2503x.1 bus2=p5udt2502.1 switch=y enabled=y phases=1 Linecode=padswitch_1_1_1_1

New Line.padswitch(r:p5udt2503-p5udt4323)p5u_120424 Units=km Length=0.001 bus1=p5udt4323.1 bus2=p5udt2503-p5udt4323xx.1 switch=y enabled=y phases=1 Linecode=padswitch_1_1_1_1

New Line.padswitch(r:p5udt2503-p5udt4323)p5u_120425 Units=km Length=0.001 bus1=p5udt2503-p5udt4323x.1 bus2=p5udt2503.1 switch=y enabled=y phases=1 Linecode=padswitch_1_3_1_1_1

New Line.padswitch(r:p5udt102-p5udt3183)p5u_120426 Units=km Length=0.001 bus1=p5udt102.1 bus2=p5udt102-p5udt3183x.1 switch=y enabled=y phases=1 Linecode=padswitch_1_3_1_1_1

New Line.padswitch(r:p5udt102-p5udt3183)p5u_120427 Units=km Length=0.001 bus1=p5udt102-p5udt3183xx.1 bus2=p5udt3183.1 switch=y enabled=y phases=1 Linecode=padswitch_1_3_1_1_1

New Line.padswitch(r:p5udt102-p5udt1847)p5u_120428 Units=km Length=0.001 bus1=p5udt1847.1 bus2=p5udt102-p5udt1847xx.1 switch=y enabled=y phases=1 Linecode=padswitch_1_1_1_1

New Line.padswitch(r:p5udt102-p5udt1847)p5u_120429 Units=km Length=0.001 bus1=p5udt102-p5udt1847x.1 bus2=p5udt102.1 switch=y enabled=y phases=1 Linecode=padswitch_1_3_1_1_1

New Line.padswitch(r:p5udt1427-p5udt4079)p5u_120430 Units=km Length=0.001 bus1=p5udt1427.1 bus2=p5udt1427-p5udt4079x.1 switch=y enabled=y phases=1 Linecode=padswitch_1_3_1_1_1_0_1

New Line.padswitch(r:p5udt1427-p5udt4079)p5u_120431 Units=km Length=0.001 bus1=p5udt1427-p5udt4079xx.1 bus2=p5udt4079.1 switch=y enabled=y phases=1 Linecode=padswitch_1_3_1_1_1_0_1

New Line.padswitch(r:p5udt1427-p5udt1847)p5u_120432 Units=km Length=0.001 bus1=p5udt1847.1 bus2=p5udt1427-p5udt1847xx.1 switch=y enabled=y phases=1 Linecode=padswitch_1_1_1_1

New Line.padswitch(r:p5udt1427-p5udt1847)p5u_120433 Units=km Length=0.001 bus1=p5udt1427-p5udt1847x.1 bus2=p5udt1427.1 switch=y enabled=y phases=1 Linecode=padswitch_1_3_1_1_1_0_1

New Line.padswitch(r:p5udt1847-p5udt2504)p5u_120434 Units=km Length=0.001 bus1=p5udt2504.1 bus2=p5udt1847-p5udt2504xx.1 switch=y enabled=y phases=1 Linecode=padswitch_1_1_1_1

New Line.padswitch(r:p5udt1847-p5udt2504)p5u_120435 Units=km Length=0.001 bus1=p5udt1847-p5udt2504x.1 bus2=p5udt1847.1 switch=y enabled=y phases=1 Linecode=padswitch_1_1_1_1

New Line.padswitch(r:p5udt6467-p5udt6809)p5u_120436 Units=km Length=0.001 bus1=p5udt6809.1 bus2=p5udt6467-p5udt6809xx.1 switch=y enabled=y phases=1 Linecode=padswitch_1_1_1_1

New Line.padswitch(r:p5udt6467-p5udt6809)p5u_120437 Units=km Length=0.001 bus1=p5udt6467-p5udt6809x.1 bus2=p5udt6467.1 switch=y enabled=y phases=1 Linecode=padswitch_1_3_1_1_1_0_1_0

New Line.padswitch(r:p5udt2504-p5udt6809)p5u_120438 Units=km Length=0.001 bus1=p5udt2504.1 bus2=p5udt2504-p5udt6809x.1 switch=y enabled=y phases=1 Linecode=padswitch_1_1_1_1

New Line.padswitch(r:p5udt2504-p5udt6809)p5u_120439 Units=km Length=0.001 bus1=p5udt2504-p5udt6809xx.1 bus2=p5udt6809.1 switch=y enabled=y phases=1 Linecode=padswitch_1_1_1_1

New Line.padswitch(r:p5udt2504-p5udt4323)p5u_120440 Units=km Length=0.001 bus1=p5udt4323.1 bus2=p5udt2504-p5udt4323xx.1 switch=y enabled=y phases=1 Linecode=padswitch_1_1_1_1

New Line.padswitch(r:p5udt2504-p5udt4323)p5u_120441 Units=km Length=0.001 bus1=p5udt2504-p5udt4323x.1 bus2=p5udt2504.1 switch=y enabled=y phases=1 Linecode=padswitch_1_1_1_1

New Line.padswitch(r:p5udt4323-p5udt6894)p5u_120442 Units=km Length=0.001 bus1=p5udt4323-p5udt6894xxx.1 bus2=p5udt4323-p5udt6894xx.1 switch=y enabled=y phases=1 Linecode=padswitch_1_1_1_1

New Line.padswitch(r:p5udt4323-p5udt6894)p5u_120443 Units=km Length=0.001 bus1=p5udt4323-p5udt6894x.1 bus2=p5udt4323.1 switch=y enabled=y phases=1 Linecode=padswitch_1_1_1_1

New Line.padswitch(r:p5udt6718-p5umv40)p5u_120414 Units=km Length=0.001 bus1=p5umv40.1.2.3 bus2=p5udt6718-p5umv40xx.1.2.3 switch=y enabled=y phases=3 Linecode=padswitch_3_4_3_2_3_3

New Line.padswitch(r:p5udt6718-p5umv40)p5u_120415 Units=km Length=0.001 bus1=p5udt6718-p5umv40x.1.2.3 bus2=p5udt6718.1.2.3 switch=y enabled=y phases=3 Linecode=padswitch_3_4_3_2_3_1_3

New Line.padswitch(r:p5umv117-p5umv40)p5u_120416 Units=km Length=0.001 bus1=p5umv117.1.2.3 bus2=p5umv117-p5umv40x.1.2.3 switch=y enabled=y phases=3 Linecode=padswitch_3_4_3_3_3

New Line.padswitch(r:p5umv117-p5umv40)p5u_120417 Units=km Length=0.001 bus1=p5umv117-p5umv40xx.1.2.3 bus2=p5umv40.1.2.3 switch=y enabled=y phases=3 Linecode=padswitch_3_4_3_3_3

New Line.padswitch(r:p5udt2381-p5udt7712)p5u_120388 Units=km Length=0.001 bus1=p5udt7712.1.2.3 bus2=p5udt2381-p5udt7712xx.1.2.3 switch=y enabled=y phases=3 Linecode=padswitch_3_4_3_2_3_1_3_1

New Line.padswitch(r:p5udt2381-p5udt7712)p5u_120389 Units=km Length=0.001 bus1=p5udt2381-p5udt7712x.1.2.3 bus2=p5udt2381.1.2.3 switch=y enabled=y phases=3 Linecode=padswitch_3_4_3_2_3_1_3_1

New Line.padswitch(r:p5udt5169-p5udt7712)p5u_120390 Units=km Length=0.001 bus1=p5udt5169.1.2.3 bus2=p5udt5169-p5udt7712x.1.2.3 switch=y enabled=y phases=3 Linecode=padswitch_3_4_3_2_3_1_3_1

New Line.padswitch(r:p5udt5169-p5udt7712)p5u_120391 Units=km Length=0.001 bus1=p5udt5169-p5udt7712xx.1.2.3 bus2=p5udt7712.1.2.3 switch=y enabled=y phases=3 Linecode=padswitch_3_4_3_2_3_1_3_1

New Line.padswitch(r:p5udt6718-p5udt7112)p5u_120392 Units=km Length=0.001 bus1=p5udt6718.1.2.3 bus2=p5udt6718-p5udt7112x.1.2.3 switch=y enabled=y phases=3 Linecode=padswitch_3_4_3_2_3_1_3_1

New Line.padswitch(r:p5udt6718-p5udt7112)p5u_120393 Units=km Length=0.001 bus1=p5udt6718-p5udt7112xx.1.2.3 bus2=p5udt7112.1.2.3 switch=y enabled=y phases=3 Linecode=padswitch_3_4_3_2_3_1_3_1

New Line.padswitch(r:p5udt7155-p5udt7599)p5u_120406 Units=km Length=0.001 bus1=p5udt7155.1.2.3 bus2=p5udt7155-p5udt7599x.1.2.3 switch=y enabled=y phases=3 Linecode=padswitch_3_4_3_3_3

New Line.padswitch(r:p5udt7155-p5udt7599)p5u_120407 Units=km Length=0.001 bus1=p5udt7155-p5udt7599xx.1.2.3 bus2=p5udt7599.1.2.3 switch=y enabled=y phases=3 Linecode=padswitch_3_4_3_2_3_1_3_1

New Line.padswitch(r:p5udt5517-p5udt7155)p5u_120408 Units=km Length=0.001 bus1=p5udt5517.1.2.3 bus2=p5udt5517-p5udt7155x.1.2.3 switch=y enabled=y phases=3 Linecode=padswitch_3_4_3_2_3_1_3_1

New Line.padswitch(r:p5udt5517-p5udt7155)p5u_120409 Units=km Length=0.001 bus1=p5udt5517-p5udt7155xx.1.2.3 bus2=p5udt7155.1.2.3 switch=y enabled=y phases=3 Linecode=padswitch_3_4_3_3_3

New Line.padswitch(r:p5udt5826-p5udt5827)p5u_120412 Units=km Length=0.001 bus1=p5udt5826.1.2.3 bus2=p5udt5826-p5udt5827x.1.2.3 switch=y enabled=y phases=3 Linecode=padswitch_3_4_3_2_3_1_3_1

New Line.padswitch(r:p5udt5826-p5udt5827)p5u_120413 Units=km Length=0.001 bus1=p5udt5826-p5udt5827xx.1.2.3 bus2=p5udt5827.1.2.3 switch=y enabled=y phases=3 Linecode=padswitch_3_4_3_3_3

New Line.padswitch(r:p5udt6894-p5udt7236)p5u_120444 Units=km Length=0.001 bus1=p5udt7236.1.2.3 bus2=p5udt6894-p5udt7236xx.1.2.3 switch=y enabled=y phases=3 Linecode=padswitch_3_4_3_2_3_1_3_1

New Line.padswitch(r:p5udt6894-p5udt7236)p5u_120445 Units=km Length=0.001 bus1=p5udt6894-p5udt7236x.1.2.3 bus2=p5udt6894.1.2.3 switch=y enabled=y phases=3 Linecode=padswitch_3_4_3_2_3_1_3_1

New Line.elbswitch(r:p5udt3783-p5umv112)p5u_151228 Units=km Length=0.001 bus1=p5umv112.1.2.3 bus2=p5udt3783-p5umv112x.1.2.3 switch=y enabled=n phases=3 Linecode=elbswitch_3_3_3_3

New Line.padswitch(r:p5udt5346-p5udt6203)p5u_151294 Units=km Length=0.001 bus1=p5udt6203.1.2.3 bus2=p5udt5346-p5udt6203xx.1.2.3 switch=y enabled=n phases=3 Linecode=padswitch_3_4_3_2_3_1_3_1

New Line.padswitch(r:p5udt5346-p5udt6203)p5u_151295 Units=km Length=0.001 bus1=p5udt5346-p5udt6203x.1.2.3 bus2=p5udt5346.1.2.3 switch=y enabled=n phases=3 Linecode=padswitch_3_4_3_2_3_1_3_1

New Line.fuse(r:p5udt30553-p5umv35)p5u_151480 Units=km Length=0.001 bus1=p5umv35.2 bus2=p5udt30553-p5umv35xxx.2 switch=n enabled=y phases=1 Linecode=fuse_1_1_1_1

New Fuse.Fuse_fuse(r:p5udt30553-p5umv35)p5u_151480 monitoredobj=Line.fuse(r:p5udt30553-p5umv35)p5u_151480 enabled=y ratedcurrent=100.0

New Line.fuse(r:p5udt669-p5udt670)p5u_151583 Units=km Length=0.001 bus1=p5udt669.1 bus2=p5udt669-p5udt670x.1 switch=n enabled=y phases=1 Linecode=fuse_1_7_1_1_1

New Fuse.Fuse_fuse(r:p5udt669-p5udt670)p5u_151583 monitoredobj=Line.fuse(r:p5udt669-p5udt670)p5u_151583 enabled=y ratedcurrent=100.0

New Line.fuse(r:p5udt2246-p5udt6719)p5u_151788 Units=km Length=0.001 bus1=p5udt2246.2 bus2=p5udt2246-p5udt6719x.2 switch=n enabled=y phases=1 Linecode=fuse_1_1_1_1

New Fuse.Fuse_fuse(r:p5udt2246-p5udt6719)p5u_151788 monitoredobj=Line.fuse(r:p5udt2246-p5udt6719)p5u_151788 enabled=y ratedcurrent=100.0

New Line.fuse(r:p5udt3192-p5udt33642)p5u_151944 Units=km Length=0.001 bus1=p5udt3192.2 bus2=p5udt3192-p5udt33642x.2 switch=n enabled=y phases=1 Linecode=fuse_1_7_1_1_1

New Fuse.Fuse_fuse(r:p5udt3192-p5udt33642)p5u_151944 monitoredobj=Line.fuse(r:p5udt3192-p5udt33642)p5u_151944 enabled=y ratedcurrent=100.0

New Line.fuse(r:p5udt4156-p5udt5827)p5u_152355 Units=km Length=0.001 bus1=p5udt5827.2 bus2=p5udt4156-p5udt5827xxx.2 switch=n enabled=y phases=1 Linecode=fuse_1_7_1_5_1_1

New Fuse.Fuse_fuse(r:p5udt4156-p5udt5827)p5u_152355 monitoredobj=Line.fuse(r:p5udt4156-p5udt5827)p5u_152355 enabled=y ratedcurrent=100.0

New Line.fuse(r:p5udt28732-p5udt6203)p5u_152426 Units=km Length=0.001 bus1=p5udt6203.2 bus2=p5udt28732-p5udt6203xxx.2 switch=n enabled=y phases=1 Linecode=fuse_1_7_1_1_1

New Fuse.Fuse_fuse(r:p5udt28732-p5udt6203)p5u_152426 monitoredobj=Line.fuse(r:p5udt28732-p5udt6203)p5u_152426 enabled=y ratedcurrent=100.0

New Line.fuse(r:p5udt4323-p5udt6894)p5u_152547 Units=km Length=0.001 bus1=p5udt6894.1 bus2=p5udt4323-p5udt6894xxx.1 switch=n enabled=y phases=1 Linecode=fuse_1_7_1_1_1

New Fuse.Fuse_fuse(r:p5udt4323-p5udt6894)p5u_152547 monitoredobj=Line.fuse(r:p5udt4323-p5udt6894)p5u_152547 enabled=y ratedcurrent=100.0

New Line.fuse(r:p5udt4080-p5udt7236)p5u_152591 Units=km Length=0.001 bus1=p5udt7236.2 bus2=p5udt4080-p5udt7236xxx.2 switch=n enabled=y phases=1 Linecode=fuse_1_7_1_5_1_4_1

New Fuse.Fuse_fuse(r:p5udt4080-p5udt7236)p5u_152591 monitoredobj=Line.fuse(r:p5udt4080-p5udt7236)p5u_152591 enabled=y ratedcurrent=100.0

New Line.fuse(r:p5udt4083-p5udt7599)p5u_152650 Units=km Length=0.001 bus1=p5udt7599.3 bus2=p5udt4083-p5udt7599xxx.3 switch=n enabled=y phases=1 Linecode=fuse_1_7_1_5_1_4_1_3

New Fuse.Fuse_fuse(r:p5udt4083-p5udt7599)p5u_152650 monitoredobj=Line.fuse(r:p5udt4083-p5udt7599)p5u_152650 enabled=y ratedcurrent=100.0

New Line.fuse(r:p5udt25563-p5udt7238)p5u_154653 Units=km Length=0.001 bus1=p5udt25563.1 bus2=p5udt25563-p5udt7238x.1 switch=n enabled=y phases=1 Linecode=fuse_1_7_1_1_1

New Fuse.Fuse_fuse(r:p5udt25563-p5udt7238)p5u_154653 monitoredobj=Line.fuse(r:p5udt25563-p5udt7238)p5u_154653 enabled=y ratedcurrent=100.0
