Clear

New Circuit.substation_p5uhs5_69 bus1=p5uhs5_69 pu=1.0 basekV=69.0 R1=1e-05 X1=1e-05 R0=1e-05 X0=1e-05

Redirect Transformers.dss
Redirect p5uhs5_1247--p5udt4497/Transformers.dss
Redirect p5uhs5_1247--p5udt2369/Transformers.dss
Redirect p5uhs5_1247--p5udt4880/Transformers.dss
Redirect p5uhs5_1247--p5udt3577/Transformers.dss
Redirect Regulators.dss
Redirect p5uhs5_1247--p5udt4497/Loads.dss
Redirect p5uhs5_1247--p5udt2369/Loads.dss
Redirect p5uhs5_1247--p5udt4880/Loads.dss
Redirect p5uhs5_1247--p5udt3577/Loads.dss
Redirect LineCodes.dss
Redirect p5uhs5_1247--p5udt4497/LineCodes.dss
Redirect p5uhs5_1247--p5udt2369/LineCodes.dss
Redirect p5uhs5_1247--p5udt4880/LineCodes.dss
Redirect p5uhs5_1247--p5udt3577/LineCodes.dss
Redirect Lines.dss
Redirect p5uhs5_1247--p5udt4497/Lines.dss
Redirect p5uhs5_1247--p5udt2369/Lines.dss
Redirect p5uhs5_1247--p5udt4880/Lines.dss
Redirect p5uhs5_1247--p5udt3577/Lines.dss
Redirect p5uhs5_1247--p5udt4497/Capacitors.dss
Redirect p5uhs5_1247--p5udt2369/Capacitors.dss
Redirect p5uhs5_1247--p5udt4880/Capacitors.dss
Redirect p5uhs5_1247--p5udt3577/Capacitors.dss

Set Voltagebases=[0.2080002494301389, 0.48, 7.199560000000001, 12.47, 69.0]

Calcvoltagebases

Buscoords Buscoords.dss

Solve
