New Capacitor.p5uc26 Bus1=p5udt1253 phases=3 Kv=12.47 conn=Wye Kvar=600.0

New CapControl.p5uc26 Capacitor=p5uc26 Element=Line.l(r:p5udt1253-p5udt4626) Terminal=1 delay=100.0 Type=voltage Vmin=120.5 Vmax=125.0 Ptratio=59.99631547328862 Ctratio=100.0

New Capacitor.p5uc29 Bus1=p5udt6007 phases=3 Kv=12.47 conn=Wye Kvar=450.0

New CapControl.p5uc29 Capacitor=p5uc29 Element=Line.l(r:p5udt4799-p5udt6007) Terminal=1 delay=100.0 Type=voltage Vmin=120.5 Vmax=125.0 Ptratio=59.99631547328862 Ctratio=100.0
