New Capacitor.p5uc30 Bus1=p5udt3681 phases=3 Kv=12.47 conn=Wye Kvar=450.0

New CapControl.p5uc30 Capacitor=p5uc30 Element=Line.padswitch(r:p5udt3681-p5udt6134)p5u_121871 Terminal=1 delay=100.0 Type=voltage Vmin=120.5 Vmax=125.0 Ptratio=59.99631547328862 Ctratio=100.0
