New Capacitor.p5uc34 Bus1=p5udt4676 phases=3 Kv=12.47 conn=Wye Kvar=600.0

New CapControl.p5uc34 Capacitor=p5uc34 Element=Line.padswitch(r:p5udt1354-p5udt4676)p5u_122384 Terminal=1 delay=100.0 Type=voltage Vmin=120.5 Vmax=125.0 Ptratio=59.99631547328862 Ctratio=100.0
