New Capacitor.p5uc36 Bus1=p5umv36 phases=3 Kv=12.47 conn=Wye Kvar=600.0

New CapControl.p5uc36 Capacitor=p5uc36 Element=Line.padswitch(r:p5udt2199-p5umv36)p5u_122651 Terminal=1 delay=100.0 Type=voltage Vmin=120.5 Vmax=125.0 Ptratio=59.99631547328862 Ctratio=100.0
