New Capacitor.p5uc40 Bus1=p5udt4983 phases=3 Kv=12.47 conn=Wye Kvar=450.0

New CapControl.p5uc40 Capacitor=p5uc40 Element=Line.padswitch(r:p5udt4983-p5udt721)p5u_124095 Terminal=1 delay=100.0 Type=voltage Vmin=120.5 Vmax=125.0 Ptratio=59.99631547328862 Ctratio=100.0
