Clear

New Circuit.substation_p5uhs8_69 bus1=p5uhs8_69 pu=1.0 basekV=69.0 R1=1e-05 X1=1e-05 R0=1e-05 X0=1e-05

Redirect Transformers.dss
Redirect p5uhs8_1247--p5udt8308/Transformers.dss
Redirect p5uhs8_1247--p5udt24709/Transformers.dss
Redirect p5uhs8_1247--p5udt31669/Transformers.dss
Redirect Regulators.dss
Redirect p5uhs8_1247--p5udt8308/Loads.dss
Redirect p5uhs8_1247--p5udt24709/Loads.dss
Redirect p5uhs8_1247--p5udt31669/Loads.dss
Redirect LineCodes.dss
Redirect p5uhs8_1247--p5udt8308/LineCodes.dss
Redirect p5uhs8_1247--p5udt24709/LineCodes.dss
Redirect p5uhs8_1247--p5udt31669/LineCodes.dss
Redirect Lines.dss
Redirect p5uhs8_1247--p5udt8308/Lines.dss
Redirect p5uhs8_1247--p5udt24709/Lines.dss
Redirect p5uhs8_1247--p5udt31669/Lines.dss
Redirect p5uhs8_1247--p5udt8308/Capacitors.dss
Redirect p5uhs8_1247--p5udt24709/Capacitors.dss
Redirect p5uhs8_1247--p5udt31669/Capacitors.dss

Set Voltagebases=[0.2080002494301389, 0.48, 7.199560000000001, 12.47, 69.0]

Calcvoltagebases

Buscoords Buscoords.dss

Solve
