New Capacitor.p5uc42 Bus1=p5udt19000 phases=3 Kv=12.47 conn=Wye Kvar=600.0

New CapControl.p5uc42 Capacitor=p5uc42 Element=Line.l(r:p5udt19000-p5udt20512) Terminal=1 delay=100.0 Type=voltage Vmin=120.5 Vmax=125.0 Ptratio=59.99631547328862 Ctratio=100.0

New Capacitor.p5uc44 Bus1=p5udt21841 phases=3 Kv=12.47 conn=Wye Kvar=450.0

New CapControl.p5uc44 Capacitor=p5uc44 Element=Line.l(r:p5udt21841-p5udt26315) Terminal=1 delay=100.0 Type=voltage Vmin=120.5 Vmax=125.0 Ptratio=59.99631547328862 Ctratio=100.0
