New Capacitor.p5uc45 Bus1=p5udt14792 phases=3 Kv=12.47 conn=Wye Kvar=450.0

New CapControl.p5uc45 Capacitor=p5uc45 Element=Line.padswitch(r:p5udt14792-p5udt28354)p5u_124372 Terminal=1 delay=100.0 Type=voltage Vmin=120.5 Vmax=125.0 Ptratio=59.99631547328862 Ctratio=100.0
