New Line.l(r:p5udt366lv-p5ulv1673) Units=km Length=0.060358100000000005 bus1=p5udt366lv.1.2 bus2=p5ulv1673.1.2 switch=n enabled=y phases=2 Linecode=1P_UG_AL_1/0_Brenau_0_416_0_2_2_2_2

New Line.l(r:p5udt366lv-p5ulv10797) Units=km Length=0.03835860000000001 bus1=p5udt366lv.1.2 bus2=p5ulv10797.1.2 switch=n enabled=y phases=2 Linecode=1P_UG_AL_4/0_Sweetbriar_0_416_0_2_2_2_2

New Line.l(r:p5udm1400-p5ulv383) Units=km Length=0.0464706 bus1=p5udm1400.1.2 bus2=p5ulv383.1.2 switch=n enabled=y phases=2 Linecode=1P_OH_AL_4/0_Zuzara_0_416_0_2_2_2_2

New Line.l(r:p5udm1400-p5ulv384) Units=km Length=0.0572649 bus1=p5udm1400.1.2 bus2=p5ulv384.1.2 switch=n enabled=y phases=2 Linecode=1P_OH_AL_4/0_Zuzara_0_416_0_2_2_2_2

New Line.l(r:p5udm1400-p5ulv385) Units=km Length=0.0682177 bus1=p5udm1400.1.2 bus2=p5ulv385.1.2 switch=n enabled=y phases=2 Linecode=1P_OH_AL_4/0_Zuzara_0_416_0_2_2_2_2

New Line.l(r:p5udm1400-p5ulv386) Units=km Length=0.07899780000000002 bus1=p5udm1400.1.2 bus2=p5ulv386.1.2 switch=n enabled=y phases=2 Linecode=1P_OH_AL_4/0_Zuzara_0_416_0_2_2_2_2

New Line.l(r:p5udm1400-p5udt366lv) Units=km Length=0.00681324 bus1=p5udt366lv.1.2 bus2=p5udm1400.1.2 switch=n enabled=y phases=2 Linecode=1P_OH_AL_2/0_Rucina_0_416_0_2_2_2_2

New Line.l(r:p5udm1406-p5ulv78360) Units=km Length=0.0256476 bus1=p5udm1406.1.2 bus2=p5ulv78360.1.2 switch=n enabled=y phases=2 Linecode=1P_OH_AL_2/0_Rucina_0_416_0_2_2_2_2

New Line.l(r:p5udm1406-p5udt366lv) Units=km Length=0.01731 bus1=p5udt366lv.1.2 bus2=p5udm1406.1.2 switch=n enabled=y phases=2 Linecode=1P_OH_AL_2/0_Rucina_0_416_0_2_2_2_2

New Line.l(r:p5udt569lv-p5ulv601) Units=km Length=0.0956401 bus1=p5udt569lv.1.2 bus2=p5ulv601.1.2 switch=n enabled=y phases=2 Linecode=1P_UG_AL_1/0_Brenau_0_416_0_2_2_2_2

New Line.l(r:p5udt569lv-p5ulv602) Units=km Length=0.105594 bus1=p5udt569lv.1.2 bus2=p5ulv602.1.2 switch=n enabled=y phases=2 Linecode=1P_UG_AL_1/0_Brenau_0_416_0_2_2_2_2

New Line.l(r:p5udm2206-p5ulv600) Units=km Length=0.0955972 bus1=p5udm2206.1.2 bus2=p5ulv600.1.2 switch=n enabled=y phases=2 Linecode=1P_OH_AL_4/0_Zuzara_0_416_0_2_2_2_2

New Line.l(r:p5udm2209-p5ulv78181) Units=km Length=0.0931675 bus1=p5udm2209.1.2 bus2=p5ulv78181.1.2 switch=n enabled=y phases=2 Linecode=1P_OH_AL_4/0_Zuzara_0_416_0_2_2_2_2

New Line.l(r:p5udm2206-p5udm2209) Units=km Length=0.0191497 bus1=p5udm2206.1.2 bus2=p5udm2209.1.2 switch=n enabled=y phases=2 Linecode=1P_OH_AL_2/0_Rucina_0_416_0_2_2_2_2

New Line.l(r:p5udm2206-p5udt569lv) Units=km Length=0.00681324 bus1=p5udt569lv.1.2 bus2=p5udm2206.1.2 switch=n enabled=y phases=2 Linecode=1P_OH_AL_2/0_Rucina_0_416_0_2_2_2_2

New Line.l(r:p5udm2210-p5ulv78182) Units=km Length=0.105756 bus1=p5udm2210.1.2 bus2=p5ulv78182.1.2 switch=n enabled=y phases=2 Linecode=1P_OH_AL_4/0_Zuzara_0_416_0_2_2_2_2

New Line.l(r:p5udm2210-p5udt569lv) Units=km Length=0.01731 bus1=p5udt569lv.1.2 bus2=p5udm2210.1.2 switch=n enabled=y phases=2 Linecode=1P_OH_AL_2/0_Rucina_0_416_0_2_2_2_2

New Line.l(r:p5udt8991lv-p5ulv20430) Units=km Length=0.0119595 bus1=p5udt8991lv.1.2 bus2=p5ulv20430.1.2 switch=n enabled=y phases=2 Linecode=1P_OH_AL_2/0_Rucina_0_416_0_2_2_2_2

New Line.l(r:p5udt9496lv-p5ulv20973) Units=km Length=0.0362714 bus1=p5udt9496lv.1.2 bus2=p5ulv20973.1.2 switch=n enabled=y phases=2 Linecode=1P_OH_AL_4/0_Zuzara_0_416_0_2_2_2_2

New Line.l(r:p5udm30734-p5ulv22622) Units=km Length=0.00371086 bus1=p5udm30734.1.2 bus2=p5ulv22622.1.2 switch=n enabled=y phases=2 Linecode=1P_OH_AL_4_Periwinkle_0_416_0_2_2_2_2

New Line.l(r:p5udm30734-p5udt10968lv) Units=km Length=0.0266704 bus1=p5udt10968lv.1.2 bus2=p5udm30734.1.2 switch=n enabled=y phases=2 Linecode=1P_OH_AL_2/0_Rucina_0_416_0_2_2_2_2

New Line.l(r:p5udm30735-p5ulv47664) Units=km Length=0.0089454 bus1=p5udm30735.1.2 bus2=p5ulv47664.1.2 switch=n enabled=y phases=2 Linecode=1P_OH_AL_2/0_Rucina_0_416_0_2_2_2_2

New Line.l(r:p5udm30735-p5udt10968lv) Units=km Length=0.0224265 bus1=p5udt10968lv.1.2 bus2=p5udm30735.1.2 switch=n enabled=y phases=2 Linecode=1P_OH_AL_2/0_Rucina_0_416_0_2_2_2_2

New Line.l(r:p5udt11463lv-p5ulv23183) Units=km Length=0.010261200000000002 bus1=p5udt11463lv.1.2 bus2=p5ulv23183.1.2 switch=n enabled=y phases=2 Linecode=1P_OH_AL_2/0_Rucina_0_416_0_2_2_2_2

New Line.l(r:p5udt12394lv-p5ulv24335) Units=km Length=0.008001480000000002 bus1=p5udt12394lv.1.2 bus2=p5ulv24335.1.2 switch=n enabled=y phases=2 Linecode=1P_OH_AL_2/0_Rucina_0_416_0_2_2_2_2

New Line.l(r:p5udt12838lv-p5ulv34863) Units=km Length=0.028920200000000004 bus1=p5udt12838lv.1.2 bus2=p5ulv34863.1.2 switch=n enabled=y phases=2 Linecode=1P_OH_AL_4/0_Zuzara_0_416_0_2_2_2_2

New Line.l(r:p5udm36479-p5ulv24891) Units=km Length=0.021363600000000003 bus1=p5udm36479.1.2 bus2=p5ulv24891.1.2 switch=n enabled=y phases=2 Linecode=1P_OH_AL_2/0_Rucina_0_416_0_2_2_2_2

New Line.l(r:p5udm36479-p5udt12838lv) Units=km Length=0.0164345 bus1=p5udt12838lv.1.2 bus2=p5udm36479.1.2 switch=n enabled=y phases=2 Linecode=1P_OH_AL_2/0_Rucina_0_416_0_2_2_2_2

New Line.l(r:p5udt14111lv-p5ulv26577) Units=km Length=0.0120104 bus1=p5udt14111lv.1.2 bus2=p5ulv26577.1.2 switch=n enabled=y phases=2 Linecode=1P_OH_AL_2/0_Rucina_0_416_0_2_2_2_2

New Line.l(r:p5udm42541-p5ulv27688) Units=km Length=0.0133094 bus1=p5udm42541.1.2 bus2=p5ulv27688.1.2 switch=n enabled=y phases=2 Linecode=1P_OH_AL_2/0_Rucina_0_416_0_2_2_2_2

New Line.l(r:p5udm42541-p5udt14924lv) Units=km Length=0.0650045 bus1=p5udt14924lv.1.2 bus2=p5udm42541.1.2 switch=n enabled=y phases=2 Linecode=1P_OH_AL_4/0_Zuzara_0_416_0_2_2_2_2

New Line.l(r:p5udm42543-p5ulv35420) Units=km Length=0.0156787 bus1=p5udm42543.1.2 bus2=p5ulv35420.1.2 switch=n enabled=y phases=2 Linecode=1P_OH_AL_2/0_Rucina_0_416_0_2_2_2_2

New Line.l(r:p5udm42542-p5ulv32670) Units=km Length=0.0148721 bus1=p5udm42542.1.2 bus2=p5ulv32670.1.2 switch=n enabled=y phases=2 Linecode=1P_OH_AL_2/0_Rucina_0_416_0_2_2_2_2

New Line.l(r:p5udm42542-p5udm42543) Units=km Length=0.0621501 bus1=p5udm42543.1.2 bus2=p5udm42542.1.2 switch=n enabled=y phases=2 Linecode=1P_OH_AL_4/0_Zuzara_0_416_0_2_2_2_2

New Line.l(r:p5udm42543-p5udt14924lv) Units=km Length=0.0162589 bus1=p5udt14924lv.1.2 bus2=p5udm42543.1.2 switch=n enabled=y phases=2 Linecode=1P_OH_AL_2/0_Rucina_0_416_0_2_1_2_2_2

New Line.l(r:p5udt15723lv-p5ulv28858) Units=km Length=0.007 bus1=p5udt15723lv.1.2 bus2=p5ulv28858.1.2 switch=n enabled=y phases=2 Linecode=1P_OH_AL_2/0_Rucina_0_416_0_2_2_2_2

New Line.l(r:p5udt20288lv-p5ulv36592) Units=km Length=0.023972200000000003 bus1=p5udt20288lv.1.2 bus2=p5ulv36592.1.2 switch=n enabled=y phases=2 Linecode=1P_OH_AL_2/0_Rucina_0_416_0_2_2_2_2

New Line.l(r:p5udt21143lv-p5ulv38259) Units=km Length=0.00613561 bus1=p5udt21143lv.1.2 bus2=p5ulv38259.1.2 switch=n enabled=y phases=2 Linecode=1P_OH_AL_2/0_Rucina_0_416_0_2_2_2_2

New Line.l(r:p5udt21387lv-p5ulv38782) Units=km Length=0.0314974 bus1=p5udt21387lv.1.2 bus2=p5ulv38782.1.2 switch=n enabled=y phases=2 Linecode=1P_OH_AL_4/0_Zuzara_0_416_0_2_2_2_2

New Line.l(r:p5udt22667lv-p5ulv41542) Units=km Length=0.015500600000000002 bus1=p5udt22667lv.1.2 bus2=p5ulv41542.1.2 switch=n enabled=y phases=2 Linecode=1P_OH_AL_2/0_Rucina_0_416_0_2_2_2_2

New Line.l(r:p5udt22670lv-p5ulv41547) Units=km Length=0.0131901 bus1=p5udt22670lv.1.2 bus2=p5ulv41547.1.2 switch=n enabled=y phases=2 Linecode=1P_OH_AL_2/0_Rucina_0_416_0_2_2_2_2

New Line.l(r:p5udt24963lv-p5ulv47114) Units=km Length=0.0113321 bus1=p5udt24963lv.1.2 bus2=p5ulv47114.1.2 switch=n enabled=y phases=2 Linecode=1P_OH_AL_2/0_Rucina_0_416_0_2_2_2_2

New Line.l(r:p5udt25980lv-p5ulv49932) Units=km Length=0.0108757 bus1=p5udt25980lv.1.2 bus2=p5ulv49932.1.2 switch=n enabled=y phases=2 Linecode=1P_OH_AL_2/0_Rucina_0_416_0_2_2_2_2

New Line.l(r:p5udt28391lv-p5ulv57272) Units=km Length=0.023201100000000002 bus1=p5udt28391lv.1.2 bus2=p5ulv57272.1.2 switch=n enabled=y phases=2 Linecode=1P_UG_AL_4/0_Sweetbriar_0_416_0_2_2_2_2

New Line.l(r:p5udt29218lv-p5ulv60111) Units=km Length=0.0352965 bus1=p5udt29218lv.1.2 bus2=p5ulv60111.1.2 switch=n enabled=y phases=2 Linecode=1P_OH_AL_4/0_Zuzara_0_416_0_2_2_2_2

New Line.l(r:p5udt30423lv-p5ulv64598) Units=km Length=0.0374089 bus1=p5udt30423lv.1.2 bus2=p5ulv64598.1.2 switch=n enabled=y phases=2 Linecode=1P_OH_AL_4/0_Zuzara_0_416_0_2_2_2_2

New Line.l(r:p5udt30718lv-p5ulv65708) Units=km Length=0.0067134 bus1=p5udt30718lv.1.2 bus2=p5ulv65708.1.2 switch=n enabled=y phases=2 Linecode=1P_OH_AL_2/0_Rucina_0_416_0_2_2_2_2

New Line.l(r:p5udt30855lv-p5ulv66231) Units=km Length=0.00492215 bus1=p5udt30855lv.1.2 bus2=p5ulv66231.1.2 switch=n enabled=y phases=2 Linecode=1P_OH_AL_2/0_Rucina_0_416_0_2_2_2_2

New Line.l(r:p5udt31131lv-p5ulv67340) Units=km Length=0.0122672 bus1=p5udt31131lv.1.2 bus2=p5ulv67340.1.2 switch=n enabled=y phases=2 Linecode=1P_OH_AL_2/0_Rucina_0_416_0_2_2_2_2

New Line.l(r:p5udt32241lv-p5ulv71841) Units=km Length=0.0104002 bus1=p5udt32241lv.1.2 bus2=p5ulv71841.1.2 switch=n enabled=y phases=2 Linecode=1P_OH_AL_2/0_Rucina_0_416_0_2_2_2_2

New Line.l(r:p5udt33273lv-p5ulv76274) Units=km Length=0.023611200000000002 bus1=p5udt33273lv.1.2 bus2=p5ulv76274.1.2 switch=n enabled=y phases=2 Linecode=1P_UG_AL_4/0_Sweetbriar_0_416_0_2_2_2_2

New Line.l(r:p5udt33400lv-p5ulv76867) Units=km Length=0.006479760000000001 bus1=p5udt33400lv.1.2 bus2=p5ulv76867.1.2 switch=n enabled=y phases=2 Linecode=1P_OH_AL_2/0_Rucina_0_416_0_2_2_2_2

New Line.l(r:p5udt33670lv-p5ulv78359) Units=km Length=0.04936320000000001 bus1=p5udt33670lv.1.2 bus2=p5ulv78359.1.2 switch=n enabled=y phases=2 Linecode=1P_OH_AL_4/0_Zuzara_0_416_0_2_2_2_2

New Line.l(r:p5udt28391-p5udt33273) Units=km Length=0.0176374 bus1=p5udt28391-p5udt33273x.3 bus2=p5udt28391-p5udt33273xx.3 switch=n enabled=y phases=1 Linecode=1P_UG_AL_#2_15_12_47_0_1_1_1_1

New Line.l(r:p5udt23611-p5udt28391) Units=km Length=0.416326 bus1=p5udt23611-p5udt28391x.3 bus2=p5udt28391.3 switch=n enabled=y phases=1 Linecode=1P_OH_AL_ACSR_#2_Sparrow_12_47_0_1_1_1_1

New Line.l(r:p5udt10968-p5udt9502) Units=km Length=0.011370400000000001 bus1=p5udt10968-p5udt9502x.2 bus2=p5udt10968.2 switch=n enabled=y phases=1 Linecode=1P_OH_AL_ACSR_#2_Sparrow_12_47_0_1_1_1_1

New Line.l(r:p5udt20288-p5udt9502) Units=km Length=0.0221207 bus1=p5udt20288-p5udt9502x.3 bus2=p5udt20288.3 switch=n enabled=y phases=1 Linecode=1P_OH_AL_ACSR_#2_Sparrow_12_47_0_1_1_1_1

New Line.l(r:p5udt32483-p5udt33400) Units=km Length=0.001 bus1=p5udt32483-p5udt33400x.1 bus2=p5udt33400.1 switch=n enabled=y phases=1 Linecode=1P_OH_AL_ACSR_#2_Sparrow_12_47_0_1_1_1_1

New Line.l(r:p5udt366-p5udt569) Units=km Length=0.001 bus1=p5udt366-p5udt569xx.3 bus2=p5udt366-p5udt569xxx.3 switch=n enabled=y phases=1 Linecode=1P_UG_AL_#2_15_12_47_0_1_1_1_1

New Line.l(r:p5udt12394-p5udt21891) Units=km Length=0.0329459 bus1=p5udt12394-p5udt21891x.1 bus2=p5udt12394.1 switch=n enabled=y phases=1 Linecode=1P_OH_AL_ACSR_#2_Sparrow_12_47_0_1_1_1_1

New Line.l(r:p5udt31131-p5udt33015) Units=km Length=0.09976800000000001 bus1=p5udt31131-p5udt33015x.2 bus2=p5udt31131.2 switch=n enabled=y phases=1 Linecode=1P_OH_AL_ACSR_#2_Sparrow_12_47_0_1_1_1_1

New Line.l(r:p5udt14924-p5udt14925) Units=km Length=0.0162589 bus1=p5udt14924-p5udt14925x.1 bus2=p5udt14924.1 switch=n enabled=y phases=1 Linecode=1P_OH_AL_ACSR_#2_Sparrow_12_47_0_1_1_1_1

New Line.l(r:p5udt29218-p5udt9496) Units=km Length=0.150753 bus1=p5udt29218.3 bus2=p5udt9496.3 switch=n enabled=y phases=1 Linecode=1P_OH_AL_ACSR_#2_Sparrow_12_47_0_1_1_1_1

New Line.l(r:p5udt29218-p5udt32753) Units=km Length=0.0753469 bus1=p5udt29218-p5udt32753x.3 bus2=p5udt29218.3 switch=n enabled=y phases=1 Linecode=1P_OH_AL_ACSR_#2_Sparrow_12_47_0_1_1_1_1

New Line.l(r:p5udt15723-p5udt27690) Units=km Length=0.15152 bus1=p5udt15723-p5udt27690x.2 bus2=p5udt15723.2 switch=n enabled=y phases=1 Linecode=1P_OH_AL_ACSR_#2_Sparrow_12_47_0_1_1_1_1

New Line.l(r:p5udt21143-p5udt27690) Units=km Length=0.0922433 bus1=p5udt21143-p5udt27690x.3 bus2=p5udt21143.3 switch=n enabled=y phases=1 Linecode=1P_OH_AL_ACSR_#2_Sparrow_12_47_0_1_1_1_1

New Line.l(r:p5udt21389-p5udt23611) Units=km Length=0.162007 bus1=p5udt21389.1.2.3 bus2=p5udt23611.1.2.3 switch=n enabled=y phases=3 Linecode=3P_OH_AL_ACSR_4/0_Penguin_12_47_0_3_3_3_3

New Line.l(r:p5udt21389-p5udt30855) Units=km Length=0.0528604 bus1=p5udt30855.1.2.3 bus2=p5udt21389.1.2.3 switch=n enabled=y phases=3 Linecode=3P_OH_AL_ACSR_4/0_Penguin_12_47_0_3_3_3_3

New Line.l(r:p5udt18412-p5udt366) Units=km Length=0.11066100000000001 bus1=p5udt18412-p5udt366x.1.2.3 bus2=p5udt18412-p5udt366xx.1.2.3 switch=n enabled=y phases=3 Linecode=3P_UG_AL_4/0_25_12_47_0_3_3_3_3

New Line.l(r:p5udt12390-p5udt18412) Units=km Length=0.5793360000000001 bus1=p5udt12390.1.2.3 bus2=p5udt18412.1.2.3 switch=n enabled=y phases=3 Linecode=3P_OH_AL_ACSR_4/0_Penguin_12_47_0_3_3_3_3

New Line.l(r:p5udt12390-p5udt27118) Units=km Length=0.108229 bus1=p5udt27118.1.2.3 bus2=p5udt12390.1.2.3 switch=n enabled=y phases=3 Linecode=3P_OH_AL_ACSR_4/0_Penguin_12_47_0_3_3_3_3

New Line.l(r:p5udt27118-p5udt30855) Units=km Length=0.0692676 bus1=p5udt30855.1.2.3 bus2=p5udt27118.1.2.3 switch=n enabled=y phases=3 Linecode=3P_OH_AL_ACSR_4/0_Penguin_12_47_0_3_3_3_3

New Line.l(r:p5udt30855-p5udt31831) Units=km Length=0.155739 bus1=p5udt31831.1.2.3 bus2=p5udt30855.1.2.3 switch=n enabled=y phases=3 Linecode=3P_OH_AL_ACSR_4/0_Penguin_12_47_0_3_3_3_3

New Line.l(r:p5udt31831-p5udt9501) Units=km Length=0.166911 bus1=p5udt9501.1.2.3 bus2=p5udt31831.1.2.3 switch=n enabled=y phases=3 Linecode=3P_OH_AL_ACSR_4/0_Penguin_12_47_0_3_3_3_3

New Line.l(r:p5udt24963-p5udt9501) Units=km Length=0.253772 bus1=p5udt24963.1.2.3 bus2=p5udt9501.1.2.3 switch=n enabled=y phases=3 Linecode=3P_OH_AL_ACSR_4/0_Penguin_12_47_0_3_3_3_3

New Line.l(r:p5udt30154-p5udt32753) Units=km Length=0.0541871 bus1=p5udt32753.1.2.3 bus2=p5udt30154.1.2.3 switch=n enabled=y phases=3 Linecode=3P_OH_AL_ACSR_4/0_Penguin_12_47_0_3_3_3_3

New Line.l(r:p5udt26172-p5udt32753) Units=km Length=0.17759200000000003 bus1=p5udt26172.1.2.3 bus2=p5udt32753.1.2.3 switch=n enabled=y phases=3 Linecode=3P_OH_AL_ACSR_4/0_Penguin_12_47_0_3_3_3_3

New Line.l(r:p5udt26172-p5udt32484) Units=km Length=0.08498830000000002 bus1=p5udt26172-p5udt32484xx.1.2.3 bus2=p5udt26172-p5udt32484x.1.2.3 switch=n enabled=y phases=3 Linecode=3P_UG_AL_4/0_25_12_47_0_3_3_3_3

New Line.l(r:p5udt26351-p5udt32484) Units=km Length=0.121162 bus1=p5udt26351.1.2.3 bus2=p5udt32484.1.2.3 switch=n enabled=y phases=3 Linecode=3P_OH_AL_ACSR_4/0_Penguin_12_47_0_3_3_3_3

New Line.l(r:p5udt26351-p5udt32241) Units=km Length=0.0445883 bus1=p5udt32241.1.2.3 bus2=p5udt26351.1.2.3 switch=n enabled=y phases=3 Linecode=3P_OH_AL_ACSR_4/0_Penguin_12_47_0_3_3_3_3

New Line.l(r:p5udt22667-p5udt32241) Units=km Length=0.053371800000000004 bus1=p5udt22667.1.2.3 bus2=p5udt32241.1.2.3 switch=n enabled=y phases=3 Linecode=3P_OH_AL_ACSR_4/0_Penguin_12_47_0_3_3_3_3

New Line.l(r:p5udt22667-p5udt25793) Units=km Length=0.01745 bus1=p5udt25793.1.2.3 bus2=p5udt22667.1.2.3 switch=n enabled=y phases=3 Linecode=3P_OH_AL_ACSR_4/0_Penguin_12_47_0_3_3_3_3

New Line.l(r:p5udt25793-p5udt29376) Units=km Length=0.293708 bus1=p5udt29376.1.2.3 bus2=p5udt25793.1.2.3 switch=n enabled=y phases=3 Linecode=3P_OH_AL_ACSR_4/0_Penguin_12_47_0_3_3_3_3

New Line.l(r:p5udt24963-p5udt29376) Units=km Length=0.169801 bus1=p5udt24963.1.2.3 bus2=p5udt29376.1.2.3 switch=n enabled=y phases=3 Linecode=3P_OH_AL_ACSR_4/0_Penguin_12_47_0_3_3_3_3

New Line.l(r:p5udt24963-p5uhs9_1247) Units=km Length=0.218781 bus1=p5udt24963-p5uhs9_1247x.1.2.3 bus2=p5udt24963.1.2.3 switch=n enabled=y phases=3 Linecode=3P_OH_AL_ACSR_4/0_Penguin_12_47_0_3_3_3_3

New Line.l(r:p5udt9501lv-p5ulv20978) Units=km Length=0.0192938 bus1=p5udt9501lv.1.2.3 bus2=p5ulv20978.1.2.3 switch=n enabled=y phases=3 Linecode=3P_UG_AL_350kcmil_15_0_416_0_3_3_3_3

New Line.l(r:p5udt33016lv-p5ulv75177) Units=km Length=0.00604649 bus1=p5udt33016lv.1.2.3 bus2=p5ulv75177.1.2.3 switch=n enabled=y phases=3 Linecode=3P_UG_AL_750kcmil_25_0_416_0_3_3_3_3

New Line.l(r:p5udt21387-p5udt33016) Units=km Length=0.0839509 bus1=p5udt21387.1.2.3 bus2=p5udt33016.1.2.3 switch=n enabled=y phases=3 Linecode=3P_OH_AL_ACSR_4/0_Penguin_12_47_0_3_3_3_3

New Line.l(r:p5udt21387-p5udt9501) Units=km Length=0.03169 bus1=p5udt9501.1.2.3 bus2=p5udt21387.1.2.3 switch=n enabled=y phases=3 Linecode=3P_OH_AL_ACSR_4/0_Penguin_12_47_0_3_3_3_3

New Line.l(r:p5udt31831lv-p5ulv70169) Units=km Length=0.00763572 bus1=p5udt31831lv.1.2.3 bus2=p5ulv70169.1.2.3 switch=n enabled=y phases=3 Linecode=3P_UG_AL_350kcmil_15_0_416_0_3_3_3_3

New Line.l(r:p5udt21389lv-p5ulv56717) Units=km Length=0.00663467 bus1=p5udt21389lv.1.2.3 bus2=p5ulv56717.1.2.3 switch=n enabled=y phases=3 Linecode=3P_UG_AL_350kcmil_15_0_416_0_3_3_3_3

New Line.l(r:p5udm58861-p5ulv38784) Units=km Length=0.00529024 bus1=p5udm58861.1.2.3 bus2=p5ulv38784.1.2.3 switch=n enabled=y phases=3 Linecode=3P_UG_AL_350kcmil_15_0_416_0_3_3_3_3

New Line.l(r:p5udm58861-p5udt21389lv) Units=km Length=0.0195323 bus1=p5udt21389lv.1.2.3 bus2=p5udm58861.1.2.3 switch=n enabled=y phases=3 Linecode=3P_UG_AL_350kcmil_15_0_416_0_3_3_3_3

New Line.l(r:p5udt23611lv-p5ulv43774) Units=km Length=0.026813700000000003 bus1=p5udt23611lv.1.2.3 bus2=p5ulv43774.1.2.3 switch=n enabled=y phases=3 Linecode=3P_UG_AL_350kcmil_15_0_416_0_3_3_3_3

New Line.l(r:p5udt23611lv-p5ulv53854) Units=km Length=0.00770726 bus1=p5udt23611lv.1.2.3 bus2=p5ulv53854.1.2.3 switch=n enabled=y phases=3 Linecode=3P_UG_AL_350kcmil_15_0_416_0_3_3_3_3

New Line.l(r:p5udt30001lv-p5ulv62926) Units=km Length=0.0148577 bus1=p5udt30001lv.1.2.3 bus2=p5ulv62926.1.2.3 switch=n enabled=y phases=3 Linecode=3P_UG_AL_350kcmil_15_0_416_0_3_3_3_3

New Line.l(r:p5udt24770lv-p5ulv46608) Units=km Length=0.0158561 bus1=p5udt24770lv.1.2.3 bus2=p5ulv46608.1.2.3 switch=n enabled=y phases=3 Linecode=3P_UG_AL_350kcmil_15_0_416_0_3_3_3_3

New Line.l(r:p5udm26033-p5ulv20979) Units=km Length=0.00930301 bus1=p5udm26033.1.2.3 bus2=p5ulv20979.1.2.3 switch=n enabled=y phases=3 Linecode=3P_UG_AL_350kcmil_15_0_416_0_3_3_3_3

New Line.l(r:p5udm26033-p5ulv55550) Units=km Length=0.04052950000000001 bus1=p5udm26033.1.2.3 bus2=p5ulv55550.1.2.3 switch=n enabled=y phases=3 Linecode=3P_UG_AL_350kcmil_15_0_416_0_3_3_3_3

New Line.l(r:p5udm26033-p5udt9502lv) Units=km Length=0.0221207 bus1=p5udt9502lv.1.2.3 bus2=p5udm26033.1.2.3 switch=n enabled=y phases=3 Linecode=3P_UG_AL_750kcmil_25_0_416_0_3_3_3_3

New Line.l(r:p5udm26034-p5ulv31597) Units=km Length=0.005744150000000001 bus1=p5udm26034.1.2.3 bus2=p5ulv31597.1.2.3 switch=n enabled=y phases=3 Linecode=3P_UG_AL_350kcmil_15_0_416_0_3_3_3_3

New Line.l(r:p5udm26034-p5udt9502lv) Units=km Length=0.0686366 bus1=p5udt9502lv.1.2.3 bus2=p5udm26034.1.2.3 switch=n enabled=y phases=3 Linecode=3P_UG_AL_350kcmil_15_0_416_0_3_3_3_3

New Line.l(r:p5udm26035-p5ulv39349) Units=km Length=0.0125219 bus1=p5udm26035.1.2.3 bus2=p5ulv39349.1.2.3 switch=n enabled=y phases=3 Linecode=3P_UG_AL_350kcmil_15_0_416_0_3_3_3_3

New Line.l(r:p5udm26035-p5udt9502lv) Units=km Length=0.0410704 bus1=p5udt9502lv.1.2.3 bus2=p5udm26035.1.2.3 switch=n enabled=y phases=3 Linecode=3P_UG_AL_350kcmil_15_0_416_0_3_3_3_3

New Line.l(r:p5udt8991-p5udt9502) Units=km Length=0.0709875 bus1=p5udt8991.1.2.3 bus2=p5udt9502.1.2.3 switch=n enabled=y phases=3 Linecode=3P_OH_AL_ACSR_4/0_Penguin_12_47_0_3_3_3_3

New Line.l(r:p5udt27122lv-p5ulv53316) Units=km Length=0.017366400000000004 bus1=p5udt27122lv.1.2.3 bus2=p5ulv53316.1.2.3 switch=n enabled=y phases=3 Linecode=3P_UG_AL_350kcmil_15_0_416_0_3_3_3_3

New Line.l(r:p5udt27122-p5udt8991) Units=km Length=0.001 bus1=p5udt8991.1.2.3 bus2=p5udt27122.1.2.3 switch=n enabled=y phases=3 Linecode=3P_OH_AL_ACSR_4/0_Penguin_12_47_0_3_3_3_3

New Line.l(r:p5udt14111-p5udt8991) Units=km Length=0.03288200000000001 bus1=p5udt14111.1.2.3 bus2=p5udt8991.1.2.3 switch=n enabled=y phases=3 Linecode=3P_OH_AL_ACSR_4/0_Penguin_12_47_0_3_3_3_3

New Line.l(r:p5udt14111-p5udt24770) Units=km Length=0.0620516 bus1=p5udt24770.1.2.3 bus2=p5udt14111.1.2.3 switch=n enabled=y phases=3 Linecode=3P_OH_AL_ACSR_4/0_Penguin_12_47_0_3_3_3_3

New Line.l(r:p5udt32483lv-p5ulv72933) Units=km Length=0.0224955 bus1=p5udt32483lv.1.2.3 bus2=p5ulv72933.1.2.3 switch=n enabled=y phases=3 Linecode=3P_UG_AL_350kcmil_15_0_416_0_3_3_3_3

New Line.l(r:p5udt24770-p5udt32483) Units=km Length=0.0595367 bus1=p5udt24770.1.2.3 bus2=p5udt32483.1.2.3 switch=n enabled=y phases=3 Linecode=3P_OH_AL_ACSR_4/0_Penguin_12_47_0_3_3_3_3

New Line.l(r:p5udt24770-p5udt30001) Units=km Length=0.0837712 bus1=p5udt30001.1.2.3 bus2=p5udt24770.1.2.3 switch=n enabled=y phases=3 Linecode=3P_OH_AL_ACSR_4/0_Penguin_12_47_0_3_3_3_3

New Line.l(r:p5udt23154lv-p5ulv42648) Units=km Length=0.00474195 bus1=p5udt23154lv.1.2.3 bus2=p5ulv42648.1.2.3 switch=n enabled=y phases=3 Linecode=3P_UG_AL_350kcmil_15_0_416_0_3_3_3_3

New Line.l(r:p5udt23154-p5udt30718) Units=km Length=0.0300649 bus1=p5udt30718.1.2.3 bus2=p5udt23154.1.2.3 switch=n enabled=y phases=3 Linecode=3P_OH_AL_ACSR_4/0_Penguin_12_47_0_3_3_3_3

New Line.l(r:p5udt30001-p5udt30718) Units=km Length=0.0225691 bus1=p5udt30001.1.2.3 bus2=p5udt30718.1.2.3 switch=n enabled=y phases=3 Linecode=3P_OH_AL_ACSR_4/0_Penguin_12_47_0_3_3_3_3

New Line.l(r:p5udt23611-p5udt30001) Units=km Length=0.354904 bus1=p5udt23611.1.2.3 bus2=p5udt30001.1.2.3 switch=n enabled=y phases=3 Linecode=3P_OH_AL_ACSR_4/0_Penguin_12_47_0_3_3_3_3

New Line.l(r:p5udt27118lv-p5ulv53303) Units=km Length=0.0373822 bus1=p5udt27118lv.1.2.3 bus2=p5ulv53303.1.2.3 switch=n enabled=y phases=3 Linecode=3P_UG_AL_350kcmil_15_0_416_0_3_3_3_3

New Line.l(r:p5udt11465lv-p5ulv23186) Units=km Length=0.00859983 bus1=p5udt11465lv.1.2.3 bus2=p5ulv23186.1.2.3 switch=n enabled=y phases=3 Linecode=3P_UG_AL_350kcmil_15_0_416_0_3_3_3_3

New Line.l(r:p5udt11465-p5udt27118) Units=km Length=0.0991908 bus1=p5udt27118.1.2.3 bus2=p5udt11465.1.2.3 switch=n enabled=y phases=3 Linecode=3P_OH_AL_ACSR_4/0_Penguin_12_47_0_3_3_3_3

New Line.l(r:p5udt12390lv-p5ulv24329) Units=km Length=0.013392 bus1=p5udt12390lv.1.2.3 bus2=p5ulv24329.1.2.3 switch=n enabled=y phases=3 Linecode=3P_UG_AL_350kcmil_15_0_416_0_3_3_3_3

New Line.l(r:p5udt18412lv-p5ulv33209) Units=km Length=0.0115542 bus1=p5udt18412lv.1.2.3 bus2=p5ulv33209.1.2.3 switch=n enabled=y phases=3 Linecode=3P_UG_AL_350kcmil_15_0_416_0_3_3_3_3

New Line.l(r:p5udt7127lv-p5ulv15235) Units=km Length=0.0613234 bus1=p5udt7127lv.1.2.3 bus2=p5ulv15235.1.2.3 switch=n enabled=y phases=3 Linecode=3P_UG_AL_350kcmil_15_0_416_0_3_3_3_3

New Line.l(r:p5udt7335lv-p5ulv19334) Units=km Length=0.0116 bus1=p5udt7335lv.1.2.3 bus2=p5ulv19334.1.2.3 switch=n enabled=y phases=3 Linecode=3P_UG_AL_750kcmil_25_0_416_0_3_3_3_3

New Line.l(r:p5udm20199-p5ulv16144) Units=km Length=0.00533004 bus1=p5udm20199.1.2.3 bus2=p5ulv16144.1.2.3 switch=n enabled=y phases=3 Linecode=3P_UG_AL_750kcmil_25_0_416_0_3_3_3_3

New Line.l(r:p5udm20199-p5udt7335lv) Units=km Length=0.0110233 bus1=p5udt7335lv.1.2.3 bus2=p5udm20199.1.2.3 switch=n enabled=y phases=3 Linecode=3P_UG_AL_750kcmil_25_0_416_0_3_3_3_3

New Line.l(r:p5udm20201-p5ulv77393) Units=km Length=0.0121449 bus1=p5udm20201.1.2.3 bus2=p5ulv77393.1.2.3 switch=n enabled=y phases=3 Linecode=3P_UG_AL_350kcmil_15_0_416_0_3_3_3_3

New Line.l(r:p5udm20201-p5udt7335lv) Units=km Length=0.0110316 bus1=p5udt7335lv.1.2.3 bus2=p5udm20201.1.2.3 switch=n enabled=y phases=3 Linecode=3P_UG_AL_350kcmil_15_0_416_0_3_3_3_3

New Line.l(r:p5udt7127-p5udt7335) Units=km Length=0.239139 bus1=p5udt7127.1.2.3 bus2=p5udt7335.1.2.3 switch=n enabled=y phases=3 Linecode=3P_OH_AL_ACSR_4/0_Penguin_12_47_0_3_3_3_3

New Line.l(r:p5udt366-p5udt7127) Units=km Length=0.01731 bus1=p5udt366.1.2.3 bus2=p5udt7127.1.2.3 switch=n enabled=y phases=3 Linecode=3P_OH_AL_ACSR_4/0_Penguin_12_47_0_3_3_3_3

New Line.l(r:p5udt19071lv-p5ulv34341) Units=km Length=0.0126611 bus1=p5udt19071lv.1.2.3 bus2=p5ulv34341.1.2.3 switch=n enabled=y phases=3 Linecode=3P_UG_AL_350kcmil_15_0_416_0_3_3_3_3

New Line.l(r:p5udt30713lv-p5ulv65699) Units=km Length=0.019738200000000004 bus1=p5udt30713lv.1.2.3 bus2=p5ulv65699.1.2.3 switch=n enabled=y phases=3 Linecode=3P_UG_AL_750kcmil_25_0_416_0_3_3_3_3

New Line.l(r:p5udt30423-p5udt30713) Units=km Length=0.24720000000000003 bus1=p5udt30423.1.2.3 bus2=p5udt30713.1.2.3 switch=n enabled=y phases=3 Linecode=3P_OH_AL_ACSR_4/0_Penguin_12_47_0_3_3_3_3

New Line.l(r:p5udt7019lv-p5ulv14711) Units=km Length=0.009702010000000002 bus1=p5udt7019lv.1.2.3 bus2=p5ulv14711.1.2.3 switch=n enabled=y phases=3 Linecode=3P_UG_AL_350kcmil_15_0_416_0_3_3_3_3

New Line.l(r:p5udt33670-p5udt7019) Units=km Length=0.0362682 bus1=p5udt33670.1.2.3 bus2=p5udt7019.1.2.3 switch=n enabled=y phases=3 Linecode=3P_OH_AL_ACSR_4/0_Penguin_12_47_0_3_3_3_3

New Line.l(r:p5udt30423-p5udt33670) Units=km Length=0.239371 bus1=p5udt30423.1.2.3 bus2=p5udt33670.1.2.3 switch=n enabled=y phases=3 Linecode=3P_OH_AL_ACSR_4/0_Penguin_12_47_0_3_3_3_3

New Line.l(r:p5udt19071-p5udt30423) Units=km Length=0.123018 bus1=p5udt19071.1.2.3 bus2=p5udt30423.1.2.3 switch=n enabled=y phases=3 Linecode=3P_OH_AL_ACSR_4/0_Penguin_12_47_0_3_3_3_3

New Line.l(r:p5udt19071-p5udt366) Units=km Length=0.125199 bus1=p5udt19071-p5udt366xx.1.2.3 bus2=p5udt19071-p5udt366x.1.2.3 switch=n enabled=y phases=3 Linecode=3P_UG_AL_4/0_25_12_47_0_3_3_3_3

New Line.l(r:p5udt28059lv-p5ulv56132) Units=km Length=0.005386350000000001 bus1=p5udt28059lv.1.2.3 bus2=p5ulv56132.1.2.3 switch=n enabled=y phases=3 Linecode=3P_UG_AL_350kcmil_15_0_416_0_3_3_3_3

New Line.l(r:p5udt20282lv-p5ulv36584) Units=km Length=0.0106452 bus1=p5udt20282lv.1.2.3 bus2=p5ulv36584.1.2.3 switch=n enabled=y phases=3 Linecode=3P_UG_AL_350kcmil_15_0_416_0_3_3_3_3

New Line.l(r:p5udt14922lv-p5ulv27686) Units=km Length=0.012848000000000002 bus1=p5udt14922lv.1.2.3 bus2=p5ulv27686.1.2.3 switch=n enabled=y phases=3 Linecode=3P_UG_AL_350kcmil_15_0_416_0_3_3_3_3

New Line.l(r:p5udt21891lv-p5ulv39879) Units=km Length=0.00941754 bus1=p5udt21891lv.1.2.3 bus2=p5ulv39879.1.2.3 switch=n enabled=y phases=3 Linecode=3P_UG_AL_350kcmil_15_0_416_0_3_3_3_3

New Line.l(r:p5udt14922-p5udt21891) Units=km Length=0.068205 bus1=p5udt14922.1.2.3 bus2=p5udt21891.1.2.3 switch=n enabled=y phases=3 Linecode=3P_OH_AL_ACSR_4/0_Penguin_12_47_0_3_3_3_3

New Line.l(r:p5udt14922-p5udt20282) Units=km Length=0.0347847 bus1=p5udt20282.1.2.3 bus2=p5udt14922.1.2.3 switch=n enabled=y phases=3 Linecode=3P_OH_AL_ACSR_4/0_Penguin_12_47_0_3_3_3_3

New Line.l(r:p5udt20282-p5udt28059) Units=km Length=0.0985979 bus1=p5udt28059.1.2.3 bus2=p5udt20282.1.2.3 switch=n enabled=y phases=3 Linecode=3P_OH_AL_ACSR_4/0_Penguin_12_47_0_3_3_3_3

New Line.l(r:p5udt25782lv-p5ulv49372) Units=km Length=0.00661214 bus1=p5udt25782lv.1.2.3 bus2=p5ulv49372.1.2.3 switch=n enabled=y phases=3 Linecode=3P_UG_AL_350kcmil_15_0_416_0_3_3_3_3

New Line.l(r:p5udt25782-p5udt28059) Units=km Length=0.117903 bus1=p5udt28059.1.2.3 bus2=p5udt25782.1.2.3 switch=n enabled=y phases=3 Linecode=3P_OH_AL_ACSR_4/0_Penguin_12_47_0_3_3_3_3

New Line.l(r:p5udt32238lv-p5ulv71836) Units=km Length=0.008928 bus1=p5udt32238lv.1.2.3 bus2=p5ulv71836.1.2.3 switch=n enabled=y phases=3 Linecode=3P_UG_AL_350kcmil_15_0_416_0_3_3_3_3

New Line.l(r:p5udt28059-p5udt32238) Units=km Length=0.08029400000000002 bus1=p5udt28059.1.2.3 bus2=p5udt32238.1.2.3 switch=n enabled=y phases=3 Linecode=3P_OH_AL_ACSR_4/0_Penguin_12_47_0_3_3_3_3

New Line.l(r:p5udt12390-p5udt28059) Units=km Length=0.117111 bus1=p5udt12390.1.2.3 bus2=p5udt28059.1.2.3 switch=n enabled=y phases=3 Linecode=3P_OH_AL_ACSR_4/0_Penguin_12_47_0_3_3_3_3

New Line.l(r:p5udt29376lv-p5ulv60680) Units=km Length=0.00406753 bus1=p5udt29376lv.1.2.3 bus2=p5ulv60680.1.2.3 switch=n enabled=y phases=3 Linecode=3P_UG_AL_350kcmil_15_0_416_0_3_3_3_3

New Line.l(r:p5udt23153lv-p5ulv42647) Units=km Length=0.013635 bus1=p5udt23153lv.1.2.3 bus2=p5ulv42647.1.2.3 switch=n enabled=y phases=3 Linecode=3P_UG_AL_350kcmil_15_0_416_0_3_3_3_3

New Line.l(r:p5udt18419lv-p5ulv70732) Units=km Length=0.00901067 bus1=p5udt18419lv.1.2.3 bus2=p5ulv70732.1.2.3 switch=n enabled=y phases=3 Linecode=3P_UG_AL_350kcmil_15_0_416_0_3_3_3_3

New Line.l(r:p5udm51979-p5ulv33218) Units=km Length=0.0252776 bus1=p5udm51979.1.2.3 bus2=p5ulv33218.1.2.3 switch=n enabled=y phases=3 Linecode=3P_UG_AL_750kcmil_25_0_416_0_3_3_3_3

New Line.l(r:p5udm51979-p5udt18419lv) Units=km Length=0.0236805 bus1=p5udt18419lv.1.2.3 bus2=p5udm51979.1.2.3 switch=n enabled=y phases=3 Linecode=3P_UG_AL_750kcmil_25_0_416_0_3_3_3_3

New Line.l(r:p5udm51980-p5ulv53315) Units=km Length=0.00516806 bus1=p5udm51980.1.2.3 bus2=p5ulv53315.1.2.3 switch=n enabled=y phases=3 Linecode=3P_UG_AL_350kcmil_15_0_416_0_3_3_3_3

New Line.l(r:p5udm51980-p5udt18419lv) Units=km Length=0.082538 bus1=p5udt18419lv.1.2.3 bus2=p5udm51980.1.2.3 switch=n enabled=y phases=3 Linecode=3P_UG_AL_350kcmil_15_0_416_0_3_3_3_3

New Line.l(r:p5udt30158lv-p5ulv63509) Units=km Length=0.00768021 bus1=p5udt30158lv.1.2.3 bus2=p5ulv63509.1.2.3 switch=n enabled=y phases=3 Linecode=3P_UG_AL_350kcmil_15_0_416_0_3_3_3_3

New Line.l(r:p5udt12838-p5udt30158) Units=km Length=0.0328566 bus1=p5udt12838.1.2.3 bus2=p5udt30158.1.2.3 switch=n enabled=y phases=3 Linecode=3P_OH_AL_ACSR_4/0_Penguin_12_47_0_3_3_3_3

New Line.l(r:p5udt12838-p5udt18419) Units=km Length=0.104125 bus1=p5udt18419.1.2.3 bus2=p5udt12838.1.2.3 switch=n enabled=y phases=3 Linecode=3P_OH_AL_ACSR_4/0_Penguin_12_47_0_3_3_3_3

New Line.l(r:p5udt18419-p5udt23153) Units=km Length=0.0838197 bus1=p5udt23153.1.2.3 bus2=p5udt18419.1.2.3 switch=n enabled=y phases=3 Linecode=3P_OH_AL_ACSR_4/0_Penguin_12_47_0_3_3_3_3

New Line.l(r:p5udt23153-p5udt29376) Units=km Length=0.11690900000000001 bus1=p5udt29376.1.2.3 bus2=p5udt23153.1.2.3 switch=n enabled=y phases=3 Linecode=3P_OH_AL_ACSR_4/0_Penguin_12_47_0_3_3_3_3

New Line.l(r:p5udt25793lv-p5ulv49389) Units=km Length=0.015317800000000001 bus1=p5udt25793lv.1.2.3 bus2=p5ulv49389.1.2.3 switch=n enabled=y phases=3 Linecode=3P_UG_AL_350kcmil_15_0_416_0_3_3_3_3

New Line.l(r:p5udt26351lv-p5ulv51041) Units=km Length=0.0130539 bus1=p5udt26351lv.1.2.3 bus2=p5ulv51041.1.2.3 switch=n enabled=y phases=3 Linecode=3P_UG_AL_350kcmil_15_0_416_0_3_3_3_3

New Line.l(r:p5udt17159lv-p5ulv31069) Units=km Length=0.0308045 bus1=p5udt17159lv.1.2.3 bus2=p5ulv31069.1.2.3 switch=n enabled=y phases=3 Linecode=3P_UG_AL_350kcmil_15_0_416_0_3_3_3_3

New Line.l(r:p5udt17159-p5udt25980) Units=km Length=0.0177973 bus1=p5udt25980.1.2.3 bus2=p5udt17159.1.2.3 switch=n enabled=y phases=3 Linecode=3P_OH_AL_ACSR_4/0_Penguin_12_47_0_3_3_3_3

New Line.l(r:p5udt25980-p5udt26351) Units=km Length=0.0673487 bus1=p5udt26351.1.2.3 bus2=p5udt25980.1.2.3 switch=n enabled=y phases=3 Linecode=3P_OH_AL_ACSR_4/0_Penguin_12_47_0_3_3_3_3

New Line.l(r:p5udt32484lv-p5ulv72934) Units=km Length=0.015303100000000002 bus1=p5udt32484lv.1.2.3 bus2=p5ulv72934.1.2.3 switch=n enabled=y phases=3 Linecode=3P_UG_AL_350kcmil_15_0_416_0_3_3_3_3

New Line.l(r:p5udt26172lv-p5ulv50495) Units=km Length=0.0145318 bus1=p5udt26172lv.1.2.3 bus2=p5ulv50495.1.2.3 switch=n enabled=y phases=3 Linecode=3P_UG_AL_350kcmil_15_0_416_0_3_3_3_3

New Line.l(r:p5udt15337lv-p5ulv28290) Units=km Length=0.012403 bus1=p5udt15337lv.1.2.3 bus2=p5ulv28290.1.2.3 switch=n enabled=y phases=3 Linecode=3P_UG_AL_350kcmil_15_0_416_0_3_3_3_3

New Line.l(r:p5udt33015lv-p5ulv75171) Units=km Length=0.0113653 bus1=p5udt33015lv.1.2.3 bus2=p5ulv75171.1.2.3 switch=n enabled=y phases=3 Linecode=3P_UG_AL_350kcmil_15_0_416_0_3_3_3_3

New Line.l(r:p5udt17161lv-p5ulv31071) Units=km Length=0.0142324 bus1=p5udt17161lv.1.2.3 bus2=p5ulv31071.1.2.3 switch=n enabled=y phases=3 Linecode=3P_UG_AL_350kcmil_15_0_416_0_3_3_3_3

New Line.l(r:p5udt17161-p5udt33015) Units=km Length=0.0538333 bus1=p5udt33015.1.2.3 bus2=p5udt17161.1.2.3 switch=n enabled=y phases=3 Linecode=3P_OH_AL_ACSR_4/0_Penguin_12_47_0_3_3_3_3

New Line.l(r:p5udt32611lv-p5ulv73483) Units=km Length=0.0106 bus1=p5udt32611lv.1.2.3 bus2=p5ulv73483.1.2.3 switch=n enabled=y phases=3 Linecode=3P_UG_AL_350kcmil_15_0_416_0_3_3_3_3

New Line.l(r:p5udt32611-p5udt33015) Units=km Length=0.182459 bus1=p5udt33015.1.2.3 bus2=p5udt32611.1.2.3 switch=n enabled=y phases=3 Linecode=3P_OH_AL_ACSR_4/0_Penguin_12_47_0_3_3_3_3

New Line.l(r:p5udt15337-p5udt33015) Units=km Length=0.0250999 bus1=p5udt15337.1.2.3 bus2=p5udt33015.1.2.3 switch=n enabled=y phases=3 Linecode=3P_OH_AL_ACSR_4/0_Penguin_12_47_0_3_3_3_3

New Line.l(r:p5udt15337-p5udt26172) Units=km Length=0.0871814 bus1=p5udt26172.1.2.3 bus2=p5udt15337.1.2.3 switch=n enabled=y phases=3 Linecode=3P_OH_AL_ACSR_4/0_Penguin_12_47_0_3_3_3_3

New Line.l(r:p5udm48791-p5ulv31070) Units=km Length=0.0299118 bus1=p5udm48791.1.2.3 bus2=p5ulv31070.1.2.3 switch=n enabled=y phases=3 Linecode=3P_UG_AL_350kcmil_15_0_416_0_3_3_3_3

New Line.l(r:p5udm48791-p5udt17160lv) Units=km Length=0.0419191 bus1=p5udt17160lv.1.2.3 bus2=p5udm48791.1.2.3 switch=n enabled=y phases=3 Linecode=3P_UG_AL_350kcmil_15_0_416_0_3_3_3_3

New Line.l(r:p5udm48792-p5ulv39351) Units=km Length=0.0122588 bus1=p5udm48792.1.2.3 bus2=p5ulv39351.1.2.3 switch=n enabled=y phases=3 Linecode=3P_UG_AL_350kcmil_15_0_416_0_3_3_3_3

New Line.l(r:p5udm48792-p5ulv62936) Units=km Length=0.0100454 bus1=p5udm48792.1.2.3 bus2=p5ulv62936.1.2.3 switch=n enabled=y phases=3 Linecode=3P_UG_AL_350kcmil_15_0_416_0_3_3_3_3

New Line.l(r:p5udm48792-p5udt17160lv) Units=km Length=0.019246600000000003 bus1=p5udt17160lv.1.2.3 bus2=p5udm48792.1.2.3 switch=n enabled=y phases=3 Linecode=3P_UG_AL_750kcmil_25_0_416_0_3_3_3_3

New Line.l(r:p5udt31286lv-p5ulv67898) Units=km Length=0.0273863 bus1=p5udt31286lv.1.2.3 bus2=p5ulv67898.1.2.3 switch=n enabled=y phases=3 Linecode=3P_UG_AL_350kcmil_15_0_416_0_3_3_3_3

New Line.l(r:p5udt14925lv-p5ulv27689) Units=km Length=0.0190166 bus1=p5udt14925lv.1.2.3 bus2=p5ulv27689.1.2.3 switch=n enabled=y phases=3 Linecode=3P_UG_AL_350kcmil_15_0_416_0_3_3_3_3

New Line.l(r:p5udt29545lv-p5ulv61235) Units=km Length=0.0089495 bus1=p5udt29545lv.1.2.3 bus2=p5ulv61235.1.2.3 switch=n enabled=y phases=3 Linecode=3P_UG_AL_350kcmil_15_0_416_0_3_3_3_3

New Line.l(r:p5udt16805lv-p5ulv30513) Units=km Length=0.0143802 bus1=p5udt16805lv.1.2.3 bus2=p5ulv30513.1.2.3 switch=n enabled=y phases=3 Linecode=3P_UG_AL_350kcmil_15_0_416_0_3_3_3_3

New Line.l(r:p5udt16805lv-p5ulv42125) Units=km Length=0.0108383 bus1=p5udt16805lv.1.2.3 bus2=p5ulv42125.1.2.3 switch=n enabled=y phases=3 Linecode=3P_UG_AL_350kcmil_15_0_416_0_3_3_3_3

New Line.l(r:p5udt11916lv-p5ulv40987) Units=km Length=0.012284900000000001 bus1=p5udt11916lv.1.2.3 bus2=p5ulv40987.1.2.3 switch=n enabled=y phases=3 Linecode=3P_UG_AL_350kcmil_15_0_416_0_3_3_3_3

New Line.l(r:p5udm33687-p5ulv23751) Units=km Length=0.012204900000000001 bus1=p5udm33687.1.2.3 bus2=p5ulv23751.1.2.3 switch=n enabled=y phases=3 Linecode=3P_UG_AL_350kcmil_15_0_416_0_3_3_3_3

New Line.l(r:p5udm33687-p5udt11916lv) Units=km Length=0.015181000000000002 bus1=p5udt11916lv.1.2.3 bus2=p5udm33687.1.2.3 switch=n enabled=y phases=3 Linecode=3P_UG_AL_350kcmil_15_0_416_0_3_3_3_3

New Line.l(r:p5udt11916-p5udt16805) Units=km Length=0.101178 bus1=p5udt16805.1.2.3 bus2=p5udt11916.1.2.3 switch=n enabled=y phases=3 Linecode=3P_OH_AL_ACSR_4/0_Penguin_12_47_0_3_3_3_3

New Line.l(r:p5udt16805-p5udt29545) Units=km Length=0.0747669 bus1=p5udt29545.1.2.3 bus2=p5udt16805.1.2.3 switch=n enabled=y phases=3 Linecode=3P_OH_AL_ACSR_4/0_Penguin_12_47_0_3_3_3_3

New Line.l(r:p5udt28564lv-p5ulv57829) Units=km Length=0.0090433 bus1=p5udt28564lv.1.2.3 bus2=p5ulv57829.1.2.3 switch=n enabled=y phases=3 Linecode=3P_UG_AL_350kcmil_15_0_416_0_3_3_3_3

New Line.l(r:p5udt22669lv-p5ulv41546) Units=km Length=0.0143177 bus1=p5udt22669lv.1.2.3 bus2=p5ulv41546.1.2.3 switch=n enabled=y phases=3 Linecode=3P_UG_AL_350kcmil_15_0_416_0_3_3_3_3

New Line.l(r:p5udt14926lv-p5ulv27690) Units=km Length=0.0145323 bus1=p5udt14926lv.1.2.3 bus2=p5ulv27690.1.2.3 switch=n enabled=y phases=3 Linecode=3P_UG_AL_350kcmil_15_0_416_0_3_3_3_3

New Line.l(r:p5udt14926-p5udt22669) Units=km Length=0.0350713 bus1=p5udt22669.1.2.3 bus2=p5udt14926.1.2.3 switch=n enabled=y phases=3 Linecode=3P_OH_AL_ACSR_4/0_Penguin_12_47_0_3_3_3_3

New Line.l(r:p5udt22669-p5udt28564) Units=km Length=0.132077 bus1=p5udt28564.1.2.3 bus2=p5udt22669.1.2.3 switch=n enabled=y phases=3 Linecode=3P_OH_AL_ACSR_4/0_Penguin_12_47_0_3_3_3_3

New Line.l(r:p5udt28564-p5udt29545) Units=km Length=0.0763102 bus1=p5udt29545.1.2.3 bus2=p5udt28564.1.2.3 switch=n enabled=y phases=3 Linecode=3P_OH_AL_ACSR_4/0_Penguin_12_47_0_3_3_3_3

New Line.l(r:p5udt14925-p5udt29545) Units=km Length=0.12059500000000001 bus1=p5udt14925.1.2.3 bus2=p5udt29545.1.2.3 switch=n enabled=y phases=3 Linecode=3P_OH_AL_ACSR_4/0_Penguin_12_47_0_3_3_3_3

New Line.l(r:p5udt14925-p5udt31286) Units=km Length=0.176825 bus1=p5udt31286.1.2.3 bus2=p5udt14925.1.2.3 switch=n enabled=y phases=3 Linecode=3P_OH_AL_ACSR_4/0_Penguin_12_47_0_3_3_3_3

New Line.l(r:p5udt17160-p5udt31286) Units=km Length=0.132765 bus1=p5udt17160.1.2.3 bus2=p5udt31286.1.2.3 switch=n enabled=y phases=3 Linecode=3P_OH_AL_ACSR_4/0_Penguin_12_47_0_3_3_3_3

New Line.l(r:p5udt17160-p5udt26172) Units=km Length=0.206006 bus1=p5udt26172.1.2.3 bus2=p5udt17160.1.2.3 switch=n enabled=y phases=3 Linecode=3P_OH_AL_ACSR_4/0_Penguin_12_47_0_3_3_3_3

New Line.l(r:p5udt32753lv-p5ulv74047) Units=km Length=0.010482 bus1=p5udt32753lv.1.2.3 bus2=p5ulv74047.1.2.3 switch=n enabled=y phases=3 Linecode=3P_UG_AL_350kcmil_15_0_416_0_3_3_3_3

New Line.l(r:p5udt30154lv-p5ulv63498) Units=km Length=0.00981098 bus1=p5udt30154lv.1.2.3 bus2=p5ulv63498.1.2.3 switch=n enabled=y phases=3 Linecode=3P_UG_AL_350kcmil_15_0_416_0_3_3_3_3

New Line.l(r:p5udt27296lv-p5ulv53845) Units=km Length=0.00966406 bus1=p5udt27296lv.1.2.3 bus2=p5ulv53845.1.2.3 switch=n enabled=y phases=3 Linecode=3P_UG_AL_350kcmil_15_0_416_0_3_3_3_3

New Line.l(r:p5udt14501lv-p5ulv27110) Units=km Length=0.0121344 bus1=p5udt14501lv.1.2.3 bus2=p5ulv27110.1.2.3 switch=n enabled=y phases=3 Linecode=3P_UG_AL_350kcmil_15_0_416_0_3_3_3_3

New Line.l(r:p5udt14501lv-p5ulv35407) Units=km Length=0.0230955 bus1=p5udt14501lv.1.2.3 bus2=p5ulv35407.1.2.3 switch=n enabled=y phases=3 Linecode=3P_UG_AL_350kcmil_15_0_416_0_3_3_3_3

New Line.l(r:p5udt13277lv-p5ulv25463) Units=km Length=0.0129916 bus1=p5udt13277lv.1.2.3 bus2=p5ulv25463.1.2.3 switch=n enabled=y phases=3 Linecode=3P_UG_AL_350kcmil_15_0_416_0_3_3_3_3

New Line.l(r:p5udt25981lv-p5ulv49933) Units=km Length=0.0112327 bus1=p5udt25981lv.1.2.3 bus2=p5ulv49933.1.2.3 switch=n enabled=y phases=3 Linecode=3P_UG_AL_350kcmil_15_0_416_0_3_3_3_3

New Line.l(r:p5udt19982lv-p5ulv36007) Units=km Length=0.0119219 bus1=p5udt19982lv.1.2.3 bus2=p5ulv36007.1.2.3 switch=n enabled=y phases=3 Linecode=3P_UG_AL_350kcmil_15_0_416_0_3_3_3_3

New Line.l(r:p5udt19982lv-p5ulv72935) Units=km Length=0.012205300000000002 bus1=p5udt19982lv.1.2.3 bus2=p5ulv72935.1.2.3 switch=n enabled=y phases=3 Linecode=3P_UG_AL_350kcmil_15_0_416_0_3_3_3_3

New Line.l(r:p5udt11466lv-p5ulv23187) Units=km Length=0.0108374 bus1=p5udt11466lv.1.2.3 bus2=p5ulv23187.1.2.3 switch=n enabled=y phases=3 Linecode=3P_UG_AL_350kcmil_15_0_416_0_3_3_3_3

New Line.l(r:p5udt11466-p5udt19982) Units=km Length=0.0595258 bus1=p5udt19982.1.2.3 bus2=p5udt11466.1.2.3 switch=n enabled=y phases=3 Linecode=3P_OH_AL_ACSR_4/0_Penguin_12_47_0_3_3_3_3

New Line.l(r:p5udt19672lv-p5ulv35421) Units=km Length=0.0122208 bus1=p5udt19672lv.1.2.3 bus2=p5ulv35421.1.2.3 switch=n enabled=y phases=3 Linecode=3P_UG_AL_350kcmil_15_0_416_0_3_3_3_3

New Line.l(r:p5udt19672-p5udt19982) Units=km Length=0.030058 bus1=p5udt19982.1.2.3 bus2=p5udt19672.1.2.3 switch=n enabled=y phases=3 Linecode=3P_OH_AL_ACSR_4/0_Penguin_12_47_0_3_3_3_3

New Line.l(r:p5udt19982-p5udt25981) Units=km Length=0.04965870000000001 bus1=p5udt25981.1.2.3 bus2=p5udt19982.1.2.3 switch=n enabled=y phases=3 Linecode=3P_OH_AL_ACSR_4/0_Penguin_12_47_0_3_3_3_3

New Line.l(r:p5udt13277-p5udt25981) Units=km Length=0.0919196 bus1=p5udt13277.1.2.3 bus2=p5udt25981.1.2.3 switch=n enabled=y phases=3 Linecode=3P_OH_AL_ACSR_4/0_Penguin_12_47_0_3_3_3_3

New Line.l(r:p5udt13277-p5udt14501) Units=km Length=0.11061900000000001 bus1=p5udt14501.1.2.3 bus2=p5udt13277.1.2.3 switch=n enabled=y phases=3 Linecode=3P_OH_AL_ACSR_4/0_Penguin_12_47_0_3_3_3_3

New Line.l(r:p5udt27690lv-p5ulv54990) Units=km Length=0.010461100000000001 bus1=p5udt27690lv.1.2.3 bus2=p5ulv54990.1.2.3 switch=n enabled=y phases=3 Linecode=3P_UG_AL_350kcmil_15_0_416_0_3_3_3_3

New Line.l(r:p5udt14501-p5udt27690) Units=km Length=0.181678 bus1=p5udt14501.1.2.3 bus2=p5udt27690.1.2.3 switch=n enabled=y phases=3 Linecode=3P_OH_AL_ACSR_4/0_Penguin_12_47_0_3_3_3_3

New Line.l(r:p5udt28395lv-p5ulv57280) Units=km Length=0.011802 bus1=p5udt28395lv.1.2.3 bus2=p5ulv57280.1.2.3 switch=n enabled=y phases=3 Linecode=3P_UG_AL_350kcmil_15_0_416_0_3_3_3_3

New Line.l(r:p5udt30427lv-p5ulv64606) Units=km Length=0.015358100000000001 bus1=p5udt30427lv.1.2.3 bus2=p5ulv64606.1.2.3 switch=n enabled=y phases=3 Linecode=3P_UG_AL_350kcmil_15_0_416_0_3_3_3_3

New Line.l(r:p5udt11905lv-p5ulv23739) Units=km Length=0.0128285 bus1=p5udt11905lv.1.2.3 bus2=p5ulv23739.1.2.3 switch=n enabled=y phases=3 Linecode=3P_UG_AL_350kcmil_15_0_416_0_3_3_3_3

New Line.l(r:p5udt23156lv-p5ulv42651) Units=km Length=0.011480700000000002 bus1=p5udt23156lv.1.2.3 bus2=p5ulv42651.1.2.3 switch=n enabled=y phases=3 Linecode=3P_UG_AL_350kcmil_15_0_416_0_3_3_3_3

New Line.l(r:p5udt11905-p5udt23156) Units=km Length=0.105707 bus1=p5udt11905.1.2.3 bus2=p5udt23156.1.2.3 switch=n enabled=y phases=3 Linecode=3P_OH_AL_ACSR_4/0_Penguin_12_47_0_3_3_3_3

New Line.l(r:p5udt11905-p5udt30427) Units=km Length=0.0182503 bus1=p5udt30427.1.2.3 bus2=p5udt11905.1.2.3 switch=n enabled=y phases=3 Linecode=3P_OH_AL_ACSR_4/0_Penguin_12_47_0_3_3_3_3

New Line.l(r:p5udt11463-p5udt30427) Units=km Length=0.0182414 bus1=p5udt11463.1.2.3 bus2=p5udt30427.1.2.3 switch=n enabled=y phases=3 Linecode=3P_OH_AL_ACSR_4/0_Penguin_12_47_0_3_3_3_3

New Line.l(r:p5udt11463-p5udt28395) Units=km Length=0.0771086 bus1=p5udt28395.1.2.3 bus2=p5udt11463.1.2.3 switch=n enabled=y phases=3 Linecode=3P_OH_AL_ACSR_4/0_Penguin_12_47_0_3_3_3_3

New Line.l(r:p5udt14501-p5udt28395) Units=km Length=0.119318 bus1=p5udt14501.1.2.3 bus2=p5udt28395.1.2.3 switch=n enabled=y phases=3 Linecode=3P_OH_AL_ACSR_4/0_Penguin_12_47_0_3_3_3_3

New Line.l(r:p5udt14501-p5udt27296) Units=km Length=0.196211 bus1=p5udt27296.1.2.3 bus2=p5udt14501.1.2.3 switch=n enabled=y phases=3 Linecode=3P_OH_AL_ACSR_4/0_Penguin_12_47_0_3_3_3_3

New Line.l(r:p5udt16115lv-p5ulv29427) Units=km Length=0.0345267 bus1=p5udt16115lv.1.2.3 bus2=p5ulv29427.1.2.3 switch=n enabled=y phases=3 Linecode=3P_UG_AL_350kcmil_15_0_416_0_3_3_3_3

New Line.l(r:p5udt16115-p5udt27296) Units=km Length=0.0172932 bus1=p5udt27296.1.2.3 bus2=p5udt16115.1.2.3 switch=n enabled=y phases=3 Linecode=3P_OH_AL_ACSR_4/0_Penguin_12_47_0_3_3_3_3

New Line.l(r:p5udt22670-p5udt27296) Units=km Length=0.0544653 bus1=p5udt22670.1.2.3 bus2=p5udt27296.1.2.3 switch=n enabled=y phases=3 Linecode=3P_OH_AL_ACSR_4/0_Penguin_12_47_0_3_3_3_3

New Line.l(r:p5udt22670-p5udt30154) Units=km Length=0.0743578 bus1=p5udt30154.1.2.3 bus2=p5udt22670.1.2.3 switch=n enabled=y phases=3 Linecode=3P_OH_AL_ACSR_4/0_Penguin_12_47_0_3_3_3_3

New Line.l(r:p5udt33142lv-p5ulv75739) Units=km Length=0.011112 bus1=p5udt33142lv.1.2.3 bus2=p5ulv75739.1.2.3 switch=n enabled=y phases=3 Linecode=3P_UG_AL_350kcmil_15_0_416_0_3_3_3_3

New Line.l(r:p5udt16120lv-p5ulv29432) Units=km Length=0.010898700000000002 bus1=p5udt16120lv.1.2.3 bus2=p5ulv29432.1.2.3 switch=n enabled=y phases=3 Linecode=3P_UG_AL_350kcmil_15_0_416_0_3_3_3_3

New Line.l(r:p5udt16120-p5udt33142) Units=km Length=0.0455206 bus1=p5udt33142.1.2.3 bus2=p5udt16120.1.2.3 switch=n enabled=y phases=3 Linecode=3P_OH_AL_ACSR_4/0_Penguin_12_47_0_3_3_3_3

New Line.l(r:p5udt32241-p5udt33142) Units=km Length=0.250382 bus1=p5udt32241.1.2.3 bus2=p5udt33142.1.2.3 switch=n enabled=y phases=3 Linecode=3P_OH_AL_ACSR_4/0_Penguin_12_47_0_3_3_3_3

New Line.l(r:p5udt28742lv-p5ulv58394) Units=km Length=0.0151253 bus1=p5udt28742lv.1.2.3 bus2=p5ulv58394.1.2.3 switch=n enabled=y phases=3 Linecode=3P_UG_AL_350kcmil_15_0_416_0_3_3_3_3

New Line.l(r:p5udt26350lv-p5ulv51040) Units=km Length=0.0102379 bus1=p5udt26350lv.1.2.3 bus2=p5ulv51040.1.2.3 switch=n enabled=y phases=3 Linecode=3P_UG_AL_350kcmil_15_0_416_0_3_3_3_3

New Line.l(r:p5udt26350-p5udt28742) Units=km Length=0.0689668 bus1=p5udt28742.1.2.3 bus2=p5udt26350.1.2.3 switch=n enabled=y phases=3 Linecode=3P_OH_AL_ACSR_4/0_Penguin_12_47_0_3_3_3_3

New Line.l(r:p5udt25793-p5udt28742) Units=km Length=0.0768067 bus1=p5udt25793.1.2.3 bus2=p5udt28742.1.2.3 switch=n enabled=y phases=3 Linecode=3P_OH_AL_ACSR_4/0_Penguin_12_47_0_3_3_3_3

New Line.l(r:p5udt16799-p5udt7127) Units=km Length=0.14364400000000002 bus1=p5udt16799-p5udt7127x.1.2.3 bus2=p5udt16799.1.2.3 switch=n enabled=y phases=3 Linecode=3P_OH_AL_ACSR_1033kcmil_Curlew_12.47_1_3_3_3_3

New Line.l(r:p5udt11466-p5udt23156) Units=km Length=0.0908578 bus1=p5udt11466-p5udt23156x.1.2.3 bus2=p5udt11466.1.2.3 switch=n enabled=y phases=3 Linecode=3P_OH_AL_ACSR_1033kcmil_Curlew_12.47_1_3_3_3_3

New Line.l(r:p5udt2913-p5udt7335) Units=km Length=0.2977310000000001 bus1=p5udt2913-p5udt7335x.1.2.3 bus2=p5udt7335.1.2.3 switch=n enabled=y phases=3 Linecode=3P_OH_AL_ACSR_1033kcmil_Curlew_12.47_1_3_3_3_3

New Line.padswitch(r:p5udt28391-p5udt33273)p5u_125874 Units=km Length=0.001 bus1=p5udt28391.3 bus2=p5udt28391-p5udt33273x.3 switch=y enabled=y phases=1 Linecode=padswitch_1_1_1_1

New Line.padswitch(r:p5udt28391-p5udt33273)p5u_125875 Units=km Length=0.001 bus1=p5udt28391-p5udt33273xx.3 bus2=p5udt33273.3 switch=y enabled=y phases=1 Linecode=padswitch_1_1_1_1

New Line.padswitch(r:p5udt366-p5udt569)p5u_125876 Units=km Length=0.001 bus1=p5udt366-p5udt569x.3 bus2=p5udt366-p5udt569xx.3 switch=y enabled=y phases=1 Linecode=padswitch_1_3_1_1_1

New Line.padswitch(r:p5udt366-p5udt569)p5u_125877 Units=km Length=0.001 bus1=p5udt366-p5udt569xxx.3 bus2=p5udt569.3 switch=y enabled=y phases=1 Linecode=padswitch_1_3_1_1_1

New Line.padswitch(r:p5udt18412-p5udt366)p5u_125880 Units=km Length=0.001 bus1=p5udt18412.1.2.3 bus2=p5udt18412-p5udt366x.1.2.3 switch=y enabled=y phases=3 Linecode=padswitch_3_3_3_3

New Line.padswitch(r:p5udt18412-p5udt366)p5u_125881 Units=km Length=0.001 bus1=p5udt18412-p5udt366xx.1.2.3 bus2=p5udt366.1.2.3 switch=y enabled=y phases=3 Linecode=padswitch_3_4_3_3_3

New Line.padswitch(r:p5udt26172-p5udt32484)p5u_125882 Units=km Length=0.001 bus1=p5udt32484.1.2.3 bus2=p5udt26172-p5udt32484xx.1.2.3 switch=y enabled=y phases=3 Linecode=padswitch_3_4_3_2_3_3

New Line.padswitch(r:p5udt26172-p5udt32484)p5u_125883 Units=km Length=0.001 bus1=p5udt26172-p5udt32484x.1.2.3 bus2=p5udt26172.1.2.3 switch=y enabled=y phases=3 Linecode=padswitch_3_4_3_2_3_1_3

New Line.padswitch(r:p5udt19071-p5udt366)p5u_125878 Units=km Length=0.001 bus1=p5udt366.1.2.3 bus2=p5udt19071-p5udt366xx.1.2.3 switch=y enabled=y phases=3 Linecode=padswitch_3_4_3_2_3_1_3_1

New Line.padswitch(r:p5udt19071-p5udt366)p5u_125879 Units=km Length=0.001 bus1=p5udt19071-p5udt366x.1.2.3 bus2=p5udt19071.1.2.3 switch=y enabled=y phases=3 Linecode=padswitch_3_4_3_2_3_1_3_1

New Line.elbswitch(r:p5udt16799-p5udt7127)p5u_151207 Units=km Length=0.001 bus1=p5udt7127.1.2.3 bus2=p5udt16799-p5udt7127x.1.2.3 switch=y enabled=n phases=3 Linecode=elbswitch_3_3_3_3

New Line.elbswitch(r:p5udt16805-p5udt8479)p5u_151227 Units=km Length=0.001 bus1=p5udt16805.1.2.3 bus2=p5udt16805-p5udt8479x.1.2.3 switch=y enabled=n phases=3 Linecode=elbswitch_3_6_3_3_3

New Line.elbswitch(r:p5udt11466-p5udt23156)p5u_151310 Units=km Length=0.001 bus1=p5udt23156.1.2.3 bus2=p5udt11466-p5udt23156x.1.2.3 switch=y enabled=n phases=3 Linecode=elbswitch_3_6_3_4_3_3

New Line.fuse(r:p5udt366-p5udt569)p5u_151544 Units=km Length=0.001 bus1=p5udt366.3 bus2=p5udt366-p5udt569x.3 switch=n enabled=y phases=1 Linecode=fuse_1_1_1_1

New Fuse.Fuse_fuse(r:p5udt366-p5udt569)p5u_151544 monitoredobj=Line.fuse(r:p5udt366-p5udt569)p5u_151544 enabled=y ratedcurrent=100.0

New Line.fuse(r:p5udt10968-p5udt9502)p5u_152864 Units=km Length=0.001 bus1=p5udt9502.2 bus2=p5udt10968-p5udt9502x.2 switch=n enabled=y phases=1 Linecode=fuse_1_1_1_1

New Fuse.Fuse_fuse(r:p5udt10968-p5udt9502)p5u_152864 monitoredobj=Line.fuse(r:p5udt10968-p5udt9502)p5u_152864 enabled=y ratedcurrent=100.0

New Line.fuse(r:p5udt20288-p5udt9502)p5u_152865 Units=km Length=0.001 bus1=p5udt9502.3 bus2=p5udt20288-p5udt9502x.3 switch=n enabled=y phases=1 Linecode=fuse_1_7_1_1_1

New Fuse.Fuse_fuse(r:p5udt20288-p5udt9502)p5u_152865 monitoredobj=Line.fuse(r:p5udt20288-p5udt9502)p5u_152865 enabled=y ratedcurrent=100.0

New Line.fuse(r:p5udt14924-p5udt14925)p5u_153472 Units=km Length=0.001 bus1=p5udt14925.1 bus2=p5udt14924-p5udt14925x.1 switch=n enabled=y phases=1 Linecode=fuse_1_7_1_1_1

New Fuse.Fuse_fuse(r:p5udt14924-p5udt14925)p5u_153472 monitoredobj=Line.fuse(r:p5udt14924-p5udt14925)p5u_153472 enabled=y ratedcurrent=100.0

New Line.fuse(r:p5udt12394-p5udt21891)p5u_154248 Units=km Length=0.001 bus1=p5udt21891.1 bus2=p5udt12394-p5udt21891x.1 switch=n enabled=y phases=1 Linecode=fuse_1_1_1_1

New Fuse.Fuse_fuse(r:p5udt12394-p5udt21891)p5u_154248 monitoredobj=Line.fuse(r:p5udt12394-p5udt21891)p5u_154248 enabled=y ratedcurrent=100.0

New Line.fuse(r:p5udt23611-p5udt28391)p5u_154446 Units=km Length=0.001 bus1=p5udt23611.3 bus2=p5udt23611-p5udt28391x.3 switch=n enabled=y phases=1 Linecode=fuse_1_1_1_1

New Fuse.Fuse_fuse(r:p5udt23611-p5udt28391)p5u_154446 monitoredobj=Line.fuse(r:p5udt23611-p5udt28391)p5u_154446 enabled=y ratedcurrent=100.0

New Line.fuse(r:p5udt15723-p5udt27690)p5u_154876 Units=km Length=0.001 bus1=p5udt27690.2 bus2=p5udt15723-p5udt27690x.2 switch=n enabled=y phases=1 Linecode=fuse_1_7_1_1_1

New Fuse.Fuse_fuse(r:p5udt15723-p5udt27690)p5u_154876 monitoredobj=Line.fuse(r:p5udt15723-p5udt27690)p5u_154876 enabled=y ratedcurrent=100.0

New Line.fuse(r:p5udt21143-p5udt27690)p5u_154877 Units=km Length=0.001 bus1=p5udt27690.3 bus2=p5udt21143-p5udt27690x.3 switch=n enabled=y phases=1 Linecode=fuse_1_7_1_1_1

New Fuse.Fuse_fuse(r:p5udt21143-p5udt27690)p5u_154877 monitoredobj=Line.fuse(r:p5udt21143-p5udt27690)p5u_154877 enabled=y ratedcurrent=100.0

New Line.fuse(r:p5udt32483-p5udt33400)p5u_155400 Units=km Length=0.001 bus1=p5udt32483.1 bus2=p5udt32483-p5udt33400x.1 switch=n enabled=y phases=1 Linecode=fuse_1_7_1_1_1

New Fuse.Fuse_fuse(r:p5udt32483-p5udt33400)p5u_155400 monitoredobj=Line.fuse(r:p5udt32483-p5udt33400)p5u_155400 enabled=y ratedcurrent=100.0

New Line.fuse(r:p5udt29218-p5udt32753)p5u_155426 Units=km Length=0.001 bus1=p5udt32753.3 bus2=p5udt29218-p5udt32753x.3 switch=n enabled=y phases=1 Linecode=fuse_1_7_1_1_1

New Fuse.Fuse_fuse(r:p5udt29218-p5udt32753)p5u_155426 monitoredobj=Line.fuse(r:p5udt29218-p5udt32753)p5u_155426 enabled=y ratedcurrent=100.0

New Line.fuse(r:p5udt31131-p5udt33015)p5u_155453 Units=km Length=0.001 bus1=p5udt33015.2 bus2=p5udt31131-p5udt33015x.2 switch=n enabled=y phases=1 Linecode=fuse_1_7_1_1_1

New Fuse.Fuse_fuse(r:p5udt31131-p5udt33015)p5u_155453 monitoredobj=Line.fuse(r:p5udt31131-p5udt33015)p5u_155453 enabled=y ratedcurrent=100.0
